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# DESCRIPTIVE STATISTICS
# Contour, Surface, and Scatter Plots and Pictures
# CreateMesh(func,xlow,xhigh,ylow,yhigh,xinc,yinc)
# Multivariate data, or large data sets, may require more sophisticated, nonstatistical visualization just to know which statistics and axes are relevant. Mathcad's surface, scatter, and contour plotting tools and picture operator may help to explore your data. These choices are available from the Insert menu.
## Contour plots
# Suppose you have a multivariate model, and you wish to visually examine how the solution changes over two of the parameters.
Model(x1, x2, x3, x5, x7) := 110.6 + 0.5*((-78.6*x2 - 78.1126*x7) + 70.0125*(x2*x7) + (66.2*x1 + 63.8*x3 - 63.46*(x1*x5) - 59.5*(x1*x2)))
Param2(x2, x7) := Model(-1, x2, 1, 1, x7)
F := CreateMesh(Param2, -2, 2, -2, 2, 40, 40)
# The CreateMesh function takes the name of the function you wish to plot, low and high endpoints on the values of two parameters, and the number of steps in each direction. In this case, we're plotting from -2 to 2 over the parameters x2 and x7, and generating 40 data points in each direction.
# [component: inputs F]
# [component: inputs F]
# Two different options for the same contour plot are shown. All settings are controlled by double-clicking on the plot and changing settings on the Appearance and Special tabs. Examine the effect of other variables in the model by changing them in the Param2 definition.
## Scatter plots
# Scatter plots can be made in much the same way, with similar options. Note that to pass in the three data vectors representing x, y, and z coordinates, you must group them in parentheses.
M := READPRN("reyesdata.txt")
# [component: inputs (M[:, 0], M[:, 1], M[:, 2])]
## Pictures
# Another way to view data, including images, is to use the Picture operator. You create it by choosing Picture from the Insert menu.
M := READPRN("spectogram.txt")
# The picture operator displays 255 bit images to the screen, so data should be scaled to the 0 to 255 range.
M_s := Scale(M, 0, 255)
# [component: inputs M_s; outputs bits]
# Try right-clicking on this picture operator to see more options.
bits = [151, 134, 138, 117, 80; 147, 149, 149, 147, 144]
# When you click on a picture operator, you can zoom, select rows and columns of your data, or select areas, by choosing appropriate buttons from the Picture toolbar.
# Right-click on the picture operator and select Properties to see a variety of useful properties for exporting selected data. We used this dialog to define the bits variable.
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# You can use the picture operator to display color images as well, by providing the Red, Green, and Blue components as separate matrices. For example, here is a spectral map that gives the mappings for the red, green, and blue components given the levels 0 to 255 in a grayscale image like the one above:
spec := READPRN("spec.prn")
map(M, Mmap, col) :=
    for i ∈ 0 .. rows(M) - 1
        for j ∈ 0 .. cols(M) - 1
            val ← floor(M[i, j])
            mapped[i, j] ← Mmap[val, col]
    return mapped
red := map(M_s, spec, 1)
green := map(M_s, spec, 2)
blue := map(M_s, spec, 3)
# [component: inputs red, green, blue]
# We can also display this matrix as a contour plot. In this example, we've applied the Fire colormap from the Advanced tab. Double-click on the plot to see all settings used to create this plot.
# [component: inputs M]
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