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# EXAMPLES
# Complex Cubic Splines of Prescribed Length
# by Alex Kushkuley
# Cubic splines are a common method of approximating a curve with cubic polynomials. This article discusses a method for specifying the length of a section of the cubic spline fit between two endpoints. Splines are used to describe a curve without a generating function. Spline interpolation can also be used to approximate a curve which has an exceptionally complicated function associated with it. The utility of splines is based on the fact that a cubic polynomial is completely determined if its value and the value of its derivative are specified at two distinct points. This means that one can prescribe directions of the curve defined by a cubic polynomial at its endpoints. This property of cubic polynomials is used for creating continuous and well-behaved interpolation curves.
# To be more precise, examine the third-order polynomial
p(x) == a[0] + a[1]*x + a[2]*x^2 + a[3]*x^3
# and assume the initial and boundary conditions
p(0) == 0
p(1) == 0
d/dt(p(0)) == c
d/dt(p(1)) == b
# Plugging these values back into the cubic equation, we get a system of linear equations
a[0] == 0
a[1] + a[2] + a[3] == 0
a[1] == c
a[1] + 2*a[2] + 3*a[3] == b
# which yields the equation of an approximating cubic spline in the form
spline(x, c, b) == c*x - (2*c + b)*x^2 + (c + b)*x^3
# The curve defined by this equation passes through points (0,0) and (1,0), and its slopes at these points are equal to c and b.
# On the other hand, suppose that we want the arc of our curve between the endpoints to have a prescribed length - this requirement is also quite natural for various CAD/CAM problems. Now we have a nonlinear equation
# (1)
L(c, b) == s
# where
L(c, b) == integral(sqrt(1 + (d/dx(spline(x, c, b)))^2), x = 0 .. 1)
# and s is a specified length. Fixing c, we can solve this equation for b in order to obtain a cubic curve which has a given length and which satisfies all the conditions of the "plain" cubic spline, except that now we can't prescribe the slope of the curve at its destination point. The integral involved is an elliptic one, so it is impossible to solve equation (1) analytically (see [1], for example ). Mathcad can be used to get a numeric solution.
# The important thing to understand is that the length function on the left-hand side of equation (1) is a convex function of its second argument,  that is, the second derivative of L in b is positive and hence, dL/db is a monotonically increasing function of b. This property means that the function has no more than two solutions. This is a rather general property of such functions (see [2]) but in our simple case we can use live symbolics to verify that it is correct.
# The integrand as a function of its second argument looks like the following expression on the left, where x and y are arbitrary constants. Using the symbolic processor, differentiate twice on b to get
d^2/db^2((1 + (x + b*y)^2)^(1/2)) simplify → y^2/(1 + x^2 + 2*x*b*y + b^2*y^2)^(3/2)
# This expression confirms that the second derivative of the length function is positive, and therefore that equation (1) has no more than two solutions. We can find these solutions by the following procedure.
# First, solve the equation
d/db(L(b)) == 0
# which has only one solution since the left hand side is a monotone function. Using the previously derived expression for spline(x,c,b) we get
L(c, b) := integral((1 + (c - 2*(2*c + b)*x + 3*(c + b)*x^2)^2)^(1/2), x = 0 .. 1)
# Fix
c := -4
# and define
L1(b) := L(c, b)
# The derivative of L(c,b) in b is
DerivL(c, b) := integral((c - 2*(2*c + b)*x + 3*(c + b)*x^2)*(-2*x + 3*x^2)/(1 + (c - 2*(2*c + b)*x + 3*(c + b)*x^2)^2)^(1/2), x = 0 .. 1)
# Define
DerivL1(b) := DerivL(c, b)
# and take the initial value
b := 0
# and compute the resulting value of the first derivative at the endpoint:
Slope := root(DerivL1(b), b)
Slope = -0.831639
# And find the length corresponding to this value of the derivative:
L1(Slope) = 1.59928
DerivL1(Slope) = -2.51708e-15
# Note that L1(Slope) is the minimum possible length of the cubic curve which satisfies three given conditions (values at the endpoints and the slope at the initial point). If we want our curve to have a given length, this length should be no less than L1(Slope). In this case the number Slope separates the two roots of our equation (1).
# Let's say we look for a spline with the length
L0 := 1.8
# then we have one root on the left of Slope
guess := Slope - 1
b1 := root(L1(guess) - L0, guess)
# Check the result:
b1 = -3.26488
L1(b1) = 1.8
# The second root is on the right of Slope
guess := Slope + 1
b2 := root(L1(guess) - L0, guess)
# Check the result:
b2 = 1.3398
L1(b2) = 1.8
# This gives us two curves, corresponding to the two roots of L1(b):
spline1(x) := (c*x - (2*c + b1)*x^2) + (c + b1)*x^3
spline2(x) := (c*x - (2*c + b2)*x^2) + (c + b2)*x^3
# which we plot below
x := 0, .01 .. 1
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# So far our methodology is of limited use, since we cannot change the endpoints of the curve, which, for the sake of simplicity, were fixed at (0,0) and (1,0). Below is a more general formulation. After the formulations given above, only a few changes are necessary.
## Arbitrary splines of prescribed length
# Points on the plane will now be represented as complex numbers, and cubic curves as cubic polynomials with complex coefficients. So, in specifying the initial conditions, use complex numbers as follows:
# starting point:
start := 1 + 1i
# end point:
end := -1 - 1i
# derivative of the curve at the starting point (the velocity of the curve):
c := -1 + 5*1i
# To solve for the derivative at the end point, we can fix the ratio between its imaginary and real parts and solve the length equation for the real part. Doing so also ensures that the curve has a prescribed tangent line at the end point. Note that we were unable to achieve this with real cubic polynomials. If we set, for example, the slope at the finishing point to be
Slope := 1
# then the velocity at the finishing point is Slope · x · i + x, where x is the real part of a complex variable. Define the coefficients of the complex spline by setting up a system of equations from the initial conditions, just as we did for the non-complex case. In this instance, the second and third order coefficients are functions of the real variable, x, since the velocity at the endpoint is written in terms of x, as above. This yields:
A(x) := (-3*start + 3*end - 2*c - x - Slope*x*1i)
B(x) := (x + Slope*x*1i + 2*start - 2*end + c)
# so that the curve we are looking for has the form
spline(x, t) := start + c*t + A(x)*t^2 + B(x)*t^3
# where the real parameter t belongs to the interval [0,1].
# The velocity vector is equal to the derivative of spline(x, t):
C(x, t) := c + 2*A(x)*t + B(x)*t^2*3
# Hence, the length of the curve is equal to
L(x) := integral(|C(x, t)|, t = 0 .. 1)
# There are two ways to proceed at this juncture. One way to find the minimum possible length is to use a solve block and the Minerr function. The accuracy of the value for the root of the function L(x) will be poor with the low tolerance used, but it will calculate quickly, and allow you to play with the values start, end, c and slope above. The second, more familiar way is to find the derivative of L(x), set it to zero, and solve for x. This method will be covered later, since it raises some interesting issues.
x := -5, -4.5 .. 5
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# To find a guess for the minimum possible length for the spline, plot L over a range of x values (you may need to change the range of x above to see the minimum.)
# Pick a value of x near the minimum and enter it as a guess for the solve block.
x := 0
Given
L(x) == 0
d := Minerr(x)
d = 0.137443
L(d) = 3.60179
# The value of L(d) found this way is still good because the minimum is shallow.
# Method 2:
# Differentiating on x we get the derivative of the length function
DerivL(x) := integral(Re((1 + Slope*1i)*conj(C(x, t)))*(-2*t + 3*t^2)/|C(x, t)|, t = 0 .. 1)
# DerivL(x) is differentiable even when |C(x,t)| =0, and in many such cases Mathcad will compute this integral correctly, despite the apparent singularity. To avoid this issue and still get a good approximation for DerivL(x), remove small intervals of integration in the neighborhood of the roots of |C(x,t)|. The following expressions calculate the roots of |C(x,t)|, and create three integrals that leave out the intervals ±ε around each root.
# To do this, compute the roots t1 and t2 of C(x,t):
D(x) := sqrt(A(x)^2 - 3*c*B(x))
t1a(x) := (-A(x) + D(x))/(3*B(x))
t2a(x) := (-A(x) - D(x))/(3*B(x))
# We look for those roots which are real and belong to the interval [0,1]:
Q(x) := if((|Im(x)| < TOL)*(Re(x) ≥ 0)*(Re(x) ≤ 1), Re(x), 1)
t1(x) := Q(t1a(x))
t2(x) := Q(t2a(x))
# Order the roots in such a way that T1 < T2, using the intermediate values t1 and t2:
T1(x) := if(t1(x) < t2(x), t1(x), t2(x))
T2(x) := if(t2(x) > t1(x), t2(x), t1(x))
# Define the size of the intervals to be removed from the integral:
λ := 10
ε := λ*TOL
# and rewrite the expression for the derivative in the following way:
DerivL1(x) := integral(Re((1 + Slope*1i)*conj(C(x, t)))*(-2*t + 3*t^2)/|C(x, t)|, t = 0 .. T1(x) - ε)
DerivL2(x) := integral(Re((1 + Slope*1i)*conj(C(x, t)))*(-2*t + 3*t^2)/|C(x, t)|, t = T1(x) + ε .. T2(x) - ε)
DerivL3(x) := integral(Re((1 + Slope*1i)*conj(C(x, t)))*(-2*t + 3*t^2)/|C(x, t)|, t = T2(x) + ε .. 1)
# The new expression for the derivative becomes:
DerivL(x) := DerivL1(x) + (T1(x) + ε < T2(x) - ε)*DerivL2(x) + (T2(x) + ε < 1)*DerivL3(x)
# Now we can find the root of the derivative.
guessx := 0.7
d := root(DerivL(guessx), guessx)
d = 0.210721
DerivL(d) = 6.99972e-12
# With either method, the minimal possible length for our curve is approximately
L(d) = 3.60227
# Choose a length L0 to be greater than L(d):
L0 := 4.2
# Find two roots of equation L(x) = L0.
guessp := d - 5
guessq := d + 5  # Check:
x := guessp
r1 := root(L(x) - L0, x)
L(r1) = 4.2
x := guessq
r2 := root(L(x) - L0, x)
L(r2) = 4.2
# So the first curve is
spline1(t) := start + c*t + A(r1)*t^2 + B(r1)*t^3
# and the second one is
spline2(t) := start + c*t + A(r2)*t^2 + B(r2)*t^3
# To graph these splines we need to plot imaginary part of our polynomials against their real parts.
# range variable:
I := 100
i := 0 .. I
s[i] := i/I
X := vectorize(Re(spline1(s)))
Y := vectorize(Im(spline1(s)))
U := vectorize(Re(spline2(s)))
W := vectorize(Im(spline2(s)))
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# This is an "equilateral fish" — the red solid curve has the same length as the blue dotted one. Both curves start at the same point on the "fish tail." Their starting velocities are equal. They finish simultaneously at the same point. Their finishing velocities are different. However the curves have the same tangent line at the finishing point which has a prescribed angle with the x-axis (45 degrees in this case).
# To verify the results let's calculate the velocities of our curves at the endpoints (these match the complex value of c set at the start of this example):
t := 0
d/dt(spline1(t)) = -1 + 5i
d/dt(spline2(t)) = -1 + 5i
t := 1
vel1 := arg(d/dt(spline1(t)))
vel2 := arg(d/dt(spline2(t)))
# To see that the slope at the finishing point really is equal to 45 degrees, compare the tangents of the two velocities (the tangent will equal the value of Slope, set earlier):
tan(vel1) = 1
tan(vel2) = 1
# The reader is advised to play with all the parameters in this document. For example, setting the parameter slope to be a big number will force both curves to be perpendicular to the x-axis at the finishing point (the correct way of doing this is, of course, to reparametrize the problem in terms of y instead of x). Changing the velocity at the starting point can radically change the shape of the solutions even if the slope at the starting point remains the same. Try, for example, multiplying the starting velocity by 5 and changing length L0 to 12. Note also that if the required length approaches L(d) the curves will move closer and closer to each other until they will merge when the length will be approximately equal to L(d). When the length is less then L(d) the root functions fail to converge (bear in mind, however, that some precision loss is inevitable).
#
# Another experiment is to impose other linear initial conditions or to relax some of these conditions. This article can be used for the purposes of practical curve design. Some experimentation will be required in choosing initial guesses for the Mathcad root functions, but the information on the length function presented here is sufficient for doing this quickly. The calculations performed here are applicable to any parametric families of curves which depend linearly on a parameter which controls the length. (cf. [2]).
# The author is grateful to Frank Purcell, Paul Lorczak and Leslie Bondaryk for very useful comments.
## References
# [1] Handbook of Mathematical Functions, edited by M. Abramovitz and A Stegun, National Bureau of Standards, 1964.
# [2] A. Kushkuley and S. Rozenberg. Length function on a parametric family of curves, Latvian Math. Ezhegodnik, vol. 27, Riga, pp. 154-159, 1983 (Russian).
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