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# EXAMPLES
# Two-Point, Two-Body Elements for the Planet Jupiter
# by Roger L. Mansfield
# Astronomical Data Service
# The problem to be solved is how to generate a set of orbital elements for the planet Jupiter that can be used to calculate Jupiter's position at any instant of the year 2004, that is, during the period 2004 January 1.0 to 2005 January 1.0. Orbital elements are a dynamical astronomer's way of describing an orbit in a manner that is useful for calculating positions in the orbit, as we shall see in what follows.
#
# To begin our task of generating elements for Jupiter, we retrieve a dataset from a U.S. Naval Observatory publication [1].
DataSet := [
    2452880.5, -4.590859157, 2.525277766, 1.195317055, "2003 Aug 29", 0;
    2452920.5, -4.744349733, 2.29600822, 1.100718447, "2003 Oct 28", 1;
    2452960.5, -4.883439395, 2.059769646, 1.002778822, "2003 Nov 17", 2;
    2453000.5, -5.007785421, 1.817312563, 0.901811754, "2003 Dec 27", 3;
    2453040.5, -5.11708814, 1.569396401, 0.798135691, "2004 Feb 05", 4;
    2453080.5, -5.211090635, 1.316787749, 0.692073192, "2004 Mar 16", 5;
    2453120.5, -5.289578417, 1.060258691, 0.583950212, "2004 Apr 25", 6;
    2453160.5, -5.352379063, 0.800585218, 0.474095406, "2004 Jun 04", 7;
    2453200.5, -5.399361849, 0.538545706, 0.362839474, "2004 Jul 14", 8;
    2453240.5, -5.430437358, 0.274919463, 0.25051452, "2004 Aug 23", 9;
    2453280.5, -5.445557097, 0.010485323, 0.137453446, "2004 Oct 02", 10;
    2453320.5, -5.444713104, -0.253979697, 0.023989362, "2004 Nov 11", 11;
    2453360.5, -5.427937567, -0.517701717, -0.089544984, "2004 Dec 21", 12;
    2453400.5, -5.395302447, -0.779911265, -0.202817767, "2005 Jan 30", 13;
    2453440.5, -5.346919109, -1.039844529, -0.315498628, "2005 Mar 11", 14;
    2453480.5, -5.282937969, -1.296744589, -0.427259208, "2005 Apr 20", 15;
    2453520.5, -5.203548148, -1.549862639, -0.537773687, "2005 May 30", 16
]
# DataSet is called an ephemeris (plural: ephemerides), because it is a table of times (zeroth column) and positions of the planet Jupiter at those times (the first, second and third columns are the x, y, and z components of Jupiter's 3D position vectors). Our ephemeris gives Jupiter's positions at equal 40-day intervals. The times are Julian dates; their corresponding calendar dates are given in the fourth column.
# Note that calendar date 2004 January 1.0, having Julian date 2453005.5, lies between the dates in rows 3 and 4 of the table. Also note that calendar date 2005 January 1.0, having Julian date 2453371.5, lies between the dates in rows 12 and 13 of the table.
# We want our orbital elements to work for the period 2004 January 1.0 (midnight on 2003 December 31) to 2005 January 1.0 (midnight on 2004 December 31). To generate the orbital elements, we will need to calculate the positions of Jupiter very precisely on these two dates.
#
# Aitken-Neville iterated polynomial interpolation [2], as implemented in polyiter, is useful for this calculation. It allows us not only to interpolate for the two positions of Jupiter on the two dates of interest, but also to put a tolerance, ε, on how good the interpolation must be.
# The x, y, and z positional coordinates of Jupiter in DataSet columns 1, 2, and 3, respectively, have been rounded off to 9 places past the decimal, and are known to be accurate to this number of decimal places. Therefore, we should specify our Aitken-Neville interpolation tolerance as
ε := 5*10^-10
# Use eight positions from DataSet, the zeroth through the 7th, to interpolate for Jupiter's position on 2004 January 1.0, and eight positions, the 9th through the 16th, to interpolate for Jupiter's position on 2005 January 1.0, as these two sets of eight positions bracket the two ephemeris points of interest.
# With eight data points input, polyiter can compute a polynomial of, at most, degree seven. Therefore, input a maximum iteration count of seven to polyiter.
N := 7
# Now extract the column vectors of x, y, and z coordinates for interpolation. The dot subscript "1" denotes the column vectors of values as needed for interpolation in x, y, and z, at the first Julian date. The subscript "2" denotes the column vectors of values for interpolation at the second Julian date. (See also additional comments on notation, Note 6, at the end of the worksheet.)
JD_1 := submatrix(DataSet, 0, 7, 0, 0)
JD_2 := submatrix(DataSet, 9, 16, 0, 0)
x_1 := submatrix(DataSet, 0, 7, 1, 1)
x_2 := submatrix(DataSet, 9, 16, 1, 1)
y_1 := submatrix(DataSet, 0, 7, 2, 2)
y_2 := submatrix(DataSet, 9, 16, 2, 2)
z_1 := submatrix(DataSet, 0, 7, 3, 3)
z_2 := submatrix(DataSet, 9, 16, 3, 3)
# Specify the Julian dates for the interpolated ephemeris positions 1 and 2.
JDT_1 := 2453005.5
JDT_2 := 2453371.5
## Aitken-Neville Interpolation
# Perform iterated interpolation for Jupiter's position r_1 at the first Julian date JDT_1 by invoking polyiter three times, once for each of x, y, and z.
Out := polyiter(JD_1, x_1, JDT_1, N, ε)
Out = [1; 6; -5.02228]
r_1[0] := Out[2]
Out := polyiter(JD_1, y_1, JDT_1, N, ε)
Out = [1; 6; 1.78661]
r_1[1] := Out[2]
Out := polyiter(JD_1, z_1, JDT_1, N, ε)
Out = [1; 6; 0.888994]
r_1[2] := Out[2]
# This is Jupiter's interpolated position vector, in A.U., on the first Julian date, 2453005.5, corresponding to 2004 January 1.0 TT (Terrestrial Time).
r_1 = [-5.02228; 1.78661; 0.888994]
# What we see is that the x, y, and z coordinates were all successfully found by Aitken-Neville interpolation, because the first element of each polyiter output vector, the "Converged" flag, is set to 1. We see that only six iterations were needed in all cases, one iteration less than seven, the maximum degree and iteration count permissible for eight input data points.
# We should note at this point a strength of Aitken-Neville interpolation: if there is a manual transcription error in the input data points, iteration usually goes up to the maximum permissible degree and does not converge (Converged = 0). So if you are pretty sure you have input enough data points to meet your convergence criterion, then Aitken-Neville is probably telling you, "Better check your input data for manual entry errors."
# Now we perform iterated interpolation for Jupiter's position r_2 at the second Julian date JDT_2.
Out := polyiter(JD_2, x_2, JDT_2, N, ε)
Out = [1; 6; -5.42054]
r_2[0] := Out[2]
Out := polyiter(JD_2, y_2, JDT_2, N, ε)
Out = [1; 6; -0.589993]
r_2[1] := Out[2]
Out := polyiter(JD_2, z_2, JDT_2, N, ε)
Out = [1; 6; -0.120735]
r_2[2] := Out[2]
# This is Jupiter's interpolated position vector, in A.U., on the second Julian date, 2453371.5, corresponding to 2005 January 1.0 TT.
r_2 = [-5.42054; -0.589993; -0.120735]
## Orbit Determination via Two-Body Mechanics
# We now have two precise positions for the planet Jupiter on two dates, 2004 January 1.0, and 2005 January 1.0. These dates are exactly 366 days apart because the year 2004 is a leap year.
#
# Let us assume for a moment that the solar system consists of just two bodies, Jupiter and the Sun, and that Jupiter travels from its position on the first date to its position on the second under the gravitational influence of the Sun alone. Motion under this assumption is called "two-body orbital mechanics," and the orbit that results is called a "two-body orbit." The larger body is called the primary and the smaller body is called the secondary.
# The great mathematician Karl Friedrich Gauss deduced a little more than 200 years ago a method of determining a two-body orbit from two position vectors and the time of flight from the first to the second. We use Gauss's method below to determine the orbital path of Jupiter from 2004 January 1.0 to 2005 January 1.0. This path is quite close to the DataSet path, as we will see.
#
# Since we use the two points of Jupiter's orbit that we have just calculated above via polyiter, and since we assume two-body mechanics, the resulting orbital elements are called "two-point, two-body" (2P2B) orbital elements for the planet Jupiter.
# Gauss's method can be summed up in the two functions, VEL1 and TWOPOS, defined below in a collapsed area. I won't say too much about these two functions here. The mathematics that is implemented in these functions is fully documented in Chapter 9 of [3].
# [area: TWOPOS and VEL1 definitions]
VEL1(K, Δt, rmag_1, r_1, r_2, a, ΔE) :=
    f ← 1 - a/rmag_1*(1 - cos(ΔE))
    g ← Δt - a^(3/2)/K*(ΔE - sin(ΔE))
    v ← (1/g)*r_2 - (f/g)*r_1
    v  # VEL1 is a velocity-calculating function for TWOPOS.
TWOPOS(K, Δt, r_1, r_2) :=
    rmag_1 ← sqrt(r_1*r_1)
    rmag_2 ← sqrt(r_2*r_2)
    cosΔv ← sqrt((1 + r_2*r_1/(rmag_2*rmag_1))/2)
    ell ← (rmag_2 + rmag_1)/(4*sqrt(rmag_2*rmag_1)*cosΔv) - 1/2
    m ← K^2*Δt^2/(2*sqrt(rmag_2*rmag_1)*cosΔv)^3
    y ← 0
    y_new ← 1
    while |y - y_new| ≥ 10^-8
        y ← y_new
        x ← m/y^2 - ell
        ΔE ← 2*atan(sqrt(4*x*(1 - x))/(1 - 2*x))
        X ← (ΔE - sin(ΔE))/sin(ΔE/2)^3
        y_new ← 1 + X*(ell + x)
    a ← (K*Δt/(2*y*sqrt(rmag_2*rmag_1)*sin(ΔE/2)*cosΔv))^2
    v ← VEL1(K, Δt, rmag_1, r_1, r_2, a, ΔE)
    augment(r_1, v)
# TWOPOS implement's Gauss's two position vector and
# time of flight orbit determination method. That is, given the
# Gaussian constant, K, the time of flight, Δt, and the two
# position vectors r_1, and r_2, TWOPOS calculates the
# velocity vector v_1 needed for the secondary to travel to
# from the first position to the second, under the assumption
# of two-body orbital mechanics.
#
# The angle between r_1 and r_2 must be less than about 70
# degrees.
# We now use TWOPOS to calculate Jupiter's heliocentric equatorial velocity vector at the first interpolated position, as needed to travel to the second interpolated position under the two-body assumptions. First we set up the arguments K and Δt for input to TWOPOS.
k_1 := 0.01720209895  # Gaussian constant for two-body motion when the Sun is the primary body.
μ := 1.000954786  # Sum of the Sun's mass and Jupiter's mass, expressed in solar masses.
K := k_1*sqrt(μ)  # Gravitational parameter composed of k_1 and μ.
Δt := JDT_2 - JDT_1  # We specify a one-year time of flight, in this case, 366 days for leap year 2004.
# The output from TWOPOS is the position and velocity vectors side by side. We put these into the 3-by-2 array PV. Then we extract position r_1 and velocity v_1 for use in calculating orbital elements.
PV := TWOPOS(K, Δt, r_1, r_2)
r_1 := PV[:, 0]
v_1 := PV[:, 1]
r_1 = [-5.02228; 1.78661; 0.888994]
v_1 = [-0.00287456; -0.00614973; -0.00256777]
## Transformation to Ecliptic Coordinates
# The components of position are expressed in astronomical units (A.U.). The components of velocity are expressed in A.U./day.
#
# The two vectors r_1 and v_1 are "heliocentric equatorial cartesian." This means that they are the (x, y, z) components of position and (v_x, v_y, v_z) components of velocity in a reference frame whose origin is at the Sun and whose fundamental plane is Earth's equatorial plane. We want to transform r_1 and v_1 to a set of classical orbital elements for the planet Jupiter. Before we can do so we must make the vectors "heliocentric ecliptic cartesian." This means that the fundamental reference plane must be changed to the plane of Earth's orbit around the sun, called the ecliptic plane. We need function EQ2EC to do the transformation, and we need EC2EQ later to go back the other way, so we define both functions now in a collapsed area.
# [area: EC2EQ and EQ2EC definitions]
deg = 0.0174533  # Mathcad's "deg" converts degrees to radians (deg = π / 180).
r2d := 1/deg
r2d = 57.2958  # We will also use "r2d" to convert radians to degrees.
# Quantity ε_o is the obliquity of the ecliptic at the
# Besselian epoch B1950.0, having Julian date
# 2433282.423.
ε_o := 23.4457874*deg
M := [1, 0, 0; 0, cos(ε_o), -sin(ε_o); 0, sin(ε_o), cos(ε_o)]
EC2EQ(r) := M*r  # (Transforms from ecliptic to equatorial.)
# EC2EQ converts a heliocentric vector r from ecliptic to
# equatorial.
EQ2EC(r) := M^-1*r  # (Transforms from equatorial to ecliptic.)
# EQ2EC converts a heliocentric vector r from equatorial
# to ecliptic.
# Now we transform r_1 and v_1 from heliocentric equatorial to heliocentric ecliptic.
r_1 := EQ2EC(r_1)
v_1 := EQ2EC(v_1)
## Transformation to Classical Elements
# Position and velocity at some epoch (in this case, 2004 January 1.0) are called "fundamental" orbital elements. What we want are called "classical" orbital elements. Classical orbital elements are derived and discussed in Chapter 5 of [3]. We use the function PV2CL ("position and velocity to classical elements") to do the transformation (see Chapter 8 of [3]). We define PV2CL in a collapsed area.
# [area: PV2CL definition]
PV2CL(K, r, v) :=
    rmag ← sqrt(r*r)
    rrdot ← r*v
    h ← r×v
    hmag ← sqrt(h*h)
    W ← h/hmag
    Energy ← v*v/2 - K^2/rmag
    a ← -K^2/(2*Energy)
    ecosE ← 1 - rmag/a
    esinE ← r*v/(K*sqrt(a))
    E ← angle(ecosE, esinE)
    e ← sqrt(esinE^2 + ecosE^2)
    M ← E - esinE
    i ← acos(W[2])
    Ω ← angle(-W[1], W[0])
    P ← cos(E)/rmag*r - sqrt(a)*sin(E)/K*v
    Q ← sin(E)/(rmag*sqrt(1 - e^2))*r + sqrt(a)*(cos(E) - e)/(K*sqrt(1 - e^2))*v
    ω ← angle(Q[2], P[2])
    [a; e; i*r2d; Ω*r2d; ω*r2d; M*r2d]
# PV2CL transforms position r and velocity v to classical
# elements, as follows.
# a
# e
# i
# Ω
# ω
# M
# semimajor axis, in A.U.
# orbital eccentricity
# orbital inclination, in deg
# celestial longitude of ascending node, in deg
# argument of perihelion, in deg
# Mean anomaly, in deg
# We invoke PV2CL to transform position and velocity to classical elements.
Elmts := PV2CL(K, r_1, v_1)
# We now have our 2P2B elements for Jupiter, for the year 2004:
# This is what the classical elements are, for a body in orbit around the Sun:
Elmts = [5.20183; 0.0489642; 1.30558; 100.085; 273.991; 140.912]
["Semimajor axis, in A.U."; "Orbital eccentricity"; "Orbital inclination, in deg"; "Celestial longitude of ascending node, in deg"; "Argument of perihelion, in deg"; "Mean anomaly, in deg"]
## Generation and Plot of 2P2B Ephemeris
# We now use these elements to generate positions of Jupiter all around its orbit, which we will plot. But before we do so, let us take a quick look at a plot of the DataSet that we started with:
# [component: inputs (DataSet[:, 1], DataSet[:, 2], DataSet[:, 3])]
# This is a 3D scatter plot of the raw DataSet data.
# The points that we see are positions of Jupiter at equal 40-day intervals over the time span 2003 Aug 29 to 2005 May 30.
# To generate our 2P2B Jupiter ephemeris for plotting, we use functions PQ2EQ and Ephem. The math in these two functions is derived and discussed in Chapter 5 of [3]. Expand the collapsible area below to see them.
# [area: PQ2EQ and Ephem definitions]
PQ2EQ(i, Ω, ω) :=
    P[0] ← cos(Ω)*cos(ω) - sin(Ω)*cos(i)*sin(ω)
    P[1] ← sin(Ω)*cos(ω) + cos(Ω)*cos(i)*sin(ω)
    P[2] ← sin(i)*sin(ω)
    Q[0] ← -(cos(Ω)*sin(ω) + sin(Ω)*cos(i)*cos(ω))
    Q[1] ← -(sin(Ω)*sin(ω) - cos(Ω)*cos(i)*cos(ω))
    Q[2] ← sin(i)*cos(ω)
    augment(P, Q)
# PQ2EQ computes the P and Q vectors needed to transform a
# celestial body's orbit plane positional coordinates to equatorial
# coordinates, using the Euler angles i, Ω, and ω.
#
# The body's position in the equatorial plane is x_wP + y_wQ.
Ephem(Elset, K, JD_o, Δt, Npts) :=
    a ← Elset[0]
    n ← K*a^-1.5
    e ← Elset[1]
    PQ ← PQ2EQ(Elset[2]*deg, Elset[3]*deg, Elset[4]*deg)
    M_o ← Elset[5]*deg
    for i ∈ 0 .. Npts
        t ← i*Δt
        M ← M_o + n*t
        E ← M
        while |E - e*sin(E) - M| ≥ 10^-8
            E ← root(E - e*sin(E) - M, E)
        x_ω ← a*(cos(E) - e)
        y_ω ← a*sqrt(1 - e^2)*sin(E)
        r ← EC2EQ(x_ω*PQ[:, 0] + y_ω*PQ[:, 1])
        TT ← JD_o + t
        Pts ← [TT, r[0], r[1], r[2]] if i == 0
        Pts ← stack(Pts, [TT, r[0], r[1], r[2]]) otherwise
    Pts
# Ephem propagates the orbit of a celestial body with classical
# orbital elements Elset and Gaussian constant K. JD_o is the
# epoch of the elements, Δt is the time step, here in days, and
# Npts is the number of ephemeris points desired. Time starts
# at epoch and steps away in increments Δt, until Npts + 1
# ephemeris points have been generated.
# In order to know how many points to plot, we need to know the orbital period of Jupiter, in days. This is the amount of time it takes Jupiter to travel once around the Sun. The formula from Kepler's Third Law of Planetary Motion is
P := 2*π/K*Elmts[0]^(3/2)
P = 4331.37
# Let us choose a time increment that gives us 36 equally-spaced ephemeris points to plot (the 37th gets plotted over the first). We have
Δt = 366
Δt := P/36
# We input this time step to Ephem and ask for 37 points (points 0 through 36), then we plot them.
Orbit := Ephem(Elmts, K, JD_1, Δt, 36)
# [component: inputs (Orbit[:, 1], Orbit[:, 2], Orbit[:, 3]), (DataSet[:, 1], DataSet[:, 2], DataSet[:, 3])]
# This 3D plot
# shows the raw data, plus the
# 2P2B orbit
# plotted for 37
# ephemeris
# points.
# We have used our 2P2B orbital elements for Jupiter to generate position points around the entire orbit (see Note 4). We also see our DataSet points (red) superimposed upon the 2P2B orbital trace and position points (blue).
## Accuracy of the Ephemeris and the DataSet
# Why didn't we simply fit three coordinate polynomials to DataSet and use the coefficients to generate Jupiter's positions during the year 2004? This is indeed the preferred approach for highest accuracy. But the orbital elements, as we have seen, are much more descriptive, and using Aitken-Neville interpolation on just two points has allowed us to generate 2P2B orbital elements for all of 2004.
#
# This concludes our data analysis. But the orbital analyst who wants to generate 2P2B elements for Jupiter for years 2005, 2006, 2007, and so on, needs quantitative answers to the following two questions.
#
# 1. How accurate are the positions generated by Ephem using 2P2B elements?
#
# 2. How accurate are the positions in DataSet in the first place?
# To answer the first question, let us look at the 2P2B elements error in the 8th dataset point, expressed in seconds of arc, that is, in arcseconds.
SecPerRad := r2d*3600  # (SecPerRad is the number of arcseconds in one radian.)
Orbit := Ephem(Elmts, K, JDT_1, DataSet[8, 0] - JDT_1, 1)
i := 0 .. 3
datarow[i] := transpose(DataSet)[:, 8][i]
datarow = [2453200; -5.39936; 0.538546; 0.362839]
transpose(Orbit)[:, 1] = [2453200; -5.39935; 0.538548; 0.36284]
|datarow - transpose(Orbit)[:, 1]|*SecPerRad = 2.44141  # (arcseconds)
# This suggests how to write a function that calculates all of the errors in the 2P2B predicted positions vs. the tabular points in DataSet during year 2004.
Errors :=
    for i ∈ 0 .. 8
        Orbit ← Ephem(Elmts, K, JDT_1, DataSet[i + 4, 0] - JDT_1, 1)
        for j ∈ 0 .. 3
            datarow[j] ← transpose(DataSet)[:, i + 4][j]
        Out[i] ← |datarow - transpose(Orbit)[:, 1]|*SecPerRad
    Out
# We see that the 2P2B elements predict the positions of Jupiter at the tabular dates in 2004 to better than 3 arcseconds.
#
# This accuracy is quite adequate for planetary visibility predictions for Jupiter made from 2P2B elements in 2004.
Errors = [0.893277; 1.65948; 2.16449; 2.42162; 2.44141; 2.23168; 1.79888; 1.1468; 0.277478]
# On to the final question: the positions in DataSet were obtained from a U.S. Naval Observatory publication from 1951. So it is quite appropriate to ask how accurate they are today. It will suffice just to look at the two positions r_1 and r_2 that we obtained from DataSet by Aitken-Neville iterated interpolation.
#
# Both r_1 and r_2 are referred to the mean equator and equinox of the Besselian epoch B1950.0, having Julian date 2433282.423. We precess them to the Julian epoch J2000.0, having Julian date 2451545.0, so that we can compare them with results from the U.S. Naval Observatory's most recent MICA program [5]. We use the following precession function, PRECESS. Expand the collapsible area below to see this function.
# [area: PRECESS definition]
PRECESS(r, JD) :=
    T ← (JD - 2433282.423)/36525.0
    P[0, 0] ← 1.0 - 0.00029697*T^2 - 0.00000013*T^3
    P[0, 1] ← -0.02234988*T - 0.00000676*T^2 + 0.00000221*T^3
    P[0, 2] ← -0.00971711*T + 0.00000207*T^2 + 0.00000096*T^3
    P[1, 0] ← -P[0, 1]
    P[1, 1] ← 1.0 - 0.00024976*T^2 - 0.00000015*T^3
    P[1, 2] ← -0.00010859*T^2 - 0.00000003*T^3
    P[2, 0] ← -P[0, 2]
    P[2, 1] ← P[1, 2]
    P[2, 2] ← 1.0 - 0.00004721*T^2 + 0.00000002*T^3
    P*r
# PRECESS tranforms a vector referred to the mean equator
# and equinox of the Besselian epoch B1950.0 so that is is
# referred to the mean equator and equinox of the Julian epoch
# J2000.0, having Julian date 2451545.0.
JD_2000.0 := 2451545.0
# r_1m was obtained from the U.S. Naval Observatory's MICA 1990-2005 program.
r_1m := [-5.046196922; 1.730326266; 0.864522613]
# We need to convert r_1 from ecliptic back to equatorial.
r_1 := EC2EQ(r_1)
# This is r_1 precessed from B1950.0 to J2000.0.
PRECESS(r_1, JD_2000.0) = [-5.04619; 1.73034; 0.864537]
# Now we compute the angle between r_1m and r_1 in arcseconds.
SecPerRad*acos(r_1m*PRECESS(r_1, JD_2000.0)/(|r_1m|*|PRECESS(r_1, JD_2000.0)|)) = 0.780146
# We do the same for r_2m and r_2.
# r_2m was obtained from the U.S. Naval Observatory's MICA 1990-2005 program.
r_2m := [-5.412958671; -0.650550743; -0.147064256]
# This is r_2
# precessed from B1950.0 to
# J2000.0.
PRECESS(r_2, JD_2000.0) = [-5.41296; -0.650535; -0.14705]
# Finally, we compute the angle between r_2m and r_2 in arcseconds.
SecPerRad*acos(r_2m*PRECESS(r_2, JD_2000.0)/(|r_2m|*|PRECESS(r_2, JD_2000.0)|)) = 0.795168
# We see that the angle between r_1m and r_1 and the angle between r_2m and r_2 are both less than an arcsecond. That is, calculations that the U.S. Naval Observatory made in the late 1940s on vacuum-tube computers, and that were published in 1951 in "Coordinates of the Five Outer Planets, 1653-2060," are still good, more than 50 years later, to better than an arcsecond.
## References and Notes
# [1] Eckert, W. J., Brouwer, Dirk and Clemence, G. M., "Coordinates of the Five Outer Planets 1653-2060," Astronomical Papers, Vol. XII, U.S. Naval Observatory, Washington, 1951.
# [2] McCalla, Thomas Richard, Introduction to Numerical Methods and FORTRAN Programming, John Wiley (1967). Although I have programmed extensively in Borland's Turbo Pascal and in several implementations of C and C++, I still find this book to be quite useful. The FORTRAN programs are short and elegant; the emphasis of the book is on deriving numerical methods. Try an author search at http://www.alibris.com to find this out-of-print book.
# [3] Mansfield, Roger L., Topics in Astrodynamics, Astronomical Data Service, Colorado Springs, Colorado (September 2003). See http://home.att.net/~astrotopics/ for availability.
# [4] The 2P2B elements that we have generated for Jupiter are most accurate during the year 2004, yet we can use them to see what the entire orbit looks like, and that is what we have done in the second 3D scatterplot. We could not have plotted the entire orbit using the DataSet points alone.
# [5] Nautical Almanac Office, U.S. Naval Observatory, Multiyear Interactive Computer Almanac 1990-2005, Washington, DC (1998). Available from Willmann-Bell, Richmond, Virginia. See http://www.willbell.com.
# [6] A note on notation: In physics and math, and especially in dynamical astronomy, vectors and matrices are typically denoted by boldface type. The convention was originally implemented in this worksheet by using a "user-defined" Math style called "Vectors & Matrices" to create vector and matrix variables, rather than simply to use the standard, default Math style "Variables," which uses the "regular" typeface.
# However, adoption of a user-defined Math style is not a good idea for an E-book, because the E-book user who is not familiar with that Math style might encounter problems (a) when trying to modify math regions in the E-book, or (b) after copying and pasting math regions into another worksheet, and then trying to modify them.
#
# So a compromise was struck: the math regions do not use boldface for vectors and matrices, but the text regions that describe them still do.
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