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# PRECONDITIONING DATA
# NaN Detection and Removal
# NaN
# markNaN(v, vindex) | IsNan(x)
# filterNan(v) | MatchNaN(v)
# NaN stands for Not a Number, and is intended to represent points in data that were never recorded, because of operator or instrumentation errors, or were recorded with unphysical values. NaNs can either be read in using the Data Wizard component, in the case where the data file is missing column elements in one or more rows, or inserted into any Mathcad matrix element just as you would any other value.
## Swapping in NaNs
# It's possible to swap in NaNs for any Mathcad value. For example, you may wish to mark outliers in data with NaNs, to retain the row (show that a measurement was made), but not use the measurement in data processing (filter out NaNs before processing).
# [component: outputs spots]
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# Suppose I've decided that the points at 1957 and 1958 look suspiciously high by using an outlier test,
index := ThreeSigma(spots[:, 1])[:, 0]
index = [257; 258]
spots[:, 1][index[0]] = 190
spots[:, 1][index[1]] = 185
# or by tracing on that region of the graph for the years at the high points,
vlookup(1957, spots, 1) = [190]
vlookup(1958, spots, 1) = [185]
# I can choose to mark any outlier values with a NaN, given the indices
index := [[index[0]; 1]; [index[1]; 1]]  # the index values we found, in column 1 of the data.
NaNspots := markNaN(spots, index)
# Plotting results marked with NaNs plot real numbers, and skips the NaNs – note the two red dots from the original data set are not highlighted.
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## Filtering out NaNs
# The function filterNaN will remove rows from a data set that contain NaN in one of the entries.
index := matchNaN(NaNspots[:, 1])
index = [257; 258]
filtspots := filterNaN(NaNspots)
rows(filtspots) = 294
rows(spots) = 296
# Note that this gives the same result as trimming the data with the indexes from matchNaN:
rows(trim(spots, index)) = 294
# The filterNaN function just bundles it into a single routine. Once NaNs have been filtered out, you can find statistics on your data, or fit them without the presence of unwanted entries. In the example here, we have assigned NaN values, only to remove the rows. This makes more sense with a data set that had missing entries, and was imported from the Data Wizard component with NaNs.
mean(filtspots[:, 1]) = 48.7687
mean(spots[:, 1]) = 49.7061
# If there are no NaNs, the matchNaN function will give an error, and the filterNaN function will return the original data, since there are no NaNs to filter.
matchNaN(spots) =  # error: no matching values found
## Working with NaN
# You can define new NaN aware functions that treat NaNs appropriately to your application, like Nmean:
mean(NaNspots[:, 1]) = NaN
Nmean(M) :=
    newM ← M[:, 0]
    if cols(M) > 1
        for i ∈ 1 .. cols(M) - 1
            newM ← stack(newM, M[:, i])
    newM ← filterNaN(newM)
    mean(newM)
Nmean(NaNspots[:, 1]) = 48.7687
# If you redefine the variable name NaN, it will no longer be NaN.
NaN := 1
IsNaN(NaN) = 0
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