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# EXAMPLES
# Principal Component Regression of NIR Spectra for Alcohol Mixtures
# by Richard Jackson
# Bruker Optics
# This data represents the near-infrared (NIR) spectra of 15 mixtures of three alcohols: methanol, ethanol, and propanol. The first column is wavenumber (1/wavelength), in cm^-1, the remaining 30 columns are the spectral absorbances, 2 spectra of each mixture. The objective is to produce a calibration based on this data that can later be used to predict the concentrations of the alcohols in an unknown mixture.
# [component: outputs DATA]
## Create Data vectors
# First, split X (independent variables - the wavenumbers) and Y (dependent variables - the measured absorbances) data into a vector and a matrix. Also transpose the data so that the spectra are in the rows, so that each column corresponds to an independent variable.
X := DATA[:, 0]
A1 := transpose(submatrix(DATA, 0, rows(DATA) - 1, 1, cols(DATA) - 1))
# Plot a few of the spectra to see what they look like (by convention, wavenumbers are plotted in decreasing order):
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## Multiple Linear Regression
# One method we can use for the calibration is multiple linear regression (MLR), also sometimes called Inverse Least Squares (ILS) or k-matrix. The first step is to generate a calibration curve. We can model the data as
#
# C == A1*B + E
#
# where for l components (in this case 3), m standards (in this case 30), and n variables (in this case absorbances) C is a m x l matrix of concentrations, A is the m x n matrix of variables, B is the n x l matrix of calibration coefficients, and E is a m x l matrix of residuals. The calibration coefficients are found using the equation
#
# B == (transpose(A1)*A1)^-1*transpose(A1)*C
#
# An estimate of the concentrations for an unknown spectrum, a, can then be predicted using the equation
#
# c == transpose(a)*B
#
# The problem with this methodology is that the dimension n (i.e. the number of variables) cannot exceed the dimension m (i.e. the number of standards), otherwise the matrix (transpose(A1)*A1) has no inverse (the problem is underdetermined).
# This is clearly a problem with the data above, which has only 30 standards, but 1142 absorbances. Looking at the data, however, most of it must be redundant. Not only are the spectra at different wavenumbers interrelated, but we only have three concentrations varying (which, since they add to 100%, represents only two degrees of freedom), plus other minor effects due to interactions between the alcohols, temperature changes, etc. It must therefore be possible to reduce the number of absorbances so that the calibration coefficients can be found. One obvious way to do this is to just keep the absorbances at a few wavenumbers, and throw the rest of the data away. This leaves us with the problem of which wavenumbers to choose, and if the absorbances that are chosen for the calibration are collinear, the matrix (transpose(A1)*A1) still has no inverse.
# Now we need to pick a number of wavelengths. We could pick up to 30, but let's just choose 5 because it's easier (and because there is a better way to do this anyway).
WaveNumbers := [4600; 5700; 6500; 7500; 8500]
# Use the Match function to get a smaller data matrix corresponding only to those wavenumbers
Anew :=
    NewData ← A1[:, Match(WaveNumbers[0], X, "near")[0]]
    for i ∈ 1 .. rows(WaveNumbers) - 1
        NewData ← augment(NewData, A1[:, Match(WaveNumbers[i], X, "near")[0]])
    NewData
# Now we can calibrate for the concentrations. These are the concentrations of the alcohols methanol, ethanol, and propanol in each of the 30 samples
# [component: outputs C]
# Calculate the calibration coefficients:
B := (transpose(Anew)*Anew)^-1*transpose(Anew)*C
# Now predict each concentration for all the samples, to see how good the calibration is:
c := Anew*B
i := -10, 0 .. 110
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# The r^2 values for the three calibrations are:
corr(C[:, 0], c[:, 0])^2 = 0.998953
corr(C[:, 1], c[:, 1])^2 = 0.987365
corr(C[:, 2], c[:, 2])^2 = 0.993861
# These calibrations look OK (although they could certainly be better!), but this is not a good way to evaluate how well the data has been modelled. We are interested in the ability of the model to predict concentrations from data that was not included in the calibration. We can get a measure of this by performing what is termed a cross validation. In this scheme we remove the data for sample 1 (in this case, the first two spectra), calibrate using the remaining data, then predict the concentrations for sample 1. The process is then repeated for sample 2, sample 3, etc. Here is a function that performs a cross validation given a matrix of data, a matrix of concentrations, and the number of samples to remove each time.
# Function to split matrix into two, by pulling out N rows starting at index:
SplitMatrix(M, index, N) :=
    OUT[0] ← submatrix(M, index, index + N - 1, 0, cols(M) - 1)
    for i ∈ index .. index + N - 1
        ind[i - index] ← i
    OUT[1] ← trim(M, ind)
    OUT
Cr_Val(DATA, C, N) :=
    RMSECV ← 0
    for i ∈ 0, N .. rows(DATA) - N
        "calibrate"
        SplitData ← SplitMatrix(DATA, i, N)
        CalData ← SplitData[1]
        PredData ← SplitData[0]
        CalC ← SplitMatrix(C, i, N)[1]
        B ← (transpose(CalData)*CalData)^-1*transpose(CalData)*CalC
        c ← PredData*B
        PredictedC ← c if i == 0
        PredictedC ← stack(PredictedC, c) otherwise
    PredictedC
# Now we can look at the results of the cross validation:
c := Cr_Val(Anew, C, 2)
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# The r^2 values for the three calibrations are:
corr(C[:, 0], c[:, 0])^2 = 0.997201
corr(C[:, 1], c[:, 1])^2 = 0.965295
corr(C[:, 2], c[:, 2])^2 = 0.982412
# An indicator of the average error in the cross validation is given by the root mean square error of cross validation, or RMSECV:
RMSECV(Ref, Pred) := sqrt(sum((Ref[i] - Pred[i])^2/rows(Ref), i = 0 .. last(Ref)))
# For methanol, ethanol, and propanol the values are:
RMSECV(C[:, 0], c[:, 0]) = 1.55091
RMSECV(C[:, 1], c[:, 1]) = 5.48239
RMSECV(C[:, 2], c[:, 2]) = 3.87515
# We could improve the cross validations by changing the number of absorbances used, and by finding the best wavenumbers to use, but this is not easy. There are obviously a huge number of possible combinations we could try. We have also thrown away a lot of information, and the variables we are left with are not orthogonal. If they are not chosen carefully they may in fact be collinear, in which case we cannot obtain the calibration coefficients.
# Fortunately, there is a much better way to compress the data than just throwing most of it away. Principle Component Analysis will yield the minimum number of variables required to describe the data, and the variables are guaranteed to be orthogonal. The regression is then performed on the new variables (the scores). This is termed principle component regression, or PCR.
## Principal Component Regression
# The first step in PCA is to mean center the data. This is done automatically by the Nipals function. By mean centering the data we remove everything that is common to all the spectra.
i := 0 .. cols(A1) - 1
MeanA[i] := mean(A1[:, i])
i := 0 .. rows(A1) - 1
CenteredA[:, i] := transpose(A1)[:, i] - MeanA
CenteredA := transpose(CenteredA)
# Since the data has been mean centered, we will also mean center the concentrations:
i := 0 .. cols(C) - 1
MeanC[i] := mean(C[:, i])
i := 0 .. rows(C) - 1
CenteredC[:, i] := transpose(C)[:, i] - MeanC
CenteredC := transpose(CenteredC)
# We now wish to compress the data to the minimum possible number of orthogonal variables. To do this we will use the Nipals function. We do not wish to scale the data to the standard deviations, so we set the last argument to "noscale". To start, we will just try a calibration using the first two PCs:
NumPC := 2
Acc := 10^-10
MaxIter := 100
PCA_result := Nipals(A1, NumPC, MaxIter, "noscale", Acc)
# Get the Scores:
SCORES := scores(PCA_result)
# Get the Loadings:
LOADINGS := loadings(PCA_result)
# The loading vectors are vectors of the same length as the original spectra. Here is what the first two look like. It can sometimes be instructive to look at the loadings, because they can indicate which parts of the data are important
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# Now perform a cross validation:
Centeredc := Cr_Val(SCORES, CenteredC, 2)
# Add the mean concentrations back in:
i := 0 .. rows(C) - 1
c[:, i] := transpose(Centeredc)[:, i] + MeanC
c := transpose(c)
i := -10, 0 .. 110
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# The r^2 values for the three calibrations are:
corr(C[:, 0], c[:, 0])^2 = 0.9959
corr(C[:, 1], c[:, 1])^2 = 0.91845
corr(C[:, 2], c[:, 2])^2 = 0.948228
# For methanol, ethanol, and propanol the RMSECV values are:
RMSECV(C[:, 0], c[:, 0]) = 1.86236
RMSECV(C[:, 1], c[:, 1]) = 8.40882
RMSECV(C[:, 2], c[:, 2]) = 6.63735
# These are comparable to the values obtained using MLR. We can do better, though, by optimizing the number of PCs used in the calibration. To do this, cross validate using 1 PC, then 2 PCs, then 3 PCs, etc. For each number of PCs we calculate the sums of the squares of the prediction errors for each component. The prediction error sum of squares (PRESS) will tend to decrease until we start to overfit the data, when it will increase. The PRESS function below will keep adding PCs until the PRESS for all three components increases. We will also calculate the r^2 value for each cross validation. To save calculating the scores and loadings again, the PRESS function will also return these.
PRESS(DATA, C, N) :=
    "Center the concentrations"
    for i ∈ 0 .. cols(C) - 1
        MeanC[i] ← mean(C[:, i])
    for i ∈ 0 .. rows(C) - 1
        CenteredC[:, i] ← transpose(C)[:, i] - MeanC
    CenteredC ← transpose(CenteredC)
    "Get the first PC and calculate the PRESS and r-squared"
    PCA_result ← Nipals(DATA, 1, MaxIter, "noscale", Acc)
    S ← PCA_result[0]
    L ← PCA_result[1]
    Centeredc ← Cr_Val(S, CenteredC, N)
    for i ∈ 0 .. cols(C) - 1
        PRESS[0, i] ← sum((CenteredC[:, i][j] - Centeredc[:, i][j])^2, j = 0 .. rows(C) - 1)
        R_squared[0, i] ← corr(CenteredC[:, i], Centeredc[:, i])^2
    "Calculate more PCs until the PRESS increases or we get the maximum number"
    for k ∈ 1 .. rows(C) - 1
        PCA_result ← Nipals2(PCA_result, 1)
        S ← PCA_result[0]
        L ← PCA_result[1]
        Centeredc ← Cr_Val(S, CenteredC, N)
        for i ∈ 0 .. cols(C) - 1
            PRESS[k, i] ← sum((CenteredC[:, i][j] - Centeredc[:, i][j])^2, j = 0 .. rows(C) - 1)
            R_squared[k, i] ← corr(CenteredC[:, i], Centeredc[:, i])^2
        Num_Greater ← 0
        if {
            for i ∈ 0 .. cols(C) - 1
                Num_Greater ← Num_Greater + 1 if PRESS[k, i] > PRESS[k - 1, i]
        } == 3
            break
    OUT[0] ← PRESS
    OUT[1] ← R_squared
    OUT[2] ← S
    OUT[3] ← L
    OUT
PRESS_result := PRESS(A1, C, 2)
PRESS_result = [
    [
        3696.19, 28327.4, 11664.4;
        104.052, 2121.25, 1321.63;
        22.0936, 81.1993, 31.8813;
        15.0245, 99.7066, 38.8779;
        13.4895, 79.1534, 28.7142;
        2.28465, 27.0858, 14.467;
        2.67434, 25.8501, 11.6792;
        2.23815, 21.8436, 10.1003;
        2.17346, 22.2014, 10.7163;
        2.87843, 29.3683, 14.0736
    ];
    [
        0.852132, 0.0444217, 0.533858;
        0.9959, 0.91845, 0.948228;
        0.999113, 0.996825, 0.998721;
        0.999398, 0.996135, 0.99847;
        0.999464, 0.996911, 0.998887;
        0.99991, 0.998933, 0.999433;
        0.999897, 0.998964, 0.999541;
        0.999912, 0.999133, 0.999604;
        0.999913, 0.999146, 0.999575;
        0.999885, 0.998861, 0.999437
    ];
    [
        8.35906, 1.02001, 0.252985, 0.135864, 0.012971, 0.0276947, 0.00685599, 0.0606891, 0.0464892, 0.0234855;
        8.35427, 1.02585, 0.233054, 0.131768, -0.00525508, 0.0381151, -0.040471, 0.0214086, 0.0600107, -0.0215958;
        -9.40649, 0.709458, 0.487951, 0.0599869, 0.110564, -0.0264753, -0.0435474, 0.008217, -0.0559501, 0.0279787;
        -9.40964, 0.733997, 0.383346, -0.033836, -0.2205, -0.0368551, -0.077531, -0.03765, -0.000380399, -0.0192432;
        2.06131, -1.27533, 0.307108, -0.0950662, -0.0215959, -0.120381, -0.0349475, 0.0261436, 0.0288353, -0.0049108;
        2.04781, -1.28876, 0.317236, -0.0898101, 0.0522597, -0.125414, -0.0183975, 0.0419425, 0.0151635, -0.0084316;
        -0.124229, -0.193419, -0.258766, 0.0612907, -0.0807254, -0.0692596, -0.0658625, -0.00249465, -0.0164346, -0.0185802;
        -0.1335, -0.195402, -0.218512, 0.0579266, -0.0263443, -0.101656, 0.0480732, 0.0415122, -0.0250933, 0.0218972;
        -2.60793, -0.0600268, -0.198188, 0.146861, -0.0265059, -0.0143107, -0.0517147, -0.0181606, 0.0178926, 0.000384942;
        -2.60609, -0.0762383, -0.215815, 0.128487, 0.0263126, -0.0281998, 0.00244423, -0.0244057, 0.0244911, -0.070723;
        1.88383, 0.0315745, -0.267643, 0.0584189, -0.141244, -0.0029913, 0.00377763, 0.00840242, -0.0467924, 0.0183346;
        1.88964, 0.0263996, -0.228888, 0.0988521, -0.0553353, -0.0312667, -0.00337295, 0.00606937, -0.0491601, 0.00734712;
        0.0824149, -0.479951, -0.11565, 0.192923, 0.0193248, 0.0045426, -0.0112398, 0.00735262, -0.0142172, 0.0420112;
        0.0667552, -0.484342, -0.168034, 0.168481, 0.0398071, 0.0268328, -0.00228181, -0.0172101, 0.0259212, -0.0341206;
        -0.883515, 0.463113, -0.265142, -0.120247, 0.0734773, -0.0732036, -0.0126557, 0.00891309, 0.041833, 0.041706;
        -0.89207, 0.463639, -0.28362, -0.116312, 0.0848454, -0.0781015, -0.0207868, -0.0130302, 0.0381952, 0.0829982;
        -5.93029, -0.136978, 0.0849529, 0.0729835, 0.109996, 0.0225494, 0.0550603, -0.0222928, 0.0019359, 0.0098809;
        -5.95384, -0.148812, 0.0566278, 0.0417843, 0.0823946, 0.0380399, 0.0586227, 0.0769696, -0.04111, -0.0411148;
        6.2314, 0.202507, 0.175581, -0.0344899, 0.0805423, 0.0539143, -0.00403094, -0.00323782, -0.0595956, -0.014503;
        6.23166, 0.219858, 0.156484, -0.0787581, -0.134201, 0.0130365, 0.0418968, 0.000766419, -0.0234714, 0.0372538;
        -5.29764, 0.527407, -0.0658476, -0.115221, -0.13696, 0.0306709, 0.124898, 0.0235487, 0.0233758, 0.00917392;
        -5.30933, 0.50441, -0.0139414, -0.0228588, 0.0960785, 0.0243742, 0.0455968, -0.0305763, 0.0356633, 0.00331237;
        3.67682, 0.645289, -0.0868617, -0.130219, 0.0700659, -0.0620632, 0.0124617, -0.0385129, 8.86231e-5, -0.0635016;
        3.66758, 0.635351, -0.120703, -0.16013, 0.0154296, -0.0654856, 0.0397326, 0.000352287, -0.0395004, -0.0687912;
        -2.06099, -0.745056, 0.0775935, -0.021061, -0.0438756, 0.0794361, 0.0393212, -0.000712776, 0.0426717, 0.0159654;
        -2.10094, -0.754333, -0.0265021, -0.0735614, -0.0646359, 0.137688, 0.00497788, 0.0433616, 0.0562178, -0.0275938;
        4.06135, -0.54948, 0.200458, 0.022949, -0.00185368, 0.00983034, 0.0440068, -0.143, 0.0183211, 0.0111917;
        4.04177, -0.571683, 0.146897, 0.00688455, 0.0143211, 0.0650189, 0.0400152, -0.030865, -0.0689938, 0.0310229;
        0.0289257, -0.126965, -0.185549, -0.152659, 0.0489838, 0.151868, -0.100249, 0.00711652, -0.0144518, 0.00645299;
        0.0318907, -0.122074, -0.160612, -0.141229, 0.0216579, 0.112051, -0.0806534, -0.000617065, -0.0219547, 0.00271194
    ];
    [
        -0.000457522, 0.000834159, -0.0149566, 0.0343391, -0.00697624, -0.00136415, 0.00397421, 0.00419765, -0.000118586, -0.00244595;
        -0.000471107, 0.000911052, -0.0148719, 0.0343704, -0.00702485, -0.00145174, 0.00385891, 0.00425252, -2.8671e-5, -0.00243129;
        -0.000487595, 0.000999705, -0.0147976, 0.0343695, -0.0070711, -0.00147946, 0.00375886, 0.00431038, -5.51263e-6, -0.00242279;
        -0.000507916, 0.00108586, -0.014789, 0.034353, -0.00707884, -0.00143337, 0.00379911, 0.00432349, -8.13168e-5, -0.00244689;
        -0.000532656, 0.00115478, -0.0148277, 0.0343539, -0.00702465, -0.00136879, 0.00396137, 0.00423793, -0.000142035, -0.00249911;
        -0.000561306, 0.00120493, -0.0148616, 0.0343488, -0.00694828, -0.00131234, 0.00412507, 0.00409827, -0.000124544, -0.00254749;
        -0.000592879, 0.00124108, -0.0148723, 0.034324, -0.00691678, -0.0012455, 0.00427037, 0.00396938, -0.000130901, -0.00257284;
        -0.00062684, 0.00126206, -0.0148512, 0.0342982, -0.00692986, -0.00122497, 0.00435516, 0.00397574, -0.000232664, -0.00256655;
        -0.000662121, 0.00127479, -0.0147778, 0.0342943, -0.00697521, -0.00128182, 0.00426994, 0.00417392, -0.000263197, -0.00253307;
        -0.000696589, 0.00129057, -0.0146884, 0.0343112, -0.00704296, -0.00135034, 0.00408616, 0.00438139, -0.000195306, -0.00247745
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    ]
]
# The PRESS values indicate that for all components 6 PCs give the lowest predicion error:
i := 0 .. rows(PRESS_result[0]) - 1
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# Although the two indicators do not always give the same results, in this case the r^2 values also indicate that 6 PCs are optimum:
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# It is worth noting here that if we use the n^th PC, there is no requirement that we use all the PCs lower than n. In fact, the graphs above show that when we include the 4^th PC the RMSECV and r^2 for ethanol are worse, but improve again when we include the 5^th PC. The lowest RMSECV for ethanol is in fact obtained if only PCs 1,2,3,5,6 are used. This is because PCA compresses the data to the most dominant factors, not the most relevant factors. The most common method used for multivariate calibration that compresses the data to the most relevant factors is Partial Least Squares (PLS).
## Final Calibration
# We will keep the first 6 scores from those returned by the PRESS calculation (for simplicity, we will keep the 4th PC for the ethanol calibration):
SCORES := submatrix(PRESS_result[2], 0, rows(PRESS_result[2]) - 1, 0, 5)
# Now perform a cross validation:
Centeredc := Cr_Val(SCORES, CenteredC, 2)
# Add the mean concentrations back in:
i := 0 .. rows(C) - 1
c[:, i] := transpose(Centeredc)[:, i] + MeanC
c := transpose(c)
i := -10, 0 .. 110
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# The r^2 values for the three calibrations are:
corr(C[:, 0], c[:, 0])^2 = 0.99991
corr(C[:, 1], c[:, 1])^2 = 0.998933
corr(C[:, 2], c[:, 2])^2 = 0.999433
# For methanol, ethanol, and propanol the RMSECV values are:
RMSECV(C[:, 0], c[:, 0]) = 0.275962
RMSECV(C[:, 1], c[:, 1]) = 0.950189
RMSECV(C[:, 2], c[:, 2]) = 0.69443
# These results are exellent! The final calibration is
B := (transpose(SCORES)*SCORES)^-1*transpose(SCORES)*CenteredC
## Prediction
# We will keep the first 6 loadings from those returned by the PRESS calculation:
LOADINGS := submatrix(PRESS_result[3], 0, rows(PRESS_result[3]) - 1, 0, 5)
# To predict the unknown concentrations from a spectrum, first we subtract the mean spectrum, as the Nipals function did for the calibration data:
# [component: outputs Unknown]
Unk_centered := Unknown - MeanA
# Next calculate an estimate of the scores using the first 6 loadings:
S := transpose(Unk_centered)*LOADINGS
S = [6.14637, 0.524308, 0.105768, 0.0702338, 0.0107193, 0.0269015]
# Finally, calculate the predicted concentrations, remembering to add the mean concentrations to get the final answer:
y := transpose(S*B) + MeanC
transpose(y) = [5.95299, 16.2882, 77.75]
# We can combine all these steps into a single statement
y := transpose(transpose(transpose(Unknown - MeanA)*LOADINGS*B) + MeanC)
y = [5.95299, 16.2882, 77.75]
# To conclude, we have used PCA to compress the original data to 6 variables, which are used for the final regression. This has the advantages over MLR that we do not have a wavenumber selection problem, and the variables are guaranteed to be orthogonal.
## References
# Spectroscopic data courtesy of Bruker Optics, Inc., all rights reserved, used by permission.
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