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# DESCRIPTIVE STATISTICS
# Quantile-Quantile and Probability Plots
# qqplot(v1,[v2 OR "distribution"])
# The quantile-quantile (q-q) plot is a plot of the quantiles of the first data set against the quantiles of the second data set, giving a visual measure of whether the two sets come from a common distribution. It is similar to a probability plot, where the quantiles for one of the data samples are replaced with the quantiles of a theoretical distribution.
# Consider the following set of measured data of the strength of bars of bonded Si nitrate (column 3), manufactured over multiple labs and multiple batches.
# [component: outputs Data]
# To investigate the relevance of the Batch on the results, we'll have to divide the data into two sets and compare them. To prepare the data, trim off the text labels, and pull out the two columns of interest, 2 and 3:
BatchData := submatrix(Data, 1, rows(Data) - 1, 2, 3)
# Create two data vectors by Batch from the data in column 1 using lookup functions:
batch1 := vlookup(1, BatchData, 1)
batch2 := vlookup(2, BatchData, 1)
# Now plot a Q-Q plot, comparing the quantiles of one data set against those of the other. The output of the qqplot function will be a three column matrix. The first column contains the quantiles of the first data set. The second column contains the quantiles of the second data set or standard probability distribution, and the third argument contains a least-squares-fit reference line to help visualize linearity of the data. It is assumed that the second and third columns will be plotted together on one axis (y), and the first column will be plotted on the other (x).
Batchplot := qqplot(batch2, batch1)
x := min(batch2) .. max(batch2)
# Calculate some quartiles for markers on the plot:
Q25_1 := percentile(batch1, 0.25)
Q75_1 := percentile(batch1, 0.75)
Q25_2 := percentile(batch2, 0.25)
Q75_2 := percentile(batch2, 0.75)
# Quantiles for batch 1 are shifted higher than they are for batch 2.
[Q25_1, Q75_1; Q25_2, Q75_2] =  # no stored result
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# Comparing the quantiles, or percentiles, of these two batches shows that they have not come from the same distribution, although the values for very small and very large quantiles are similar. A 1-to-1 reference line is plotted to emphasize how the data vary. We can also see that the Batch 1 quantiles are significantly higher than those for Batch 2, suggesting very different processing conditions.
## Probability plots
# The qqplot function can also be used to generate a normal probability plot, comparing a single data set against the quantiles for the normal distribution. This is yet another measure of dispersion in the data. The closer the points on this plot lie to the 45 degree reference line, the more normally distributed the given data is.
# [component: outputs Data]
# We are trying to determine the measurement process that resulted in this heat flow meter data were "in control," that is, if the data were drawn randomly and from a fixed distribution. We can check if the data are normally distributed by comparing them with the normal distribution in a probability plot:
Normplot := qqplot(Data, "normal")  # equivalent to qqplot(Data)
# We'll also calculate the slope and intercept of the line of best fit to this probability plot, which is plotted to show how close to a straight line the quantiles are:
[b; m] := line(Normplot[:, 0], Normplot[:, 1])
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# The very close correlation with the reference line would indicate that the samples are normally distributed. This check of normality will allow us to apply other criteria appropriately, such as tests for outliers.
# Here is a set of data that represents electrical insulation failure voltages for cables subjected to increasing voltage stress (Statistical Methods for Lifetime Data, by J.F. Lawless).
R := transpose([39.4, 45.3, 49.2, 49.4, 51.3, 52.0, 53.2, 53.2, 54.9, 55.5, 57.1, 57.2, 57.5, 59.2, 61.0, 62.4, 63.8, 64.3, 67.3, 67.7])
i := 0 .. 8
bins[i] := i*5 + 30
stem := hist(bins, R)
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# The histogram reveals that the data is not normal in distribution. It's skewed to one side. Let's compare its quantiles with those for the Weibull distribution:
Weibplot := qqplot(R, "weibull")
[b; m] := line(Weibplot[:, 0], Weibplot[:, 1])
# Where the Weibull parameters of interest are approximately given by the slope of the line
β := m
β =  # no stored result
# and the x-intercept
α := exp(intercept(Weibplot[:, 1], Weibplot[:, 0]))
α =  # no stored result
# Here is the plot. When the Weibull quantiles are used, the x axis is returned in units of ln(quantile) for the original data set.
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