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# DESCRIPTIVE STATISTICS
# Association
# cvar(A,B) | corr(A,B)
# Spear(v1,v2) | kendltau(v1,v2)
# contingtb1(M) | kendltau2(M)
# The first four of these functions take two arrays of the same length, or in some cases two matrices of the same size, and return the correlation, Pearson's r correlation coefficient, Spearman coefficient, Kendall's tau, or a contingency table. The last two functions take a contingency table matrix and calculate statistics of merit. These quantities give a measure of the association between two data sets, that is, whether one depends on the other. They are measures of whether an independent variable is a significant predictor of a dependent variable, or unrelated entirely.
## Covariance
# Consider the linearly related voltage data shown:
DATA := [
    1, 0.4, 0.4;
    2, 0.7, 0.72;
    3, 1.075, 1.1;
    4, 1.4, 1.45;
    5, 1.6, 1.8;
    6, 2, 2.17;
    7, 2.4, 2.4;
    8, 2.7, 2.8;
    9, 3.05, 3.2;
    10, 3.4, 3.4
]
# Covariance is the degree to which two variables, x and y covary. Just as variance measures how much data deviates from its mean, the covariance measures how much two data sets simultaneously deviate from their respective means.
cvar(DATA[:, 0], DATA[:, 1]) = 2.74875
# For a least-squares fit line, the covariance is related to the slope of the fit line:
slope(DATA[:, 0], DATA[:, 1]) = 0.333182
cvar(DATA[:, 0], DATA[:, 1])/var(DATA[:, 0]) = 0.333182
## Pearson's correlation coefficient
# Pearson's correlation coefficient is calculated by corr. It is the ratio of the observed covariance to the maximum possible covariance. For example, for two perfectly linearly related data sets:
N := 5
i := 0 .. N - 1
x[i] := i
y[i] := 2*i
corr(x, y) = 1
corr(-x, y) = -1
cvar(x, y) = 4
cvar(x, y)/(stdev(x)*stdev(y)) = 1
# The internal calculation represented by corr is
1/N*sum(((x[i] - mean(x))/stdev(x))*((y[i] - mean(y))/stdev(y)), i = 0 .. N - 1) = 1
# Pearson's coefficient indicates the direction of the correlation (whether the relationship is direct or inversely proportional), while the coefficient of determination gives an equal interval and ratio measure of the strength of the correlation. You can get the coefficient of determination by squaring the output of corr. For our sample data,
r := corr(DATA[:, 0], DATA[:, 1])
r = 0.999061
r^2 = 0.998122
## Spearman rank correlation
# The Spearman correlation uses the same formula as Pearson's but applies it instead to the ranks of the data in each data set
Rx := Rank(x)
Ry := Rank(y)
r_s := corr(Rx, Ry)
r_s = 1
Rdata0 := Rank(DATA[:, 0])
Rdata1 := Rank(DATA[:, 1])
# Pearson
corr(DATA[:, 0], DATA[:, 1]) = 0.999061
# Spearman
corr(Rdata0, Rdata1) = 1
# Since it is based on the Pearson formula, the Spearman coefficient has the same properties, namely, it is always between -1 and +1. Unlike the Pearson, however, the Spearman coefficient can be +1 or -1 without the data lying on a straight line, as is the case for our test voltage data. Spearman's rank coefficient is used in nonparametric hypothesis testing, that is, correlation testing that does not depend on the distribution or form of the data.
# The Spear function returns not only this correlation coefficient, but other figures of merit:
# - the sum squared difference of ranks, D
# - the number of standard deviations by which D deviates from the expected value under the null hypothesis
# - the probability that this value or one larger in absolute value would occur for uncorrelated samples
# - Spearman's rank-order correlation coefficient r_s
# - the probability that this value or one larger in absolute value would occur for uncorrelated samples
# Compare the response of a group of patients at a clinic who are given different levels of a medication designed to reduce blood cholesterol. Record the value +1 to indicate lowered cholesterol, 0 to indicate no change, and -1 to indicate higher cholesterol. The medication will be recorded in units administered.
# [component: outputs Meds]
# [component: outputs Resp]
Spear(Meds, Resp) = [388; -0.0951279; 0.924213; 0.0263837; 0.928661]
# The rank-order correlation coefficient is .0264, close to zero, indicating that there is very little evidence for an association between the amount of medication given and the response of the patient.
# Here's an example of the correlation of the linear data vector with itself. The correlation is 1, with a small probability (0.0455) of uncorrelated samples.
Spear(x, x) = [0; -2; 0.0455003; 1; 0]
## Kendall's tau
# Kendall's τ uses the relative ranks of the data points in its measure of correlation. Each pair (xi,yi) is compared with each other pair. It then totals the number of comparisons in which the relative ordering of the x's is the same as the relative ordering of the y's (concordant pairs), the number in which the relative orderings are different (discordant pairs), the number in which the x's are the same (extra y pairs), and the number in which the y's are the same (extra x pairs).
τ == (concordant - discordant)/(sqrt(concordant + discordant + extra_y)*sqrt(concordant + discordant + extra_x))
# In both of these tests, the last entry in the vector gives the probability that a statistic larger in absolute value would occur for uncorrelated samples. This is based on the assumption that the test statistics are approximately normally distributed when the data are uncorrelated.
# The kendltau function yields a vector of length 3 containing:
# - Kendall's τ,
# - its number of standard deviations away from zero
# - the probability that a value this large or larger in absolute value would occur if the samples were uncorrelated
# We could use the dose/result data, which compares only the relative ordering of ranks to give a measure of correlation.
kendltau(Meds, Resp) = [0.0300658; 0.149782; 0.880937]
# The correlation measure here is .0301, again providing no support for a relationship between medication and response.
## Contingency Tables
# When there are only a few possible values for each variable, the data may be recorded as a contingency table, with the frequency of responses as entries. For example, if the medication in our example were administered in only 4 doses, we could construct a 3 by 4 contingency table.
# Change in Cholesterol
# Medication Level
# 0 150 250 500
# Decrease
Table := [0, 2, 13, 4; 2, 5, 7, 10; 3, 2, 1, 0]  # No Change
# Increase
kendltau2(Table) = [-0.232663; -2.35848; 0.0183497]
# This time we get -.2327 as the measure of correlation, with probability .0183 that this value or one larger than this in absolute value could occur for uncorrelated samples. Interpretation of these results is not always obvious, but we would likely conclude that in this case an increase in the medication is related to a decrease in cholesterol.
# The output of the contingtbl function is a vector of length 5 containing χ2, degrees of freedom, the probability a χ2 this large or larger would occur if variables had no association, Cramer's V, and the contingency coefficient C. Small values of the probability indicate a significant association.
[χ2; df; prob; V; C] := contingtbl(Table)
[χ2; df; prob; V; C] = [21.2183; 6; 0.00167603; 0.46531; 0.549706]
# The probability that the computed value of χ^2 or a larger value would occur if the two variables were independent is very small, so we reject the null hypothesis of independence.
# The strength of this association is given by the last two elements of the vector, Cramer's V and the contingency coefficient. These reparametrizations of χ^2 lie between 0 and 1. Unfortunately, it is difficult to interpret what these measurements of the strength mean quantitatively. They provide only qualitative guidance, in that a value near zero would indicate no association, a value near 1 would indicate perfect association.
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