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# EXAMPLES
# Conical Surface Regression and Analysis
# by Xavier Colonna de Lega
# Zygo Corporation
## Introduction
# This worksheet illustrates how to calculate the parameters defining a conical surface that best matches a set of (x,y,z) points in a least-squares sense. The deviation of the original data points with respect to the best-fit cone is then calculated to create radial and tangential profiles of the surface deviation.
#
# Valves used for hydraulic and fuel injection systems in cars and trucks are typically made of a moving ball or needle that mates to a conical surface. The region on the cone where the two surfaces contact in the closed position is called the valve seat. In order for the seat to be an effective sealing surface its deviation from a perfect cone is tightly toleranced. Dedicated profilers are used on the production floor and in the QC lab to verify that these tolerances are met. The data used in this worksheet are the result of a measurement of a machined valve seat with a surface profiling interferometer.
## Coordinate system
# The (X,Y,Z) coordinate system is defined by the interferometer geometry (see the figure below). The center is the point P. The axes are defined by the unitless X, Y and Z normed vectors.
#
# In the figure the conical surface is perfectly aligned to the instrument: its axis defined by the cone center point C and the unit vector D is collinear with the Z-axis. The cone semi included angle is γ. The inspection diameter where roundness deviation must be measured is φ.
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# Finally, the location of the cone center on the Z-axis is such that the normal to the surface at a point M belonging to the inspection diameter passes through the center of the coordinate system P. In other words, the conical surface is tangent to a sphere of radius MP centered at P. The nominal distance MP is defined by the instrument. It is called "radius" in the worksheet.
# Notations: Vector variables are bold faced. Small caps variables are scalar values. Large caps variables correspond to (x,y,z) points.
# [area: Predefined units]
μm ≡ 10^-6*m
nm ≡ 10^-9*m
mrad ≡ 10^-3*rad
μrad ≡ 10^-6*rad
arcsec ≡ 1/3600*deg
arcmin := 1/60*deg
Range(array) := max(array) - min(array)
# Coordinate system:
# Unit vectors:
X := [1; 0; 0]
Y := [0; 1; 0]
Z := X×Y
# Center position:
P := [0; 0; 0]*m
# Nominal cone semi included angle:
γ_0 ≡ 45*deg
# Nominal cone direction: we define the normed vector D by two angles α and β that correspond to two successive rotations of the cone axis about the X and Y axes.
# Nominal rotations:
α_0 := 0*mrad
β_0 := 0*mrad
# Rotation matrix:
rot(α, β) := [1, 0, 0; 0, cos(α), -sin(α); 0, sin(α), cos(α)]*[cos(β), 0, -sin(β); 0, 1, 0; sin(β), 0, cos(β)]
# Nominal cone direction:
D_0 := rot(α_0, β_0)*(-Z)
# Radius of tangent sphere:
radius ≡ 2.0*mm
# Nominal cone center or apex:
C_0 := P + radius/sin(γ_0)*Z
# We have defined the conical surface and its location in space by 6 scalar values: the semi included angle γ, the (x,y,z) coordinates of the cone center or apex and the two rotation angles describing the normed vector D.
#
# In practice, the measured data corresponds to a part that is not perfectly aligned to the instrument. The least-squares fit cone provides estimates for these 6 parameters.
## Import measured data
# Load measured (x,y,z) coordinates:
MeasuredXYZ := READBIN("ConeXYZ.bin", "float", 0, 3, 0)*mm
# Number of (x,y,z) measurement points:
rows(MeasuredXYZ) = 51518
# Extract coordinates:
x := MeasuredXYZ[:, 0]
y := MeasuredXYZ[:, 1]
z := MeasuredXYZ[:, 2]
## Best-fit conical surface
# We first define a merit function to minimize. Here we choose to calculate the sum of the squared distances from the measured data points to the best-fit cone. The distance is measured along the local cone normal.
# The figures at right illustrates the calculation of the distance HM for a given measured point M.
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# We have:
|CM'| == (CM*D > 0)
# The signed length M'M" is defined as positive.
M'M'' == |CM'|*tan(γ)
# The signed length M'M is also positive.
M'M == |MM'| == sqrt(|CM|^2 - |CM'|^2)
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# This yields an expression for the signed length MM".
MM'' == M'M'' - M'M
# We have:
MM'' == MH/cos(γ)
# If we define the surface deviation as HM this signed quantity is given by:
HM == cos(γ)*sqrt(|CM|^2 - |CM'|^2) - sin(γ)*|CM'|
# The sum calculation has been optimized in this program. It turns out that calculation with vectors is slower than scalar calculations. The least square sum is scaled to mm^2 in order to avoid large exponents.
Residuals(points, cx, cy, cz, α, β, γ) :=
    sγ ← sin(γ)/mm
    cγ ← cos(γ)/mm
    [Dx; Dy; Dz] ← [sin(β); sin(α)*cos(β); -cos(α)*cos(β)]
    "Loop on all data points"
    for k ∈ 0 .. rows(points) - 1
        CMx ← points[k, 0] - cx
        CMy ← points[k, 1] - cy
        CMz ← points[k, 2] - cz
        CM2 ← CMx^2 + CMy^2 + CMz^2
        cmz ← CMx*Dx + CMy*Dy + CMz*Dz
        HM[k] ← cγ*sqrt(CM2 - cmz*cmz) - sγ*cmz
    return HM
# Guess values for the fit:
α_0 = 0 mrad
β_0 = 0 mrad
γ_0 = 45 deg
C_0 = [0; 0; 2.82843] mm
[cx_0; cy_0; cz_0] := C_0
# Minimize the sum of squares using a solve block:
# Set convergence tolerance:
TOL := 10^-4
# On slower computers we can use a data subset to perform the fit.
sub := 20
i := 0, sub .. rows(MeasuredXYZ) - 1
T0 := transpose(MeasuredXYZ)
subMeasuredXYZ[:, i/sub] := T0[:, i]
subMeasuredXYZ := transpose(subMeasuredXYZ)
## Sum of Squares Solve Block
# Enable one or the other equality statement, depending on if you wish to use the truncated data or the full set. The Quasi-Newton algorithm gives the best results here. The right-click option on Minerr was used to force this choice.
Given
Residuals(subMeasuredXYZ, cx_0, cy_0, cz_0, α_0, β_0, γ_0) == 0
SumSquares(MeasuredXYZ, cx_0, cy_0, cz_0, α_0, β_0, γ_0) == 0  # disabled
[cx, cy, cz, α, β, γ] := transpose(Minerr(cx_0, cy_0, cz_0, α_0, β_0, γ_0))
# Verify improvement of sum of squares:
Res_Initial := Residuals(subMeasuredXYZ, cx_0, cy_0, cz_0, α_0, β_0, γ_0)
sum(Res_Initial^2) = 22.0651
Res_Final := Residuals(subMeasuredXYZ, cx, cy, cz, α, β, γ)
sum(Res_Final^2) = 0.000517702
# Best fit cone included angle:
2*γ = 90.091 deg
# Note: A typical cone angle tolerance is on the order of 1°.
# Tilt of cone axis:
α = -0.296058 deg
β = 0.244273 deg
# Best fit cone parameters:
# Direction:
D := rot(α, β)*D_0
# Cone center:
C := [cx; cy; cz]
# Displacement from nominal:
C - C_0 = [-0.0113924; 0.0129396; -0.133073] mm
## 3D plot of measured data and fitted cone
# Angular width of displayed best fit cone surface:
Δθ := 6*deg
# [area: Best-fit 3D plot]
Cone3D(D, C, γ) :=
    X' ← -Y×D
    X' ← X'/|X'|
    Y' ← -D×X'
    d_1 ← C[2]*(cos(γ) - 1.3*sin(γ)*Δθ)
    d_2 ← C[2]*(cos(γ) + 1.3*sin(γ)*Δθ)
    for i ∈ 0 .. 180
        ω ← i*2*deg
        E ← sin(γ)*cos(ω)*X' + sin(γ)*sin(ω)*Y' + cos(γ)*D
        H ← C + d_1*E
        X[i, 0] ← H[0]
        Y[i, 0] ← H[1]
        Z[i, 0] ← H[2]
        H ← C + d_2*E
        X[i, 1] ← H[0]
        Y[i, 1] ← H[1]
        Z[i, 1] ← H[2]
    [X; Y; Z]
FitCone := Cone3D(D, C, γ)
FitX := FitCone[0]
FitY := FitCone[1]
FitZ := FitCone[2]
# Cone axis D:
AxisX := [C[0]; C[0] + D[0]*radius]
AxisY := [C[1]; C[1] + D[1]*radius]
AxisZ := [C[2]; C[2] + D[2]*radius]
# The red line corresponds to the best-fit cone axis.
#
# The light-blue wireframe surface represents a section of the best fit cone.
# [component: inputs (x/mm, y/mm, z/mm), (FitX/mm, FitY/mm, FitZ/mm), (AxisX/mm, AxisY/mm, AxisZ/mm)]
## Calculation of deviation from best fit cone
# This step consists in calculating the distance of each data point to the best-fit cone along the local normal. This distance h is associated to the (X,Y) projection of the data point onto a plane perpendicular to the cone axis.
# [area: Residuals]
GetResiduals(points, C, D, γ) :=
    "Define 2 unit vectors that are normal to the best-fit cone axis and to each other"
    [(U ← -Y×D), (U ← U/|U|)]
    [(V ← D×U), (V ← V/|V|)]
    sγ ← sin(γ)
    cγ ← cos(γ)
    for k ∈ 0 .. rows(points) - 1
        CM ← transpose([points[k, 0], points[k, 1], points[k, 2]]) - C
        CM2 ← CM*CM
        cmz ← CM*D
        MM' ← sqrt(CM2 - cmz*cmz)
        HM ← cγ*MM' - sγ*cmz
        ω ← atan2(CM*U, CM*V)
        Flat[k, 1] ← MM'*cos(ω)
        Flat[k, 2] ← MM'*sin(ω)
        Flat[k, 0] ← HM
        Flat[k, 3] ← MM'/sγ
        Flat[k, 4] ← ω*m
    Flat ← csort(Flat, 4)
    return Flat
# Each line in the residual matrix contains the height deviation d from the best-fit cone, X, Y, ρ and ω. (X,Y) are the rectangular coordinates of the projection of the data point onto a plane perpendicular to the best-fit cone axis. (ρ,ω) are the distance of the data point from the cone center and the angular position of the data point projection in the plane XY.
Residuals := GetResiduals(MeasuredXYZ, C, D, γ)
# Surface deviation:
δ := Residuals[:, 0]
# Look at the distribution of values:
hh := histogram(1000, δ*nm^-1)
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## Cone flatness deviation
# Peak to valley surface deviation:
Range(δ) = 3.66118 μm
# Projected points coordinates:
Px := Residuals[:, 1]
Py := Residuals[:, 2]
# [area: Plots]
CircleAtR(φ) :=
    for k ∈ 0 .. 360/5
        ω ← 5*deg*k
        out[k, 0] ← φ/2*cos(ω)
        out[k, 1] ← φ/2*sin(ω)
        out[k, 2] ← 0*mm
    return out
LineAtψ(ψ, Sx, Sy) :=
    d ← max(vectorize(|Sx|), vectorize(|Sy|))
    ψ ← atan2(cos(ψ), sin(ψ))
    [0, 0, 0; d*cos(ψ), d*sin(ψ), 0]
# For display of profiles:
str := LineAtψ(ψ, Px, Py)
strx := str[:, 0]
stry := str[:, 1]
strz := str[:, 2] + max(1.0*max(δ), 0.02*μm)
circ := CircleAtR(φ)
Cx := circ[:, 0]
Cy := circ[:, 1]
Cz := circ[:, 2] + max(1.0*max(δ), 0.02*μm)
φ = 2.68 mm
ψ = 45 deg
# [component: inputs (Px/mm, Py/mm, δ/μm), (Cx/mm, Cy/mm, Cz/μm), (strx/mm, stry/mm, strz/μm)]
# This surface is plotted using a 3D scatter plot because the surface plot can not handle data with holes. The style for the 3 plots is scatter plot.
# The blue line position is defined by the angle ψ. The so-called straightness profile is generated as the intersection of the surface with a plane that contains the blue segment and is perpendicular to the plane of the figure.
#
# Similarly, the red trace is the location where we want to extract a roundness profile, which is the intersection of the measured surface with a cylinder of diameter φ that has its axis perpendicular to the plane of the figure.
# In the following we will use the projection shown above to extract a straightness and a roundness profile. Note that the projection introduces geometrical distortions that we will ignore in this worksheet.
## Straightness profile
# Straightness profile at angular position:
ψ ≡ 45*deg
# We select a subset of data points based on their proximity to the generatrix of interest. Here we retain points whose angular position is within +/-1° of the generatrix direction ψ.
# [area: Straightness]
# Select the points that are within +/-Dy from the direction y. We use the function Match.
SelectDataSt(ψ, Data, Δψ) :=
    "Get angular position of projected data points"
    ω ← Data[:, 4]*m^-1
    "Calculate angular distance to chosen direction"
    dω ← vectorize(mod(ω - ψ, 2*π))
    "Select data points that are close enough to profile direction"
    "Match provides a list of positions in matrix Data"
    msg ← "Could not find matching points"
    try
        Positions ← Match([-Δψ; Δψ], dω, "range")
    on error
        return msg
    "Allocate memory in one step"
    SelectData[3, last(Positions)] ← 0
    TData ← transpose(Data)
    "Create point selection"
    for i ∈ 0 .. last(Positions)
        SelectData[:, i] ← TData[:, Positions[i]]
    "Finally, sort according to distance from cone center"
    return csort(transpose(SelectData), 3)
## Interpolated straightness profile
# (profile along a generatrix) The input data are in the format:
# Data = [ Residual along normal, X-projection on plane perpendicular to cone axis, Y-projection, distance to cone center along generatrix ]
# These data points have been selected based on their proximity to the generatrix of interest. Output data is in the same format and contains the interpolated profile. We use loess for the interpolation.
StProf(ψ, Data, γ, lp, dρ) :=
    LS ← loess(augment(Data[:, 1], Data[:, 2])/mm, Data[:, 0]/μm, lp)
    ρ ← Data[:, 3]
    N ← round((max(ρ) - min(ρ))/dρ)
    id ← 0
    for i ∈ 0 .. N
        "r is the projected radius on the XY plane"
        r ← (min(ρ) + i*dρ)*sin(γ)
        x ← r*cos(ψ)
        y ← r*sin(ψ)
        try
            dz ← interp(LS, augment(Data[:, 1], Data[:, 2])/mm, Data[:, 0]/μm, mm^-1*[x; y])
        on error
            continue
        out[id, 0] ← dz*μm
        out[id, 1] ← x
        out[id, 2] ← y
        out[id, 3] ← r/sin(γ)
        id ← id + 1
    out
subData := SelectDataSt(ψ, Residuals, 2*deg)
subX := subData[:, 1]
subY := subData[:, 2]
subZ := subData[:, 0]
subρ := subData[:, 3]
subω := subData[:, 4]/m
# We use loess to create an interpolated profile. The loess proximity parameter is chosen to be small to limit lowpass filtering:
lp := 0.05
# Interpolation sampling step:
dρ := 2*μm
Straightness := StProf(ψ, subData, γ, lp, dρ)
stZ := Straightness[:, 0]
stρ := Straightness[:, 3]
# We also create an interpolated profile by fitting a plane to the four closest neighbors of each interpolation location. The corresponding function needs data in a new coordinate system. The first parameter X is the position of the data points projected on the plane of the profile. The second parameter Y is the distance of the data points to the plane of the profile. The third parameter Z is the surface deviation. The last two parameters are the maximum distance from the profile plane for a point to be valid and the sampling step for the interpolation.
# [area: 4-point interpolation]
Interpolate4PtPlane(X, Y, Z, x_start, x_end, d_max, step) :=
    d2_max ← d_max*d_max
    k ← 0
    x ← x_start
    idx ← 0
    while |X[idx] - x| > d_max
        idx ← idx + 1
    while x ≤ x_end
        i1 ← idx
        j ← 0
        neighbors ← 0
        while |x - X[i1]| < d_max
            distance2 ← (x - X[i1])^2 + Y[i1]^2 + Z[i1]^2
            if distance2 < d2_max
                neighbors[j, 0] ← i1
                neighbors[j, 1] ← distance2*μm^-2
                j ← j + 1
            i1 ← i1 - 1
            break if i1 < 0
        i2 ← idx + 1
        if i2 < rows(X)
            while |x - X[i2]| < d_max
                distance2 ← (x - X[i2])^2 + Y[i2]^2 + Z[i2]^2
                if distance2 < d2_max
                    neighbors[j, 0] ← i2
                    neighbors[j, 1] ← distance2*μm^-2
                    j ← j + 1
                i2 ← i2 + 1
                break if i2 == rows(X)
        if rows(neighbors) > 3
            "Order neighbors from closest"
            neighbors ← csort(neighbors, 1)
            "Calculate a LSF plane"
            [(Sx2 ← sum((X[neighbors[ii, 0]] - x)^2, ii = 0 .. 3)), (Sxy ← sum((X[neighbors[ii, 0]] - x)*Y[neighbors[ii, 0]], ii = 0 .. 3)), (Sy2 ← sum(Y[neighbors[ii, 0]]^2, ii = 0 .. 3))]
            [(Sx ← sum(X[neighbors[ii, 0]] - x, ii = 0 .. 3)), (Sy ← sum(Y[neighbors[ii, 0]], ii = 0 .. 3)), (Sz ← sum(Z[neighbors[ii, 0]], ii = 0 .. 3))]
            [(Sxz ← sum((X[neighbors[ii, 0]] - x)*Z[neighbors[ii, 0]], ii = 0 .. 3)), (Syz ← sum(Y[neighbors[ii, 0]]*Z[neighbors[ii, 0]], ii = 0 .. 3))]
            "Calculate interpolated value"
            pt[k, 0] ← x
            pt[k, 1] ← (-Sx*Sxz*Sy2 + Sx*Sxy*Syz + Sy*Sxy*Sxz - Sy*Syz*Sx2 + Sz*Sx2*Sy2 - Sz*Sxy^2)/(Sx2*Sy2*4 - Sx2*Sy^2 - Sxy^2*4 + 2*Sxy*Sx*Sy - Sx^2*Sy2)
            k ← k + 1
        x ← x + step
        idx ← round((i1 + i2)/2)
        while (X[idx] < x)*(idx < last(X))
            idx ← idx + 1
        while (X[idx] > x)*(idx > 0)
            idx ← idx - 1
    return pt
X := subρ
Y := vectorize(subρ*mod(subω - ψ, 2*π))
Z := subZ
Straightness' := Interpolate4PtPlane(X, Y, Z, min(subρ), max(subρ), 10*μm, dρ)
stZ' := Straightness'[:, 1]
stρ' := Straightness'[:, 0]
Range(stZ') = 1.86143 μm
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## Roundness profile
# Cone diameter where roundness is measured:
φ ≡ 2.68*mm
# [area: Roundness]
SelectDataRd(φ, Data, Δr) :=
    "Get radial distance of each point to specified radius"
    dr ← (Data[:, 3]*sin(γ) - φ/2)*μm^-1
    "Select data points that are close enough to profile direction"
    "Scale the distance to micrometer so that there are no TOL issues"
    msg ← "Could not find matching points"
    try
        Positions ← Match([-Δr; Δr]*μm^-1, dr, "range")
    on error
        return msg
    "Allocate memory in one step"
    SelectData[3, last(Positions)] ← 0
    TData ← transpose(Data)
    "Create point selection"
    for i ∈ 0 .. last(Positions)
        SelectData[:, i] ← TData[:, Positions[i]]
    "Finally, sort according to angular position on the strip of data"
    return csort(transpose(SelectData), 4)
RdProf(φ, Data, γ, lp, dp) :=
    LS ← loess(augment(Data[:, 1], Data[:, 2])/mm, Data[:, 0]/μm, lp)
    "Number of points over full circle"
    N ← round(π*φ/dp)
    dp ← π*φ/N
    r_0 ← φ/2
    id ← 0
    for i ∈ 0 .. N - 1
        "p is the perimeter location"
        p ← (i + 0.5)*dp
        ω ← p/r_0
        x ← r_0*cos(ω)
        y ← r_0*sin(ω)
        try
            dz ← interp(LS, augment(Data[:, 1], Data[:, 2])/mm, Data[:, 0]/μm, mm^-1*[x; y])
        on error
            continue
        out[id, 0] ← dz*μm
        out[id, 1] ← x
        out[id, 2] ← y
        out[id, 3] ← p
        id ← id + 1
    out
# We first select the data points that fall within a certain distance of the circle of diameter φ. The last parameter of the function call below defines this maximum distance.
subData2 := SelectDataRd(φ, Residuals, 10*μm)
subX := subData2[:, 1]
subY := subData2[:, 2]
subZ := subData2[:, 0]
subρ := subData2[:, 3]
subω := subData2[:, 4]/m
# Nominal interpolation sampling step along the perimeter:
dp := 5*μm
# Exact sampling step:
dp := π*φ/(2*round(π*φ/(2*dp)))
dp = 4.99968 μm
# Use 4-point linear interpolation:
X := φ/2*(subω + π)
Y := subρ*sin(γ) - φ/2
Z := subZ
# Because the data wrap around in this case we pad both ends of the data sent to the interpolation function.
cut := round(0.5*last(X))
X := stack(submatrix(X, cut, last(X), 0, 0) - π*φ, X, submatrix(X, 0, cut, 0, 0) + π*φ)
Y := stack(submatrix(Y, cut, last(Y), 0, 0), Y, submatrix(Y, 0, cut, 0, 0))
Z := stack(submatrix(Z, cut, last(Z), 0, 0), Z, submatrix(Z, 0, cut, 0, 0))
Roundness := Interpolate4PtPlane(X, Y, Z, 0*mm, π*φ - dp, 10*μm, dp)
rdZ := Roundness[:, 1]
rdp := Roundness[:, 0]
# The roundness error at diameter φ is equal to:
max(rdZ) - min(rdZ) = 0.381132 μm
Range(rdZ) = 0.381132 μm
# Note: A typical roundness tolerance is on the order of 1 micrometer.
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## Profile filtering
# Roundness profiles are usually lowpass, band-pass and highpass filtered to extract form, waviness and roughness information. We illustrate here how to extract form with a Gaussian filter. A typical cutoff frequency (50% transfer function) for this type of data is "50 upr," which corresponds to 50 undulations per revolution.
# Since there may be missing data points in the interpolated roundness profile, we use linear interpolation to fill in the missing data and then use a Fourier transform to apply the Gaussian filter. Note that since the data is effectively periodic for a roundness profile there are no edge discontinuities issues for the Fourier transformation.
# [area: Create regularly sampled data]
[rdp_2; rdZ_2] :=
    "Create data trace that extends beyond end points"
    rdp_tmp ← stack(rdp[last(rdp)] - π*φ, rdp, rdp[0] + π*φ)
    rdZ_tmp ← stack(rdZ[last(rdZ)], rdZ, rdZ[0])
    for i ∈ 0 .. π*φ/dp - 1
        p[i] ← i*dp
        Missing ← 0
        try
            idx ← match(p/mm, rdp/mm)[0]
        on error
            Missing ← 1
        dZ[i] ← linterp(rdp_tmp, rdZ_tmp, p[i]) if Missing
        dZ[i] ← rdZ[idx] otherwise
    [p; dZ]
# Generate Gaussian filter for the frequency domain:
Npt := rows(rdp)
j := 0 .. Npt/2
filt[j] := exp(-ln(2)*j^2/50^2)
filt[mod(Npt - j, Npt)] := filt[j]
# Filtered profile:
rdZ_2 := icfft(vectorize(cfft(rdZ_2)*filt))
# The roundness from error at diameter φ is equal to:
max(rdZ_2) - min(rdZ_2) = 0.276747 μm
# Roundness profiles are frequently presented as polar plots.
# Offset radius:
R := 1.5*μm
# Plot range:
sc := ceil((max(rdZ) + R)/(0.2*μm))*0.2*μm
# The number of grid points on the polar axis should be set manually to sc*10/μm = 14 to get a scale of 0.1*μm per radial division.
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## 3D plot detail
# As a final step, let's display the subregion of the data where the roundness and straightness profiles intersect. Rotate the figure to observe how the profiles follow the original surface deviation.
# [area: Select data]
# Straightness data:
stX := Straightness[:, 1]
stY := Straightness[:, 2]
# Surface deviation data:
subData := SelectDataSt(ψ, Residuals, 3*deg)
subX := subData[:, 1]
subY := subData[:, 2]
subZ := subData[:, 0]
# Find the corresponding section of the roundness profile.
list := Match([-3*deg; 3*deg], mod(2*rdp/φ - ψ + π, 2*π) - π, "range")
[rdX; rdY; rdZ] :=
    ω ← 2*rdp/φ
    Δω ← mod(ω - ψ + π, 2*π) - π
    list ← Match([-3*deg; 3*deg], Δω, "range")
    for i ∈ 0 .. last(list)
        out[i, 0] ← cos(ω[list[i]])*φ/2
        out[i, 1] ← sin(ω[list[i]])*φ/2
        out[i, 2] ← rdZ[list[i]]
        out[i, 3] ← Δω[list[i]]*m
    out ← csort(out, 3)
    [out[:, 0]; out[:, 1]; out[:, 2]]
# [component: inputs (subX/mm, subY/mm, subZ/μm), (rdX/mm, rdY/mm, rdZ/μm), (stX/mm, stY/mm, stZ/μm)]
## References
# Metrology data courtesy of Zygo Corporation, all rights reserved, used by permission.
#
# For more information on surface metrology: D. J. Whitehouse (1994), Handbook of Surface Metrology, Institute of Physics Publishing, ISBN 0-7503-0039-6.
#
# For more information on optical profilers: Peter de Groot, Xavier Colonna de Lega (May 2003), "Valve cone measurement using white light interference microscopy in a spherical measurement geometry," Optical Engineering, Vol. 42, No. 5, pp. 1232-1237.
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