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# EXAMPLES
# Cosine Smoothing
# by James C. (Jim) Bach
# Delphi Electronics & Safety
# Kokomo, IN, USA
## Introduction
# Mathcad provides a number of built-in smoothing filters, which are often sufficient for cleaning up your data/waveforms prior to the primary processing operation. Sometimes, however, the built-in filters oversmooth data, removing features that are not noise, and you cannot obtain the desired level or quality of filtering you need. For example, here is a noisy signal which we might want to filter before analyzing its key characteristics.
Signal := READPRN("signal.prn")
i := 0 .. last(Signal)
Time[i] := i/300
# Passing the signal through the three built-in smoothing filters we see:
N_Filt1 := 41
N_Filt2 := N_Filt1/300
Filtered_Med := medsmooth(Signal, N_Filt1)
Filtered_K := ksmooth(Time, Signal, N_Filt2)
Filtered_Sup := supsmooth(Time, Signal)
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# With this dataset, there are problems with all of the above smoothing techniques.
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# Median smoothing artifically 'squared-up' the high-frequency ripple.
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# Gaussian smoothing overattenuated the high-frequency ripple,
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# and artificially 'rounded-off' the square pulse.
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# Super smoothing removed the
# high-frequency ripple (highly over-filtered),
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# and artificially rounded the square pulse.
## Mean smoothing
# In cases such as this, you can write your own sliding window filters using a Mathcad program block (multiline function), as shown in the example below. This "Mean" smoother filters your data (input vector "Data") by taking the average (mean) of the data points within the sliding window (width specified by "Width"):
MeanSmooth(Data, Width) ≡
    "Calculate 1/2-width of filtering window"
    Width_Half ← trunc(Width/2)
    "Calculate where we need to start collapsing the window"
    NearEnd ← last(Data) - Width_Half
    "Iterate through all of the data points"
    for Pt ∈ 0 .. last(Data)
        "Calculate beginning (Start) of sliding window"
        Start ← Pt - Width_Half if Pt ≥ Width_Half
        Start ← 0 otherwise
        "Calculate ending (Stop) of sliding window"
        Stop ← Pt + Width_Half if Pt ≤ NearEnd
        Stop ← last(Data) otherwise
        "Use 'submatrix' to extract the window of data, then take mean of that chunk"
        Out[Pt] ← mean(submatrix(Data, Start, Stop, 0, 0))
    "Return the filtered data"
    return Out
# Testing this filter with the signal yields
Filtered_Mean := MeanSmooth(Signal, N_Filt1)
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## Cosine smoothing
# A variant of the mean smoother, shown above, is the "Cosine Weighted Mean" smoother, which weights the averaged data points so that those near the center of the window have more weight (importance) than those near the edges of the window:
CosMeanSmooth(Data, Width) :=
    "Calculate 1/2-width of filtering window"
    Width_Half ← trunc(Width/2)
    "Calculate where we need to start collapsing the window"
    NearEnd ← last(Data) - Width_Half
    "Store-away pi divided by 2 because we'll need it often"
    Π ← π/2
    "Iterate through all of the data points"
    for Pt ∈ 0 .. last(Data)
        "Calculate beginning (Start) of sliding window"
        Start ← Pt - Width_Half if Pt ≥ Width_Half
        Start ← 0 otherwise
        "Calculate ending (Stop) of sliding window"
        Stop ← Pt + Width_Half if Pt ≤ NearEnd
        Stop ← last(Data) otherwise
        "Calculate 'Area Correction Factor' . . ."
        " . . . compensate for size of sliding window"
        η ← 1/sum(cos(Π*(j - Pt)/Width_Half), j = Start .. Stop)
        "Iterate through the window of data . . ."
        "Take sum of of cosine-weighted data points"
        Out[Pt] ← η*sum(Data[j]*cos(Π*(j - Pt)/Width_Half), j = Start .. Stop)
    "Return the filtered data"
    return Out
# Note the truncated (narrowed) window widths at the ends of the data, as controlled by the variables "Start" (beginning of sliding window) and "Stop" (ending of sliding window). At the 1st data point, only ^1/_2 of the specified window width is available for averaging. As the program block iterates through the data, the averaging window expands until it is the specified width, which occurs when it has reached the "Width_Half" data point. It continues to slide across the data until it nears the end of the data, at which point (at "NearEnd" data point) it begins to collapse. When it finally reaches the last data point, the averaging window is once again only ^1/_2 of the specified width. It is because of this automatically expanding/collapsing window that the summation of weighted points needs to be multiplied by the scaling factor containing the "Start" and "Stop" indices:
η ← 1/sum(cos(Π*(j - Pt)/Width_Half), j = Start .. Stop)
# Testing this filter, we see:
Filtered_Cos := CosMeanSmooth(Signal, N_Filt1)
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# Note, however, that the area compensation factor (η) needs to be adjusted for each shape by performing an iterated sum of the shape's values in order to find the area under the curve. Since the curve (window) expands and collapses dynamically at the data endpoints, this needs to be calculated on-the-fly, or, at least when near the ends. This process can be made more efficient (since the collapsed window occurs a small fraction of the time) by only repeatedly calculating the window area when near the ends of the data, as shown in the following revision of the program block:
CosMeanSmooth(Data, Width) :=
    "Calculate 1/2-width of filtering window"
    Width_Half ← trunc(Width/2)
    "Calculate where we need to start collapsing the window"
    NearEnd ← last(Data) - Width_Half
    "Store-away pi divided by 2 because we'll need it often"
    Π ← π/2
    "Calculate window area when free-and-clear of the ends of data"
    η_mid ← 1/sum(cos(Π*(j - Width_Half)/Width_Half), j = 0 .. 2*Width_Half)
    "Iterate through all of the data points"
    for Pt ∈ 0 .. last(Data)
        "Calculate beginning (Start) of sliding window"
        Start ← Pt - Width_Half if Pt ≥ Width_Half
        Start ← 0 otherwise
        "Calculate ending (Stop) of sliding window"
        Stop ← Pt + Width_Half if Pt ≤ NearEnd
        Stop ← last(Data) otherwise
        "Calculate 'Area Correction Factor' . . ."
        " . . . compensate for size of sliding window"
        η ← η_mid if Width_Half ≤ Pt ≤ NearEnd
        η ← 1/sum(cos(Π*(j - Pt)/Width_Half), j = Start .. Stop) otherwise
        "Iterate through the window of data . . ."
        "Take sum of of cosine-weighted data points"
        Out[Pt] ← η*sum(Data[j]*cos(Π*(j - Pt)/Width_Half), j = Start .. Stop)
    "Return the filtered data"
    return Out
# Testing this more efficient version of the smoother:
Filtered_Cos2 := CosMeanSmooth(Signal, N_Filt1)
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# Notice that this filter doesn't suffer (as much) from the same problems of the built-in smoothing filters. The high-frequency ripple isn't as severely attenuated and the square pulse is more accurately reproduced:
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# The graph below illustrates three varients of "Weighted Mean" smoothing windows that are eaily implemented with the programming block above:
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# We can find the area under the curves, presuming untruncated (full-width) windows, as:
Π := π/2
Width := 10000
Width_Half := 50 %*Width
## "Cosine" Window
sum(cos(Π*(j - Width_Half)/Width_Half), j = 0 .. Width)/Width = 63.662 %
## "Cosine Squared" Window
sum(cos(Π*(j - Width_Half)/Width_Half)^2, j = 0 .. Width)/Width = 50 %
## "Linear Ramp" Window
sum((1 - |(j - Width_Half)/Width_Half|), j = 0 .. Width)/Width = 50 %
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