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# DESCRIPTIVE STATISTICS
# Dispersion
# var(A, B, C,...) | Var(A, B, C,...)
# stdev(A, B, C,...) | Stdev(p, A)
# skew(A, B, C,...) | kurt(A, B, C,...)
# Ftest(v1, v2)
# These functions take single or multiple scalars or arrays, and return the variance, standard deviation, skew, and kurtosis, respectively, giving measures of the dispersion or shape of a data set. The best choice of location estimator depends on the general dispersion or distribution of your data. Ftest tests whether two samples are drawn from distributions with the same variance.
## Variance
# The variance is the sum of the squared differences between the data points and the mean, divided by the sample size. There are two variance functions in Mathcad, the Population variance, var, which divides by the sample size, and the Sample variance, Var, which divides by sample size minus one. Var is the more commonly used definition in quantitative data analysis. Although the variance is intended to be an overall measure of spread, it is strongly affected by the tail behavior.
points := 2000
i := 0 .. points
Weib := rweibull(points, 2)*kg
Norm := rnorm(points, .87, .5)*kg
variance(V) := sum((V[i] - mean(V))^2, i = 0 .. rows(V) - 1)/(rows(V) - 1)
variance(Weib) = 0.221077 kg^2
variance(Norm) = 0.251159 kg^2
# To see how the variance indicates shape, consider the variance of these two random distributions:
Var(Weib) = 0.221077 kg^2
mean(Weib) = 0.895742 kg
Var(Norm) = 0.251159 kg^2
mean(Norm) = 0.894672 kg
Wei := histogram(15, Weib/kg)
Nor := histogram(15, Norm/kg)
# The smaller variance indicates that the mean value is skewed off to one side of the Weibull distribution, while the larger variance for the normal distribution indicates a more symmetric shape with the mean in the center.
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## Standard Deviation
# The standard deviation is the square root of the variance, and there are upper and lowercase versions of this function as well, corresponding to the upper and lowercase versions of Var/var.
sqrt(Var(Norm)) = 0.501158 kg
Stdev(Norm) = 0.501158 kg
# Note that the units of standard deviation are the same as those of the original data, making it a slightly more intuitive measure of dispersion. It can be considered a measure of the error in a series of measurements that should be ideally identical.
## Skewness
# A distribution is skewed if its histogram tails off to either the right or the left, as does the Weibull distribution shown above. Skewness in a population can be estimated by the following sample skewness coefficient:
skewness(v) := rows(v)*sum((v - mean(v))^3)/((rows(v) - 1)*(rows(v) - 2)*Stdev(v)^3)
# Positive values of skewness indicate that the distribution is skewed (tails off) to the right, while negative values indicate that the distribution is skewed to the left. (Population skewness values can be positive or negative and are unbounded.) A symmetric distribution, like the normal, will have a skewness value of zero.
skewness(Weib) = 0.631024
skew(Weib) = 0.631024
skew(-Weib) = -0.631024
## Kurtosis
# kurtosis measures the heaviness (thickness) of a distribution's tail. Population kurtosis can be estimated by the following sample kurtosis coefficient:
kurtosis(v) := rows(v)*(rows(v) + 1)*sum((v - mean(v))^4)/((rows(v) - 1)*(rows(v) - 2)*(rows(v) - 3)*Stdev(v)^4) + (-3*(rows(v) - 1)^2/((rows(v) - 2)*(rows(v) - 3)))
# An ideal normal distribution has a kurtosis value of zero. A negative value of kurtosis indicates that the distribution's tail is heavier than that of the normal. (Values for population kurtosis can lie anywhere between -2 and infinity, inclusively.) A positive value of kurtosis indicates that the distribution's tail is thinner than that of the normal.
kurtosis(Weib) = 0.231822
kurtosis(Norm) = 0.0168404
kurt(Weib) = 0.231822
kurt(Norm) = 0.0168404
## F test
# The Ftest function tests the hypothesis that two samples are drawn from distributions having the same variance. The output is a vector of length 2 containing the value of the F statistic, and the probability that a value this large or larger would occur when the distributions have the same variance, that is, samples having the same dispersion.
# [component: outputs cer]
Batch := submatrix(cer, 1, rows(cer) - 1, 2, 3)
batch1 := Re(vlookup(1, Batch, 1))
batch2 := Re(vlookup(2, Batch, 1))
Stdev(batch1) = 65.5491
Stdev(batch2) = 61.8542
F1 := Var(batch1)/Var(batch2)
F1 = 1.12304
Ftest(batch1, batch2) = [1.12304; 0.370383]
# The samples have only a 37% probability of having the same variance.
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