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# EXAMPLES
# Stabilizing and Normalizing the Error Variance
# by Paul Lorczak
# Suppose we have a multivariate data set where the value of σ^2, the random error, is increasing with respect to one of the independent variables:
# sample size:
n := 75
σINCR :=
    DATA[:, 0] ← runif(n, 0, 1)
    DATA[:, 1] ← runif(n, 0, 1)
    "Two columns of random data for x1 and x2"
    σincr ← DATA[:, 0]
    "create a column of errors that depend on the first data column"
    ε ← vectorize(σincr*rnorm(n, 0, 1))
    β ← [4; 7; 2]
    "create a linear relationship between x1, x2, and a dep. variable"
    DATA[:, 2] ← β[0] + β[1]*DATA[:, 0] + β[2]*DATA[:, 1] + ε
    DATA
y := σINCR[:, 2]
i := 0 .. last(y)
X[:, 0] := σINCR[:, 0]
X[:, 1] := σINCR[:, 1]
# The error term ε is from a normal distribution with a mean of zero.
# To check model assumptions, do a multivariate polynomial fit with the two columns of independent variables to the single column of dependent variables:
params := regress(X, y, 2)
yfit[i] := interp(params, X, y, transpose(X)[:, i])
resid := y - yfit
stERR := sqrt(sum(resid^2)/(last(y) - 5))
stERR = 0.774739
# If scatter plots of the standardized residuals versus each of the independent variables or versus the predicted values show no discernible pattern, then the variance of the error terms is most likely constant. On the plot of the residuals versus x1 (shown in red), the points spread out increasingly from left to right, indicating that ε increases with x1.
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# On a similar graph for x2, the pattern is not clear.
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# The pattern, however, is again evident on the graph of the residuals versus the predicted values:
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# To perform a valid regression, we need to counteract the increasing error variance by transforming the dependent data. The variance stabilizing transformations are listed below in order of increasing severity. The first equation is enabled. To see the effect of the other transformations, you can disable the first equation and enable another equation.
y_stab := vectorize(sqrt(y))
y_stab := vectorize(ln(y))  # disabled
y_stab := vectorize(1/y)  # disabled
# Below, we've plotted the new resulting residuals versus the predicted values, to see the effect of stabilization.
params := regress(X, y_stab, 2)
yfits[i] := interp(params, X, y_stab, transpose(X)[:, i])
resids := y_stab - yfits
stERR := sqrt(sum(resid^2)/(last(y) - 5))
stERR = 0.774739
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# You may find that some of the transformations are too severe, actually causing a violation rather than removing it. For instance, the graph pattern could be curved rather than random, indicating that a nonlinear model might provide a better fit to the data.
## Correcting Nonnormality
# Besides helping to stabilize the error variance, the same transformations may also correct any nonnormality of errors. To check for nonnormality, generate a sample from a population having error terms that are exponentially distributed.
# sample size:
n_expo := 25
εEXPO :=
    DATA[:, 0] ← runif(n_expo, 0, 1)
    DATA[:, 1] ← runif(n_expo, 0, 1)
    ε1 ← rexp(n_expo, 10)
    β ← [4; 7; 2]
    DATA[:, 2] ← β[0] + β[1]*DATA[:, 0] + β[2]*DATA[:, 1] + ε1
    DATA
ye := εEXPO[:, 2]
i := 0 .. last(ye)
Xe[i] := 1
Xe[:, 1] := εEXPO[:, 0]
Xe[:, 2] := εEXPO[:, 1]
# Nonnormality can be detected in a normal plot of the standardized residuals. If the plot resembles a straight line, then most likely the errors are from a normal distribution.
params := (transpose(Xe)*Xe)^-1*(transpose(Xe)*ye)
yfit := Xe*params
params = [4.15954; 6.91454; 1.9863]
reside := ye - yfit
stERR := sqrt(sum(reside^2)/(last(ye) - cols(Xe)))
stERR = 0.111587
rplot := qqplot(reside/stERR, "normal")
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# As expected, the residuals are not normally distributed, as shown on this nonlinear scatter plot.
## Transforming for normality
# Again, we've defined the transformations in order of increasing severity. The first equation is enabled. To see the effect of the other transformations, you can disable the first equation, and enable another equation.
y_norm := sqrt(ye)
y_norm := ln(ye)  # disabled
y_norm := 1/ye  # disabled
# Inspecting the new standardized residual normal plot.
params := (transpose(Xe)*Xe)^-1*(transpose(Xe)*y_norm)
yfit := Xe*params
params = [2.14624; 1.18717; 0.350042]
reside := y_norm - yfit
stERR := sqrt(sum(reside^2)/(last(y_norm) - cols(Xe)))
stERR = 0.0296133
rplot := qqplot(reside/stERR, "normal")
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# You can investigate the relationship between the transformation and the nonnormality of error terms through enabling and disabling different equations. Again, you'll probably find that some transformations work better than others.
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