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# PRECONDITIONING DATA
# Exponential Smoothing
# Smoothing can also be accomplished using averaging techniques, such as exponential smoothing.
# Consider a sampled time series with a random noise component and an increasing, nonlinear trend,
samples := 2^7
n := 0 .. samples - 1
f(x) := sin(x)^12 + 2 + rnd(1) + .2*x^1.8
t[n] := n/100*3*π
d[n] := f(t[n])
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## Double Exponential Smoothing
# Double exponential smoothing, in which a smoothed value is computed using a percentage of the existing value and a percentage of the preceding value, was designed to handle data of this type, with random noise and a strong trend.
# To compute subsequent values in the smoothed data, use seeded iteration. To begin, you need seed values, estimates of the stationary and trend values, s and b, which are calculated from the first 10 terms of the data:
k := 0 .. 9
y[k] := d[k]
x[k] := t[k]
b[0] := slope(x, y)*(x[1] - x[0])
st[0] := intercept(x, y)
st[0] = 2.32286
# The particular seed values are somewhat problem-dependent. You could try finding the slope of fewer or greater number of initial terms. The correct value depends on a visual inspection of the result.
# The seed value for b estimates the change in value from one data point to the next due to the trend.
b = [0.0167131]
# Choose the two smoothing constants. The first, α, controls how much of the original stationary value, st, at a point in the data, d, is kept and how much is calculated from the smoothed value of the previous point. The closer α is to 1, the more closely the smoothed curve tracks the original data.
α = 0.4
β = 0.5
[st; b] :=
    for m ∈ 1 .. samples - 1
        st[m] ← α*d[m] + (1 - α)*(st[m - 1] + b[m - 1])
        b[m] ← α*β*(st[m] - (st[m - 1] + b[m - 1])) + b[m - 1]
    [st; b]
# Sequential trend values are estimated from the previous and current values of the smoothed data and the previous values of the smoothed trend. Note that each previous term contributes an exponentially decreasing amount to the smoothed value at any point.
#
# The vector st contains the smoothed value of the data at all points.
# Compare the original and smoothed data, and adjust the values of a and b to see how the smoothing changes.
α ≡ 0.4
β ≡ 0.5
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# Note that, although the smoothed curve does track the trend of the original data, it does not track the periodic part very well. This is a limitation of double exponential smoothing, and for this data set one of the other smoothing methods described in this handbook may be more appropriate. It is also possible to extend double exponential smoothing to correctly handle the periodicity, which leads to triple exponential smoothing. There is an excellent discussion of various exponential smoothing techniques from NIST, http://www.itl.nist.gov/div898/handbook/pmc/section4/pmc43.htm
## Optimizing for Time Series Prediction
# In addition to smoothing data, this method can be used for the prediction of time series. The forecasted value r steps ahead is given by:
r = 3
P[n] :=
    st[n] if n < r
    st[n - r] + r*b[n - r] otherwise
# For predicting time series, it is possible to choose optimal values of α and β, so that they provide the optimal forecast in a least squares sense. Define the difference equations as functions, so that the sum of the squared differences between the actual and predicted values r steps ahead can be minimized:
Smooth(α, m) := α*d[m] + (1 - α)*(st[m - 1] + b[m - 1])
Trend(α, β, m) := α*β*(st[m] - (st[m - 1] + b[m - 1])) + b[m - 1]
Forecast(α, β, m) :=
    Smooth(α, m) if m < r
    Smooth(α, m - r) + r*Trend(α, β, m - r) otherwise
# Calculate the sums of squares of the errors. Note that these are only calculated over the range for which we have predicted values
SSE(α, β) := sum((d[m] - Forecast(α, β, m))^2, m = r + 1 .. samples - 1)
# Now set the starting guesses. Note that the minimization is somewhat sensitive to the starting guesses, and may converge to a local minimum. To be sure that the minimization has found the global minimum, try several different guesses:
[α; β] := [0.2; 0.5]
SSE(α, β) = 40.5441
Given
SSE(α, β) == 0
[α_opt; β_opt] := Minerr(α, β)
[α_opt; β_opt] = [0.325588; 1.33725]
ERR = 35.2542
# Recalculate the estimated data:
sopt[0] := 0
bopt[0] := 0
[sopt; bopt] :=
    for m ∈ 1 .. samples - 1
        sopt[m] ← α_opt*d[m] + (1 - α_opt)*(sopt[m - 1] + bopt[m - 1])
        bopt[m] ← α_opt*β_opt*(sopt[m] - (sopt[m - 1] + bopt[m - 1])) + bopt[m - 1]
    [sopt; bopt]
P[n] :=
    sopt[n] if n < r
    sopt[n - r] + r*bopt[n - r] otherwise
# Change the number of steps ahead that predicted by changing r. As was the case with smoothing, we can see that the double exponential method copes well with the trend in the data, but not with the periodicity.
r ≡ 3
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## Other smoothing techniques
# This shows a single example of smoothing by signal averaging. Exponential smoothing, and other built-in functions for smoothing, windowing and signal manipulation, are available in the Signal Processing Extension Pack and the Image Processing Extension Pack, available separately from PTC.
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