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# PRECONDITIONING DATA
# Smoothing by Windowing
# cfft(vx) | icfft(VX)
# Filtering, the process of convolving or multiplying a time series by another function, can be used for smoothing and other data preprocessing. For example, a lowpass window function multiplied in the Fourier transform domain can be used for smoothing.
# Consider a sampled time series with a random and increasing trend,
samples := 2^7
n := 0 .. samples - 1
f(x) := sin(x)^12 + 2 + rnd(1) + .1*x
t[n] := n/100*3*π
d[n] := f(t[n])
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## Filtering in the transform domain
# The first step in smoothing by filtering is to remove the linear trend; otherwise, the transform mostly displays frequency components of the linear signal, and not the higher frequency content. Make a vector representing the time of each sample and use the slope function:
r := slope(t, d)
# Remove the trend:
dd := d - t*r
# Take the transform:
D := cfft(dd)
# The complex DFT is used here, but we could have used the real-signal FFT or fft, as well, since our data is real and of length 2^n.
# The transformed spectrum will be samples long, and symmetric around the center, with DC on the ends of the spectrum, and higher frequencies in the center. Window the transform by zeroing the high frequency components in the middle, saving only the beginning and the end, which represent the low frequencies.
# [area: Windowing functions]
## Rectangular window
WRectangle(Index, Length, samples) := (|Index - samples/2| ≥ (samples/2 - Length))
## Bartlett (triangular) window
WBartlett(Index, Length) := if(Index ≤ (Length - 1), |1 - Index/(Length - 1)|, 0)
## Hanning window
WHanning(Index, Length) := if(Index ≤ (Length - 1), .5 + .5*cos(π*Index/(Length - 1)), 0)
## Hamming window
WHamming(Index, Length) := if(Index ≤ (Length - 1), .54 + .46*cos(π*Index/(Length - 1)), 0)
## Blackman window
WBlackman(Index, Length) := if(Index ≤ (Length - 1), 0.42 + 0.5*cos(π*Index/(Length - 1)) + 0.08*cos(2*π/(Length - 1)*Index), 0)
## Kaiser window with parameter b
WKaiser(Index, Length, β) := if(Index ≤ (Length - 1), I0(β*sqrt(1 - (Index/(Length - 1))^2))/I0(β), 0)
M(i, L) := [
    WRectangle(i, L, samples);
    WBartlett(i, L);
    WHanning(i, L);
    WHamming(i, L);
    WBlackman(i, L);
    WKaiser(i, L, 2*π)
]
W(length, window) :=
    "no window selected" if window == 0
    for i ∈ 0 .. samples/2
        winval ← M(i, length)[window - 1]
        W[i] ← winval
        W[mod(samples - i, samples)] ← winval
    W
# This writes a window centered around 0, so the DC component is always included, and there are always an odd number of samples.  Then, the remaining window components are copied to the other end of the frequency cycle using the mod function.
# Different window shapes change how much of the mid-frequency band is retained. Select a window:
# [component: outputs window]
w := samples/8
# Construct a window of width w using the selected window shape. Note that you have to select an appropriate width for each shape.
# Apply the window by multiplying it with the transformed spectrum:
DW := vectorize(W(w, window)*D)
# Now invert and add the trend back in.
dw := icfft(DW) + t*r
# Most of the noise has been removed, but also some of the periodicity of the original signal. You can select how much noise to remove vs. how much of the frequency content of the signal to retain by adjusting the window width.
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# This technique is appropriate for periodic signals with slight trends and noise at a frequency much higher than the original signal, but is less successful when the trend is strong, or the data has a shape which requires wide frequency content to describe it. You may wish to consider one of the other smoothing techniques described in this section for other types of data.
## Other filtering techniques and windows
# This shows a single example of smoothing by windowing, where a window was used in the transform domain to low-pass filter the data. If you require more information on time-series filtering, filter design, and additional built-in functions for windowing and signal manipulation, many are available in the Signal Processing Extension Pack and the Image Processing Extension Pack, available separately from PTC.
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