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# APPENDICES
# Appendix A: New Functions List
# Note: Place your cursor on any function name below and press [F1] to go to the Help page description for it.
Bicubic2D(vx, vy, Z, p, q)
# Interpolates between 2-D values in Z, with locations x and y, at intermediate points p and q. See Example file.
Binterp(x, b)
# Interpolates results b from Spline2 at point x, along with the first, second, and third derivatives. See Example file.
confidence(vx, vy, F, b, conf)
# Returns the confidence limits on the parameters b of a fitting function F(x,b) fit to the data vx and vy. See Example file.
contingtbl(M)
# Returns chi-squared, degrees of freedom, probability that chi-squared or larger would occur if variables had no association, Cramer's V, and the contingency coefficient, C for a contingency table M. See Example file.
DWS(b)
# Takes a vector, b, the result vector from the Spline2 function and returns the Durbin-Watson statistic of the Spline. See Example file.
filterNaN(v)
# Trims the elements or rows or data that have NaNs.
# See Example file.
Ftest(v1, v2)
# Tests the hypothesis that v1 and v2 are drawn from distributions having the same variance. Returns the F statistic, and the probability that a value this large or larger would occur when the distributions have the same variance. See Example file.
Grubbs(v, a)
# Returns indices of suspected outliers, and their Grubbs test statistics for a confidence level a. See Example file.
GrubbsClassic(v, a)
# Returns index of the data point most likely to be an outlier and its Grubbs test statistic for a confidence level a. See Example file.
Hlookup(z, a, row, modifier)
# Looks in the first row of A for values matched by z according to the boolean modifier. Returns the value(s) in the matched column(s) in row r. See Example file.
kendltau(v1, v2)
# Returns Kendall's tau, number of standard deviations from 0, and the probability that a value this large or larger would occur if the samples were uncorrelated. See Example file.
kendltau2(M)
# Returns Kendall's tau, number of standard deviations from 0, and the probability that a value this large or larger would occur if contingency table M were uncorrelated. See Example file.
LeastSquaresFit(vx, vy, F, guess, conf, Stdy, LBUB, Acc)
# Returns parameters and their confidence limits for the nonlinear fitting function F for the data vx and vy, for a confidence level conf, with optional standard deviations Stdy and optional lower and upper bounds on acceptable parameter values. Acc is the convergence accuracy. See Example file.
loadings(Nipals)
# Returns the loadings of the principal components (eigenvalues) from multivariate data returned by the Nipals function. See Example file.
localmax(M, w)
localmax(x, y, M, w)
# Returns the local maxima in data by nearest neighbor comparison, with an optional window width w of comparison points. See Example file.
localmin(M, w)
localmin(x, y, M, w)
# Returns the local minima in data by nearest neighbor comparison, with an optional window width w of comparison points. See Example file.
Lookup(z, A, B, modifier)
# Looks in A for values matched by z according to the boolean modifier. Returns the value(s) of the corresponding elements in B.
# See Example file.
markNaN(v, vindex)
# Changes each element in data specified by vindex to contain a NaN. See Example file.
Match(z, A, modifier)
# Returns the indices of entries in A which match z according to the boolean modifier. See Example file.
matchNaN(data)
# Returns the index or pair of indexes of the NaN entries in data. See Example file.
Nipals(DATA, numPC, maxiter, "scale/noscale", Acc)
# Returns scores, loadings, accumulated variance explained, and principal components (eigenvalues) from multivariate data using a maximum of maxiter iterations. Acc specifies the termination accuracy used for eigenvalue generation. Data may be optionally scaled to the standard deviation. See Example file.
Nipals2(Nipals, numAddPC)
# Returns scores, loadings, accumulated variance explained, eigenvalues for numPC additional principal components (eigenvalues), given the results calculated by Nipals. See Example file.
order(v)
# Returns the index in which the entries of v occur if sorted, based on the current value of ORIGIN. See Example file.
PCAeigenvals(Nipals)
# Returns the principal components (eigenvalues) from multivariate data returned by the Nipals or Nipals2 function. See Example file.
PCAvariance(Nipals)
# Returns the accumulated percentage of variance explained by the calculated principal components (eigenvalues) returned by the Nipals or Nipals2 function. See Example file.
percentile(v, p)
# Returns the number of values in v below p percent of the total number of points. See Example file.
polycoeff(vx, vy)
# Returns the coefficients of the interpolating polynomial function. See Example file.
polyint(vx, vy, x)
# Returns interpolated value at x using a polynomial function, and the expected error. See Example file.
polyiter(vx, vy, x, N, ε)
# Returns interpolated value at x using a polynomial function with maximum order N and maximum error, e. Also returns the calculated error, and whether the function converged. See Example file.
# qqplot(v1,[v2 or "distribution"])
# Returns points on a probability plot. If only v1 is specified, quantiles for v1 and the normal distribution are returned. If v2 is specified, quantiles for v1 and v2 are returned. If 'Weibull' is specified, returns natural log quantiles for v1 and the Weibull quantiles. See Example file.
Rank(v)
# Returns the averaged position at which each value in v appears in a sorted list of the data. See Example file.
rationalfit(vy, vy, conf, m, n, Stdy, LBUB, Acc, "noscale")
# Returns parameters and their confidence limits for a rational polynomial fit of order m on the top and n on the bottom.
# See Example file.
rationalfitnp(vx, vy, conf, m, n, Stdy, LBUB, Acc, "noscale")
# Same as rationalfit, but can return rational function parameters that have no poles in the data range, vx. See Example file.
rationalint(vx, vy, x)
# Returns interpolated value at x using rational functions, and the expected error. See Example file.
Scale(M, min, max)
# Scales all values in M between min and max. See Example file.
scores(Nipals)
# Returns the scores of the principal components (eigenvalues) from multivariate data returned by the Nipals or Nipals2 function. See Example file.
Spear(v1, v2)
# Returns Spearman's rank correlation coefficient and associated statistics. See Example file.
Spline2(vx, vy, n, vw, u, level)
# Returns the optimal set of degree-n B-spline knots to interpolate on data vx and vy, with optional weights vw, optional desired knots u, and an optional reject level. Output is used with Binterp. See Example file.
Thiele(vx, coeff, x)
# Returns the interpolated data value at x using Thiele continued fraction interpolation. Requires the coefficients calculated by Thielecoeff. See Example file.
Thielecoeff(vx, vy)
# Returns the interpolation coefficients for x-y data using Thiele continued fraction interpolation. Output is used with Thiele. See Example file.
ThreeSigma(v)
# Returns indices of points in v whose mean divided by standard deviation is greater than three (outlier test), and the value of this quantity for each point. See Example file.
trim(v, vindex)
# Trims out the entries (rows) specified by vindex. See Example file.
VHlookup(z1, z2, A, c, modifier)
# Looks in the first column and row of A for values matched by z1 and z2 according to the boolean modifier. Returns the value(s) in the intersection of matched rows and columns. See Example file.
vhlookup(z1, z2, A)
# Looks in the first column and row of A for values matched by z1 and z2. Returns the value(s) in the intersection of matched rows and columns. See Example file.
Vlookup(z, A, c, modifier)
# Looks in the first column of a matrix, A, for values matched by z according to the boolean modifier. Returns the value(s) in the matched row(s) in column c. See Example file.
VSmooth(v, w)
# Takes a vector of complex-valued data, a vector of integer window-widths, w, and repeatedly median smoothes data until no additional change has occurred for each window width. See Example file.
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