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# APPENDICES
# Appendix B: Functions as Mathcad Programs
# Although these functions are now built into Mathcad for you to use in any of your documents, these prototype Mathcad programs may help you to see ways in which you could write new functions.
# filterNaN(v)
filterNaN1(data) :=
    data ← transpose(data)
    trimi ← 0
    for i ∈ 0 .. cols(data) - 1
        if IsScalar(matchNaN(data[:, i]))
            trimmed[:, trimi] ← data[:, i]
            trimi ← trimi + 1
    return transpose(trimmed)
# localmax(Data,n)
localmax1(Data, n) :=
    count ← 0
    error("window must be integer greater than or equal to 1") if n < 1 or (trunc(n) ≠ n)
    error("window cannot be wider than half of data range") if n/2 > rows(Data) - 1
    Δ1 ← n
    Δ2 ← rows(Data) - 1 - n
    for i ∈ 0 .. rows(Data) - 1
        Start ← i - n if i ≥ Δ1
        Start ← 0 otherwise
        Stop ← i + n if i ≤ Δ2
        Stop ← rows(Data) - 1 otherwise
        compoints ← submatrix(Data, Start, Stop, 1, 1)
        if sum(compoints > Data[i, 1]) == 0
            Val[count, 0] ← Data[i, 0]
            Val[count, 1] ← Data[i, 1]
            count ← count + 1
    return Val
# localmin(Data,n)
localmin1(Data, n) :=
    count ← 0
    error("window must be integer greater than or equal to 1") if n < 1 or (trunc(n) ≠ n)
    error("window cannot be wider than half of data range") if n/2 > rows(Data) - 1
    Δ1 ← n
    Δ2 ← rows(Data) - 1 - n
    for i ∈ 0 .. rows(Data) - 1
        Start ← i - n if i ≥ Δ1
        Start ← 0 otherwise
        Stop ← i + n if i ≤ Δ2
        Stop ← rows(Data) - 1 otherwise
        compoints ← submatrix(Data, Start, Stop, 1, 1)
        if sum(compoints < Data[i, 1]) == 0
            Val[count, 0] ← Data[i, 0]
            Val[count, 1] ← Data[i, 1]
            count ← count + 1
    return Val
# markNaN(data, index)
markNaN1(data, index) :=
    if IsArray(index[0])
        "case where index is an array of nested matrix indices"
        for i ∈ 0 .. rows(index) - 1
            data[index[i][0], index[i][1]] ← NaN
    otherwise
        "case where index is a vector of vector indices"
        for i ∈ 0 .. last(index)
            data[index[i]] ← NaN
    data
# matchNaN(v)
matchNaN1(v) :=
    match ← 0
    for i ∈ 0 .. last(v)
        if IsNaN(v[i])
            index[match] ← i
            match ← match + 1
    index
# order(v)
order1(x) :=
    sorted ← sort(x)
    ind ← 0
    for i ∈ 0 .. last(x)
        m ← match(x[i], sorted)
        if length(m) > 1
            found[ind] ← x[i]
            repeats ← length(match(x[i], found))
            order[i] ← m[repeats - 1]
            ind ← ind + 1
        order[i] ← m[0] otherwise
    order
# percentile(v,p)
percentile1(x, p) :=
    n ← rows(x)
    pos1 ← (p*n + p) - 1
    position ←
        0 if pos1 ≤ 0
        pos1 if 0 < pos1 < n - 1
        n - 1 if pos1 ≥ n - 1
    between_entries ← position - floor(position)
    sorted ← sort(x)
    percentile ← sorted[floor(position)] + between_entries*(sorted[ceil(position)] - sorted[floor(position)])
    percentile
# polyiter(vx,vy,x,N,ε)
polyiter1(vx, vy, x, N, ε) :=
    for k ∈ 0 .. N - 1
        Y[1, k] ← (vy[k]*(x - vx[k + 1]) - vy[k + 1]*(x - vx[k]))/(vx[k] - vx[k + 1])
    Converged ← 0
    for m ∈ 2 .. N
        if Converged == 0
            m_max ← m
            k ← 0
            while k ≤ N - m
                if Converged == 0
                    Y[m, k] ← (Y[m - 1, k]*(x - vx[k + m]) - Y[m - 1, k + 1]*(x - vx[k]))/(vx[k] - vx[k + m])
                    y ← Y[m, k]
                    Converged ← 1 if (|Y[m, k] - Y[m - 1, k]| < ε) and k == 0
                k ← k + 1
    [Converged; m_max; y]
# qqplot(v1,[v2/"distribution"])
qqplot1(y1, y2) :=
    error("The first argument must be a vector") if IsArray(y1) == 0
    error("The second argument must be a vector or a recognized distribution") if (IsArray(y2) or IsString(y2)) == 0
    if IsArray(y2)
        len1 ← length(y1)
        len2 ← length(y2)
        pts ← if(len1 < len2, len1, len2)
        for j ∈ 0 .. pts - 1
            p[j] ← (100*j/(pts - 1) + 0.3175)/(100 + 0.365)
            Plot[j, 0] ← percentile(y1, p[j])
            Plot[j, 1] ← percentile(y2, p[j])
    if IsString(y2)
        pts ← length(y1)
        for j ∈ 0 .. pts - 1
            p[j] ← (100*j/(pts - 1) + 0.3175)/(100 + 0.365)
            if y2 == "weibull"
                Plot[j, 0] ← ln(percentile(y1, p[j]))
                Plot[j, 1] ← ln(-ln(1 - p[j]))
            otherwise
                Plot[j, 0] ← percentile(y1, p[j])
                Plot[j, 1] ← qnorm(p[j], 0, 1)
    Plot
# Rank(v)
Rankdemo1(x) :=
    sorted ← sort(x)
    for i ∈ 0 .. length(x) - 1
        m ← match(x[i], sorted) + 1
        rank[i] ← mean(m)
    rank
## Supsmooth(v)
LocLin(x, y, n) :=
    medsmooth(x, n) if mod(n, 2) == 0
    otherwise
        sy ← y
        N ← last(x)
        for i ∈ (n - 1)/2 .. N - ((n - 1)/2)
            xtemp ← submatrix(x, i - (n - 1)/2, i + (n - 1)/2, 0, 0)
            ytemp ← submatrix(y, i - (n - 1)/2, i + (n - 1)/2, 0, 0)
            m ← slope(xtemp, ytemp)
            b ← intercept(xtemp, ytemp)
            sy[i] ← m*x[i] + b
        sy
## Thielecoeff(vx,vy)
Thielecoeff1(x, y) :=
    ε ← 10^-18
    n ← rows(x)
    for i ∈ 0 .. n - 1
        M[i] ← y[i]
    for j ∈ 1 .. n - 1
        for i ∈ j .. n - 1
            dM ← M[i] - M[j - 1]
            dM ← ε if |dM| < ε
            M[i] ← (x[i] - x[j - 1])/dM
    for i ∈ 0 .. n - 1
        c[i, 0] ← x[i]
        c[i, 1] ← M[i]
    return c
# trim(vdata,vindex)
trim1(data, index) :=
    data ← transpose(data)
    trimi ← 0
    for i ∈ 0 .. cols(data) - 1
        try
            match(i, index)
        on error
            trimmed[:, trimi] ← data[:, i]
            trimi ← trimi + 1
    return transpose(trimmed)
# VSmooth(v, w)
Smooth(x, w) :=
    maxit ← 100
    sx ← medsmooth(x, w)
    sx2 ← medsmooth(sx, w)
    counter ← 1
    while (1 - (sx == sx2))*(counter < maxit)
        sx ← sx2
        sx2 ← medsmooth(sx, w)
        counter ← counter + 1
    sx2
VSmooth1(x, W) :=
    n ← length(W)
    ax ← x
    for i ∈ 1 .. n
        ax ← Smooth(ax, W[i - 1])
    ax
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