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# PRECONDITIONING DATA
# Parametric Prediction
# genfit(vx,vy,guess,F(x,β))
# Given time-series data, the function genfit can be used to fit a function of time to that data. This function can then be used to predict future values for the time series. This example shows how to do just that and compare the results with predict.
# Our example data is as follows:
# [component: outputs D]
i := 0 .. last(D)
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# Given the oscillating nature of this data, try to fit a function of the form:
a*cos(b*x) + c*sin(d*x) + k
# Define
t[i] := i
# as the horizontal axis value.
# Also define the necessary function for genfit:
F1(t, C) := [
    C[0]*cos(C[1]*t) + C[2]*sin(C[3]*t) + C[4];
    cos(C[1]*t);
    -C[0]*t*sin(C[1]*t);
    sin(C[3]*t);
    C[2]*t*cos(C[3]*t);
    1
]
# Last, make a guess for the unknown parameters:
guess := [5; 3; 5; 4; 5]
# Now determine the fit:
Cfit := genfit(t, D, guess, F1)
Cfit = [5.27641; 3.14159; 0.162158; 4.2296; 6.64675]
# Let's look at our fit:
S1(t) := Cfit[0]*cos(Cfit[1]*t) + Cfit[2]*sin(Cfit[3]*t) + Cfit[4]
tr := 0, 0.1 .. 16
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# Not bad!  Now let's use the function definition to estimate some future values . . .
Nvals := 4
k := 1 .. Nvals
Tfuture[k - 1] := t[last(t)] + k
P1 := vectorize(S1(Tfuture))
P1 = [11.7624; 1.42645; 12.0319; 1.21329]
# For comparison, compute similar values with predict:
P2 := predict(D, 8, Nvals)
P2 = [12.9091; 1.3505; 11.7695; 1.24395]
# Both approaches capture the periodic nature of the data,
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# which is not surprising since we have seen that predict  assumes periodic results, while in the case of genfit we intentionally fitted a periodic function.
# Numerically the predicted values differ:
P1 = [11.7624; 1.42645; 12.0319; 1.21329]
P2 = [12.9091; 1.3505; 11.7695; 1.24395]
P1 - P2 = [-1.14672; 0.0759461; 0.262345; -0.030664]
# We emphasize that there is no reason to expect the two methods to agree. They are both doing something that is essentially impossible: predicting the future. It is important to use whatever method best suits your knowledge of the data. If you have enough knowledge regarding the source of the data and can reasonably guess the form of a function to fit the data, use genfit. Otherwise, use predict or some other method.
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