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# DESCRIPTIVE STATISTICS
# Histograms
# hist(n,M) | histogram(n,M)
# Mathcad provides two kinds of histogram functions. Both take either the number of data intervals or a vector of interval endpoints, and the data vector. Both count the number of data points greater than or equal to the bottom and less than (not equal to) the top value of each interval. The hist function returns the number of counts in each bin only, while the histogram function returns the midpoints of the intervals as well, for easier plotting. If any data are complex numbers, the imaginary part will be ignored.
# [component: outputs Data]
# To investigate the relevance of the Batch on the results, divide the data into two sets and compare them. To prepare the data, trim off the text labels, and pull out the two columns of interest, 2 and 3:
BatchData := submatrix(Data, 1, rows(Data) - 1, 2, 3)
# Create two data vectors by Batch from the data in column 1 using lookup functions:
batch1 := vlookup(1, BatchData, 1)
batch2 := vlookup(2, BatchData, 1)
# Create a set of bins for the two data sets, rather than letting the histogram function calculate them, so they can be compared on the same intervals:
j := 0 .. 20
bins[j] := j*25 + min(BatchData[:, 1])
# Examine a bihistogram of the two data sets. Batch 2 is skewed from Batch 1 in its average strength.
hist1 := histogram(bins, batch1)
hist2 := histogram(bins, batch2)
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# Use these functions to count the number of data points in any single interval by writing a two-element vector for interval- endpoint argument. Note that hist only counts elements less than the top of the interval. Change the second endpoint to 40.1 to see the difference in counts.
ages := [23; 47; 39; 22; 51; 40; 28; 55]
hist([25; 40], ages) = [3]
# Note that the output is, in this case, a single-element vector.
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