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# UTILITIES
# Data Input and Output
# READPRN("filename") | READBIN(z, A)
# WRITEPRN("filename", [M]) | WRITEBIN(z, A, r, [M])
# APPENDPRN("filename", [M])
# READFILE("filename", "type", [colwidths],
# [rows], [cols], [emptyfill])
# Data Import Wizard
# Data Tables | Data Input/Output Components
# Scriptable Object Components
# Third Party Components: Excel, ODBC, Matlab, etc.
# A variety of methods exist for importing and exporting data to and from Mathcad. The Data Wizard, File Input and Output components, Third Party Components, and Data Tables, all available from the Insert menu, give you the most control over your data source format, which rows and columns are read, and delimiters between data.
# Data can also be read from a file and written to a file with a variety of command-line functions, the READFILE function for text, Excel, and other file formats, with options for limiting the number of rows and columns, and the READPRN/WRITEPRN/ APPENDPRN (for text files) and READBIN/WRITEBIN (for binary files) functions. These functions, and the Data Wizard, also work with Mathcad's nested matrix format (see Mathcad Help for more information on nested matrices).
## Data Wizard
# To import a file with the most flexible import options, use the Data Wizard. Choose Insert>Component then choose Data Import Wizard from the resulting list. The Wizard allows you to read a large variety of file formats - including binary, fixed-width, and database formats - preview the data, select delimiters, visually or numerically select rows and columns to import, and control other preferences, such as how to deal with missing values.
# For example, here is a Data Wizard-created component that reads a text file with headers, starts at the appropriate row, and uses a specified delimiter. The component displays the data in a data table, or, if desired, just the file name.
# [component: outputs Wizard]
# Properties can be set by right-clicking in the top left corner. Doing so allows you to change the import settings, but not the file type. If you want to start over, right-click in the top left corner and choose Import. You can also right-click and choose Add Input Variable. You may then type the file name and path into the input variable for quicker swapping of files with the same import options.
# The Wizard panels allow you to set delimiters, starting row, separator text, included or disincluded rows and columns, and other options, all of which will update the preview panel as they are changed.
# Note that large data files may take a little time to refresh in the data preview. For this reason, we have limited the preview to 100 lines in the panes that allow you to select delimiters and text qualifiers, and to 250,000 elements in the final pane which allows you to click-select which rows and columns to include in the final import. You still can include or disinclude rows and columns that are not displayed using the input text boxes, specifying ranges manually, you just cannot preview them all.
## READFILE function
# You can also read data files using the READFILE function, designed to give you some of the same options as the Data Wizard. The following program uses READFILE to pack sequential Excel files into a nested matrix of data.
batch_read(dataname) :=
    for i ∈ 0 .. last(dataname)
        filename ← dataname[i]
        M[i] ← READFILE(filename, "Excel", 2)
    M
filenames := ["mydata1.xls"; "anotherdataset.xls"; "somenewdata.xls"]
data := batch_read(filenames)
data = [
    [1, 1; 2, 4; 3, 9; 4, 16; 5, 25; 6, 36]; [1, 1; 2, 4; 3.3, 10.89; 4, "01/15/1900"; 5.1, "01/25/1900"; 6, "02/04/1900"]; [1, 1; 2, 4; 2.8, 7.84; 4.4, 19.36; 5.61, 31.4721; NaN, NaN]
]
data[1] = [1, 1; 2, 4; 3.3, 10.89; 4, "01/15/1900"; 5.1, "01/25/1900"; 6, "02/04/1900"]
# The READFILE function is very flexible. It has a number of optional arguments that can be used to control which rows and columns get read. The required arguments are the filename, with a path, if appropriate, and a file type. The allowed types are "delimited", "fixed" (for fixed-width records), and "Excel". If you specify the "fixed" type, the next argument must be a column vector which holds the widths of each column.
READFILE("data3.txt", "fixed", [14; 14; 14; 14]) = [
    1.78769e-5, 0.000111718, 2.79802e-5, 0.000112716;
    3.89495e-5, 0.000113799, 5.08591e-5, 0.000114973;
    6.37894e-5, 0.000116246, 7.78279e-5, 0.000117626;
    9.30698e-5, 0.000119122, "end of data", NaN
]
# The subsequent arguments, rows and columns, can either be a single integer specifying the starting row and starting column, or a two-element column vector specifying the starting and ending rows and columns, for example:
READFILE("Lanczos1.dat", "delimited", [2; 5], 1) = [2.04433, 0.05; 1.6684, 0.1; 1.36642, 0.15; 1.12323, 0.2]
# The last argument allows you to specify what Mathcad value should be used to fill any missing entries (unfilled columns in any given row). You can use the new NaN value here, if you wish.
# Note that the Data Wizard and the READFILE command execute every time a Mathcad document is recalculated. If you wish to import data only once, use a Data Table.
## Data Tables
# To insert a Data Table, click in a blank space in your worksheet, and choose Data > Table from the Insert menu, or right-click in a blank space and select Insert > Table from the menu. When you click on a Data Table, scroll bars appear if the data set is large. Data Tables can be used for typing entries individually, or for one-time importing of data (no link is retained to the original data source) permanently into Mathcad. Data is then stored inside the .xmcd file.
# [component: outputs Data]
# This Data Table contains annual sunspot totals from 1700 to 1995. The data was input to the table by right clicking in the box at the upper left, then selecting Import from the menu. Note that various spreadsheet formats, such as Excel data, can also be imported this way.
# To extract the sunspot data for a particular year, use a lookup function:
year := 1956
vlookup(year, Data, 1) = [142]
# Once this data has been embedded in your Mathcad worksheet, you can use it as you would any Mathcad matrix:
year := Data[:, 0]
count := Data[:, 1]
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## Writing data
# To write data to a file, use a File Output component or the WRITEPRN command:
# [component: inputs Data]
# or
out := WRITEPRN("sunspots.prn", Data)  # error: Permission denied
# Right-click on the disk icon that represents the File Output component, and choose Properties. This dialog shows you the options for File Output. In this example, the Data Range tab has been used to output only the data for rows 50 to 100 from Data. The WRITEPRN statement outputs the whole file, and returns the value of the Data to the assigned variable, out.
# The construction shown here is new functionality for the WRITEPRN function, not what is documented in Help. Here, the matrix containing the data, Data, is given as a second, optional argument to WRITEPRN, rather than putting the function on the left-hand side of the definition. Doing so allows you to use the function in global definitions or inside programs. For example, it's possible to write out a series of data files, each containing a subset of the sunspot data, by creating a short program:
write_subsets(Data, Rows) :=
    for i ∈ 0 .. floor(rows(Data)/Rows)
        filename ← concat("output", num2str(i), ".prn")
        datasubset ← submatrix(Data, Rows*i, Rows*(i + 1) - 1, 0, cols(Data) - 1) if Rows*(i + 1) < rows(Data)
        datasubset ← submatrix(Data, Rows*i, rows(Data) - 1, 0, cols(Data) - 1) otherwise
        WRITEPRN(filename, datasubset)
    1
write_subsets(Data, 100) =  # error: Permission denied
# Any time a worksheet is recalculated, the File Output component and the WRITEPRN function will recalculate, overwriting the original file. If you wish to retain previous values and add to the end of the file, use APPENDPRN:
makeafile :=
    for i ∈ 0 .. 10
        M[i] ← i
        APPENDPRN("counting.txt", M)
    M  # error: access denied
# The APPENDPRN function will create a file if none exists under that name; otherwise, it will append data to the end of the file.
# If desired, you can even write or read files from a directory other than the one in which your document is stored by using a relative or absolute path name with the ***PRN functions. You may find the CWD variable useful for constructing paths.
# The CWD built-in variable returns the path to the current document once it's been saved. You can use the search and substr functions to pull off pieces of this path
path := CWD  # (current working directory)
path = "C:\Extension Packs\Data Analysis\"
mydir := search(path, "\", 4)
mydir = 18
substr(path, mydir, strlen(path)) = "\Data Analysis\"
# and the concat function, as shown above, to concatenate the path with the file name.
## Reading Data
# Read back in the data that we wrote with the File Output component. Recall that we only stored lines 50 through 100.
# [component: outputs sun50_100]
length(sun50_100[:, 0]) = 51
## Batch reading of data
# Here's another example of reading files in batch mode using READPRN with a consistent and sequential file naming structure:
batch_read2(dataname, files) :=
    for i ∈ 0 .. files - 1
        filename ← concat(dataname, num2str(i), ".prn")
        M[i] ← READPRN(filename)
    M
batch_read2("output", 3) = [
    [
        1700, 5;
        1701, 11;
        1702, 16;
        1703, 23;
        1704, 36;
        1705, 58;
        1706, 29;
        1707, 20;
        1708, 10;
        1709, 8
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    ];
    [
        1800, 15;
        1801, 34;
        1802, 45;
        1803, 43;
        1804, 48;
        1805, 42;
        1806, 28;
        1807, 10;
        1808, 8;
        1809, 3
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    ];
    [
        1900, 10;
        1901, 3;
        1902, 5;
        1903, 24;
        1904, 42;
        1905, 64;
        1906, 54;
        1907, 62;
        1908, 49;
        1909, 44
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    ]
]
## Binary files
# Binary files can be read much like .PRN text files, with the following available types:
#
# - "double" (64 bit floating point),
# - "float" (32 bit floating point),
# - "byte" (8 bit unsigned integer),
# - "uint16" (16 bit unsigned integer), or
# - "uint32" (32 bit unsigned integer)
File := READBIN("binarydata.bin", "float")
# These first two arguments are the only required arguments, but additional options are available to specify columns, rows, and other file features.
File = [0; 1; 2; 3; 4; 5; 6; 7; 8; 9; 10]
# The third argument, endian, indicates whether the data format is big-endian (high byte first) or little-endian (low byte first). Big-endian is represented by 1, and little-endian by 0. Default is 0.
# Remember that if you wish to specify subsequent arguments to READBIN, you must provide values for the previous optional arguments, or Mathcad cannot distinguish which ones you are setting:
c := 2  # number of columns per row, defaults to 1.
skip := 4  # number of bytes to skip at the beginning of the file, defaults to 0.
r := 3  # number of rows to read, defaults to end of file.
File := READBIN("binarydata.bin", "float", 0, c, skip, r)
File = [1, 2; 3, 4; 5, 6]
# The WRITEBIN function takes the file name, in quotes, and the data format, in quotes, with a setting for endian as an optional third argument. Note that if you wish to use WRITEBIN on the right side of a definition, as was done in the programs above using WRITEPRN and APPENDPRN, you need to specify endian before you specify the matrix of data to write into the file.
M := WRITEBIN("binarydata.bin", "float", 0, makeafile)  # error: bad_variable
# The Data Wizard, File Input/Output components, and the PRN and BIN functions, are for interactive reading and writing of data, that is, they execute every time the document is calculated, unlike the importing of data into a Data Table, which happens only once. Note that you can also read Excel files and other spreadsheet files using the File Input/Output components.
## Reading unique formats
# If you need to read data from other applications, such as an ODBC database, choose from third-party components available in the Insert > Component menu.
# If your file type defies all of these descriptions, for example, a text file with no delimiters but a known record length, you can write your own component using VBScript or JavaScript. The Mathsoft Scriptable Object component, available from the Insert > Component menu, or any of the Mathsoft Controls, available from the Insert > Control menu, can be scripted to handle unique file types.
# Here is an example of a Mathsoft pushbutton control that has been scripted to read files. Suppose the path to the file is the same as the path to the current worksheet:
path := CWD
path = "C:\Extension Packs\Data Analysis\"
# Supply the file name, record length, and number of expected columns to be sliced out of the continuous text in the file:
filename := "data2.txt"
reclength := 14
columns := 4
# You can add up to 4 input variables on custom components by right-clicking on the component and choosing Add Input Variable. Right-click and select Edit Script to see the way this Control was written. Some error checking was built-in to warn you if it can't find the file or if it can't read the file. It creates 0's if you ask for more records (reclength*columns) than exist in the file, and it allows you to read in data as either numbers or strings.
# [component: inputs [path, filename, reclength, columns]; outputs Results]
Results = [
    1.78769e-5, 0.000111718, 2.79802e-5, 0.000112716;
    3.89495e-5, 0.000113799, 5.08591e-5, 0.000114973;
    6.37894e-5, 0.000116246, 7.78279e-5, 0.000117626;
    9.30698e-5, 0.000119122, "end of data   ", 0
]
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