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# EXAMPLES
# Numerical Integration of Data
# by Jean Giraud, Richard Jackson, and Leslie Bondaryk
# One common problem in data analysis is that of integrating over a data set which can't be accurately fit with an analytical function. Various discrete techniques can be used, or the data can be interpolated with a function that can then be used to integrate over an arbitrarily close spacing of points, yielding more accurate results.
# Here are two vectors that represent the same exponentially shaped data. They present several challenges for integration routines. First, they are sparse, that is, there is wide spacing between points and they cover a large range of magnitudes. X1 has approximately half the number of points as X2, spanning the same range of values. We wish to integrate over the same limits for both vectors so that we can compare five methods of numerical integration.
f(x) := 25*exp(-41*x) + 0.015
n1 := 25
n2 := 51
# Create a range variable for each data set:
xstart := 0
xend := 0.5
ix1 := 0 .. n1 - 1
ix2 := 0 .. n2 - 1
# Generate vectors for the 51 and 25 point data sets in x and y:
X1[ix1] := (xend - xstart)/(n1 - 1)*ix1
Y1[ix1] := f(X1[ix1])
X2[ix2] := (xend - xstart)/(n2 - 1)*ix2
Y2[ix2] := f(X2[ix2])
[Δx1; Δx2] := [X1[1] - X1[0]; X2[1] - X2[0]]
[Δx1; Δx2] = [0.0208333; 0.01]
Y1 = [25.015; 10.6559; 4.54419; 1.94279; 0.835541; 0.364253; 0.163655; 0.0782734; 0.0419315; 0.0264631; 0.0198791; 0.0170767; 0.0158839; 0.0153762; 0.0151601; 0.0150682; 0.015029; 0.0150123; 0.0150053; 0.0150022; 0.015001; 0.0150004; 0.0150002; 0.0150001; 0.015]
Y2 = [
    25.015; 16.6063; 11.0258; 7.32231; 4.8645; 3.23337; 2.15087; 1.43247; 0.955706; 0.6393
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]
# Spacing for the first data set is 0.0208, and the second is 0.01.
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# Ideally, when integrated, these two sets of data should yield the same area under the curve.
## Trapezoidal and Simpson's rules
# Traditional numerical integration methods use quadrature rules to obtain approximate areas. The simplest of these quadrature methods are the Trapezoidal rule and Simpson's rule. The Trapezoidal rule can be applied to any vector of data, whereas Simpson's rule requires that the number of data points is odd (that is, an even number of divisions). While the Trapezoidal rule fits a straight line to each division (a straight line is drawn from data point to data point) forming trapezoidal areas, which are summed, Simpson's rule fits second degree polynomials or parabolas to three subsequent points, in many instances giving a better approximation to the integrated area.
Trapezoidal(V, h) := h*((V[last(V)] + V[0])/2 + sum(V[i], i = 1 .. last(V) - 1))
Trapezoidal(Y1, Δx1) = 0.653886
Trapezoidal(Y2, Δx2) = 0.625774
Simpsons(V, h) := h/3*(V[last(V)] + V[0] + 4*sum(V[2*i - 1], i = 1 .. last(V)/2) + 2*sum(V[2*i], i = 1 .. (last(V) - 2)/2))
Simp51 := Simpsons(Y1, Δx1)
Simp25 := Simpsons(Y2, Δx2)
Simp51 = 0.618914
Simp25 = 0.61735
# Note that there is much better agreement between the two values using Simpson's rule. Sometimes, it may even be warranted to fit higher degree polynomials to the data, in which case the Newton-Coates formula may be used.
# Integration using interpolating functions
# An better approach is to create an interpolating function, for example using splines, and then apply Mathcad's numerical integration methods to the interpolating function. The advantage of this approach is that the numerical integration methods can have an arbitrarily small step size. What is important in this approach is that the chosen interpolation function is well suited to the shape of the curve it must interpolate. We'll compare three interpolation methods: a cubic spline with parabolic endpoints (pspline), linear interpolation (linterp), and a rational function interpolation (rationalint).
# The pspline:
sx1 := pspline(X1, Y1)
sx2 := pspline(X2, Y2)
psp(x) := interp(sx1, X1, Y1, x)
PSP(x) := interp(sx2, X2, Y2, x)
# The linear interpolation:
lin(x) := linterp(X1, Y1, x)
Lin(x) := linterp(X2, Y2, x)
# And the rational function interpolation:
r(x) := rationalint(X1, Y1, x)[0]
R(x) := rationalint(X2, Y2, x)[0]
# Compare the three methods and the previous results from Simpson's rule. Since both sets of data represent the same curve, we want the values for a similar method to yield similar results.
# 51 points vector | 26 points vector
integral(psp(x), x = 0 .. 0.5) = 0.620809
integral(PSP(x), x = 0 .. 0.5) = 0.617497
integral(lin(x), x = 0 .. 0.5) = 0.653882
integral(Lin(x), x = 0 .. 0.5) = 0.625724
integral(r(x), x = 0 .. 0.5) = 0.617256
integral(R(x), x = 0 .. 0.5) = 0.617256
Simp51 = 0.618914
Simp25 = 0.61735
# The integral of the actual function used to generate this data is
integral(f(x), x = 0 .. 0.5) → 0.617256096799
# Rational spline integration produces a correct value to six significant figures, and furthermore, it produces consistent values for both numbers of data points. Rational function interpolation is particularly well-suited to asymptotic data, and interpolates well between the values even in the sparse case.
# The parabolic-endpoint cubic spline does well in the case where there are more points, but fails somewhat when the data is sparse, as it cannot adequately predict the interim values for this type of curve. Linear interpolation produces much the same result as the Trapezoidal method, as we might expect, since both are drawing straight lines from one data point to the next and finding the area of the resulting trapezoid.
# This comparison should convince you how important it is to choose the most appropriate interpolating method you can, as the errors propagate when you make subsequent use of the data. For example, look at the errors generated by two of the interpolation methods for the missing data points in the sparse vector.
# Generate the interpolated points for the 51 point spacing using the interpolation for the 26 point spacing.
I := vectorize(R(X1))
# Find the associated errors with each of these points, using the second value returned by rationalint.
E[ix2] := rationalint(X1, Y1, X2[ix2])[1]
err := 2*E
# The error is 0 at the points which overlap in Y2, since these were used to generate the interpolating values, but at the interleaved points, the errors are very small.
vectorize(err/Y2) = [
    0; 9.99678e-9; 2.24213e-10; -6.1865e-10; -4.98941e-11; 4.0479e-11; 1.11039e-11; -9.3047e-12; -1.14587e-12; 2.43908e-12
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] %
# If we do the same analysis using the pspline values for the sparse case,
Ipsp := psp(X2)
Epsp := Y2 - Ipsp
# We see much larger errors, particularly at the hard-to-fit initial values on the asymptotic slope.
vectorize(Epsp/Y2) = [
    0; -2.07721; -0.220314; 1.47121; 0.324831; -0.758896; -0.236028; 0.583565; 0.296593; -0.244834
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] %
# This difference accounts for the difference in the integration values.
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