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# EXAMPLES
# Limitations of Linear Correlation and Extrapolation
# by Paul Lorczak
# Linear correlation has the potential to be misinterpreted. This example shows the potential for misunderstanding, and the dangers of extrapolation from fitted parameters. Consider the following example. Let z and y be related by the following formula:
y(z) := .4*z^2 + 5*z + 1
# This is not a linear relationship. However, if we have only data from a small interval, we might compute the correlation coefficient based on an insufficient sampling to see the relationship:
i := 0 .. 19
z[i] := .001*i - .01
fz[i] := y(z[i])
# It is interesting to note that the covariance is quite small:
cvar(z, fz) = 0.000166237
# But from Pearson's correlation coefficient, it looks as if the points are collinear:
corr(z, fz) = 1
# The intercept and slope of this line are
[a; b] := line(z, fz)
[a; b] = [1.00001; 4.9996]
# When we plot the points and the line, we get this graph:
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# It seems conclusive that z and fz are linearly correlated over this small range. Once we move to larger values of z, however, the difference between the true functional value and the assumed linear one becomes apparent.
z[i] := 10*i - 100
fz[i] := y(z[i])
corr(z, fz) = 0.0485987
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# Here is another set of data with what looks like a linear functional relationship.
S := [0; 1; 2; 3; 4; 5; 6]
T := [1; 1.1; 1.2; 1.3; 1.4; 1.5; 1.6]
# Again, we compute the intercept and slope of the best-fitting line.
SL := slope(S, T)
INT := intercept(S, T)
SL = 0.1
INT = 1
j := 0 .. 6
range := .01, .05 .. 6.01
F(u) := 3*sin(12*π/(u - 3)) + 1 + u/10
# When we graph the points, we see that they might be drawn from any number of functions that pass through them. Adequate sampling frequency and range of measurement is critical to draw meaningful conclusions about your data.
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