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# REGRESSION
# General Linear Regression
# linfit(vx,vy,F) | lnfit(vx,vy)
# While data doesn't always follow a straight line, it can often be fit by a function which is a simple linear sum of terms. While the terms don't have to be linear in x, the independent variable, they must be linear in the parameter which multiplies the term in order to be considered a linear fit. Consider the following data:
# [component: outputs data]
X := data[:, 0]
Y := data[:, 1]
# Enter the vector of functions to fit.
F1(x) := [ln(x); sqrt(x); 1]
# Call the linfit function using the data and the vector of functions, F.
params := linfit(X, Y, F1)
# Define a function that uses these newly found parameter values in the logarithmic model. Also, define a range variable over which to graph the function.
f(x) := F1(x)*params
z := min(X) .. max(X)
# A graph of the model function with the newly found parameter values and the original data points reveals a good fit.
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corr(vectorize(f(X)), Y) = 0.979481  # correlation coefficient
## Common linear functions
# A simpler way to perform a customized log fit is by using the lnfit function, which fits data to the model function y == a*ln(x) + b:
T1 := lnfit(X, Y)
T1 = [0.880846; 4.17344]
h(x) := T1[0]*ln(x) + T1[1]
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corr(vectorize(h(X)), Y) = 0.978984  # correlation coefficient
# A sum of powers of x, a polynomial regression, is another kind of linear function. As with natural log fits, this type of regression is so common that a dedicated function has been created, regress, to address this functional form, although it could be calculated with linfit if you wished to define the F(x) vector.
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