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# REGRESSION
# Linear Regression
# line(vx,vy) | slope(vx,vy)
# stderr(vx,vy) | intercept(vx,vy)
# The line, slope, and intercept functions find the least-squares line-of-best-fit through a set of x-y data. The stderr function calculates the error in fitted parameters. Least-squares regression (fitting) uses the idea that the "line of best fit" is the line that minimizes the distances (errors) between each point in the data set and the final fitted line.
# Here, for example, is a set of distances in miles, and how long it takes, in minutes, to drive these distances.
dist := transpose([8, 3, 4, 2, 5, 4, 12, 18, 3])*mi
Time := transpose([30, 15, 30, 10, 16, 15, 30, 60, 15])*min
Npts := length(dist)
i := 0 .. Npts - 1
# We would like to create a linear function estimating how long it should take to drive any distances not specifically given in this data, but of the same general order of magnitude. We don't care whether the points are under or over the line, so we square the distances to get rid of any negative signs, then add them up to get a measure of total distance.
## Slope and intercept
m := slope(dist, Time)
b := intercept(dist, Time)
# When computing slope(x, y) and intercept(x, y), y must represent the quantity you wish to estimate. The order of the arguments to slope and intercept does matter! The least-squares line is given by
ti(d) := m*d + b
m = 2.68137 min/mi
b = 6.9777 min
# which minimizes the sum of the squares of the distances from each point to the line, that is the difference between the actual Y values and the values calculated by the prediction function for each x-value.
sum((Time[i] - ti(dist[i]))^2, i = 0 .. Npts - 1) = 292.124 min^2
# The "Error bar" trace type is used to show the vertical distances from the original points to the line.
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## Line
# As a convenience, the slope and intercept functions are also combined to form the single built-in function, line.
vx := dist/mi
vy := Time/min
params := line(vx, vy)
# intercept
b = 6.9777 min
params = [6.9777; 2.68137]
# slope
m = 2.68137 min/mi
# Note that this produces the same result as the familiar linear algebra expression
X := augment(vx^0, vx^1)
(transpose(X)*X)^-1*(transpose(X)*vy) = [6.9777; 2.68137]
# and also explains why the arguments to the line function must be dimensionless, since slope and intercept will have different dimensions with dimensioned x and y, but packed into the same vector, results must have the same dimension. You can use whichever representation is best suited to your application.
## Using the results
# The resulting parametrized equation from linear or any other type of regression should be used only for values near the original observed data. For example, note that this equation predicts that at a distance of 0 miles, it will take
ti(0*mi) = 6.9777 min
# minutes to drive that distance, which doesn't make sense if the measured time is strictly travel time at constant velocity. In some cases, the measurements may include something mundane, such as waiting time at traffic lights, which must be accounted for in any interpretation of a linear regression.
## The Standard Error
# As a measure of how good the linear fit of a data is, the standard error in the estimate or the standard error in y given x is defined to be
x := dist
y := Time
sqrt(1/(length(x) - 2)*sum((y - (m*x + b))^2))
# where x and y are the paired data vectors being fitted, and m and b are the slope and intercept of the linear fit, respectively. The df := length(x) - 2 expression represents the degrees of freedom in the problem. This is the number of data points minus the number of fitted parameters. So the standard error is really the sum-of-squared-distances, the quantity which we minimized to get the fitting equation, divided by the degrees of freedom in the data. This says that the more data you fit with the fewer parameters, the smaller your error is likely to be.
# In the case of the data above, the standard error is
sqrt(1/df*sum((y - ti(x))^2)) = 6.46004 min
# or, as computed by the built-in function
stderr(dist, Time) = 6.46004 min
# This is the square root of the mean squared error, MSE, or σ^2.
# The standard error in the slope is given by
slope_err := stderr(x, y)/sqrt(sum((x - mean(x))^2))
slope_err = 0.431415 min/mi
# and the standard error in the intercept is given by
int_err := stderr(x, y)*sqrt(1/length(x) + mean(x)^2/sum((x - mean(x))^2))
int_err = 3.55463 min
# You can get the standard deviation (error) in both variables at once using
H := (transpose(X)*X)^-1
k := 0 .. last(params)
sβ[k] := stderr(vx, vy)*sqrt(H[k, k])
# where the first entry is the error in the intercept, and the second is the error in slope.
sβ = [3.55463; 0.431415]
## Confidence intervals
# We can use these estimates, together with percentile points from the Student's t distribution with the same degrees of freedom as the regression to form a confidence interval for the estimate of the slope.
# If
α := 0.02
t := qt(1 - α/2, df)
t = 2.99795
# we are (1 - α) = 98 % confident that the correct value of m for this data lies on the interval between m - t*slope_err = 1.38801 min/mi and m + t*slope_err = 3.97473 min/mi.
# Likewise, we are (1 - α) = 98 % confident that the true intercept lies between b - t*int_err = -3.67892 min and b + t*int_err = 17.6343 min.The wide range on this value indicates the high level of scatter in the data.
# This calculation is wrapped up in the confidence function that will be desribed in detail in the section on Quality of Fit.
lsf(x, b, m) := b + m*x
pCI := confidence(vx, vy, lsf, params, 1 - α)
pCI = [10.6566, 2.99795; 1.29336, 0]
# The first column gives the confidence interval on the parameters intercept and slope, and the entry in the second column is the value of the t statistic. Divide the first column by t to get back the standard errors in both parameters:
pCI[:, 0]/t = [3.55463; 0.431415]
# If we wish to calculate a confidence interval for the regression itself, that is, what is the uncertainty on any prediction of a y value made by the regression formula, we would find
confy(x0) := t*stderr(x, y)*sqrt(1/length(x) + (x0 - mean(x))^2/sum((x - mean(x))^2))
# Then you can calculate the confidence interval for any predicted y value:
confy(20*mi) = 18.5482 min
# You can do the same thing with the matrix computations:
CI(x0) := t*stderr(x, y)*sqrt([1, x0]*H*[1; x0])
CI(20) = 18.5482 min
# You can view the entire confidence interval for the regression region:
Upper(x0) := b + m*x0 + confy(x0)
Lower(x0) := (b + m*x0) - confy(x0)
dr := 0*mi, 1*mi .. 20*mi
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# The confidence region for predicted values using the regression formula has a waist near the center of the measured values. This is because these formulas are mean-based, so values predicted closer to the mean of the data are more accurate.
# Note that the confidence limits on the measured values are somewhat different than those for predicted values.
confm(x0) := t*stderr(x, y)*sqrt(1 + 1/length(x) + (x0 - mean(x))^2/sum((x - mean(x))^2))
confm(8*mi) = 20.4998 min
# Likewise, for the matrix calculations
CIm(x0) := t*stderr(x, y)*sqrt(1 + [1, x0]*H*[1; x0])
CIm(8) = 20.4998 min
# These limits apply only at the measured data points, and are probably best viewed as error bars around each value.
Upper(x0) := b + m*x0 + confm(x0)
Lower(x0) := (b + m*x0) - confm(x0)
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# This can be used as a form of outlier detection, where measured values outside the confidence intervals can indicate an outlier.
## Relationship to statistics
# An alternate formula for slope(x, y) is
stdev(y)/stdev(x)*corr(x, y)
# look at the definitions for standard deviation and the correlation coefficient to see what this means in terms of your data.
# An alternative formula for intercept(x, y) is
mean(y) - slope(x, y)*mean(x)
# This means that the least-squares line always passes through the point (mean(x), mean(y)), as illustrated below.
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## Quality of Fit
# A linear regression model can be broken down into components of variation, one due to residual error,
SSE := sum((y - ti(x))^2)  # also known as χ^2,
SSE = 292.124 min^2
# and another due to the regression equation itself.
SSR := sum((ti(x) - mean(y))^2)
SSR = 1612.1 min^2
# The sum of these components equals what we call the total sum of squares:
SST := sum((y - mean(y))^2)
SST = 1904.22 min^2
SSE + SSR = 1904.22 min^2
# The proportion of variation in y that can be explained by the linear regression rather than by using the mean of y alone is given by
corr(dist, Time)^2 = 0.846591
# which is the percentage of the variation in Time explained by the regression model. The rest of the variation is explained by standard deviations in the data.
# There are
DF_RESID := length(x) - 2
# degrees of residual freedom associated with the sum of squares for residual error, because there are two parameters.
# The degrees of freedom for the sum of squares due to regression,
DF_REG := 2
# are the same as the number of independent variables in the model. The degrees of freedom, like the corresponding sum of squares, are additive, so that the degrees of freedom for the total sum of squares equals
DF_TOTAL := DF_RESID + DF_REG
DF_TOTAL = 9
# Dividing a sum of squares by its degrees of freedom provides us with a variance estimate. Mean square error is
MSE := SSE/DF_RESID
# and can be used as an estimate of the population error variance, σ^2, that is, the variance unexplained by the regression model. Similarly, the mean square regression,
MSR := SSR/DF_REG
# supplies us with an estimate for the variance that is explained by the regression.
## The F Statistic
# The ratio of explained variance MSR to unexplained variance MSE gives us another measure of the regression relationship. The test will tell us whether it's reasonable to model our data with a linear regression. Under the null hypothesis of
# H_0: no linear regression relationship (that is, the slope is equal to zero)
# the test statistic
Ft := MSR/MSE
Ft = 19.3149
# has an F distribution with
n1 := DF_REG
# and
n2 := DF_RESID
# degrees of freedom.
α := 0.05
F_a := qF(1 - α, n1, n2)
F_a = 4.73741
# The p-value of the test is given by
p := 1 - pF(Ft, n1, n2)
p = 0.00141409
# The small value of p and Ft > F_a = 1means we can reject the null hypothesis, and we have 1 - α = 95 % confidence that there is a linear relationship between x and y.
## DF
## SS
## MS
## F
DF_REG = 2
SSR = 5803552 s^2
MSR = 2901776 s^2
Ft = 19.3149
DF_RESID = 7
SSE = 1051648 s^2
MSE = 150235 s^2
## p-value
DF_TOTAL = 9
SST = 6855200 s^2
p = 0.00141409
## Coefficient of Determination:
corr(x, y)^2 = 0.846591
# At a glance, we can see the following.
# 1.
# The amount of variability explained by the linear regression (MSR) is larger than the amount due to residual error (MSE) occurring naturally in the sample.
# 2.
# This difference is large enough to conclude that there is significant evidence (the p-value is close to 0) that a linear relationship exists between time and distance.
# 3.
# The coefficient of determination tells us specifically that, if a linear relationship is appropriate,
corr(x, y)^2 = 84.6591 %
# of the variation in y is explained by the regression model.
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