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# NONPARAMETRIC FITTING
# Linear Interpolation
# linterp(vx,vy,x)
# The linterp function performs linear interpolation at a requested point, x, by calculating the line that passes through each pair of points in the data.
## Linear Interpolation
# The linterp function requires the x values to be sorted in increasing order. It calculates intermediate values between points using the best fit line for two adjacent points.
i := 0 .. 9
Time[i] := 2*π*i/10
Height := [2.7; 7.6; 3.6; 4.7; 8.4; 1.8; 6.9; 6; 2.2; 8.6]
j := 0 .. 65
t[j] := 0.1*j
interp_vals[j] := linterp(Time, Height, t[j])
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# As expected, the linterp function draws a straight line between each set of data points. You can see the problem with using linterp to predict values beyond the data range. The interpolation assumes that the last approximation function, the one calculated between the last two points, will continue to be true for all other points on that end of the range. This assumption is seldom appropriate. This difficulty is true for any interpolation method. Prediction of values outside of a data range is fodder for different methods.
# Moreover, the curve that you get with linear interpolation is not smooth at each connecting data point, so there are no defined derivatives of the interpolated curve. For this reason, you may wish to use a cubic spline or B-spline to fit your data.
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