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# DESCRIPTIVE STATISTICS
# Location
# mean(A,B,C,...) | median(A,B,C,...)
# mode(A,B,C,...) | percentile(v,p)
# These functions take single or multiple scalars or arrays, and return the mean, median, and mode, respectively, giving measures of the location of a data point relative to the rest of the distribution. The best choice of location estimator depends on the general dispersion or distribution of your data.
## Mean
# For a set of numeric data, for example:
mfg := [79; 85; 46; 86; 81]
N := length(mfg)
# the arithmetic mean or average of the N values in x is given by
1/N*sum(mfg[i], i = 0 .. N - 1) = 75.4
mean(mfg) = 75.4
# mean is sensitive to change in the value of one or more data points:
mfg[2] := 1.2*mfg[2]
mean(mfg) = 77.24
# If your data set has significant outliers, you may find the mean a poor description of the central location. You can trim the outliers, and find the "trimmed mean" for a better estimate.
## Median
# The median, or "middle value," of a set of data is another metric for central location. It is less sensitive to outliers or small changes in data. A median is the value falling in the middle when data are sorted in ascending order. If there are an odd number of data, there is one data value which is the median.
median(mfg) = 81
sort(mfg) = [55.2; 79; 81; 85; 86]
# The median depends on the relative positions of the data, not on the actual values of every data point, and so is relatively insensitive to small changes in individual data values. Mathcad's median function does not accept complex numbers.
# In the case of an even number of data there is not a unique median. Median values are those that lie between the middle two data values. The convention with data sets containing an even number of data points is to find the average of the two middle data points.
## Mode
# The mode of a data set is the value that occurs with greatest frequency.
mode(mfg) =  # error: no duplicates
# In a data set where there are no repeated values, you see an error message like the one shown above. In the case where more than one data value is repeated with the same frequency, the mode function also gives an error, with the message "multimodal."
i := 0 .. N - 1
mfg2[i] := mfg[i]
mfg2[i + N] := mfg[i]
mode(mfg2) =  # error: multimodal
## Percentiles and Quartiles
# Percentiles measure which values of a data set fall below a certain percentage of the total number of points. So, if your data set has 11 points, the 50th percentile is the value of the median, or 6th point, and so on. The percentile function takes a vector of data and a percentage between 0 and 1 and returns the value of the percentile.
i := 0 .. 10
x[i] := i
percentile(x, 0.50) = 5
percentile(x, 50 %) = 5
median(x) = 5
x = [0; 1; 2; 3; 4; 5; 6; 7; 8; 9; 10]
percentile(x, 0.25) = 2
percentile(x, 0.90) = 9.8
# because there are 11 entries in this vector.
# Note that if the indexed value occurs between two data points, then we have to calculate the amount to add or subtract from an actual point in the data set to give the percentile. A quartile is one of the three percentiles that mark 1/4 of the data:
quartile1 := percentile(mfg, 0.25)
quartile1 = 67.1
quartile2 := percentile(mfg, 0.50)
quartile2 = 81
quartile3 := percentile(mfg, 0.75)
quartile3 = 85.5
# Quartiles are best used for graphical analysis of data in Quantile-Quantile plots.
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