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# UTILITIES
# Matching and Lookup
# Match(z, A, modifier) | Lookup(z, A, B, modifier)
# Vlookup(z, A, col, modifier) | Hlookup(z, A, row, modifier)
# VHlookup(z1, z2, A, modifier) | vhlookup(z1, z2, A)
# Each of these functions look for the value z in a vector or matrix. The degree of precision to which the comparison adheres is determined by the TOL setting of the worksheet. Lowercase versions of these functions are included in Mathcad, and can only do an equality match. The uppercase versions in this extension pack take Boolean modifiers that specify what type of comparison produces a match. The Match function searches for matching values in a vector or matrix, and returns the index(ices) of the elements which contain the value. Lookup, Vlookup, and Hlookup perform the search and return the values in the second array, matrix column, or matrix row at those indices. VHlookup searches for z1 in the first column, z2 in the first row, and returns the value at the intersection of these indices.
# It is possible to search for strings as well as real and complex numbers. Let's examine how the basic, lowercase versions work first.
## match and lookup
carcost := [20000, 16000, 14000; 22000, 17000, 23000; 30000, 23000, 25000]
crashrating := [2, 3, 2; 2, 3, 3; 1, 2, 1]
index := match(23000, carcost)
# You can choose to display the results as either the number of pairs of indices found or the indices themselves.
index = [[2; 1]; [1; 2]]
index[0] = [2; 1]
# Note: to expand nested matrices, double-click on the result, choose the Display Options tab, and check "Expand nested arrays."
index = [[2; 1]; [1; 2]]
# Reference the entry using vector subscripts with the [ key. To get the entry corresponding to these indices in a corresponding table/matrix, use lookup:
lookup(23000, carcost, crashrating) = [2; 3]
## vlookup and hlookup
# Vertical and horizontal lookup are useful for cross-tabulating data in the same table. They attempt to match the value z either in the first horizontal row (hlookup) or vertical column (vlookup), and specify a column (hlookup) or row (vlookup) in the matrix from which to pull the indexed value. This is equivalent to matching and returning just a single index, vertical or horizontal, and specifying the other manually.
# Matching numbers down the first column (vertically) and correlating with measurements in the second column (index 1).
heatrise := [
    "time", "degrees", "volts";
    1, 96.5, 2.6*10^-3;
    2, 97.1, 3*10^-3;
    3, 97.5, 3.3*10^-3;
    4, 98.2, 3.5*10^-3;
    5, 98.3, 3.8*10^-3;
    6, 98.5, 3.9*10^-3
]
ts := 5
col_index := match("degrees", heatrise)[0][1]
vlookup(ts, heatrise, col_index) = [98.3]
# The measured value of temperature at 5 seconds is 98.3.
## Boolean comparisons and search ranges
# The lookup functions return errors if there is no value that exactly matches the one you are searching for. If you want the nearest match or the match within some range, use the capitalized versions of the function names. Suppose you want to find all car costs greater than or equal to 23000 from the first example:
Match(23000, carcost, "geq") = [[2; 0]; [2; 1]; [1; 2]; [2; 2]]
# or all car costs between 15000 and 21000:
Match([15000; 21000], carcost, "range") = [[0; 0]; [0; 1]; [1; 1]]
# The boolean modifier is entered as a string, which can have the following values:
#
# - "near" - returns the value closest to z
# - "gt" - matches everything greater than the value z
# - "lt" - matches everything less than the value z
# - "geq" - matches everything greater than or equal to z
# - "leq" - matches everything less than or equal to z.
# - "not" - matches everything not equal to z.
# - "range" - matches everything in the given range specified as a two element matrix instead of the scalar z.
# The other capitalized lookup functions work the same way:
Vlookup(2.2, heatrise, col_index, "near") = [97.1]
Vlookup(3.9, heatrise, 2, "geq") = [0.0035; 0.0038; 0.0039]
# Remember that the comparison is done on the matched value, in this case, 3.9 in the first column. We get all the values in column 2 that correspond to times that are greater than or equal to 3.9.
## Indexing by values
# The VHlookup function takes a value to be found in the first column, a value to be found in the first row, and returns the matrix element at the two resulting indices. An equivalent lowercase version has also been added that doesn't require a modifier.
vhlookup(4, "volts", heatrise) = [0.0035]
# This statement works fine, because both 4 and "volts" appear in the matrix heatrise. On the other hand,
vhlookup(4.7, "volts", heatrise) =  # error: no matching values found
# does not produce a result, because 4.7 is not an exact match for any of the matrix entries. We have to use a "near" modifier, and the capitalized version of the function, to get a match:
VHlookup(4.7, "volts", heatrise, "near") = [0.0038]
# VHlookup can be used as an effective way to trim unwanted rows and columns from matrices:
VHlookup(20000, 22000, carcost, "not") = [22000, 17000, 23000; 30000, 23000, 25000]
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