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# UTILITIES
# Maxima and Minima
# localmax(x, y, [w]) | localmax(x, y, M, [w])
# localmin(x, y, [w]) | localmin(x, y, M, [w])
# The routines localmax and localmin compare adjacent values in a data set to determine local maxima and minima. The optional window value, w, determines how many points on each side of the point in question must also be smaller or larger for the point to be considered maximum or minimum. Larger windows will help give true maxima for noisy data sets. These functions work for both 2D and 3D data sets.
## Local peaks
# It's sometimes useful to know where the local maxima and minima are in a data set before doing subsequent processing. Consider the following noisy data mimicking radar antenna response:
i := 0 .. 399
noise := runif(400, -0.1, 0.1)
n := 10
ω[i] := -10 + 20/399*i
# Set the data in a two column array
Data1[:, 0] := ω
Data1[:, 1] := n^2/(n + 2*sum((n - k)*sinc(k*ω), k = 1 .. n - 1)) + noise
# [component: outputs w]
w := floor(w)
w =  # no stored result
# Set the window width to the place where only real maxima and minima are found.
Maxima := localmax(Data1, w)
Minima := localmin(Data1, w)
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# The graph shows the local maxima and minima using the actual data values. If you wish to know the absolute maximum for approximate interim values, take the numerical derivative of the interpolated curve and find the places where it is zero.
## Finding functional peaks and troughs
# If you know a functional form for your data, perhaps by using regression techniques, you can find maxima and minima by searching for the roots of the first derivative:
f(x) := 1 - (x + 1)^3 + 2*(x + 1)^2 + 1/10*(x + 1)^4
# There are numerous ways to do this in Mathcad. The method shown below is applicable to polynomials. First, find the polynomial coefficients using live symbolics:
coeff := d/dx(f(x)) coeffs, x; float, 2 → [1.4; -.80; -1.8; .40]
# Use the vector of coefficients as an argument to the polyroots function:
zeros := Polyroots(coeff)
zeros =  # no stored result
x0 := zeros[0]
x1 := zeros[1]
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# Bump points on the graph of the function f(x) are zero crossings for the derivative, which are found by polyroots. You could use the root function for any functional form to find roots one at a time, or you can try the following program, based on the symbolic processor's root finder:
Roots := d/dx(f(x)) solve, x → [-1; 11/4 + 1/4*65^(1/2); 11/4 - 1/4*65^(1/2)]
CriticalPoints :=
    for i ∈ 0 .. last(Roots)
        out[i, 0] ← Roots[i]
        out[i, 1] ← f(Roots[i])
        x ← Roots[i]
        MinOrMax ← signum(d^2/dx^2(f(x)))
        out[i, 2] ← "Maximum" if MinOrMax == -1
        out[i, 2] ← "Minimum" if MinOrMax == 1
        out[i, 2] ← "Inflection" otherwise
    out
CriticalPoints =  # no stored result
zeros =  # no stored result
## Finding local and global maxima and minima in 3D
# Using a demonstration function with one local maximum and 4 local minima, we can use the same empirical localmax and localmin functions for 3D matrices:
g(x, y) := -x^2 + 3*x - 2*y^2 - 3/4*y + 100
j := 0 .. 40
i := 0 .. 40
x[i] := -10 + i/2
y[i] := x[i]
G[i, j] := g(x[i], y[j])
localmin(x, y, G) =  # no stored result
min(G) =  # no stored result
localmax(x, y, G) =  # no stored result
max(G) =  # no stored result
# If there is a known analytic function, you can use the Maximize or Minimize functions to find maxima or minima analytically. First, provide guess values to give the solver a place to start seeking a solution.
[x; y] := [0; 0]
# Pass the name of the objective function and the guess values to Maximize.
[x_max; y_max] := Maximize(g, x, y)
x_max =  # no stored result
y_max =  # no stored result
# When optimizing a function of more than one parameter, Mathcad will return a vector of results. The first element in this vector corresponds to the first variable after the function name in the call to Maximize or Minimize (x in this case), and so on.
g(x_max, y_max) =  # no stored result
X[0] := x_max
Y[0] := y_max
Z[0] := g(x_max, y_max)
# [component: inputs g, (X, Y, Z)]
# You can also find maxima and minima in a constrained way using solve blocks. Provide guess values for any unknowns:
x := 2
y := 2
Given  # Open the solve block with Given
0 ≤ x ≤ 5  # Provide Boolean constraints. These say we want the minimum value for g in the space where x and y can be no greater than 5, nor less than 0.
0 ≤ y ≤ 5
[x_min; y_min] := Minimize(g, x, y)  # Close with a call to Minimize
X[0] := x
Y[0] := y
Z[0] := g(x, y)
X[1] := x_min
Y[1] := y_min
Z[1] := g(x_min, y_min)
# [component: inputs g, (X, Y, Z)]
# When optimizing a function in Mathcad, guess values play an extremely important role in the solution which is found. Guesses far from the desired values may cause the solver to converge to a local maximum or minimum. For example, consider the function H, which has two peaks:
H(a, b) := 1000 - 3*a^4 + 8*a^3 + 66*a^2 - 144*a - 50*b^2
# [component: inputs H]
# If you compare the results of Maximize with two different sets of guesses, you can see that one set of guesses finds the global maximum, while the other converges to the local maximum.
a := 4.5
b := 3.5
a1 := 1
b1 := -4
[a_max; b_max] := Maximize(H, a, b)
[a1_max; b1_max] := Maximize(H, a1, b1)
## local max
## global max
a_max =  # no stored result
b_max =  # no stored result
a1_max =  # no stored result
b1_max =  # no stored result
H(a_max, b_max) =  # no stored result
H(a1_max, b1_max) =  # no stored result
X := [a; a_max]
Y := [b; b_max]
X1 := [a1; a1_max]
Y1 := [b1; b1_max]
Z := [H(a, b); H(a_max, b_max)]
Z1 := [H(a1, b1); H(a1_max, b1_max)]
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