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# REGRESSION
# Median-Median Regression
# medfit(x,y)
# The medfit function returns a two element vector containing the intercept and slope of the median-median straight line fit x and y. As shown in the previous section, the goal of the least-squares linear fit is to minimize the sum of the squared distances from data points to the desired line. If the data contains outliers, however, the least-squares fit may be thrown off while trying to minimize the distance to the outlier. The medfit line is much less sensitive to outliers, much like the median is a less outlier-sensitive measure of centrality than is the mean.
X := transpose([1, 2, 3, 4, 5, 6, 7])
Y := transpose([4, 7, 10, 13, 16, 19, 70])
Y[6] := 70
Pm := medfit(X, Y)
Pl := line(X, Y)
med(x) := Pm[0] + Pm[1]*x
lsq(x) := Pl[0] + Pl[1]*x
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# Try changing the value of Y_6 in the data above. You'll find that the median-median line moves hardly at all, while the least-squares line will track the outlier until it is no longer an outlier.
## The median-median algorithm
# Data is divided into 3 smaller sets of approximately the same size. Each set is then represented by a single point determined by the medians of the x and y data in the set. A line is then fit to these 3 points.
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# The subsets must consist of consecutive data points.
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# No two subsets can have a common x value, repeated values are put in the same set.
# The slope of the line is determined by the difference in medians of the x and y data between the first and the third groups. The intercept, b, is chosen so that the line passes through the point which is the average of the medians among the three groups:
((x1 + x2 + x3)/3, (y1 + y2 + y3)/3)
# The median-median fit line is also called the line of least absolute deviation.
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