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# PRECONDITIONING DATA
# Moving Average Smoothing
# A smoothing technique which is particularly applicable to time-series data is moving average filtering. The moving average calculates the mean, or average, of n points around each data point, and substitutes that value for the data. This makes it somewhat more sensitive to outliers than median smoothing, as with all cases in which the mean and median are compared.
# Enter a matrix of noisy X-Y data to be analyzed:
# [component: outputs data]
data := csort(data, 0)
X := data[:, 0]
Y := data[:, 1]
# Enter a window size for moving average (odd integer 0 < w < n):
w := 13  # w must be odd for a symmetric window
m := (w - 1)/2
# Number of data points:
n := rows(data)
n = 200
# Near the endpoints, systematically decrease the window size, but keep it symmetric and as large as possible.
# Smoothed data:
i := 0 .. n - 1
mvg_avg[i] := if(i < m, sum(Y[j], j = 0 .. 2*i)/((2*i) + 1), if(i > n - 1 - m, sum(Y[j], j = 2*i - n + 1 .. n - 1)/(2*n - 1 - 2*i), sum(Y[j], j = i - m .. i + m)/w))
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## Other smoothers
# You may wish to consider various regression techniques as smoothing methods, since fitting a curve to a set of data amounts to finding a smooth function that approximates the data. If you evaluate the function at every original data point in x, you will get a smoothed version of the y data. In particular, the loess function for fitting windowed piece-wise quadratics results in a curve that is more like a smoothed version of data than a classical polynomial fit.
# There is a built-in version of the moving average filter in the Signal Processing Extension Pack, available separately from PTC.
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