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# REGRESSION
# Nonlinear Regression
# LeastSquaresFit(vx, vy, F(x,β),  guess, conf, [Stdy], [LBUB], [Acc])
# Minerr(guess) | genfit(vx, vy, guess, F(x,β))
# Nonlinear regression minimizes the distance of all data points to a curve described by a nonlinear function of multiple parameters. Choosing the function may be informed by the physics of a problem, or it may be somewhat arbitrary to simply match the shape of the data.
# Solvers equipped to handle the problem of minimizing least-squares sums over an arbitrarily complex formula are varied in their approach, but all will require guess values, and derivatives with respect to each of the parameters in the equation. These derivatives can be found numerically by finite differences, or they can be supplied in closed form. For large data sets, analytical expressions for derivatives may provide additional speed and accuracy.
## Sequential Quadratic Programming solver
# The LeastSquaresFit solver gives the most flexibility for solving nonlinear regression problems. It allows you to enter constraint equations for any of the dependent parameters, lower and upper bounds on parameters, standard deviations on the x values, as well as a confidence limit for the calculation. With so many arguments, it's best to explain this function by example.
# These data are taken from an example discussed in Lanczos (1956). The data were generated to 14-digits of accuracy using
fexact(x) := 0.0951*e^(-x) + 0.8607*e^(-3*x) + 1.5576*e^(-5*x)
data := READPRN("Lanczos1.dat")
vy := data[:, 0]
vx := data[:, 1]
i := 0 .. last(vx)
# Fitting function
f(x, β) := β[0]*e^(-β[1]*x) + β[2]*e^(-β[3]*x) + β[4]*e^(-β[5]*x)
# The individual parameters above are elements of a vector, β. Subscripts are made with the [ key. You can, if you wish, specify the input function with individual variable names, rather than elements of a vector:
f(x, A, B, C, D, E, F) := A*e^(-B*x) + C*e^(-D*x) + D*e^(-F*x)  # disabled
# Guess values:
βguess := [0.5; 0.7; 3.6; 4.2; 4; 6.3]
# Fit the function:
Res := LeastSquaresFit(vx, vy, f, βguess, 0.95)
# The x and y data are the first two arguments, followed by the fit function, f(x,β). Next is the guess vector βguess for the parameter values, followed by the desired confidence limit on the parameters, 0.95, or 95%.
# The solver uses sequential quadratic programming (SQP) to solve the resulting least-squares problem. By introducing additional variables, the original problem is transformed into a general equality constrained nonlinear programming problem, which is, in general, faster and more stable than some other methods.
#
# The first column of output contains the values for the fitted parameters. The second column contains the left and the third column the right boundary for the confidence interval on the parameters.
β := Res[:, 0]
# Correct values from the NIST website:
NIST := transpose([9.5100000027*10^-2, 1.0000000001, 8.6070000013*10^-1, 3.0000000002, 1.5575999998, 5.0000000001])
# Compare values
NIST = [0.0951; 1; 0.8607; 3; 1.5576; 5]
Res = [
    0.0360453, -0.095132, 0.167223;
    0.190923, -2.12032, 2.50216;
    1.52203, 0.135642, 2.90842;
    3.31018, 1.89435, 4.726;
    0.956463, -0.556824, 2.46975;
    5.73942, 3.75614, 7.7227
]
fit(x) := f(x, Res[:, 0])
NISTfit(x) := f(x, NIST)
# The 95% confidence limits on the parameters cover a fairly wide range, showing that the fit is difficult and the individual parameters can vary widely. The worksheet on the confidence function shows how to further analyze these limits.
x := 0, .05 .. 1.1*max(vx)
corr(fit(vx), vy) = 0.999999
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sum((vy[i] - fit(vx[i]))^2, i) = 1.60324e-5
# You'll notice that this fit is approaching convergence, but could benefit from an adjustment in the convergence tolerance. That can be done through one of the optional arguments.
## Constraints, standard deviation, and tolerance
# There are several optional arguments to LeastSquaresFit. Upper and lower bounds on fit parameters can be specified to constrain the fit values. Here they are set well outside the expected parameter values, because we don't know of a particular bound in this case. If we wanted to restrict one or more parameters, we could do so here.
LBUB := [0, .1; 0, 10; 0, 10; 0, 10; 0, 10; 0, 10]
# Additionally, you may set a vector of standard deviations for each y value. Standard deviations may be used to mask outlier points. For example, let's perturb one of the data values, to simulate a mismeasurement.
StdY[last(vy)] := 0.0
vy2old := vy[2]
vy[2] := 2*vy[2]
StdY[2] := 10^8
# The large value of 10^8 in the standard deviation effectively removes the value from the calculation, without removing it from the data. As with all least-squares solvers, we are trying to minimize, among other conditions, the sum of the residuals squared. In the case of standard deviations, the objective function is
# if the standard deviation is 0 for a point, then the original, undeviated function is used at that point, that is, StdY_i is set to 1.
sum(((y[i] - fit(x[i], β))/StdY[i])^2, i)
# If you would like the solver to apply a more stringent convergence tolerance to the calculation, you can use a final optional argument. The default is 10^-7.
Acc := 10^-12
# Compare the calculation with and without the standard deviation that masks the bad point:
Res := LeastSquaresFit(vx, vy, f, βguess, 0.90, LBUB, Acc)  # error: non-positive covariance diagonal
Res1 := LeastSquaresFit(vx, vy, f, βguess, 0.90, StdY, LBUB, Acc)
# The unmasked calculation fails because the confidence limits are too large.
Res1[:, 0] = [0.0985293; 1.01732; 0.869526; 3.02149; 1.54535; 5.00719]
fit1(x) := f(x, Res1[:, 0])
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vy[2] := vy2old
# Note that order of arguments matters here. You are welcome to use any of the optional parameters alone, that is, you can calculate
Res := LeastSquaresFit(vx, vy, f, βguess, 0.95, 10^-20)
# if you just want to adjust the accuracy of the calculation. However, if you are using two or all three of the optional parameters, you must first enter the standard deviation vector, then the lower and upper bounds matrix, then the accuracy.
Res[:, 0] = [0.0951; 1; 0.8607; 3; 1.5576; 5]
## Strategies for nonlinear solving
# One of the difficulties of finding the unknown coefficients in a nonlinear least squares problem is figuring out how to specify the problem to give the nonlinear solver the best chance of finding a global solution with good numerical accuracy.  Consider the following function:
fnew(x) := 10000*e^(-x) + .0001*e^(-100*x)
# where x ranges from 0 to 1.  This function has coefficients that range in value from .0001 to 10000 which can cause nonlinear solvers to fail to converge, or give poor solutions.  The obvious functional form to fit is:
fit1new(x, A, B, C, D) := A*e^(-B*x) + C*e^(-D*x)
# The solver may not be able to converge to a solution because the dynamic range of A,B,C and D is so large. If possible, it is best to scale the coefficients to be of similar size.  While the true values may not be known, close initial guesses and appropriate upper and lower bounds can help convergence.  A better functional fit would be of the form:
fit2new(x, A, B, C, D) := 5000*A*e^(-1*B*x) + .001*C*e^(-200*D*x)
# The unknown coefficients now only have about a factor of 10 dynamic range which will greatly increase the likelihood that the solver will converge to a solution and that the solution will be the global one.
# It also helps to scale the data into a reasonable range, which is really equivalent to the type of parameter scaling mentioned above.  One common technique for this is to scale the y data by the x values.  There is an example of this sort of transformation in the application document on thermocouple coefficients.You could also scale it to a range from 0 to 1 or from -10 to 10, or some other appropriate set of values for your problem.  Remember to scale the parameters along with your data set.  There are examples of this sort of scaling in the application document on index of refraction. You may wish to use the scale function in this type of calculation.
# Finally, if your convergence isn't good at first try, or you suspect you are at a local minimum rather than a global one, you should try adjusting the optional accuracy parameter, and providing lower and upper bounds on parameters, if you know them.
# Setting accuracy is, to a certain extent, a function of the scale of your data.  If the data is of very small scale, perhaps 10^-8 or smaller, and you do not wish to scale it before fitting, you may require a very small accuracy before your problem converges.  For a problem with data over a small dynamic range and of order 1 or 10, a setting somewhere in the range of 10^-5 to 10^-12 is probably sufficient and more meaningful computationally.
# Any nonlinear optimization method can be applied to linear problems. The method just may not be the most efficient for that type of problem. You may wish to use the LeastSquaresFit function to solve linear models, so that you can include constraint functions, standard deviations, bounds, and confidence limits on these fits as well.
## General nonlinear fitting
# You may, of course, use Mathcad's general nonlinear fitting function, genfit. The genfit function lets you choose a Levenberg-Marquardt or an Optimized Levenberg-Marquard method for solving - right click on the function name to pick. You can give it the analytical forms of the derivatives with respect to each parameter to improve accuracy. Live symbolics will help in constructing the vector of partial derivatives.
d/dβ1(β1*e^(-β2*t) + β3*e^(-β4*t) + β5*e^(-β6*t)) → e^((-β2)*t)
d/dβ2(β1*e^(-β2*t) + β3*e^(-β4*t) + β5*e^(-β6*t)) → (-β1)*t*e^((-β2)*t)
# fitting function
# deriv w.r.t. parameter β_0
F(t, β) := [
    β[0]*e^(-β[1]*t) + β[2]*e^(-β[3]*t) + β[4]*e^(-β[5]*t);
    exp(-β[1]*t);
    -β[0]*t*exp(-β[1]*t);
    exp(-β[3]*t);
    -β[2]*t*exp(-β[3]*t);
    exp(-β[5]*t);
    -β[4]*t*exp(-β[5]*t)
]
# .
# .
# .
# deriv w.r.t. parameter β_5
# This vector contains the fit function in the first element, and derivatives with respect to each parameter in the subsequent elements. Note that the parameters must be specified as elements in a vector of parameters, using index subscripts (press [ on your keyboard).
β := genfit(vx, vy, βguess, F)
transpose(β) = [0.0951, 1, 0.8607, 3, 1.5576, 5]
genf(x) := F(x, β)[0]
corr(genf(vx), vy) = 1
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## Weighting functions in genfit
# It is possible, using local function definitions in programs, to modify the genfit routine to perform some of the extended functionality of LeastSquaresFit using the Levenberg-Marquardt solver instead of the SQP method. Customize the modifications to suit your problem. For example, to weight data with a standard deviation and calculate numerical derivatives (using the Optimized Levenberg-Marquardt choice), the new merit function is
Error == sum((wt[i]*(f(x[i], coef) - y[i]))^2, i)
Y := [0; 2.004; 123.3; 13.72; 21.92; 32.57; 35.48; 50.11; 57.67; 82.47; 70; 105; 111.4; 124.7; 137]
σ := [0.137; 0.157; 1.37; 0.274; 0.356; 0.463; 0.492; 0.638; 0.714; 0.962; 0.837; 1.187; 1.251; 1.384; 1.507]
i := 0 .. last(Y)
X[i] := i
guess := [2; 2]
genfitwt(x, y, σ, guess, f) :=
    "Compute the weighting factor from standard deviation"
    "Does not handle divide by zero cases"
    wt ←
        s ← 1/σ
        s/|s|
    "Multiply the y values by the weights"
    ywt ← vectorize(y*wt)
    "Create a variable to replace x which is simply the index of x"
    for i ∈ 0 .. last(x)
        vx[i] ← i
    "Create a function that will return the genfit derivative matrix"
    "ith x,y data pair.  Derivatives are computed numerically"
    f_wt(i, vc) ← wt[i]*f(vx[i], vc)
    "Call genfit using the new variables and local function"
    return genfit(vx, ywt, guess, f_wt)
# Just supply the fit function - the Optimized Levenberg-Marquardt routine in genfit will calculate the derivatives numerically.
fexp(x, coef) := coef[0]*x^coef[1]
βexp := genfitwt(X, Y, σ, guess, fexp)
βexp = [2.97761; 1.44598]
LeastSquaresFit(X, Y, fexp, guess, 0.95, σ) = [2.97761, -4.24321, 10.1984; 1.44598, 0.44778, 2.44419]
wtgenf(x) := fexp(x, βexp)
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## Minimizing with a solve block
# You may wish to write out the equation for a sum of squares explicitly and solve using a solve block for notational clarity.
# Minimize the sums of squares:
i := 0 .. last(vx)
SSE(β) := sum((vy[i] - f(vx[i], β))^2, i)
CTOL := 10^-9
# Use the same guess values as before
Given
SSE(βguess) == 0
β1 := Minerr(βguess)
transpose(β1) = [0.0339429, 0.481694, 0.737589, 2.60935, 1.74186, 4.89271]
ERR = 2.03383e-8
SSE(β1) = 2.03383e-8
# The ERR variable is defined within Mathcad whenever a solve block is called. It returns the sum of the squared residuals, and it is the quantity that is being minimized when calculating the vector of parameters.
# You can manipulate the method used to minimize this solve block by right-clicking on the function Minerr above. You'll be able to choose between the Levenberg-Marquardt method, Quasi-Newton, and Conjugate Gradient solvers. For nonlinear problems, Minerr will automatically choose the first one that converges, but you may wish to experiment with the different options to see which converges to the smallest error for your problem.
#
# Note that, if you wish to use Levenberg-Marquardt optimally, you should supply it with the vector of residual equations set to zero, rather than the sum of squared residuals.
resid(β) :=
    for i ∈ 0 .. last(vx)
        r[i] ← vy[i] - f(vx[i], β)
    r
Given
resid(βguess) == 0
β_LM := Minerr(βguess)
ERR^2/(length(vx) - 2) = 6.48962e-27
SSE(β_LM)/(length(vx) - 2) = 6.48961e-27
β_LM = [0.0951; 1; 0.8607; 3; 1.5576; 5]
NIST = [0.0951; 1; 0.8607; 3; 1.5576; 5]
# Solving nonlinear problems is extremely difficult. One solving technique may work very well on certain problems but break down on others. The search for a minimum, which happens as steps are taken away from the guess values, may get sidetracked and the method may wander off, finding neither a min or max. In this case we say the method "does not converge."
# Since the solve block/Minerr method of nonlinear regression allows you to put any equation you want into the block for minimization, you have the option of creating your own regression specification. For example, if you want to minimize a weighted sum of squares, so that you can include standard deviations, use an equation like:
SSE(β, w) := sum(w[i]*(vy[i] - f(vx[i], β))^2, i = 0 .. last(vx))/sum(w[i], i = 0 .. last(vx))
# and supply a vector of weights. You can also include boolean constraint equations within the body of the solve block to limit the search space on parameters.
# The data in this example were drawn from Lanczos, C. (1956), Applied Analysis, Prentice Hall, pp. 272-280, as documented in the NIST Statistical Reference Dataset Archive, http://www.itl.nist.gov/div898/strd/.
# For further information on the LeastSquaresFit sequential quadratic programming method, see
#
# Schittkowski K. (1988), Solving nonlinear least squares problems by a general purpose SQP-method, in Trends in Mathematical Optimization K.-H. Hoffmann, et. al., eds., International Series of Numerical Mathematics, Vol 84, Birkhäuser, pp. 295-309.
# Schittowski, K. (1985), "NLQPL: A FORTRAN-Subroutine Solving Constrained Nonlinear Programming Problems," Annals of Operations Research, Vol. 5, pp. 485-500.
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