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# REGRESSION
# Common Nonlinear Fit Functions
# expfit(vx,vy,[vg])
## sinfit(vx,vy,vg)
# pwrfit(vx,vy,vg)
## logfit(vx,vy,vg)
## lgsfit(vx,vy,vg)
# Certain nonlinear fit functions occur more frequently than others in data analysis. These special functions are set up in Mathcad so you won't have to define the functional form or its derivatives. The special fitting functions perform exponential, sin, power series, log, and logistic fits. They require the data and a set of guess values, except in the case of expfit, where guess values are optional. They all use Levenberg-Marquardt to solve the least-squares problem.
## Exponential fitting
# Exponential functions are common everywhere there is a process that decays or grows to a steady state, such as radioactive decay, the transient response of an RC circuit, or the displacement of an overdamped spring.
f(x, β) := β[0]*e^(β[1]*x) + β[2]
# [component: outputs data]
vx := data[:, 0]
vy := data[:, 1]
β := expfit(vx, vy)
β =  # no stored result
x := min(vx) .. max(vx)
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# The expfit function is unusual among nonlinear fitting functions because it does not require a guess value, although you may supply one if you don't like the results you are getting from the internal guess routine. The internal routine fits a line to the y values, and begins from there.
## Sinusoidal fit
# If your data oscillates with a regular period, you may wish to use a sinusoidal fit.
f(x, β) := β[0]*sin(x + β[1]) + β[2]
# [component: outputs data]
vx := data[:, 0]
vy := data[:, 1]
# Define a vector of guesses. You may have to adjust these to get the best possible fit. The first value should be approximately equal to the amplitude of your data, the second should be equal to the phase shift, and the third equal to the offset.
Guess := [6; 1; 0]
β := sinfit(vx, vy, Guess)
β =  # no stored result
corr(f(vx, β), vy) =  # no stored result
x := 0, .1 .. max(vx)
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# Power fitting
# The pwrfit function fits the model
f(x, β) := β[0]*x^β[1] + β[2]
# [component: outputs data]
vx := data[:, 0]
vy := data[:, 1]
# Define a vector of guesses. You may have to adjust these to get the best possible fit. The first value should be approximately equal to the magnitude of your data around x = 1, less the offset, which is the third value. The second value should be approximately equal to the degree of curvature of the data.  You may find it helpful to plot the curve, using the guess values, to refine them, before fitting.
Guess := [1; 2; 1]
β := pwrfit(vx, vy, Guess)
β =  # no stored result
corr(f(vx, β), vy) =  # no stored result
x := 0, .1 .. max(vx)
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# Natural logarithmic fitting
# The logfit function fits the model
f(x, β) := β[0]*ln(x + β[1]) + β[2]
# [component: outputs data]
vx := data[:, 0]
vy := data[:, 1]
# Define a vector of guesses. You may have to adjust these to get the best possible fit. The first value should roughly describe the height and sign of your data, the second should reflect the horizontal offset, and the third the vertical offset. It may help to plot your data first.
# The function ln is only defined for positive numbers. The second parameter shifts the x data so that the ln can be computed. If your x data is negative, the second guess value should be positive and large enough to shift the x values to the positive axis.
Guess := [1; 1; 4]
β := logfit(vx, vy, Guess)
corr(f(vx, β), vy) =  # no stored result
β =  # no stored result
x := 1, 1.1 .. max(vx)
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## Logistic Fit
# These data are the result of a NIST study involving superconductivity magnetization modeling. The response variable is magnetism (column 0), and the predictor variable (column 1) is the log of time in minutes.
# [component: outputs data]
vy := data[:, 0]
vx := data[:, 1]
# The fitting function for lgsfit is
f(x, β) := β[0]/(1 + β[1]*e^(-β[2]*x))
# It can be challenging to select appropriate guess values for a logistic regression. The guess value for coefficient β_0 should be the approximate intercept of a curve going through the data. Use a linear approximation:
a := intercept(vx, vy)
# The guess value for coefficient β_1 should be less than 1 if the “center” of the data is to the right of the origin and greater than 1 if the data is to the left of the origin. Estimate it by finding the mean of the independent variable. Usually this number is too large if the independent data is integer, which is not the case here.
b := mean(vx)
# The guess value for coefficient C should be large if there is a precipitous drop from the high data to the low data (greater than 1) and small if the transition is more gradual (smaller than 1). Also, this coefficient should be negative if the data is decreasing from left to right and it should be positive if the data is increasing from left to right. In many situations, 1 or -1 will do as a guess value.
a =  # no stored result
guess := [a; b; -1]
b =  # no stored result
β := lgsfit(vx, vy, guess)
β =  # no stored result
x := min(vx), 1.1*min(vx) .. max(vx)
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# If you want to include additional information about the data or the parameters for any of these fits, such as standard deviation in the data, bounds on the parameters, or constraint functions, you should use LeastSquaresFit to do the calculation in a more detailed way.
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