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# EXAMPLES
# Optimal Spacing of Interpolation Points
# by Robert Adair
# In his seminal book on spline fitting, deBoor says, "Polynomial interpolation at appropriately chosen points (e.g. the Chebyshev points) produces an approximation which ... differs very little from the best possible approximant by polynomials of the same order". That is, if your points are well chosen, a single polynomial of appropriate order will fit all your data well. If they are not, then a spline fitting method may be a better choice. In particular, uniformly spaced points can have bad consequences. Further, "...If the function to be approximated is badly behaved anywhere in the interval of approximation, then the approximation is poor everywhere. This global dependence on local properties can be avoided when using piecewise polynomial approximants." by which he means cubic splines or bsplines.
# What this means is that a polynomial of the same order as the number of the data points will pass through all the points, but can give a terrible approximation to the function elsewhere if the points are badly chosen. For example, consider the following uniformly spaced sample points across a Lorenzian function:
# Endpoints:
a := -.9
b := 1
# n =points
i := 0 .. n
vx[i] := a + i*(b - a)/n
# Sample the function
g1(x) := 1/(1 + 25*x^2)
vy[i] := g1(vx[i])
# Create a global polynomial interpolation using this data spacing
fit(x) := polyint(vx, vy, x)[0]
j := 0 .. 200
step := |b - a|/200
x[j] := a + j*step
# You might expect that as you increase the number of sampled points and the order of the polynomial, n, the approximation would improve, but it does not. Try n = 20.
n ≡ 8
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# What deBoor recommends is instead choosing the interpolating points as the zeros of the Chebyshev polynomial of degree n,
vxCheb[i] := (a + b - (a - b)*cos((2*i + 1)*π/(2*(n + 1))))/2
vxCheb := sort(vxCheb)
vyCheb[i] := g1(vxCheb[i])
data[:, 0] := vxCheb
data[:, 1] := vyCheb
# Interpolate the same function using these new points. Go back and try a few values of n, to see that these points generally provide a nicer fit everywhere for larger values of n.
fitCheb(x) := polyint(vxCheb, vyCheb, x)[0]
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# The Chebyshev point spacing does indeed provide a better interpolation for higher values of n, as we expect. However, it would be nice to know what the optimal spacing of points was so that we could use a lower value of n and still get good results. This can be calculated if we recall that a global polynomial interpolation is the same as a polynomial regression of the same order as the number of data points.
## Optimal point spacing
# Based on the notion that a polynomial of order n can always be found that passes through n points, we can find the polynomial that best approximates the given function g, and find which points on the curve it fits exactly. These points are the optimal interpolation points, that is, the points that, when interpolated with a polynomial, provide the best possible approximation everywhere on the interval.
# We need to work with the integral version of the least squares problem to get the optimal solution for a polynomial fit.
Error := integral((sum(c[n]*x^n, n = 0 .. degree) - g(x))^2, x = a .. b)  # disabled
# The normal equations are generated by taking the derivative of the error with respect to the polynomial coefficients and setting the result equal to 0.
d/d(c[k])(Error) := 2*integral((sum(c[n]*x^n, n = 0 .. degree) - g(x))*x^k, x = a .. b)  # disabled
# To solve the equations, we will need to evaluate the integrals
fI0(n, k) := integral(x^(n + k), x = a .. b)
fI1(k) := integral(g1(x)*x^k, x = a .. b)
# In general, the integral fI1 will require numerical evaluation.  In the case of a Runge function, it could be evaluated symbolically, but the speed of evaluation is good enough that both fI0 and fI1 will be left as numerical integrals.
# The least squares matrix equation for the coefficients then becomes
M*c == y_integral
# where:
degree := n
k := 0 .. degree
k1 := 0 .. degree
y_integral[k] := fI1(k)
M[k, k1] := fI0(k, k1)
# Solving for the optimal interpolation coefficients, c gives:
L := cholesky(M)
L_inverse := L^-1
c := transpose(L_inverse)*L_inverse*y_integral
# Then the optimal fit equation is given by the new polynomial of order n
fitOpt(x) := sum(c[k]*x^k, k)
# Take a look at the interpolated error over the data range:
ChebErr(x) := g1(x) - fitCheb(x)
OptErr(x) := g1(x) - fitOpt(x)
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# Finding the zeros of the error will give the points at which the optimal fit polynomial is exactly equal to the function, and these are the optimal interpolation points. To do this, let's bracket the zero crossings, then use these brackets as guesses for the root solver.
# Bracket all the roots
fGuess(a, b) :=
    npts ← 200
    dx ← (b - a)/npts
    x0 ← a
    y0 ← OptErr(x0)
    k ← 0
    for i ∈ 1 .. npts
        x1 ← a + i*dx
        y1 ← OptErr(x1)
        if y0*y1 ≤ 0
            if y0*y1 == 0
                x1 ← x1 + dx/2
                y1 ← OptErr(x1)
            RootBracket[k, 0] ← x0
            RootBracket[k, 1] ← x1
            k ← k + 1
        x0 ← x1
        y0 ← y1
    return RootBracket
# Refine the roots from the initial bracketing guesses
xOpt :=
    guess ← fGuess(a, b)
    nRoots ← rows(guess)
    for i ∈ 0 .. nRoots - 1
        x ← (guess[i, 0] + guess[i, 1])/2
        r[i] ← root(OptErr(x), x, guess[i, 0], guess[i, 1])
    return r
yOpt := fitOpt(xOpt)
# Compare the optimal fit to the Chebyshev fit.  Overall the two fits have the same general appearance, and the ripple is much smaller than the equally spaced data points fit.  Comparing the location of the interpolation points, one finds the Chebyshev points have a similar distribution to the optimal points which helps to reduce the overall ripple. Adjust the value of n to see how these two approximations change with sampling.
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# If you have the luxury of choosing where your data will be sampled, you may wish to use guidelines of this sort when choosing your data spacing.
## Reference
# de Boor, Carl (1978), A Practical Guide to Splines, Springer-Verlag, Chapter 2.
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