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# NONPARAMETRIC FITTING
# Polynomial Interpolation
# polyint(vx,vy,x) | polycoeff(vx,vy)
# polyiter(vx,vy,x,N,ε)
# The polyint function performs polynomial interpolation of a data set of length N at a requested point, x, using Neville's algorithm. This finds a unique polynomial of degree N - 1 which passes through each point. The output is a vector of length 2 containing the interpolated value of the function and an estimate of the error. The polycoeff function will calculate the coefficients of this interpolating polynomial for use in subsequent calculations. The polyiter function allows you to enter an acceptable error, ε, and maximum degree for the polynomial, allowing you to specify an interpolating polynomial of lower order, and therefore shorter calculation time, if you can accept more error.
## Polynomial interpolation
x := [301; 306; 318; 332; 333]
y := [.02; 0.2; -.04; .06; .17]
i := 0 .. rows(x) - 1
polyint(x, y, 328) =  # no stored result
r := 0 .. max(x) - min(x)
curve[:, r] := polyint(x, y, r + min(x))
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## Interpolation coefficients
# If the interpolated values are all you need, it is better to stick to polyint. The coefficients provided by polycoeff are less accurate at the given data values, so they are not a good representation of interpolated values. However, if you need to calculate both the interpolating polynomial and some of its derivatives, this is a way to do it.
c[i] := polycoeff(x, y)[i]
c =  # no stored result
f(z) := sum(c[i]*z^i, i)
f1(z) := d/dz(f(z))
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# Note that this function does not construct the polynomial of best least-squares fit, as is done by the regress function. The results of polyint and polycoeff should not be used to make predictions for y values outside of the range of original x values.
## Aitken-Neville Iterated Interpolation
# Aitken-Neville interpolation is similar to the polynomial interpolation implemented in polyint and polycoeff. But since the interpolation is iterated, polyiter permits the user to specify an input tolerance, ε, and a maximum number of iterations, N, which say, in effect, that "if the last two iterated estimates of the data point agree to within the tolerance ε, or if the number of iterations reaches the input argument N, then stop. The estimate is good enough."
#
# Iterated interpolation is used to advantage, for example, in the Romberg quadrature of definite integrals. Numerical integration is a very computationally-intensive process. Being able to exit early can save processing time in trade for a less accurate answer.
#
# Aitken-Neville interpolation is typically used to find only a few interpolated points with some specified tolerance.
# The specified tolerance ε can be small enough that it forces the number of iterations to the limit N = n - 1, where n is the number of data points, or it can be large enough that the iteration is permitted to stop before the number of iterations reaches N, for some input N less than n - 1. If the number of iterations goes all the way up to n - 1, then polyiter will give exactly the same results as polyint. Note that the input argument N cannot be larger than n - 1.
N := length(x) - 1
ε := .01
# The first element of the polyiter output vector is a "Converged" flag (1 = converged, 0 = did not converge). The second is the number of iterations, m_max, needed to meet the specified tolerance (polyint always iterates up to m_max = n - 1). The third is the iterated estimate of y obtained for the input value of x, which as noted above, will agree with polyint if m_max = n - 1.
polyiter(x, y, 328, N, ε) =  # no stored result
polyint(x, y, 328) =  # no stored result
# The output of polyiter tells us that to achieve an error of .01 or smaller is impossible for this algorithm at this point, because it did not converge (first return value is 0). All iterations are used, and the result is the same as that from polyint. Try changing ε to .1 or 1 to see how the returns change.
r := 0 .. max(x) - min(x)
curve_iter[:, r] := polyiter(x, y, r + min(x), N, ε)
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# Aitken-Neville iterated interpolation is illustrated in the application worksheet, Two-Point, Two-Body Elements for the Planet  Jupiter.
# The polyint and polycoeff routines are based on polyint (p.109) and polycoeff (p.121) from the book "Numerical Recipes in C, The Art of Scientific Computing" (Cambridge University Press),  Copyright (C) 1987, 1988 Numerical Recipes Software, and is used under license.
# The polyiter routine is described in McCalla, Thomas Richard (1967). Introduction to Numerical Methods and FORTRAN Programming, John Wiley.
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