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# PRECONDITIONING DATA
# Linear Prediction
# predict(vx, prev, next)
# The predict function takes a time series of data, y, the number of previous points from the end of the series you wish to use for a prediction, and the number of subsequent points to predict. A linear prediction method returns a vector containing next predicted values of the time series. The data are assumed to be measured at equal time intervals. Given some time-series data,
# [component: outputs y]
i := 0 .. last(y)
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# the predict function is used to predict or forecast as many future values of the time series being observed as we like.
pre_y := predict(y, 15, 10)
k := 0 .. last(pre_y)
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# Most time-series prediction methods assume that an observed piece of data, say,
y[N]
# is a direct function of a specific number of data points prior to this point. For example,
y[N] == f(y[N - 1], y[N - 2], y[N - 3])
# says that the value of the observation at time N is a function of the three previous observed values. Therefore the next observation
y[N + 1]
# would be given by
y[N + 1] == f(y[N], y[N - 1], y[N - 2])
# If, in fact, this prediction function is a linear function — meaning there are constants a, b, and c such that
f(y[N - 1], y[N - 2], y[N - 3]) == a*y[N - 1] + b*y[N - 2] + c*y[N - 3]
# . . . so
y[N] == a*y[N - 1] + b*y[N - 2] + c*y[N - 3]
y[N + 1] == a*y[N] + b*y[N - 1] + c*y[N - 2]
y[N + 2] == a*y[N + 1] + b*y[N] + c*y[N - 1]
# and so on — we say the prediction method is a linear prediction method.
# Using greater or fewer numbers of points from the time series will produce different predicted values since we are changing the prediction model.
# The following setup allows you to play with these two parameters and study their effect on the randomly generated time-series data:
Num := 15
i := 0 .. Num
z[i] := i/10 + 3/(i + 1) + rnd(0.5)
Nprev := 3
Nmore := 5
next_z := predict(z, Nprev, Nmore)
k := 1 .. Nmore
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## How predict Works
# Here we outline what's going on inside of predict.
# Let's say we have data
X := [2.7; 5.7; 6.8; 2.9; 5.1; 6.2; 2.5]
# and predict is told to estimate
Npredict := 4
# future values using a model where
Nprior := 3
# previous values are used in the estimate.
# The number of previous values, and the fact that we are using linear prediction, now tells predict that it is looking for three coefficients,
c[0], c[1], c[2]
X[3] == c[0]*X[0] + c[1]*X[1] + c[2]*X[2]
X[4] == c[0]*X[1] + c[1]*X[2] + c[2]*X[3]
# etc.
# that can be used to predict new values for the series data.
# Now values for the c's such that the observed data exactly satisfies
X[3] == c[0]*X[0] + c[1]*X[1] + c[2]*X[2]
X[4] == c[0]*X[1] + c[1]*X[2] + c[2]*X[3]
# etc.
# most likely do not exist, so we need to find approximate values for such c's. Here's what predict does:
# Using the relationship
X[k] == c[0]*X[k - 3] + c[1]*X[k - 2] + c[2]*X[k - 1]
# you can establish the system of three equations in the three unknowns, c_0, c_1, and c_2,
φ[0]*c[0] + φ[1]*c[1] + φ[2]*c[2] == φ[1]
φ[1]*c[0] + φ[0]*c[1] + φ[1]*c[2] == φ[2]
φ[2]*c[0] + φ[1]*c[1] + φ[0]*c[2] == φ[3]
# where the φ values are the autocorrelations.
# Using a technique known as Burg's method, predict computes estimates for the φ_j values, solves the system of equations above, and yeilds the prediction coefficients:
c := [0.881422439293; -0.417638429301; 0.522564333016]
# This is all done internally and you never need to know these values.
# Having the coefficients in hand, predict can now estimate future values. The next X-value is approximated by the combination of previous X-values
Predicted_X[0] := c[0]*X[4] + c[1]*X[5] + c[2]*X[6]
Predicted_X =  # no stored result
# and this is the first value you see returned by predict:
predict(X, Nprior, Npredict) =  # no stored result
# Now, how does it get the second predicted value?  We've just used the last three observed data values. The answer is the predicted value just computed is added to our data set,
X =  # no stored result
Predicted_X[0] =  # no stored result
# and is now treated like just another piece of data. So the second predicted value is
Predicted_X[1] := c[0]*X[5] + c[1]*X[6] + c[2]*Predicted_X[0]
Predicted_X =  # no stored result
predict(X, Nprior, Npredict) =  # no stored result
# predict continues in this fashion until it has produced the requested number of estimated values:
Predicted_X[2] := c[0]*X[6] + c[1]*Predicted_X[0] + c[2]*Predicted_X[1]
Predicted_X[3] := c[0]*Predicted_X[0] + c[1]*Predicted_X[1] + c[2]*Predicted_X[2]
Predicted_X =  # no stored result
predict(X, Nprior, Npredict) =  # no stored result
# Look at the sequence of calculations predict performed to produce the estimates:
Predicted_X[0] := c[0]*X[4] + c[1]*X[5] + c[2]*X[6]
Predicted_X[1] := c[0]*X[5] + c[1]*X[6] + c[2]*Predicted_X[0]
Predicted_X[2] := c[0]*X[6] + c[1]*Predicted_X[0] + c[2]*Predicted_X[1]
Predicted_X[3] := c[0]*Predicted_X[0] + c[1]*Predicted_X[1] + c[2]*Predicted_X[2]
# As you keep predicting, you are using only predicted values to compute new predicted values. For Predicted_X, the smallest index that appears on X is 4, since we only use the previous three values to predict. Does this mean the values X_0, X_1, X_2, and X_3 are irrelevant to predict?
# The answer is no!  All X-values are used. We can convince you of this by throwing away the first X-value and repeating the predict process:
Xsmaller := submatrix(X, 1, last(X), 0, 0)
Xsmaller =  # no stored result
X =  # no stored result
predict(X, Nprior, Npredict) =  # no stored result
predict(Xsmaller, Nprior, Npredict) =  # no stored result
# Note the different results. The reason is that all data values are used internally to compute the φ values used internally. Different φ's produce different c's!
## Using predict
# The error messages emitted by predict are basically ones that warn against grossly wrong types of arguments, but one error message related to the algorithm itself is
predict([2.7; 8.2; 1.9; 0.3; 2.7], 5, 3) =  # error: must be less than the number of data points
# So you cannot ask that the predicted values be a linear function of all the data points. You can use up to one less than the number of data points:
predict([2.7; 8.2; 1.9; 0.3; 2.7], 4, 3) =  # no stored result
# We recommend choosing a value that is not too large relative to the amount of data.
# Another interesting point is that predict works very well if the data are periodic. This is not surprising, since the autocorrelation tells you a lot if the data are periodic, and predict depends on the autocorrelation.
# For example, look at the following periodic data:
i := 0 .. 100
P[i] := sin(12*π*i/100) + cos(6*π*i/100)
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# We can compare the result of using predict with our knowledge of how the data were generated:
k := 101 .. 105
sin(12*π*k/100) + cos(6*π*k/100) =  # no stored result
predict(P, 10, 5) =  # no stored result
# We see that predict does very well.
# In fact, periodic data are what predict handles best. For example, take a look at a case of linear data:
i := 0 .. 25
t[i] := i
PT := predict(t, 10, 5)
k := 1 .. 5
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# The predict predictions seem to fit the given data.
# However, if you try to predict too far ahead with these data or any data, you will run into problems if you are expecting linearity.
PT := predict(t, 10, 50)
k := 1 .. 50
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# Now predict much further ahead:
PT := predict(t, 10, 100)
k := 1 .. 100
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# We see that predict essentially forces periodicity. If you are predicting this far ahead, you're asking for trouble anyway!
## Estimating prior values
# The predict function can also be used to estimate prior values of a set of time-series data. All you need to do is change your perspective for a while.
# Consider the following data set:
X := transpose([0.81, 1.07, 1.83, 2.25, 3.01, 2.91, 1.87, 1.53, 1.40, 1.05])
i := 0 .. last(X)
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# We can apply predict to the reversed set of data,
Nvals := 3
Nterms := 7
P := predict(reverse(X), Nterms, Nvals)
P =  # no stored result
# and then reverse these values:
past := reverse(P)
past =  # no stored result
# We can add these values to our plot, distinguishing them as follows:
k := -Nvals .. -1
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