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# REGRESSION
# Quality of Fit
# confidence(vx,vy,F(x),vparam,conf)
# Scattered throughout the previous files in the regression section we have included metrics for judging how well we have fit the data: how far away are the predicted values of y from the actual values of y. In the case of the LeastSquaresFit function, confidence limits are provided along with the fit parameters, and the stderr function gives a measure of the error for linear fits. The confidence function can provide these confidence intervals for any nonlinear fit, using the original data values, the fitting function, a vector of the parameter values, and the desired confidence percentage.
# [component: outputs data]
vx := data[:, 0]
vy := data[:, 1]
# Suppose we fit some exponential parameters to the data.
[a; b; c] := expfit(vx, vy)
[a; b; c] = [5.28995; 0.404892; 0.277819]
fit(x, a, b, c) := a*e^(b*x) + c
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# But how close are these values to the data? How sure are we that these are the right parameters? How closely may we predict the behavior at a point that we did not measure.
## Residuals and χ^2
# One reasonable first test of how well we did with our fit is to calculate the residuals — the difference between the calculated model values and the measured ones.
residual := fit(vx, a, b, c) - vy
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# The sum of the residuals squared is the error in the calculation; that is, it's the quantity we minimize when calculating a least-squares solution. The error is also a measure of how well we did, since it shows how much deviation is unexplained by the regression.
χ2 := sum(residual^2)
χ2 = 6.99829
# This value is also known as χ^2, and is a general metric for the goodness of fit.
## Analysis of variance table
# The amount of variation explained by a linear model is described in terms of deviations from the mean of y. In a nonlinear model, however, we'll define the sum of squares due to the regression (SSR) with respect to the total sum of squares.
SSY := sum(vy^2)
SSE := χ2
SSR := SSY - SSE
# Degrees of freedom are the length of the data less the number of fit parameters.
DF_unadj := length(vx)
DF_param := 3  # the number of parameters
DF_resid := DF_unadj - DF_param
# Mean square error and regression mean square are given by the SSE divided by the appropriate degrees of freedom.
MSE := χ2/DF_resid
MSR := χ2/DF_param
# This set of statistics will characterize the fit, and forms an analysis of variance table.
# DF | SS | MS
DF_param = 3
SSR = 14723
MSR = 2.33276
DF_resid = 5
SSE = 6.99829
MSE = 1.39966
DF_unadj = 8
SSY = 14730
# For a rough estimate of how well the model fits the data, use the value
Fit := 1 - SSE/sum((vy - mean(vy))^2)
Fit = 0.998862
## Confidence intervals
# Because our parameter estimates are only approximations, we'll need to rely on asymptotic rather than on exact properties to form confidence intervals for population parameters. By definition, the asymptotic variance-covariance matrix of the parameter estimates can be found by multiplying a matrix of partial derivatives, called the Jacobian matrix, by the mean squared error.
i := 0 .. last(vx)
DFA[i] := d/da(fit(vx[i], a, b, c))
DFB[i] := d/db(fit(vx[i], a, b, c))
DFC[i] := d/dc(fit(vx[i], a, b, c))
A := augment(DFA, DFB, DFC)
Covar := (transpose(A)*A)^-1
Vβ := MSE*Covar
# Taking the square root of the diagonal elements produces asymptotic standard errors for the parameter estimates.
i := 0 .. cols(A) - 1
stderr[i] := sqrt(Vβ[i, i])
# We can form a confidence interval from the errors using the Student's t-Distribution, much as we did in the case of a linear fit.
# If
α := 0.01
t := qt(1 - α/2, DF_resid)
t = 4.03214
# giving confidence intervals on the parameters of
t*stderr = [3.04261; 0.0769792; 5.8725]
# This functionality is wrapped up in the confidence function.
CI := confidence(vx, vy, fit, [a; b; c], 1 - α)
CI = [3.04261, 4.03214; 0.0769792, 0; 5.8725, 0]
[a; b; c] = [5.28995; 0.404892; 0.277819]
# The first column of the result contains the distance of the interval borders from the current parameter value. The second column contains the value for the percent point function value of the t-distribution. With a probability of 1 - α = 99 %, values for the estimated parameters are contained in intervals
[a; b; c] + CI[:, 0] = [8.33256; 0.481871; 6.15032]
[a; b; c] - CI[:, 0] = [2.24734; 0.327913; -5.59469]
# That is, we are (1 - α) = 99 % confident that the correct value of the parameter a, for this data, lies on the interval between a - CI[:, 0][0] = 2.24734 and a + CI[:, 0][0] = 8.33256, and so on.
# The standard deviation (standard error) for each parameter can be computed as follows:
StdFx := CI[:, 0]/CI[:, 1][0]
StdFx = [0.754589; 0.0190914; 1.45642]
stderr = [0.754589; 0.0190914; 1.45642]
# The correlation matrix of parameter estimates is given by
j := 0 .. cols(A) - 1
Cβ[i, j] := Vβ[i, j]/(stderr[i]*stderr[j])
Cβ = [1, -0.994385, -0.927378; -0.994385, 1, 0.896797; -0.927378, 0.896797, 1]
# From the confidence intervals and the correlation matrix for the parameter estimates it is pretty clear that the model is overparameterized and that parameter c can be dropped.
## Approximate confidence intervals on calculated and measured y
# Similarly, we can calculate confidence intervals on any y values predicted by the model at any point along the range of vx.
Vy := A*Vβ*transpose(A)
k := 0 .. last(vx)
S[k] := sqrt(Vy[k, k])
dhigh := fit(vx, a, b, c) + t*S
dlow := fit(vx, a, b, c) - t*S
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# You could also view these as error bars on each data point:
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# And finally, for the measured values of y, we can calculate confidence intervals at any measured point in vx.
Smeas[k] := sqrt(MSE + Vy[k, k])
dhigh := fit(vx, a, b, c) + t*Smeas
dlow := fit(vx, a, b, c) - t*Smeas
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# Note that either
fit(x, a, b, c) := a*e^(b*x) + c
fit(x, β) := β[0]*e^(β[1]*x) + β[2]
# are acceptable ways to specify the fit function for the confidence function.
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