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# REGRESSION
# Rational Function Regression
# rationalfit(vx, vy, conf, m, n, [Stdy], [LBUB], [Acc],["noscale"])
# rationalfitnp(vx, vy, conf, m, n, [Stdy], [LBUB], [Acc],["noscale"])
# LeastSquaresFit(vx, vy, F(x), guess, conf, [Stdy], [LBUB], [Acc])
# Rational functions can be useful in fitting data with asymptotes, or other intractable shapes, much like rational function interpolation. The rationalfit function will fit a rational polynomial to data, estimating a guess value by doing a linear fit for the parameters in the numerator, assuming a denominator of 1. It requires you to provide the order of the numerator and denominator, m and n, respectively. The rationalfitnp function has an additional calculation to avoid poles in the denominator within the data range, so the function will be well behaved everywhere in the interval.
# The following data are the result of a NIST study involving semiconductor electron mobility. The response variable is a measure of electron mobility, and the predictor variable is the natural log of the density.
# [component: outputs data]
# 1 Response variable, y (mobility)
# 1 Predictor variable, x (density)
vy := data[:, 0]
vx := data[:, 1]
## Solving for the parameters
# Specify an order for the numerator and denominator of the rational function:
m := 3
n := 3
# Fitting function:
NIST(x, β) := (β[0] + β[1]*x + β[2]*x^2 + β[3]*x^3)/(1 + β[4]*x + β[5]*x^2 + β[6]*x^3)
# Apply the rationalfit function:
Res := rationalfit(vx, vy, 0.95, m, n, "noscale")
# The first column of output contains the values for the parameters. The second and third column contain outputs for the lower and upper confidence limits, respectively.
# Correct values from the NIST web site:
NISTβ := transpose([1.2881397*10^3, 1.4910793*10^3, 583.2383688, 75.4166443, 0.966295, 0.3979729, 0.0497273])
# Compare values
NISTβ =  # no stored result
Res =  # no stored result
fit(x) := NIST(x, Res[:, 0])
NISTfit(x) := NIST(x, NISTβ)
x := -3.2, -3.1 .. max(vx)
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corr(vectorize(fit(vx)), vy) =  # no stored result
## Comparison with NIST results
degofree := length(vx) - (m + n)
degofree =  # no stored result
residual := vectorize(vy - fit(vx))
NISTres := vectorize(vy - NISTfit(vx))
# Residual sum of squares
b := sum(residual^2)
NISTb := sum(NISTres^2)
[b; NISTb] =  # no stored result
# Standard deviation
σ := sqrt(sum(residual^2)/degofree)
NISTσ := sqrt(sum(NISTres^2)/degofree)
[σ; NISTσ] =  # no stored result
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## Further constraints
# Note that you can specify lower and upper bounds on fit parameters, a standard deviation on the y values, and a tolerance for this function, just as for LeastSquaresFit.
# Create a matrix of lower and upper bounds on the parameters
i := 0 .. (m + n)
LBUB[i, 0] := 0
LBUB[i, 1] := 10^4
StdY[last(vy)] := 1.0
Res := rationalfit(vx, vy, 0.95, m, n, StdY, LBUB, 10^-7, "noscale")
NISTβ =  # no stored result
Res =  # no stored result
# Note that order of arguments matters here. You are welcome to use any of the optional parameters alone, that is, you can calculate
Res := rationalfit(vx, vy, 0.95, m, n, 10^-10)
# if you just want to adjust the accuracy of the calculation. Default accuracy is 10^-7. However, if you are using two or all three of the optional parameters, you must first enter the standard deviation vector, then the lower and upper bounds matrix, then the accuracy.
# Finally, be aware that rationalfit does an automatic scaling on input data, so that the accuracy can remain scale-invariant.  It then rescales the output parameters to match the original data.  Most of the time, this ensures that your fit will be achieved regardless of the relative scale of your input data.  If you are having trouble achieving a good fit, however, you may wish to add the noscale option string at the end of the argument list, to back out this option.
## Solving for the rational function without poles
# In the case of rationalfitnp (no poles), the solution to the traditional least-squares problem is checked for roots of the denominator within the fitting interval. If there are no poles, the generated fit is returned. If there are poles, additional constraints are added to the nonlinear optimization problem. The denominator polynomial is cast in the following form:
denom(x) == product(a[i]*x^2 + b[i]*x + c[i], i = 0 .. floor(m/2))*product(b[i]*x + c[i], i = floor(m/2) .. 3*floor(m/2) - m)
g(a, b, c) == integral(1/(a*x^2 + b*x + c)^2, x = min(x) .. max(x))
# To avoid poles the following constraints are added:
i := 0 .. floor(m/2)
g(a[i], b[i], c[i]) ≤ ∞
i := 3*floor(m/2) - m
g(0, b[i], c[i]) ≤ ∞
# This modified problem is then solved.
Res := rationalfitnp(vx, vy, 0.95, m, n, StdY, LBUB)
Res =  # no stored result
# In this case, no poles are detected in the first fit, so the results are the same.
## General nonlinear fitting of rational functions
# For comparison, here is the same calculation set up using the LeastSquaresFit function, which performs the same algorithm, but requires setup of the fitting function and a guess value. There may be cases where you wish to do this. For example, if you are fitting a function where you desire the constant term in the numerator, rather than the denominator, to be 1.
# Here our function is of the form | 1/x
i := 1 .. 15
X[i] := i + 10^-15
Y[i] := 1/(X[i] + 0.5*rnd(i))
num := 3
denom := 5
# First try rationalfit:
dev[i] := 1/0.5
param := rationalfit(X, Y, 0.95, num, denom, dev, 10^-5)
f(x, β) := sum(β[n]*x^n, n = 0 .. num)/(1 + sum(β[n]*x^(n - num), n = num + 1 .. rows(param) - 1))
fit(x) := f(x, param[:, 0])
x := 0, 0.001 .. rows(X)
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# The no-poles version of the function might provide a nicer fit, once the tolerance was appropriately adjusted, but in general, the functional form doesn't reflect the real nature of the function.
# Now LeastSquaresFit:
# Guess value :
βguess := [-0.198; 9.614*10^-3; 1; 0; 0]
i := 0 .. last(βguess)
Bounds[i] := 0
Bounds =  # no stored result
f(x, c) := (1 + c[0]*x + c[1]*x^2)/(c[2] + c[3]*x + c[4]*x^2)
Bounds[:, 1] := [1; 1; 1; 1; 1]
c_LSF := LeastSquaresFit(X, Y, f, βguess, .95, dev, Bounds, 10^-4)[:, 0]
c_LSF =  # no stored result
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# Note that any filtering or data transformation method that biases the data towards a straight line before doing a rational function fit will add considerable convergence speed to the rational function and may have a side benefit of getting rid of unwanted poles.
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