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# NONPARAMETRIC FITTING
# Rational Function Interpolation
# rationalint(vx,vy,x)
# The rationalint function performs interpolation at a requested point, x, using a rational function approximation (quotient of polynomials) to the data. This type of interpolation is useful for data with sharp discontinuities, which are handled by the poles in the denominator of the rational function.
# Consider the data:
x := [8; 13; 17; 24; 66; 89; 120; 187; 200]
y := [.08; .131; .172; .245; .766; 1.235; 2.9; -6.7; -4.2]
j := 0 .. rows(x) - 1
# A transition of sorts occurs between x = 120 and x = 187. We would like to estimate where this happens, and also approximate y values for any values of x in the range of the tabulated points.
X := transpose([10, 3, 050, 80, 110, 140, 180, 220, 250])
Y[j] := rationalint(x, y, X[j])[0]
E[j] := rationalint(x, y, X[j])[1]
# The output of rationalint is a vector of length 2 containing the value of the rational function evaluated at X and an estimate of the error.
## Finding the asymptote
# To find the value of x at which the approximation has an asymptote, we can solve for the value at which rationalint(x,y,z) has a zero denominator:
# A guess at the location of the transition:
z := 150
R := root(1/rationalint(x, y, z)[0], z)  # error: bad_argument (Matrix (Value {}))->I4->Value {} (Value {})->(Value a)->b I4 Value a
# Approximate position of the asymptote:
R =  # error: bad_argument (Matrix (Value {}))->I4->Value {} (Value {})->(Value a)->b I4 Value a
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# The polynomials in the numerator and denominator of the quotient have the same degree if the number of tabulated points is odd. The degree of the denominator is one larger than the degree of the numerator if the number of points is even.
## Poles in the interpolated values
# Note that the very feature which makes rational function interpolation useful, the existence of poles which result in asymptotic behavior, can be a liability. The algorithm may construct unwanted poles in an effort to fit the data better throughout the rest of the range. The following example compares the error in polyint and rationalint, and shows this unwanted effect, as opposed to polynomial interpolation, which has no poles.
# which approximates the curve
f(x) := sqrt(x)
f(0.35) =  # no stored result
x1 := [0.1; 0.2; 0.3; 0.4; 0.5; 0.6; 0.7; 0.8; 0.9; 1]
y1 := [0.316228; 0.447214; 0.547723; 0.632456; 0.707107; 0.774597; 0.83666; 0.894427; 0.948683; 1]
rationalint(x1, y1, 0.35) =  # no stored result
polyint(x1, y1, 0.35) =  # no stored result
# Calculate the interpolated vectors
steps := 1000
i := 0 .. steps
u[i] := (i*(1 - 0.1)/steps) + 0.1
r[i] := rationalint(x1, y1, u[i])[0]
p[i] := polyint(x1, y1, u[i])[0]
# and the associated errors
Δr[i] := 1 - u[i]^(-1/2)*r[i]
Δp[i] := 1 - u[i]^(-1/2)*p[i]
# The interpolated values from ratint and polint seem virtually identical,
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# but look at the errors:
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# There is a sharp spike in the error for the rational function interpolation, that is due to a pole in the chosen denominator. We can zoom in on this portion:
steps := 1000
i := 0 .. steps
u[i] := (i*(0.55 - 0.52)/steps) + 0.52
r[i] := rationalint(x1, y1, u[i])[0]
Δr[i] := 1 - u[i]^(-1/2)*r[i]
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# In practice, you may not notice these poles if your step size is too large, but the interpolated value does go to infinity if you are directly on the pole, which may cause problems, for example, if you are integrating these results with a small convergence tolerance. You may find that Thiele interpolation provides better results in these cases.
# The rationalint function is based on RATINT (p.112) from the book "Numerical Recipes in C, The Art of Scientific Computing" (Cambridge University Press),  Copyright (C) 1987, 1988 Numerical Recipes Software, and is used under license.
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