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# EXAMPLES
# Using a Rational Function to Fit Optical Constants
# by Robert Adair
# The refractive index of a material is a particularly good candidate for fitting with a rational function because the dispersion model is a sum of partial fractions, which is another form of a rational function.
n(λ)^2 == A + B*λ^2/(C - λ^2) + D*λ^2/(E - λ^2) + ...
# which is another form of:
n(λ)^2 == (c0 + c1*λ^2 + c2*λ^4 + ...)/(1 + d1*λ^2 + d2*λ^4 + ...)
# where λ is the wavelength of light.
# One problem encountered in optics is obtaining this dispersion model from a set of data points. This is normally done using a nonlinear least-squares solver to solve the unknown constants in the partial fraction expansion. If the data is accurate enough, rationalint can also be used to interpolate between the data points.
# As an example, consider the dispersion of fused silica. This data was taken from a table in the Melles Griot Optics catalog:
# [component: outputs SiO2_Data]
nm ≡ 10^-9*m
μm ≡ 10^-6*m
λtest := SiO2_Data[:, 0]*nm
n := SiO2_Data[:, 1]
rows(SiO2_Data) = 56
# Typically, the experimenter will only have a small number of data points, so extract a subset of data which rationalint will interpolate.
# Where l is in nanometers (first column), and n is dimensionless (second column).
InterpData := [
    302.2, 1.48719;
    404.7, 1.4696;
    496.5, 1.4625;
    632.8, 1.457;
    706.5, 1.4551;
    1500, 1.4446;
    1800, 1.4409;
    2100, 1.4366
]
λ_interp := InterpData[:, 0]*nm
n_interp := InterpData[:, 1]
i := 0 .. rows(InterpData) - 1
# Create a rational function that can evaluate the data between the interpolation points. Note that we expect the index of refraction squared to follow a rational function, not the index. It is best, then, to transform the measured data by squaring it before interpolating, then take the square root when comparing with the original data.
vx1 := vectorize(λ_interp^2)
vy1 := vectorize(n_interp^2)
fnsq(x) := rationalint(vx1, vy1, x^2)[0]
fn(x) := rationalint(λ_interp, n_interp, x)[0]
# Compute the refractive index at the full range of wavelengths.
n_fit := vectorize(sqrt(fnsq(λtest)))
n2_fit := vectorize(fn(λtest))
# Compare the computed values of the refractive index
# to the experimental data.
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# The interpolation for the squared data lies directly on top of the actual data, even though it must extrapolate outside of the data range, and bridge large gaps between points. The direct interpolation without squaring overpredicts n when it is used to extrapolate.
## Regression
# Here is an example using rationalfit to fit the data.
# The Dispersion formula is given in Melles Griot as
fε1(λ) := 1 + 0.6961663*λ^2/(λ^2 - (.0684043*μm)^2) + .4079426*λ^2/(λ^2 - (.1162414*μm)^2) + .8974794*λ^2/(λ^2 - (9.896161*μm)^2)
# Let's give ourselves a squared dataset to work with that is scaled to microns for numerical accuracy:
vx1_sc := vectorize((λ_interp/μm)^2)
# The data also has a published accuracy:
StdY[i] := 3*10^-5
# Fit the data with the rationalfitnp function which creates a rational function with no poles in the data fitting region.  If the poles are not in an area of concern, then rationalfit may be used for slightly higher accuracy.
param := rationalfitnp(vx1_sc, vy1, 0.98, 2, 2, 10^-12)  # error: maximum iterations exceeded
param =  # error: bad_syntax 0 272
f(x, β) := (β[0] + β[1]*x + β[2]*x^2)/(1 + β[3]*x + β[4]*x^2)
λ_min := min(λtest)
λ_max := max(λtest)
wav := λ_min, λ_min + 1*nm .. λ_max
nfit(λ) := sqrt(f((λ/μm)^2, param[:, 0]))  # error: bad_syntax 0 272
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# All the curves, including the well-established Sellmeier equation, appear to lie approximately on top of one another within the range of the measured data.
resid_ratfit := vectorize(n_interp - nfit(λ_interp))  # error: bad_syntax 0 272
resid_Sell := vectorize(n_interp - sqrt(fε1(λ_interp)))
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sum(resid_ratfit^2) =  # error
sum(resid_Sell^2) = 4.356e-9
# Note that scaling is critical to the calculation to help the nonlinear solver converge quickly to a numerically accurate solution.  Squaring the wavelength also helps in that it creates a rational function that best matches the physics of the refractive index dispersion.
## Reference
# (1988) Melles Griot Optics Guide, Melles Griot, Irvine, CA, p.3-5.
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