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# REGRESSION
# Polynomial Regression
# regress(vx, vy, n) | loess(vx, vy, span)
## interp(vs, vx, vy, x)
# Polynomial regression minimizes the distance of all data points to a polynomial curve of degree n (least-squares). The regress function creates a single polynomial that best approximates the entire data set. The loess function performs localized regression, fitting second-order (quadratic) polynomials piecewise along the curve. The span argument controls the size of the piece. As span gets larger, loess becomes equivalent to regress with n = 2. The interp function is used to calculate the value of the regression at a point x given the output, vs, from regress or loess.
# Both regress and loess can be used for multivariate regression (more than one independent variable), as discussed in the next section.
## Polynomial of best-fit
# Consider a set of data:
i := 0 .. 30
vx[i] := rnd(10) - 5
vy[i] := 3*sin(vx[i]) + rnd(0.5)
# We can construct the polynomial of best-fit in the least squares sense much like we did for the linear case. The regress function returns the set of polynomial coefficients c_i that make the sum-of-squares equation
sum((Y[j] - sum(c[i]*X[j]^i, i = 0 .. n))^2, j = 0 .. N)
# a minimum, by differentiating with respect to each coefficient and setting the results equal to zero. The normal equations obtained in this way are then solved by singular value decomposition.
# Here are several polynomial fits, for order 3, 5, and 10.
c3 := regress(vx, vy, 3)
p3(t) := interp(c3, vx, vy, t)
c5 := regress(vx, vy, 5)
p5(t) := interp(c5, vx, vy, t)
c10 := regress(vx, vy, 10)
p10(t) := interp(c10, vx, vy, t)
t := -6, -5.9 .. 6
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## Choosing the order of the polynomial
# This plot brings up an important point. The order of a polynomial specifies the number of bumps in the function. While you want to include enough bumps to adequately model your data, the extra wiggles will probably make your function behave more unpredictably, that is, less like the general trend of your data, at the ends of the data range. As with all regression, using the polynomial fit function outside the range of the data carries risk. In addition, calculating polynomials of higher order requires more computations, since you are solving a larger system of equations. You must balance the need for accuracy against the speed of the computation and the overall behavior of the function.
# It may be worthwhile to investigate how much your estimates improve with higher order:
polyerr :=
    for n ∈ 1 .. 10
        c ← regress(vx, vy, n)
        SSE[n - 1] ← 1/(length(vx) - n)*sum((vy[j] - interp(c, vx, vy, vx[j]))^2, j = 0 .. last(vx))
    SSE
i := 0 .. 9
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polyerr =  # no stored result
# So, in the case of this data, a polynomial order of 5 or 6 is probably more than sufficient.
# Finally, recall that you can't fit a polynomial with an order greater than one less than the total number of data points:
vx := transpose([0.5, 1, 1.5, 2, 2.5])
i := 0 .. last(vx)
vy := transpose([-1.7, 3.9, 2.7, 3.1, 0])
t := 0, 0.1 .. 3
c1 := regress(vx, vy, 1)
P1(t) := interp(c1, vx, vy, t)
c2 := regress(vx, vy, 2)
P2(t) := interp(c2, vx, vy, t)
c3 := regress(vx, vy, 3)
P3(t) := interp(c3, vx, vy, t)
c4 := regress(vx, vy, 4)
P4(t) := interp(c4, vx, vy, t)
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# You can see the parabolic, cubic, and quartic fits to the data. In the case of 5 data points, the quartic is sufficient to pass through every point, and is, in fact, the same as the interpolating polynomial.
c4 := regress(vx, vy, 4)
P4(t) := interp(c4, vx, vy, t)
pol(t) := polyint(vx, vy, t)[0]
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# Note that the polynomial of best fit calculated by regress is, in general, different than the interpolating polynomial given by polyint. While polyint returns a line that will pass through every point, the interpolating polynomial will be of degree one less than the number of points, and so may oscillate between points unrealistically or undesirably. The regress function will allow you to constrain the order of the polynomial, and will return the coefficients of the fit. It is more like polyiter in this respect.
# Any requests for higher degree fits,
n := 5
c := regress(vx, vy, n)  # error: There must be at least as many data points as parameters
# result in an error message that there must be as many data points than polynomial coefficients. Now let's look at what the regress function returns and why the interp function enters the picture.
# The regress function is used like the various spline functions (pspline, lspline, cspline) discussed in the section on spline interpolation. The output of regress will be a vector. The first three components contain codes for interp. They are:
c4[0] =  # no stored result  # A code telling interp that this is the output of regress.
c4[1] =  # no stored result  # The index within the vector where the polynomial coefficients begin.
Co := [3; 3; 4; -36; 118.65; -125.95; 56.2; -9]
c4[2] =  # no stored result  # The value of n.
# The remaining n+1 terms are the coefficients of the fitting polynomial from the lowest-degree term to the highest-degree term.
# This means you can extract the polynomial coefficients for the regress fit directly, if you need them, and construct the fitting polynomial as
x0 := 2.2
f(x) := sum(Co[i + 3]*x^i, i = 0 .. Co[2])
f(x0) =  # no stored result
interp(c4, vx, vy, x0) =  # no stored result
sum(Co[i + 3]*x^i, i = 0 .. Co[2]) → -36 + 2373/20*x - 2519/20*x^2 + 281/5*x^3 - 9*x^4
## Piecewise quadratic fitting
# The loess function fits a series of quadratic functions to data using local regression. A percentage of the total number of points in a weighted window around each data point will be used for successive quadratic fits. The percentage is defined by the third argument, span, or α, which is governed by the general guideline that
span*Numpts > 1
# since you want some number of points greater than 1 to be averaged into each least-squares weighted fit. Using only a few points around each value of x would be roughly equivalent to doing a quadratic spline. So, for the data
# [component: outputs S]
X := S[:, 0]
Y := S[:, 1]
α := .5
α*length(X) =  # no stored result
length(X) =  # no stored result
cpoly := regress(X, Y, 2)
fitpoly(t) := interp(cpoly, X, Y, t)
clo := loess(X, Y, α)
fitloess(t) := interp(clo, X, Y, t)
t := min(X), min(X) + .1 .. max(X)
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# In the case where α is large, it means that all data are being considered together in a single quadratic fit with almost all weights equal. This will approach the regress solution for a quadratic polynomial. Try setting α to 2 or 3.
# There are no real exact guidelines in choosing a value for α. As α gets larger, the plot of the loess fit gets smoother, because fewer pieces are being connected in the fit. But the fit may fail to follow data features appropriately. Conversely, as α gets small, you may find that loess doesn't converge.
# The loess algorithm is not designed for extrapolation. If you try to evaluate interp at values beyond the original x-range, you'll get an error.
fitloess(-15) =  # error: loess cannot extrapolate
# You may wish to use loess when your data has a somewhat discontinuous characteristic, but when you do not wish to piecewise fit by hand, or use complex or physically unrealistic models and nonlinear fitting methods.
# Both regress and loess are capable of multivariate fitting, as described in the next section.
# The Mathcad implementation of loess is a variation (some approximations made for the sake of speed) on the algorithm described in Smoothing by Local Regression: Principles and Methods. W. S. Cleveland and C. L. Loader (1996), http://cm.bell-labs.com/cm/ms/departments/sia/doc/smoothing.springer.pdf.
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