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# REGRESSION
# Residuals and Applicability of Fit
# Before a regression model can be used for prediction, it's important to see whether the underlying model assumptions have been met. Assumptions for the simple linear model are based on the way in which the population error terms are distributed. Specifically, the errors should be uncorrelated, and, for any given value of X, should be normally distributed with a mean of zero and a constant variance. We can check the assumptions, therefore, by investigating the error estimates (residuals).
# It's often easier to interpret the relative magnitude of residuals if they're standardized, that is, if the residuals are divided by an estimate of the error standard deviation σ.
FLEX := [
    0.711, 0.58;
    0.701, 0.63;
    0.706, 0.603;
    0.67, 0.615;
    0.898, 0.855;
    0.821, 0.810;
    0.872, 0.799;
    0.874, 0.834;
    0.848, 0.791;
    0.853, 0.81;
    0.67, 0.615;
    0.905, 0.916;
    0.887, 0.87;
    0.742, 0.73;
    0.79, 0.696
]
vx := FLEX[:, 0]
vy := FLEX[:, 1]
n := rows(FLEX)
i := 0 .. n - 1
# The residuals are found by fitting the data
FLEXfit(a) := intercept(vx, vy) + slope(vx, vy)*a
# and subtracting the fit values from the measured values.
residF[i] := vy[i] - FLEXfit(vx[i])
# An estimate of σ is given by the standard error of estimate:
se := stderr(vx, vy)
se =  # no stored result
## Standardized Residuals
# Dividing the residuals by the standard error of the estimate (i.e., the parametric fit)
sresid := residF/se
sresid =  # no stored result
# gives us what are known as standardized residuals.
# Another frequently used estimate for σ adjusts for the distance, or leverage, between each value of x and the mean of x:
i := 0 .. n - 1
leverage[i] := 1/(rows(vx) - 1)*(vx[i] - mean(vx))^2/Var(vx)
# The adjusted standardized residual, called a studentized residual, is defined by
stu_resid[i] := sresid[i]/sqrt(1 - (1/rows(vx) + leverage[i]))
# where
σ_estim := se/sqrt(1 - (1/rows(vx) + leverage))
σ_estim =  # no stored result
# is an estimate for the standard deviation of the individual residual.
# Studentized residuals are more precise in the sense that they account for any point-to-point differences in error variance. However, for the most part, standardized and studentized residuals will usually be close in value:
sresid =  # no stored result
stu_resid =  # no stored result
## Checking the assumption
# A linear relationship was originally chosen for this data because it looked linear
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# and had a high correlation coefficient,
corr(vx, vy) =  # no stored result
# If the data are, in fact, linearly related, and the errors are normally distributed, a scatterplot of the standardized (or studentized) residuals versus either the x values or the predicted y values will have no discernible pattern. The points will be randomly scattered about the hypothesized error mean of zero.
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# If the data are not linear, residual scatterplots will have a distinct pattern. For instance, if we generate a random sample of points having a curvilinear (in this case, quadratic) relationship,
n_sample := 75
endpt := 20
k := 0 .. n_sample - 1
x[k] := rnd(endpt)
σ := 10
ε := rnorm(n_sample, 0, σ)
y := vectorize((x - endpt/2)^2) + ε
fit(a) := intercept(x, y) + slope(x, y)*a
# residuals:
resid[k] := y[k] - fit(x[k])
# The quadratic pattern in the data will be reflected in the residual scatterplot.
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## Constant Error Variances
# If the variance of the error terms is not constant (they are not normally distributed), a scatterplot of the residuals will show either an increasing or decreasing spread from left to right. Even though the data generated below appear linear, the error variances are not normally distributed. The points in the residual plot are increasingly scattered from left to right:
n_sample := 75
endpt := 20
k := 0 .. n_sample - 1
x[k] := rnd(endpt)
σ_incr := x
ε_incr[k] := rnorm(n_sample, 0, σ_incr[k])[k]
m := 5
b := 2
y := m*x + b + ε_incr
fit(a) := intercept(x, y) + slope(x, y)*a
# residuals:
resid[k] := y[k] - fit(x[k])
corr(x, y) =  # no stored result
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# It may be possible to correct this sort of situation by transforming the dependent variable, as described in Stabilizing the Error Variance.
## Correlation of Errors
# Whether adjacent error terms in the linear regression model are correlated can be determined by the Durbin-Watson statistic (DW).
x := FLEX[:, 0]
y := FLEX[:, 1]
# Values for the statistic range from 0 to 4. If adjacent terms are uncorrelated, the Durbin-Watson value will be close to 2.
DW(e) := sum((e[d] - e[d - 1])^2, d = 1 .. rows(e) - 1)/sum(e[d]^2, d = 0 .. rows(e) - 1)
DW(residF) =  # no stored result
# Durbin-Watson values less than 2 indicate positive adjacent correlations, and values greater than 2 indicate negative correlations. Note that this statistic is used in the calculation of least-squares B-splines.
# Unfortunately, the Durbin-Watson statistic cannot detect higher-order (non adjacent) correlations. These types of correlations do not commonly occur without a correlation between adjacent errors.
## Normality
# If a normal plot of the standardized residuals resembles a straight line, as it does for the FLEX data, then the errors are approximately normally distributed.
axes := qqplot(residF/stderr(vx, vy), "normal")
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# Since normal plots can also be sensitive to other assumption violations, such as when the error variances are not equal, it's best to check for normality last.
## Residuals and outliers
# As a general rule, a data point can be classified as an outlier if the absolute value of its standardized residual is greater than 3. Let's make an outlier in the FLEX data to demonstrate.
FLEX[12, 1] := 1.151
vx := FLEX[:, 0]
vy := FLEX[:, 1]
n := rows(FLEX)
FLEXfit(a) := intercept(vx, vy) + slope(vx, vy)*a
i := 0 .. n - 1
residF[i] := vy[i] - FLEXfit(vx[i])
# We can remove the outlier using the trim function
outlier[0] := 12
vectorize(|residF/stderr(vx, vy)|) > 3 =  # no stored result
FLEXnew := trim(FLEX, outlier)
vx1 := FLEXnew[:, 0]
vy1 := FLEXnew[:, 1]
FLEXfit1(a) := intercept(vx1, vy1) + slope(vx1, vy1)*a
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## Influence of outliers
# Outliers that are the result of experimental errors should, of course, be discarded from a regression. Removing an outlier that's not due to an error depends in part on its effect on the regression.
# For instance, when the outlier detected above is removed from the original data the coefficient of determination improves from
corr(vx, vy)^2 =  # no stored result
# to
corr(vx1, vy1)^2 =  # no stored result
## Cook's Distance
# The overall influence of a deleted point on a linear regression can be measured by Cook's distance:
Cooks(DATA, index) :=
    vx ← DATA[:, 0]
    vy ← DATA[:, 1]
    yfit ← intercept(vx, vy) + slope(vx, vy)*vx
    ind[0] ← index
    x0 ← trim(vx, ind)
    y0 ← trim(vy, ind)
    y0fit ← intercept(x0, y0) + slope(x0, y0)*vx
    Cooks ← sum((y0fit[i] - yfit[i])^2, i = 0 .. last(vx))/(2*stderr(vx, vy)^2)
Cooks(FLEX, 12) =  # no stored result
# If Cook's distance for an outlier is less than 1, then the outlier doesn't usually have a major effect on the regression and perhaps should not be removed.
# This outlier does affect the correlation, but should we delete it?  If, for some reason, we believe that the outlier came from a source other than the rest of the data, it should be removed from the analysis. The caution is that what appear to be outliers may, in fact, represent a physical phenomena which must be explained, and perhaps a different regression model is a better choice.
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