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# EXAMPLES
# Savitzky-Golay and Median Filtering
# by Erik Esveld
# Wageningen University and Research Center
# For the analysis of kinetic processes, the derivative of a  signal measured at regular time intervals is often required. Because of the noise in real measured systems, the data needs to be smoothed in order to obtain meaningful results for the derivative of the data.
# Savitzky-Golay (SG) filtering is a smoothing technique which relies on a local polynomial fit of regularly spaced data. Since the nth order derivative for x=0 is directly determined by the respective polynomial coefficient, the filtering method can also conveniently be used to directly obtain the derivative of the data.
#
# SG filtering is a convolution method. The coefficients of the convolution window which follow from the least-square polynomial fit are obtained by the Moore Penrose inverse of a fixed matrix.
# Real data is often also cluttered with spikes, which can be efficiently removed by a median filter. This filter is especially useful for monotonic ascending or descending data or data which contains sudden level changes. It doesn't work very well for spectral data with peaks.
## Filter function definition
# The filter functions have error messages defined in this vector:
CustErrMsg := ["Odd window width expected"; "Order of polynomial should be less \nthan width of the window"; "Order of derivative cannot be greater \nthan the order of polynomial"]
# The following function calculates the Savitzky-Golay coefficients for the smoothing, with odd-length window width w, and a kth order polynomial to obtain the the dth order derivative by convolution.
SGcoef(k, w, d) :=
    error(CustErrMsg[0]) if mod(w, 2) == 0
    otherwise
        error(CustErrMsg[1]) if k ≥ w
        otherwise
            error(CustErrMsg[2]) if d > k
            otherwise
                m ← (w - 1)/2
                for r ∈ 0 .. 2*m
                    for c ∈ 0 .. k
                        S[r, c] ← (r - m)^c
                MPinverse ← (transpose(S)*S)^-1*transpose(S)
                d!*transpose(MPinverse)[:, d]
# Convolution of a vector X with window coefficients c:
Convol(X, c) :=
    width ← length(c)
    error(CustErrMsg[0]) if mod(width, 2) == 0
    otherwise
        m ← (width - 1)/2
        Con[last(X)] ← 0
        for i ∈ m .. (last(X) - m)
            Con[i] ← c*submatrix(X, i - m, i + m, 0, 0)
        Con
# The error messages are handy to track misuse of the functions. For example, click on this faulty expression:
SGcoef(2, 5, 3) =  # error: Order of derivative cannot be greater \nthan the order of polynomial
## Filter application example
# Consider the example data with increasing chirp.
f(t) := 2 - cos(exp(t/300))
# Add white noise with stdev_wn := 0.2.
whitenoise(t) := qnorm(rnd(1), 0, stdev_wn)
# Add some outliers with stdev_out := 2 every n := 20 points.
outliers(t) := if(rnd(1) ≤ 1/n, qnorm(rnd(1), 0, stdev_out), 0)
# Store the original data and the noisy data in vectors.
i := 0 .. 1000
F[i] := f(i)
X[i] := f(i) + whitenoise(i) + outliers(i)
Stdev(X - F) =  # no stored result
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# Let's get rid of the spikes by the application of a narrow (5pt window) median filter.
XM := medsmooth(X, 5)
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# Smooth the result with a 2nd order polynomial fit over 41 points.
k := 2
w := 41
XMSG := Convol(XM, SGcoef(k, w, 0))
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# Now look at the first derivative of the smoothed data.
dXMSG := Convol(XM, SGcoef(k, w, 1))
df[i] := d/di(f(i))
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# The smoothing of the function worked well with the exception of the region ends, where the window width extends past the end of the data. The first derivative shows an underestimation of the steepest slopes. This is due to the limitations of the second order (parabolic) fit over the large window. With a smaller window or with a quadratic polynomial fit, these steep features can be better modeled at the cost of decreased noise smoothing. Try changing the values of k and w to examine these effects.
## Loess smoothing
# Finally, it's worth comparing this method with another polynomial fitting and windowing method, the loess fit. Loess, with small scale factors, similar to windows, provides an effective smoother. The difference with the Savitzky-Golay method is that loess uses a weighted and adaptive window to locally fit a 2nd degree polynomial.
I[i] := i
smoothed := loess(I, XM, 0.07)
XML[i] := interp(smoothed, I, XM, i)
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# Since the loess method cannot be used for extrapolation, and numerical derivatives require differencing on either side of the endpoints, we'll contract the range over which we find the derivatives.
i := 1 .. length(X) - 2
# To obtain the first derivative we can use the simple linear difference since the local parabolic fit is discontinuous in the second derivative.
dXML[i] := (XML[i + 1] - XML[i - 1])/2
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# In the case of loess, the fit is applicable over a wider range, since it uses an adaptive and weighted window. Unlike the Savitzky-Golay method, the derivative at the right side is not underestimated. However, better fidelity in the derivative implies poorer smoothing. The Savitzky-Golay method, on the other hand, is capable of using higher order fits to obtain all the derivatives directly.
## Reference
# W.H. Press et al. (1992), Numerical recipes in C : the art of scientific computing, Cambridge University Press, 2nd ed. Chapter 14.8, page 640.
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