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# PRECONDITIONING DATA
# Scaling and Transformation
# Scale(M,min,max)
# It may be necessary to scale your data for good results from various fitting routines, to view it appropriately, or to avoid exceeding the calculation limits of the computer in some cases. The Scale function takes a data vector or matrix, M, and scales it between min and max. It may also be desirable to transform your data using a log scale or other system in order to fit linear equations to nonlinear data.
## Scaling for images
# So, for example, if you wish to scale data to be displayed in the picture operator, you can set your range from 0 to 255:
i := 0 .. 200
j := 0 .. 200
data[i, j] := sin(2*π*i)*cos(2*π*j)
data_sc := Scale(data, 0, 255)
# [component: inputs data_sc]
# If the data were unscaled, the image would appear black. Try changing the argument name to see this.
## Scaling for processing
# Some algorithms are sensitive to large or small scale data, or may not display sensibly for certain scales of data. It may be useful to scale the data to a reasonable range before applying a polynomial regression, or displaying a histogram, for example, to get sensible bin markers.
y := rnorm(200, 0, .1)
min(y) = -0.270673
max(y) = 0.239604
z := histogram(10, y)
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z
ynew := Scale(y, -10, 10)
z := histogram(10, ynew)
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# A scaling may be appropriate before attempting a Least-Squares regression. All solvers for this type of problem eventually calculate a matrix product. It's worthwhile to check the determinant of M^T*M where M*c=y. When the determinant goes to 0 or infinity, your answers from a numerical solver are highly suspect, if the solver converged at all. Rescaling the data can help this problem.
## Transforming data
# It may be worthwhile to transform data to a different functional form to apply simpler, more robust parametric linear fit routines. For example, data following the polynomial form
Y == A*X^B*ε
y(x) := 4*x^3*0.2
i := 0 .. 20
vx[i] := i + .01
vy[i] := y(vx[i])
# can be transformed into linearly related data by using logarithms
ln(Y) == ln(A*X^B*ε)
ln(A*X^B*ε) expand → ln(A*X^B*ε)
# Carrying this through with the example data
vyln[i] := ln(vy[i])
params := lnfit(vx, vyln)
B := params[0]
lnAlnε := params[1]
fitln(x) := B*ln(x) + lnAlnε
# To return to the original data form, do the inverse transformation on the coefficients.
e^lnAlnε = 0.8
4*0.2 = 0.8
B = 3
fit(x) := e^lnAlnε*x^B
vfit := vectorize(fit(vx))
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y := y  # Undefine y
# Other types of transformations can be applied to data whose error terms are not normally distributed with a constant variance. It's important to remember, of course, that regression results will be based on the transformed variables, rather than on the originals.
## Stabilizing the Error Variance
# The regression model
Y[i] == β_0 + β_1*X1[i] + β_2*X2[i] + ... + β[p]*Xp[i] + ε[i]
# assumes that values of the independent variables are fixed, and the only random component is the error term ε. Violations concerning ε may sometimes be corrected by transforming the dependent variable. In theory, if the error variance σ^2 is a function of the mean of Y,
σ^2 == f(mean(Y))
# then the transformation satisfying
d/dy(T(y)) == c/sqrt(f(y))
# where c is any constant, will produce an error term with a nearly constant variance. Integrating the preceding equation gives T(y) as
T(y) == integral(c/sqrt(f(y)), y)
# Here are three of the more common transformations, in order of increasing severity.
## Square Root Transformation
# When
σ^2 == k*mean(Y)  # that is,
f(y, k) := k*y
# the transformation T(y) is defined by
integral(c/sqrt(f(y, k)), y) → 2*c*sqrt(k*y)/k
# Taking
c == sqrt(k)/2
# the transformation can be simplified to
T(y) == sqrt(y)
## Logarithm Transformation
# When
σ^2 == k*mean(Y)^2  # that is,
f(y, k) := k*y^2
# the transformation T(y) is defined by
integral(c/sqrt(f(y, k)), y) == integral(c/sqrt(k*y^2), y) == integral(c/(sqrt(k)*y), y)
integral(c/(sqrt(k)*y), y) → c*ln(y)/sqrt(k)
# Taking
c == sqrt(k)
# the transformation can be simplified to
T(y) == ln(y)
## Reciprocal Transformation
# When
σ^2 == k*mean(Y)^4  # that is,
f(y, k) := k*y^4
# the transformation T(y) is defined by
integral(c/sqrt(f(y, k)), y) == integral(c/sqrt(k*y^4), y) == integral(c/(sqrt(k)*y^2), y)
integral(c/(sqrt(k)*y^2), y) → -c/(sqrt(k)*y)
# Taking
c == -sqrt(k)
# the transformation can be simplified to
T(y) == 1/y
# In practice, however, the functional relationship between σ^2 and the mean of the dependent variable isn't always evident. Finding the right transformation to correct a particular violation may be more a matter of trial and error.
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