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# NONPARAMETRIC FITTING
# About Splines and Interpolation Methods
# Splines are used to describe a curve through a data set without a parametric function.  Spline interpolation can also be used to approximate a curve which has an exceptionally complicated function associated with it. In the case of B-splines, where a string of knots is used to represent the data instead of the original x-values, significant data compression can be realized as well. The utility of polynomial splines is that, although they do not represent a closed-form expression, they are well-behaved, that is, they are differentiable, integrable, etc., and so are useful in many of the same kinds of mathematical analyses as a closed-form expression.
# Parametric fit functions, or regressions, are described in the next section.  It may seem more natural to find a closed-form expression to describe a data set, rather than simply draw a line through it, but there are circumstances where the spline technique is perferable, or, in fact, the only one feasible.  See, for example, the comparison of B-splines with a polynomial fit.
# Different kinds of splines depend on different basis functions, that is, the type of function which will be used to interpolate between one data point and the next.  Depending on the form of your data, you may wish to use interpolation methods with special properties, like the rational spline, which is appropriate for asymptotic data, or data with a known rational function for a physical desciption.
# Note that polynomials splines, such as the built-in lspline, pspline, and cspline, or the new polyint, are a very poor fit to functions such as ln(x) and sqrt(x), because these functions have poles in the value and first derivative. A rational function is a much better choice here because it has the pole to match the original function.
#
# Additionally, polynomial splines return very suspect values near the end points, hence the choice of boundary conditions lspline, pspline and cspline. The so called "natural boundary conditions" used in cspline are probably the statistically worst option for the general problem. These end point issues mean that extrapolation beyond the data fitting region should not be done, and, in the case of B-Splines, this is generally enforced by making the function zero outside the data range.
# On the other hand, a rational function may be a good approximation to the true function which generated the data. If care is taken, it can be extrapolated beyond the endpoints. As a general rule of thumb, a data set with several turning points is well fit by polynomials (gaussians and lorentzians are exceptions) while data which is very smooth (for example, monotonic in derivative) is better fit by rational functions. This smoothness is what makes rational functions better candidates for data extrapolation than polynomial functions.
## Cubic splines
# The first step in cubic spline interpolation is to compute a vector of second derivatives for the spline.  For the built-in mathcad cubic spline functions, you have a choice of "linear" endpoints (lspline), "parabolic" endpoints (pspline) or "cubic" endpoints (cspline).  In this simulation, the choice of splines is done by setting the global variable type below using to the values 0 = lspline, 1 = pspline, 2 = cspline.
# We define the function
spline(n, x, y) := if(n == 1, pspline(x, y), if(n == 2, cspline(x, y), lspline(x, y)))
# for comparison purposes.
# First specify the data
N := 6
i := 0 .. N
x[i] := i
x := sort(x)
y[i] := rnd(2) - 1
# The vector of second derivatives returned by the spline routines is found by solving a linear system of equations. The arrays describing this system are set up below.  Note that changing the type of endpoint derivatives only affects a few elements of the coefficient matrix.
r := 1 .. N - 1
# The constant vector:
b[r] := (y[r + 1] - y[r])/(x[r + 1] - x[r]) - (y[r] - y[r - 1])/(x[r] - x[r - 1])
b[0] := 0
b[N] := 0
# The coefficient matrix:
M[0, 0] := 1
M[N, N] := 1
M[r, r - 1] := (x[r] - x[r - 1])/6
M[r, r] := (x[r + 1] - x[r - 1])/3
M[r, r + 1] := (x[r + 1] - x[r])/6
# The type specific assignments:
M[0, 1] := if(type == 1, -1, if(type == 2, (x[0] - x[2])/(x[2] - x[1]), 0))
M[0, 2] := if(type == 2, (x[1] - x[0])/(x[2] - x[1]), 0)
M[N, N - 1] := if(type == 1, -1, if(type == 2, (x[N] - x[N - 2])/(x[N - 2] - x[N - 1]), 0))
M[N, N - 2] := if(type == 2, (x[N - 1] - x[N])/(x[N - 2] - x[N - 1]), 0)
# Set the type here:
type ≡ 1  # 0 = lspline  # 1 = pspline  # 2 = cspline
# The value returned by the corresponding spline function is given by solving the system M * vs = b for vs.
vs := M^-1*b
vs =  # no stored result
spline(type, x, y) =  # no stored result
## The interp function
# The point at which we want to evaluate the spline is denoted by t and is defined as a global variable below.
# Determine which two x values t lies between, using the first two if t is less than all of them.  Use the last two x values if t is greater than all of them.
k := 0 .. N - 1
u[1] := 1
# This statement determines the indices of the two x values that bound t.  The last two values are used if t lies above the range, and the first two values are used if t lies below the range.
u[:, 0*k] :=
    index ← [0; 1] if t ≤ x[0]
    index ← [N - 1; N] if t ≥ x[N]
    otherwise
        i ← 0
        while x[i] < t
            i ← i + 1
        index ← [i - 1; i]
# Define:
x1 := x[u[0]]
x2 := x[u[1]]
y1 := y[u[0]]
y2 := y[u[1]]
v1 := vs[u[0]]
v2 := vs[u[1]]
hx := x2 - x1
hy := y2 - y1
hv := v2 - v1
# The portion of the cubic spline defined on the interval from x1 to x2 is given by
p(x) := hv/hx*(x - x1)^3/6 + v1*(x - x1)^2/2 + (hy/hx - hx/6*(v2 + 2*v1))*(x - x1) + y1
# Specify the value of t:
t ≡ 4.03
# The value returned by interp is shown below along with that given by the construction of this section.
p(t) =  # no stored result
v := if(type == 0, lspline(x, y), if(type == 1, pspline(x, y), cspline(x, y)))
interp(v, x, y, t) =  # no stored result
# B-splines
# B-splines are based on polynomial splines, but they use a set of points on the x-axis, called knots, to determine the piecewise  polynomials.  The polynomials, or basis functions, are used to fit the data by finding a sum of these functions which passes through the data.
u := [0; 0.75; 1.25; 1.75; 2.75]
X := [0; 0.5; 1; 1.5; 2; 2.5]
Y := [1; 2; 3.1; 2.9; 1.7; 2.8]
d := 2
# For any set of four consecutive knots k we define a piecewise quadratic function (because d =in our example) as follows.
# Define
B1(k, x) := (k[3] - x)^2/((k[3] - k[1])*(k[3] - k[2]))
B2(k, x) := -(k[3] - k[0])*(k[2] - x)^2/((k[3] - k[2])*(k[2] - k[1])*(k[2] - k[0]))
B3(k, x) := (k[3] - k[0])*(k[1] - x)^2/((k[3] - k[1])*(k[2] - k[1])*(k[1] - k[0]))
# Now we define our B-spline basis functions of degree d as
B(k, x) :=
    B1(k, x) + B2(k, x) + B3(k, x) if k[0] < x < k[1]
    B1(k, x) + B2(k, x) if k[1] ≤ x < k[2]
    B1(k, x) if k[2] ≤ x < k[3]
    0 otherwise
# The above are general formulas for the B-spline basis of degree 2 for any set of knots.  Similar definitions exist for degrees 1 and 3.  Now we continue our construction for our data.
# The next step is to extend the given set of knots by adding a few knots to either end of the original set
t[0] := u[0] - 2*(u[1] - u[0])
t[1] := u[0] - (u[1] - u[0])
t := stack(t, u)
n := last(u)
t[n + 3] := u[n] + (u[n] - u[n - 1])
t[n + 4] := u[n] + 2*(u[n] - u[n - 1])
t =  # no stored result
u =  # no stored result
# With these knots we construct our B-spline basis functions by taking four consecutive knots (there are 6 such the same number as our data points)) and using our function B above.  Define
Bp(n, x) := B([t[n]; t[n + 1]; t[n + 2]; t[n + 3]], x)
# our basis functions.
# For this particular set of knots they look like
s := -1.5, -1.49 .. 4.75
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# You may wish to change the knots u at the outset and see how the basis functions change.
# To perform our interpolation, we find numbers A_j such that
f(x) == sum(A[j]*Bp(j, x), j = 0 .. 5)
# interpolates the data.  That is, we want
Y[i] == sum(A[j]*Bp(j, X[i]), j = 0 .. 5)
# which is just a linear system solvable as
i := 0 .. 5
j := 0 .. 5
M1[i, j] := Bp(j, X[i])
M1 =  # no stored result
A := lsolve(M1, Y)
A =  # no stored result
# Define
f(x) := sum(A[j]*Bp(j, x), j = 0 .. 5)
# and we have our function:
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# So what does bspline return exactly?  The output of bspline
Q := bspline(X, Y, u, d)
# has three components:
Q[0] =  # no stored result
# is just a flag to interp that the output came from bspline as opposed to say pspline.  The third component
Q[2] =  # no stored result
# is just the node values
u =  # no stored result
# wrapped into the columns of an array.  The other output
Q[1] =  # no stored result
# contains the coefficients of the piecewise polynomials determined by the fit on each interval specified by the knots.  For example
Q[1][:, 0] =  # no stored result
# are the coefficients of the quadratic fit on the interval
Q[2][:, 0] =  # no stored result
# so we could define
p0(x) := Q[1][:, 0]*[1; x; x^2]
p1(x) := Q[1][:, 1]*[1; x; x^2]
# These functions interpolate on the appropriate subintervals:
X[0] =  # no stored result
Y[0] =  # no stored result
p0(X[0]) =  # no stored result
X[1] =  # no stored result
Y[1] =  # no stored result
p0(X[1]) =  # no stored result
X[2] =  # no stored result
Y[2] =  # no stored result
p1(X[2]) =  # no stored result
# and those are B-spline fits.
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