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# NONPARAMETRIC FITTING
# Cubic Splines
# pspline(Mx,My) | cspline(Mx,My)
# lspline(Mx,My) | interp(vs,Mx,My,x)
# Bicubic2D(vx,vy,Z,p,q)
# These functions construct cubic splines (piecewise polynomials) of the specified endpoint form, l for linear, p for parabolic, and c for cubic.  Columns of Mx must be in ascending order.The interp function is required to construct the interpolated points from the output of the spline functions. The Bicubic2D function performs bicubic interpolation in two dimensions at the requested point (p,q).
# [component: outputs Cu]
Cu := csort(Cu, 1)  # sort on the second column (1)
## Cubic splines
# You can choose to have the second derivative of your spline at both endpoints equal to 0 (lspline), equal to that of the next nearest point (pspline), or determined by the straight line through the nearest two points (cspline), meaning that the piecewise polynomial that passes through the last point on each end of your data is either linear, parabolic, or cubic.
vx := Cu[:, 1]
vy := Cu[:, 0]
paramsc := cspline(vx, vy)
paramsl := lspline(vx, vy)
# These functions return a vector which contains the values of the second derivative of the desired spline at each point of Mx.  Pass the output to the interp function to generate the interpolated values.
fitc(x) := interp(paramsc, vx, vy, x)
fitl(x) := interp(paramsl, vx, vy, x)
x := min(vx) .. max(vx)
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## Derivatives
# You may also wish to know the derivatives of the spline fit, to find maxima and minima, slope, or other features.  Mathcad's numerical derivative operators work with the fitted curves, e.g.
deriv(x) := d/dx(fitc(x))
deriv(44.5) = -0.0149786
x0 := vx[0]
x1 := vx[last(vx)]
d^2/dx0^2(fitl(x0)) = 0
d^2/dx0^2(fitc(x0)) = -0.0466822
d^2/dx1^2(fitl(x0)) = 0
d^2/dx1^2(fitc(x0)) = 0
# You can see an example of integrating using splines in the Application section.
## Interpolation in two dimensions
# If you are dealing with a square matrix of values, that is, the same number of x points as y points in a grid, then you can use the cubic spline functions in two dimensions as well:
# [component: outputs Mz]
n := rows(Mz)
i := 0 .. n - 1
X[i] := i
Y[i] := i
Mxy := augment(sort(X), sort(Y))
S := cspline(Mxy, Mz)
fit(x, y) := interp(S, Mxy, Mz, [x; y])
xlow := min(X)
FIT := CreateMesh(fit, 0, 5, 0, 5, 4*n, 4*n)
# [component: inputs FIT]
# [component: inputs Mz]
## 2D Bicubic Interpolation on a non-square grid
# The Bicubic2D function is equivalent to using lspline in two dimensions, with no restrictions on the number of rows and columns of the input values (they need not be equal). To obtain a value for a point in a table that does not previously exist, we first interpolate down each column of the table, creating a new row; then we interpolate across the new row.
x := transpose([0, 200, 300])
Altitude := [125, 139.8, 119.8; 124.8, 135.5, 120; 114.4, 139.2, 122.3; 121.1, 137.7, 121.1; 123.2, 135, 123.3]
y := [0; 10; 50; 120; 190]
# The x and y values must be in sorted order. If we do this for enough points, we can produce a smooth interpolation of the sketchy information in the table, and plot a representative map.
i := 0 .. 19
j := 0 .. 30
p[i] := 10*i
q[j] := 10*j
Zinterp[i, j] := Bicubic2D(y, x, Altitude, p[i], q[j])
# [component: inputs Altitude]
# [component: inputs Zinterp]
# The Bicubic2D function is based on SPLIN2 (p.128) from the book "Numerical Recipes in C, The Art of Scientific Computing" (Cambridge University Press),  Copyright (C) 1987, 1988 Numerical Recipes Software, and is used under license.
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