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# EXAMPLES
# Comparing Splines with a Polynomial Fit
# by Robert Adair
# The statistical B-spline functions introduced in the data analysis extension pack will calculate a string of knots using the Durbin-Watson statistic to accept or reject spline fits. In this way, statistical B-splines supply a minimal number of knots to reflect all of the data features.
a := READPRN("example1.txt")
x := a[:, 0]
y := a[:, 1]
w := a[:, 2]
# where w is a vector of weights giving the estimated standard deviations of the random error in y. We'll fit with spline polynomials of order 3.
SplineDegree := 3
b := Spline2(x, y, SplineDegree, w)
# The number of knots returned for the optimal spline fit is b[1] =, which is a good compression of the data from the original length(x) =points. We can take a look at the quality of the spline fit:
i := 0 .. b[1]
knots[i] := b[i + 2]
i := 0 .. 100
range[i] := i*(max(x) - min(x))/101 + min(x)
Spline[:, i] := Binterp(range[i], b)
Spline := transpose(Spline)
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## Polynomial fits
# But why couldn't we fit this same data with an equivalent global polynomial? Do a global fit to the data using the same number of free parameters as the spline has knots, to see why the spline is a better option.
NumFreeParm := b[1]
PolyDegree := NumFreeParm - 1
vs := regress(x, y, PolyDegree)
f_global.regress(x1) := interp(vs, x, y, x1)
y_regress := vectorize(f_global.regress(x))
# The regress function fails in this fit, which is not surprising given the high polynomial degree.
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# Try fitting to Chebyshev polynomials for a better numerical stability.
x_min := min(knots)
x_max := max(knots)
fPoly(n, x) := Tcheb(n, 2*(x - x_min)/(x_max - x_min) - 1)
i := 0 .. last(x)
j := 0 .. PolyDegree
M[i, j] := fPoly(j, x[i])
c := (transpose(M)*M)^-1*transpose(M)*y
# The matrix inversion is nearly singular in a numerical sense as can be seen by evaluating the determinant.
|transpose(M)*M| =  # no stored result
# This is testament to the numerical complexity of fitting a polynomial with enough coefficients to represent all the inflections in the data, as well as the large number of points.
f_global(x) := sum(c[j]*fPoly(j, x), j)
y_global := vectorize(f_global(x))
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# Even the more stable Tchebychev polynomials will oscillate on the tails of the data because of the large number of terms, and fail to accurately represent the peaks and finer features of the data. While the splines are perhaps less informative as a physical model, they are a much better predictor of the behavior of the data at any arbitrary point in the range.
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