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# EXAMPLES
# Calibrating a Thermocouple
# by Jean Giraud
# Thermocouples measure temperature indirectly by measuring the voltage produced across dissimilar metals when there is a temperature gradient present at the junction. Converting any measured voltage to a temperature requires calibration of the thermocouple. Typically, thermocouples are calibrated using standard reference tables of coefficients published by NIST (http://srdata.nist.gov/its90/main/its90_main_page.html), which fit a piecewise polynomial curve to the standard ITS-90 reference temperatures (http://srdata.nist.gov/its90/tables/table_iii.html).
# There are several problems with the temperature conversions obtained in this manner. First, the curve that describing the voltage-to-temperature data is highly nonlinear, and is, perhaps, better fit with a more complicated fit function. The calibrations published by NIST are piecewise for this reason, so you must know which temperature range you will measure before you can choose a set of calibration parameters. Next, the NIST data only represents the calibration of the thermocouple wires themselves, not any extended cabling, gradient thermal effects, time-dependent degradation, or other sources of error.
# We will use a rational function to fit the calibration data. The fit parameters will be stored so that subsequent measurements at non-fixed-point temperatures can be calculated whenever new measurements are taken.
# It is unlikely that all the calibration points will be measured, but you can only fit as many parameters as there are data points. For demonstration purposes, use the calibrated values from NIST.
# Values at the fixed points
# Fixed points  °C  mV
# Helium NBP
# Hydrogen TP
# Hydrogen NBP
# Neon TP
# Neon NBP
# Oxygen TP
# Nitrogen TP
# Nitrogen NBP
# Oxygen NBP
# Cabon Dioxide SP
# Mercury FP
# Ice Point
# Ether TP
# Water BP
# Benzoic TP
# Indium FP
# Tin FP
# Bismuth FP
# Cadmium FP
# Lead FP
# Mercury BP
# -268.935  -6.25629
# -259.340  -6.22919
# -252.870  -6.19773
# -248.595  -6.17138
# -246.048  -6.15358
# -218.789  -5.87302
# -210.002  -5.75328
# -195.802  -5.53559
# -182.962  -5.31472
# -78.476  -2.74070
# -38.862  -1.43494
# 0.00  0.00
# 26.87  1.0679
# 100.00  4.2773
# 122.37  5.3414
# 156.634  7.0364
# 231.9681  11.0133
# 271.442  13.2188
# 321.108  16.0953
# 327.502  16.4733
# 356.66  18.2179
ET := [
    -6.25629, -268.935;
    -6.22919, -259.340;
    -6.19773, -252.870;
    -6.17138, -248.595;
    -6.15358, -246.048;
    -5.87302, -218.789;
    -5.75328, -210.002;
    -5.53559, -195.802;
    -5.31472, -182.962;
    -2.74070, -78.476;
    -1.43494, -38.862;
    0.00000, 0.000;
    1.06790, 26.870;
    4.27730, 100.000;
    5.34140, 122.370;
    7.03640, 156.634;
    11.01330, 231.968;
    13.21880, 271.442;
    16.09530, 321.108;
    16.47330, 327.502;
    18.21790, 356.660
]
# type ' T ' Thermocouple (T/C) from NBS Monograph 125
i := 0 .. rows(ET) - 1
# Divide the matrix into X and Y vectors.
X := ET[:, 0]
Y := ET[:, 1]
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## Regression
# Here, rationalfit is used to fit the data.
top_order := 7
bottom_order := 6
# These would need to be reduced if there were fewer data points available.
c_fit := rationalfit(X, Y, 0.95, top_order, bottom_order, 10^-5, "noscale")
Poly(x, c, On, Od) := sum(c[n]*x^n, n = 0 .. On)/(1 + sum(c[n + On]*x^n, n = 1 .. Od))
yfit[i] := Poly(X[i], c_fit[:, 0], top_order, bottom_order)
# Look at the final fit. This seems to have good convergence at first glance.
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# Use the stored fitted parameters for subsequent calculations.
K := [
    0.14298647377;
    25.8947060665;
    4.75419821808;
    -0.41190837679;
    -0.08307537523;
    1.33815495105*10^-3;
    2.46943457583*10^-4;
    0.21474459551;
    -0.01184922606;
    -3.88461364789*10^-3;
    -1.01779135807*10^-5;
    1.36789923053*10^-5;
    5.82209744522*10^-8
]
c_fit[:, 0] =  # no stored result
# Define a temperature conversion function:
temp(mV) := Poly(mV, c_fit[:, 0], top_order, bottom_order)
# Input the measured voltage here
point := 3
measured := ET[point, 0]
measured =  # no stored result
# Calculate the measured temperature given a measured voltage (in mV) here. We've used one of the fixed point voltages, to compare results, but any temperature in the range of the calibration is acceptable.
temp(measured) =  # no stored result
ET[point, 1] =  # no stored result
# Let's compare this with the polynomial expression. For a type T thermocouple, the coefficients from the table are
NIST := [
    0.100860910;
    25727.94369;
    -767345.8295;
    78025595.81;
    -9247486589;
    6.97688*10^11;
    -2.66192*10^13;
    3.94078*10^14
]
T(V) := NIST[0] + V*(NIST[1] + V*(NIST[2] + V*(NIST[3] + V*(NIST[4] + V*(NIST[5] + V*(NIST[6] + V*NIST[7]))))))
# in units of volts.
T(measured/10^3) =  # no stored result
temp(measured) =  # no stored result
# Actual value:
ET[point, 1] =  # no stored result
# Calculate the residuals for the NIST fit and compare them with the new calibrated fit.
NISTY := vectorize(T(X/10^3))
# Comparison of rational fit χ2 error with the polynomial fit parameters:
sum(vectorize(Y - temp(X))^2) =  # no stored result
sum((Y - NISTY)^2) =  # no stored result
## Improving the fit further
# We can further improve and stabilize this fit by transforming the data. The closer the trend is to a straight line, the faster and better converged the rational polynomial will be. We should also be able to use a smaller number of fit coefficients, which will also give more stable results from the solvers, and allows us to measure fewer data points for calibration. We can achieve this with the current data set by transforming the y variable to be y/x. To accomplish this, we'll strip out the (0,0) point from the data set.
ET1 := [
    -6.25629, -268.935;
    -6.22919, -259.34;
    -6.19773, -252.87;
    -6.17138, -248.595;
    -6.15358, -246.048;
    -5.87302, -218.789;
    -5.75328, -210.002;
    -5.53559, -195.802;
    -5.31472, -182.962;
    -2.7407, -78.476;
    -1.43494, -38.862;
    1.0679, 26.87;
    4.2773, 100;
    5.3414, 122.37;
    7.0364, 156.634;
    11.0133, 231.968;
    13.2188, 271.442;
    16.0953, 321.108;
    16.4733, 327.502;
    18.2179, 356.66
]
i := 0 .. rows(ET1) - 1
X1 := ET1[:, 0]
Y1 := vectorize(ET1[:, 1]/ET1[:, 0])
top_order := 6
bottom_order := 6
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# Finally, we'll use genfit to do the fit, so we can use analytical derivatives, which will give a few more places of accuracy than the numerical derivatives. To do this, we'll need to construct the vector of analytical derivatives required by genfit.
f'Poly(x, c, k) :=
    BottomSum ← 1 + sum(c[n + top_order]*x^n, n = 1 .. bottom_order)
    return -x^(k - top_order)*sum(c[n]*x^n, n = 0 .. top_order)/BottomSum^2 if k > top_order
    return x^k/BottomSum
GenfitFunctionMatrix(x, C) :=
    A[0] ← Poly(x, C, top_order, bottom_order)
    for i ∈ 0 .. top_order + bottom_order
        A[i + 1] ← f'Poly(x, C, i)
    return A
# To construct a guess value, calculate a set of polynomial fit coefficients to the data, which is the same as a numerator in the rational polynomial with a denominator of 1 (order 0).
j := 0 .. top_order
c_guess[top_order + bottom_order] := 0
M[i, j] := X1[i]^j
q := (transpose(M)*M)^-1*transpose(M)*Y1
c_guess[j] := q[j]
# Calculate the rational fit with genfit.
c_fit := genfit(X1, Y1, c_guess, GenfitFunctionMatrix)
y1[i] := Poly(X1[i], c_fit, top_order, bottom_order)
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sum((Y1 - y1)^2) =  # no stored result
corr(Y1, y1) =  # no stored result
# Go back and look at this fit with respect to the original, untransformed data, and its residuals, by multiplying by the x values.
fitrs(x) := Poly(x, c_fit, top_order, bottom_order)
x := -6.26, -6.25 .. 20
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residual := Y - vectorize(X*fitrs(X))
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# Transforming back to the original data:
sum(residual^2) =  # no stored result
# The χ2 from above was
sum(vectorize(Y - temp(X))^2) =  # no stored result
# One extra operation, that of transforming the data, has improved the fit by a factor by about 2000%, with fewer fit parameters to calculate.
## References
# The Omege Instruments Web Site:
# http://www.omega.com/temperature/Z/pdf/z021-032.pdf
# The NIST ITS90 Calibration Standard page:
# http://srdata.nist.gov/its90/main/its90_main_page.html
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