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# NONPARAMETRIC FITTING
# Thiele Continued Fraction Interpolation
# Thielecoeff(vx, vy) | Thiele(vx, coeff, x)
# The Theile function performs interpolation at a requested point, x, using continued-fraction approximations between points.  This type of interpolation is useful for data with asymptotes or of a rational polynomial form that result in a failure of other types of rational polynomial interpolation.
# The Theilecoeff function calculates interpolation coefficients using a function of the form
f(x) == c_0 + (x - x_0)/(c_1 + (x - x_1)/(c_2 + ...))
# Set the number of interpolation points
npts := 10
j := 0 .. npts
# Choose a rational function, such as the Lorentzian
f(x) := 1/(1 + 500*(x - .5)^2)
f(x) := (1 + (-1*x) + 4*x^2)/(1 + .5*x + .25*x^2)  # disabled
# Create some data:
x_data[j] := j/npts
y_data := vectorize(f(x_data))
# The output of Thielecoeff are the coefficients of the continued fraction:
c := Thielecoeff(x_data, y_data)
c =  # no stored result
# The actual interpolation is done by Thiele
fy(x) := Thiele(x_data, c, x)
fratint(x) := rationalint(x_data, y_data, x)[0]
# Plot over the interpolation range using many points spaced between the data values.
δ1 := .5
x_c := .5
npts := 5000
i := 0 .. npts
x_min := x_c - δ1
x_max := x_c + δ1
x[i] := x_min + i/npts*(x_max - x_min)
y_Thiele := vectorize(fy(x))
y_exact := vectorize(f(x))
# Note that the rationalint function fails outright at some points in this interpolation range, because of the symmetry of the data, causing divide-by-zero errors at some intermediate values of x.
y_ratint := vectorize(fratint(x))  # error: Exception has been thrown by the target of an invocation.
# It is possible to get it to evaluate at the original data points:
y_ratint := vectorize(fratint(x_data))
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# Here are the residuals for the Thiele interpolation:
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# You can use the Thiele coefficients to generate a polynomial expression that fits the data. This should be done with caution as the conversion process and the resulting polynomial evaluation may have roundoff error issues.  Convert a Thiele Continued Fraction of the form shown below to a ratio of polynomials
f(x) == c[0] + (x - x[0])/(c[1] + (x - x[1])/(c[2] + (x - x[2])/c[3]))
# At some step in the conversion process, the function will look like:
f(x) == c[0] + (x - x[0])/(c[1] + (x - x[1])/(c[2] + (x - x[2])/(P(x)/Q(x))))
# Where P(x) and Q(x) are polynomials. To get the next step, note:
c[k] + (x - x[k])/(P/Q) == (c[k]*P + (x - x[k])*Q)/P
# [area: cont. fraction to rational poly]
fThieleToPoly(x, c) :=
    n ← rows(c)
    m ← trunc(rows(c)/2)
    m ← 0 if rows(c) < 3
    P[m] ← 0
    Q[m] ← 0
    P[0] ← c[n - 1]
    Q[0] ← 1
    for i ∈ n - 2 .. 0
        ck ← c[i]
        xk ← x[i]
        Q1 ← 0
        for j ∈ 0 .. m
            T ← P[j]
            P[j] ← ck*P[j] - xk*Q[j] + Q1
            Q1 ← Q[j]
            Q[j] ← T
    "Rescale the coefficients to get rid of huge values"
    Scale ← 0
    for i ∈ 0 .. m
        Scale ← Q[i] if |Q[i]| > |Scale|
    Scale ← 1/Scale
    return Scale*augment(P, Q)
c_poly1 := fThieleToPoly(x_data, c)
c_poly1 =  # no stored result
# Check the poles in the denominator
Polyroots(c_poly1[:, 1]) =  # no stored result
# Plot the resulting polynomial.
fy_poly1(x) := sum(c_poly1[n, 0]*x^n, n = 0 .. rows(c_poly1) - 1)/sum(c_poly1[n, 1]*x^n, n = 0 .. rows(c_poly1) - 1)
y_poly1 := vectorize(fy_poly1(x))
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## Ordering of points
# Here is an example for which there are an exact set of continued fraction coefficients, from Hildebrand.  If you feed the data into the Thiele algorithm in it's original order, there are repeated y values.  This causes the algorithm to fail.
X := transpose([0, 1, 2, 3, 4])
Y := transpose([1, 1, 3/5, 2/5, 5/17])
Thielecoeff(X, Y) =  # no stored result
# You can reorder the data to get an appropriate solution:
X := transpose([1, 2, 3, 4, 0])
Y := transpose([1, 3/5, 2/5, 5/17, 1])
# Which are data representing the function
vΓ := [1; -5/2; -6/5; 35/2; 1/5]
Q(a) := vΓ[0] + (a - X[0])/(vΓ[1] + (a - X[1])/(vΓ[2] + (a - X[2])/(vΓ[3] + (a - X[3])/vΓ[4])))
f2(a) := Q(a) simplify → (1 + a)/(a^2 + 1)
# Thielecoeff will now calculate these coefficients
co2 := Thielecoeff(X, Y)
co2 =  # no stored result
Q1(x) := Thiele(X, co2, x)
x := -10, -9.99 .. 10
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## Regression with Thiele
# Since coefficients can be extracted for the continued fraction approximation, the Thiele functions can be considered a regression technique. Here is a set of data representing saturation temperature of boiling water in °C(p). The calculated data points match published data very closely.
P := [0.1; 0.5; 1; 2.5; 5; 10; 25; 50; 100; 150; 200; 220]  # in bar
T := [45.81; 81.32; 99.61; 127.41; 151.84; 179.89; 223.96; 263.94; 311; 342.16; 365.75; 373.71]  # in degrees C
coeff := Thielecoeff(P, T)
°C(x) := Thiele(P, coeff, x)
coefp := regress(P, T, 6)
poly(x) := interp(coefp, P, T, x)
p := 0, .1 .. 220
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# Use the function that calculates the saturation temperature to check two intermediate calculated values from the steam tables:
["Ref", "calculated"; 290.52, 75 °C; 327.78, 125 °C] =  # no stored result
# So, for example, if we wish to calculate the temperature at which water boils in Mexico city 4000m above sea level, we find the atmospheric pressure there, estimated to be
p_mexico := 0.616
# Using the Thiele interpolated results, find the boiling temperature.
p_mexico °C =  # no stored result
## Reference
# The Thiele function is based on work in Hildebrand, F.B. (1974), Introduction to Numerical Analysis, 2nd Ed., McGraw Hill.
# The International Association for the Properties of Water and Steam, http://www.iapws.org/.
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