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# EXAMPLES
# Statistical Analysis of Water Meter Data
# by D. M. Griffin
# Louisiana Tech University
# The data used here are daily water usage values expressed as gal/min.  These are being collected as part of an ongoing research project between Louisiana Tech University and the Louisiana Department of Transportation and Development to quantify water usage and wastewater generation at Interstate Rest Areas in Louisiana.
# The medsmooth function was used to examine water flowrates over a period of record from 7/1/97 to the present.  Using a smoothed data set (bandwidth = 7 days) it was found that daily flows after day 1200 were somewhat lower and less variable than those before day 1200.  This results in substantial changes in less frequent flow rates before and after day 1200.  A bandwidth of 7 days was used because significant autocorrelation occurs within a one-week period, less so after one week.
# Read in daily water usage rates at Grand Prairie Interstate rest area, I-49 in gal/min.  Missing values given value of -1.  There are 10 to 20 missing values in the data set.
# [component: outputs DATA]
i := 0 .. length(DATA) - 1
length(DATA) =  # no stored result
elapsed_time[i] := i*day
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# The raw data exhibits no obvious changes in pattern.  There were about 20 days where flow data were not available and these were given the value -1
# We first need to deal with the -1 values.  There is no generally accepted way of doing this.  If they are removed, the data set is discontinuous, which is undesirable.  In this case I will first remove the -1 values to create another set of "real" values.  Then I will compute the mean of that data set. Finally, I will substitute the median value of that data set for all -1 values in the original data set.  In this way I have a continuous data set (not a perfect solution, but this is the real world!) with no missing values.
# Get all the indices of the data which are of value -1:
index := match(-1, DATA)
# Trim them from the data set:
DATAtrim := trim(DATA, index)
rows(DATA) =  # no stored result
rows(DATAtrim) =  # no stored result
# Now compute median of DATAtrim and substitute it for all -1 values.
medianval := median(DATAtrim)
DATA := DATA*gpm
DATAorig := DATA
j := 0 .. last(index)
DATA[index[j]] := medianval*gpm
# As expected, the median changes less in this data transformation, since it's a more robust measure of centrality.
mean(DATA) = gpm
mean(DATAorig) = gpm
median(DATA) = gpm
median(DATAorig) = gpm
## Autocorrelation
# Autocorrelation is a procedure to determine if a data set is correlated with itself over time. Data which are correlated are not independent and standard statistical hypothesis tests are not valid, strictly speaking. Data which are not autocorrelated are said to be independent.
# First, compute and plot the residuals, the differences between each daily flow value and the overall mean flow for the data set.
μ := mean(DATA)
RESID := DATA - μ
m1 := 320
m2 := 360
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# Comparing the data points to the y = 0 line, we see that the flow was generally larger than the mean for the first 90 days
# or so; then was less than the mean until about day 240. Recently the flow has been increasing again.
# The high values occurring between 320 and 360 were caused by watering of trees and grass during May and June 1998. In addition, problems occurred with the well around 6/15/98, (day 349) which necessitated pumping the well for an extended period while working on it. High flows around the end of September (day 450) were probably a result of large numbers of evacuees heading north from New Orleans and surrounding area as hurricane Georges approached New Orleans (actually it turned out that the riser pipe in the well had split). High residuals occurring near day 880 and day 890 are due to the conduct of dye tests in the rock plants filters. All of these events tend to wash out legitimate long-term trends in the data, which is what we are interested in.
# Plot the correlogram for the daily flow. A correlogram is the sequence of autocorrelation coefficients of flow over a series of specified time intervals, called lag periods or lags.
n := 0 .. 28
N := length(DATA)
σ := stdev(DATA)
lagcorr[n] := 1/(N*σ^2)*sum((DATA[i] - μ)*(DATA[i - n] - μ), i = n .. N - 1)
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# The autocorrelation coefficient over a lag period of 7 days is approximately 0.4. This means that the flow on any day is positively correlated with the the flow 7 days previous. Similarly the value at 21 days is somewhat over 0.2. This indicates that the flow is correlated with the flow 21 days previous but not as well as the flow 7 or 14 days ago.
# Now look at the overall curve. It has a regular pattern that repeats every 7- 8 days. This is not immediately obvious from the raw data. It is also interesting to note that the value of the coefficients drop with each succeeding cycle.
# Here are the upper and lower 95% confidence limits on the autocorrelation coefficients. Values inside this region cannot be assumed different than zero in a statistical sense.
u := ((-1 + 1.96*sqrt(length(DATA) - 2))/(length(DATA) - 2))
u =  # no stored result
l := (-1 - 1.96*sqrt(length(DATA) - 2))/(length(DATA) - 1)
l =  # no stored result
## Median Smoothing
# Now use medsmooth to smooth the data.  Based on the serial correlation analysis, it was decided to use a bandwidth of 7 days.
Q7 := medsmooth(DATA, 7)
# The median of the 7 points surrounding each data point is used to replace each data point. The procedure is followed for each point so there are as many point in the smoothed data set as the original.
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# Note the change in water use highlighted by the smoothed data. The curve above suggests that daily water use appeared to increase up until about day 1200, which would correspond to about October of 2000.  After that time, water usage dropped and appeared to be less variable. This is not at all evident in the original data. The main reason for this change is the fact that before day 1200, testing was occurring at the site, requiring extra water to be run through the treatment system. Based on these results it could be argued that we have, in effect, 2 data sets, one before day 1200, and one from day 1200 to the present.  It seems reasonable to plot probability curves for the data before and after day 1200.
## Weibull plots
# First, we extract the data before and after day 1200.
k1 := 0 .. 1199
k2 := 0 .. last(DATA) - 1200
DATA_bef_1200[k1] := DATA[k1]
DATA_aft_1200[k2] := DATA[k2 + 1200]
mean(DATA_bef_1200) = gpm
mean(DATA_aft_1200) = gpm
median(DATA_bef_1200) = gpm
median(DATA_aft_1200) = gpm
# We sort the data and create the Weibull plotting variable for three probability curves. The first is for all data, the second for data collected before day 1200, and the third for data collected after day 1200.
x1 := sort(DATA)/gpm
y1 := sort(Rank(DATA))/length(DATA)*100
x2 := sort(DATA_bef_1200)/gpm
y2 := sort(Rank(DATA_bef_1200))/length(DATA_bef_1200)*100
x3 := sort(DATA_aft_1200)/gpm
y3 := sort(Rank(DATA_aft_1200))/length(DATA_aft_1200)*100
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# The curves may be interpreted as follows:
#
# 1. The curve for all the data combined shows a flow rate with a 50% probability of occurrence is 3.42 gal/min.  That is, 50% of future flows will be less than this value. Corresponding values for data collected before and after day 1200 are 3.8 and 3.1 gal/min respectively.
percentile(DATA, 50 %) = gpm
percentile(DATA_bef_1200, 50 %) = gpm
percentile(DATA_aft_1200, 50 %) = gpm
# 2. Using the curve for data collected after day 1200, 90% of future flows will be less than 5.8 gal/min. The corresponding value for data collected before day 1200 is 8.9 gal/min
percentile(DATA_bef_1200, 90 %) = gpm
percentile(DATA_aft_1200, 90 %) = gpm
# Now, lets examine changes in flowrate as a function of how often the flow occurs.  We will look at 20 percentile flows, median flows, and 90 percentile flows.
## 20 percentile flow
# Before day 1200:
B1200_20 := percentile(DATA_bef_1200, 20 %)
# After day 1200:
A1200_20 := percentile(DATA_aft_1200, 20 %)
change_20 := -(B1200_20 - A1200_20)/A1200_20
change_20 =  # no stored result
## Median flows
# Before day 1200:
B1200_50 := percentile(DATA_bef_1200, 50 %)
# After day 1200:
A1200_50 := percentile(DATA_aft_1200, 50 %)
change_med := -(B1200_50 - A1200_50)/A1200_50
change_med =  # no stored result
## 90 percentile flow
# Before day 1200:
B1200_90 := percentile(DATA_bef_1200, 90 %)
# After day 1200:
A1200_90 := percentile(DATA_aft_1200, 90 %)
change_90 := -(B1200_90 - A1200_90)/A1200_90
change_90 =  # no stored result
# Summary:
change_20 =  # no stored result
change_med =  # no stored result
change_90 =  # no stored result
# These data suggest that changes in the more frequent flows before and after day 1200 are small, about - 5%.  However, the change in median flows before and after day 1200 is -21% and the change in the 90 percentile flowrate is twice that, or - 54%.  This suggests that:
# changes in flow before and after day 1200 were substantial. The flow dropped considerably after day 1200.
# Percentage changes in the mean or median flowrate underpredict changes at higher, less frequent, flow rates. This makes sense because the testing that was done required large water flows and thus affected the probability of occurrence of the less frequent flows.
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