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# EXAMPLES
# Wilcoxon Signed-Rank Test
# The following are the compressive strengths of a material manufactured by two different methods, A and B:
# The data is paired, that is, there are an equal number of measurements in each pool.
A := [60.3; 50.2; 56.5; 60.6; 59.3; 49.7; 50.8; 59.8; 52.5; 57.4; 55.8; 54.5; 53.6; 56.8; 57.1]
B := [56.0; 56.2; 55.1; 59.2; 62.3; 54.5; 56.5; 57.1; 56.2; 56.1; 58.5; 63.5; 58.2; 48.9; 53.0]
n := length(A)
n = 15
# The signed-rank test will tell us, to some degree of statistical significance, whether the means of the two data sets are equal, that is, if they came from the same distribution.  The test compares the ranks of the positive and negative differences between data pairs. First, find the differences:
diff := B - A
# and determine which are positive and which are negative:
positive(v) :=
    count ← 0
    for i ∈ 0 .. last(v)
        if v[i] > 0
            out[count] ← i
            count ← count + 1
    out
# These definitions will not count differences which are 0. Then, find the rank of the absolute values of these differences, and pull and sum the ranks corresponding to the positive and negative differences independently:
ranks := Rank(vectorize(|diff|))
transpose(diff) = [-4.3, 6, -1.4, -1.4, 3, 4.8, 5.7, -2.7, 3.7, -1.3, 2.7, 9, 4.6, -7.9, -4.1]
transpose(ranks) = [9, 13, 2.5, 2.5, 6, 11, 12, 4, 7, 1, 5, 15, 10, 14, 8]
indexp := positive(diff)
indexn := positive(-diff)
posranks :=
    for i ∈ 0 .. last(indexp)
        p[i] ← ranks[indexp[i]]
    p
negranks :=
    for i ∈ 0 .. last(indexn)
        p[i] ← ranks[indexn[i]]
    p
posranks = [13; 6; 11; 12; 7; 5; 15; 10]
negranks = [9; 2.5; 2.5; 4; 1; 14; 8]
T+ := sum(posranks)
T- := sum(negranks)
T+ = 79
T- = 41
# Note that the variable names, T+ and T-, were made by typing T[Ctrl-Shift-K]+{Ctrl-Shift-K].  This key sequence lets you type literal values that would otherwise be interpreted as operators in Mathcad.
# The test statistic for smaller sample sizes (n<5) is
T := if(T+ < T-, T+, T-)
T = 41
# but here we will use the percent point function for the normal distribution, which is reasonably close to the appropriate shape for this test.
T_0 := qnorm(0.95, 0, 1)
T_0 = 1.64485
μ_T := n*(n + 1)/4
μ_T = 60
σ2_T := n*(n + 1)*(2*n + 1)/24
σ2_T = 310
T := (T+ - μ_T)/sqrt(σ2_T)
T = 1.07913
WRStest :=
    "null hypothesis rejected, means are unequal" if T > T_0
    "null hypothesis OK, means are equal" otherwise
WRStest = "null hypothesis OK, means are equal"
# So we may conclude that the mean for both materials samples is the same, with a 95% confidence limit.  This has implications for the manufacturing processes for these materials.
## Reference
# Kottegoda and Rosso, Statistics, Probability and Reliability for Civil and Environmental Engineers, McGraw-Hill, 1997. pp.274-5.
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