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# COMBINATIONS OF IMAGES
# Blending and Masking
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# Function Definitions and Syntax
# blend(M, N) | mask(M, N)
# The blend function combines two images, while the mask function masks one image with the other. Blending is useful in subtracting and rebiasing backgrounds, which improves feature visibility. Masking can be used to black out part of an image so that processing can be done on the remaining features.
# Arguments
# • M, the first image matrix
# • N, the second image (or mask) matrix, the same size as the first.
# The functions return an image matrix which contains the sum of M and N, or the mask of M with N, clipped at 255.
# Function Details | blend(M, N)
# This function combines two images M and N of the same size, using the formula
(M + N) - vectorize(M*N/255)
# As you can see, when an element of either M or N is 255 this formula returns 255, which is the desired clipping response. When M or N is zero, the function returns only the remaining element.
Q := [10, 20, 0; 123, 59, 255; 20, 25, 0]
R := [0, 225, 255; 10, 255, 0; 225, 255, 0]
blend(Q, R) = [10, 227.353, 255; 128.176, 255, 255; 227.353, 255, 0]
# For a larger example, let's use two 256 × 256 grayscale images.
M := READ_IMAGE("fruit.bmp")
N := READ_IMAGE("lena.bmp")
A := blend(M, N)
# [component: inputs A]
# Function Details | mask(M, N)
# This function masks matrix M with N. It returns the intensity of M if the mask is nonzero; otherwise it returns zero.
# In the following example of an MRI image of the head, we read in a mask corresponding to the brain and then using the mask function, we extract the brain region from the input image.
head := READ_IMAGE("brain.gif")
rows(head) = 257
cols(head) = 256
# This image has an odd number of rows, so we extract the first 256 rows from it:
head := submatrix(head, 0, 255, 0, 255)
# Now we read the mask image from the disk (To see how this mask was
# constructed using functions in this extension pack, see the section on
# Region Growing Segmentation):
brain_mask := READ_IMAGE("brain_mask.bmp")
# Finally we mask the brain out of the input head image.
brain := mask(head, brain_mask)
# [component: inputs head]
# [component: inputs brain]
# [component: inputs brain_mask*255]
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