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# IMAGE FILTERING AND RESTORATION
# Deblurring via Transforms
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# Motion blur in a photograph occurs when an image moves relative to the camera during the exposure. If the relative motion is in a straight line, the image can often be deblurred by deconvolving it with a trace that represents the motion. This deconvolution "undoes" the averaging effect of the blur and restores some sharpness to the image. In the first example, blur is artificially added to an image to demonstrate the deblurring algorithm. In the second example, a real blurred image is corrected.
# To manufacture the blurred image, we're following an example in The Image Processing Handbook, by John C. Russ (CRC Press, Inc., 1992), an excellent source of interesting examples. Reading in the image:
A := submatrix(READ_IMAGE("bridge.bmp"), 0, 127, 128, 255)
# A smaller segment of the image is used to speed calculations.
# Since a discrete Fourier transform will be used in the deconvolution, and the arithmetic carried out by the FFT algorithm assumes that the image is periodic, the image must be made periodic as well. To keep the left and right edges of the image from interfering with each other, a black border as wide as the blur is placed around the image.
C := submatrix(A, 0, 111, 0, 111)
Q[127, 127] := 0
Q := putregion(Q, C, 8, 8)
# [component: inputs Q]
# In the blurred image, each pixel value is replaced by the average of the values at eight points lying on a diagonal extending down and to the right. We could carry out the blurring by multiplying transforms in the frequency domain (the very process we're going to undo by deconvolution). But for this example, the kernel is small enough to allow direct convolution in a reasonable time, averaging each pixel with the seven pixels lying on a diagonal below and to the right.
a := 0 .. 119
b := 0 .. 119
B[a, b] := 1/8*sum(Q[a + n, b + n], n = 0 .. 7)
B[127, 127] := 0
# [component: inputs B]
# To deblur the image, an image representing the blur is required, consisting of a single, diagonal trace. It's easy to make the right image, since we made the original blur, but we could make a pretty good guess starting from the blurred image - look, for example, at the bright streaks in the upper left corner. Because convolution, which is used in deblurring, flips the kernel, our trace starts in the upper left corner (the origin) and then extends up from the bottom right corner.
T[127, 127] := 0
p := 0 .. 6
T[121 + p, 121 + p] := 1/8
T[0, 0] := 1/8
# The blurred image is really just the result of convolving the original bridge image with T. To deblur, the process must be reversed. Of course, it's not fully reversible, since information is lost in the blurring.
# Taking the discrete Fourier transform of both the blurred image and the trace, divide the image transform by the trace transform, and then inverse transform to reconstruct the deblurred image. The transform of T contains zeros that represent the loss of information in the blurring process. You can't divide by these zeros in deblurring, so just set the undefined quotients to zero.
c(x) := if(|x| == 0, 0, 1/x)
transT := CFFT(T)
transB := CFFT(B)
S := Re(ICFFT(vectorize(transB*c(transT))))
# [component: inputs scale(S, 0, 255)]
# The deblurred result looks very similar to the original image, though they are not the same.
# It is worth noting that the transform of the blurred image gives information on the extent and direction of the blur. Taking the log here makes the relevant detail easy to see, but we have to add a small offset since the transform has zeros.
specB := vectorize(ln(|transB| + e^-10))
specB := Re(center(scale(specB, 0, 255)))
# [component: inputs specB]
# The transform has bands at 45 degrees (perpendicular to the blur direction) and the bands are 16 apart, as we can confirm by scrolling through a display of specB looking for the diagonals of -10s.
specB = [
    60.2885, 130.186, 92.2214, 111.224, 126.198, 117.29, 117.395, 114.632, 118.209, 103.256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;
    131.096, 122.762, 122.941, 89.7698, 117.682, 95.9354, 108.074, 108.801, 116.653, 102.576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;
    138.802, 114.36, 124.037, 104.828, 115.853, 128.846, 109.893, 111.054, 101.76, 115.28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;
    126.399, 120.755, 112.835, 112.645, 116.137, 123.479, 102.992, 83.5482, 104.861, 65.3413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;
    127.86, 130.154, 126.119, 118.802, 121, 114.713, 111.684, 102.971, 104.827, 75.2779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;
    110.613, 125.445, 109.414, 114.821, 92.5701, 99.1405, 94.5273, 102.881, 111.489, 74.5578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;
    111.59, 118.884, 122.672, 117.29, 104.257, 97.4362, 83.1298, 98.22, 91.3514, 46.3279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;
    102.259, 108.036, 102.907, 106.472, 100.572, 104.535, 90.8236, 70.5038, 52.8964, 9.17438e-12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;
    111.916, 105.539, 108.414, 102.91, 103.674, 94.8917, 78.2708, 72.9058, 1.20551e-11, 70.7809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;
    114.984, 111.283, 84.0693, 104.331, 109.099, 80.9258, 63.4736, 1.5155e-11, 72.5487, 89.0512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]
# The image is 128 square, so the band spacing is equal to the image size divided by the blur length of 8.
# Now let's look at an actual blurred image of a freight car and try to read some of the lettering that is obscured by the motion. Here's the image:
train := READ_IMAGE("train.bmp")
# [component: inputs train; outputs Tmat]
# The large lettering is still readable, but the smaller lettering (for example, the black letters in the white band in the middle) is blurred beyond legibility. The blur appears to be almost horizontal -- not too surprising given that this is a moving train! By blowing up a little patch (say the letter "T" at the bottom, which we have selected and output from the image), a better estimate of the blur may be made. Assuming that the letter "T" has a crossbar of the same thickness as the vertical leg, this will give us an estimate of the length of the blur.
letter := freichen(Tmat)
# [component: inputs scale(letter, 0, 255)]
f(x) := x > 12
# It's easiest to count pixels by scrolling around in a displayed array. Scrolling in the array below, we find that the crossbar of the T extends from about 11 or 12 to 18 or 19, which gives a height around 7, while the vertical extends from about 15 or 16 to 36 or 37, for a width of about 21.
vectorize(f(letter)) = [
    1, 1, 1, 1, 1, 1, 1, 1, 1, 1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;
    1, 0, 0, 0, 0, 0, 0, 0, 0, 0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;
    1, 0, 0, 0, 0, 0, 0, 0, 0, 0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;
    1, 0, 0, 1, 1, 1, 1, 1, 1, 1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;
    1, 0, 1, 1, 1, 1, 1, 1, 1, 1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;
    1, 0, 1, 1, 1, 0, 0, 1, 1, 1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;
    1, 0, 1, 1, 0, 0, 0, 0, 0, 0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;
    1, 0, 1, 0, 0, 0, 0, 0, 0, 0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;
    1, 0, 1, 0, 0, 0, 0, 0, 0, 0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;
    1, 0, 1, 0, 0, 0, 0, 0, 0, 0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]
# The length of the blur is given by the parameter L. The exploration above suggests the value 14, but it turns out that 16 works best.
L := 16
width := 16*L - 1
I := submatrix(train, 100, 163, 0, width)
# [component: inputs I]
# Constructing the transform for a horizontal blur of length L allows deblurring by deconvolution, as above.
p := 0 .. L - 2
T1[63, width] := 0
T1[0, 0] := 1
T1[0, width - p] := 1
c(x) := if(x == 0, 0, 1/x)
transI := CFFT(I)
transT1 := CFFT(T1)
U := Re(ICFFT(vectorize(transI*c(transT1))))
U := equalize(scale(U, 0, 255))
# Finally we view the deblurred word, which we now can read. (Presumably it's part of "Bangor and Aroostook.")
# [component: inputs U]
# If we wanted to deblur the whole image, we'd need a more sophisticated procedure, and in particular we'd need to worry about the edge interference produced by our FFTs.
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