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# VISION AND SEGMENTATION
# Segmentation of the Brain
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# Segmentation of medical images, the process of visually differentiating between different areas, can be useful in many applications, such as locating tissues for radiation therapy, or measuring organs for diagnosis of disease. This example uses functions in the Image Processing Extension Pack to segment the brain from the rest of the cranial structures in an MRI cross-section of a head.
#
# We thank Professor David Haynor of the University of Washington for the image shown here.
head := READ_IMAGE("anat45.pgm")
# [component: inputs head]
# The approach used in this example is to construct a mask for just the brain tissue in the image. As a first step, the image is binarized. Upper and lower thresholds are adjusted visually until most of the brain is selected. Erosion can clean up the edges slightly, and create a mask that selects inside the region of interest, rather than preserving unwanted external details.
binhead := binarize2(head, 35, 80, 1, 0)
binhead2 := erode8(binhead, 1)
# [component: inputs binhead*255]
# [component: inputs binhead2*255]
# The next step in segmentation is to apply 8-neighbor connected component labeling to the binarized image, measure the area of each component, and pick out the largest component. The easiest way to do this is visually, by displaying the connected component image in picture region, activating it by double-clicking on the image, and moving the mouse over the brain. Its label appears in the toolbar.
conhead := concomp(binhead2, 8, 1)
# [component: inputs conhead*255]
# The brain is region number 12.
brain := vectorize(conhead == 12)
# Since we applied erosion to the original image, we should now dilate to regain the original size:
brain2 := dilate8(brain, 1)
# Now we need to get rid of the holes in our mask. We do this by using morphological closing, with a circular structuring element with a 7-pixel radius:
i := 0 .. 14
j := 0 .. 14
se[i, j] := if((i - 7)^2 + (j - 7)^2 < 49, 1, 0)
brain3 := close(brain2, se, 1)
# [component: inputs brain3*255]
# This is our mask! Below we find its boundary and superimpose that on the original image to verify its correctness, and then we use the mask to view just the brain:
boundary := brain3 - erode8(brain3, 1)
finalimg := augment3(head, or(head, 255*boundary), head)
finalbrain := mask(head, 255*brain3)
# [component: inputs finalimg]
# [component: inputs finalbrain]
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