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# THE TRANSFORM DOMAIN
# Centering a Transformed Image
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# Function Definition and Syntax
# center(M)
# This function recenters a Fourier-transformed image so that the DC component is in the center. It takes one argument.
# Arguments
# • M, the fast Fourier transformed image matrix
# The function returns a matrix containing the centered image in the transform domain.
# Function Details | center(M)
# This function returns a matrix formed by rearranging the Fourier transform of an image so that the DC component is centered and the high frequencies are moved to the edges. Consider this example:
M := READ_IMAGE("astrsk.bmp")
# Take the complex two-dimensional Fourier transform and set the DC component to 0 so that the detail in the rest of the transform is visible. (Alternatively, we could view the log of the transform magnitude.)
S := vectorize(|cfft(M)|)
S[0, 0] := 0
# Rescale to a grayscale intensity scale:
S := scale(S, 0, 255)
S := equalize(S)
# The recentering process puts the DC, or image average, components in the center, and the higher frequency components on the outside of the image.
R := center(S)
R := vectorize(Re(R))
# Compare the original image, transform, and recentered transform:
# [component: inputs M]
# [component: inputs S]
# [component: inputs R]
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