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# IMAGE ENHANCEMENT
# Pseudocolor Enhancement
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# The function gray_to_rgb can be used to turn a grayscale image into a pseudocolor image by using a color map: an assignment from each gray value from 0 to 255 to a red/green/blue triplet of values from 0 to 255. In Mathcad, color maps are represented by n × 4 matrices, where the first column gives the gray value to be mapped and the second, third, and fourth columns give the red, green, and blue values to which to map it.
# This section provides a couple color maps for you to use in your documents. They are stored as files with the extension .PRN in the directory that was created when you installed this Extension Pack. The files that are included are:
# Spec.prn | Spectrum: the colors of the rainbow
# Usa.prn | USA: reds, whites, and blues
# To take a look at these color maps we create a band image N to display them:
i := 0 .. 255
j := 0 .. 255
N[i, j] := j
# Then we read any of the files into a matrix using the Input Table component, transform N with the gray_to_rgb function, and then view:
# To view or edit the data in the Input Table component, just click on it, and use the scroll bars.
# [component: outputs M]
Ncolor := gray_to_rgb(N, M)
# [component: inputs N]
# [component: inputs Ncolor]
# Try this map out on an image:
pix := READ_IMAGE("jupiter.gif")
pixPseudo := gray_to_rgb(pix, M)
# [component: inputs pixPseudo]
# The intrepid or artistic among us are not going to be satisfied with having only two color maps in our lives. The rest of this document shows how one can use some of Mathcad's functions to conveniently build many custom color maps.
# The main feature to consider when constructing these maps is that most color maps contain a sequence of bands of "pure" color in them. For example, the spectrum color map goes from purple to blue to green to yellow to orange to red. In between these bands of pure color there are transitions of blended color.
# We are going to design custom color maps by hand-defining the pure colors that make up the bands and then using the Mathcad linear interpolation function linterp to make the transitions between bands. In this example we make an "inverse spectrum" with eight pure color bands varying from red to black.
# First define the pure colors in the bands:
numColors := 8
# RED | GREEN | BLUE
colors[0, 0] := 255
colors[0, 1] := 0
colors[0, 2] := 0
colors[1, 0] := 255
colors[1, 1] := 128
colors[1, 2] := 0
colors[2, 0] := 255
colors[2, 1] := 255
colors[2, 2] := 0
colors[3, 0] := 0
colors[3, 1] := 255
colors[3, 2] := 0
colors[4, 0] := 0
colors[4, 1] := 200
colors[4, 2] := 64
colors[5, 0] := 75
colors[5, 1] := 75
colors[5, 2] := 255
colors[6, 0] := 0
colors[6, 1] := 0
colors[6, 2] := 128
colors[7, 0] := 64
colors[7, 1] := 0
colors[7, 2] := 128
colors[8, 0] := 0
colors[8, 1] := 0
colors[8, 2] := 0
# To perform the linear interpolation step, we fill in RGB values corresponding to every grayscale value from 0 to 255. The pure bands defined above should occur at evenly spaced values between 0 to 255. Therefore we create the following argument vector x which contains the grayscale values that we wish to map to each of the above pure colors:
lenMap := 256
i := 0 .. numColors
x[i] := i*lenMap/numColors
# The actual linear interpolation can now proceed using the argument vector x in conjunction with a column of hand-defined red, green, or blue intensity values, as appropriate:
j := 0 .. 255
M[j, 1] := floor(linterp(x, colors[:, 0], j))
M[j, 2] := floor(linterp(x, colors[:, 1], j))
M[j, 3] := floor(linterp(x, colors[:, 2], j))
# Grayscale values are entered in the first column, so we can view our creation:
M[j, 0] := j
Nnew := gray_to_rgb(N, M)
# [component: inputs Nnew]
# We can save the fruits of our labor for future use by writing the color map to a .PRN file:
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# [component: inputs M]
# Enable Evaluation | Write Component
# Note: This component has been toggled off. For instructions on enabling evaluation and writing the file, double-click on the popup icons above.
# Notice that by changing the pure colors defined in the vector colors, the above example can serve as a template for the construction of many interesting color maps for your applications.
# Additional methods for generating palettes are shown in the section on HLS and HSV color schemes.
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