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# VISUALIZATION AND SYNTHETIC IMAGES
# Visualizing Complex Functions
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# A complex function maps the complex plane into itself. Since each complex value is a two-part number, representing the function graphically requires four dimensions. By using lightness and hue to represent complex values, we can draw a kind of picture of a complex function with a two-dimensional HLS image.
# First we set up a grid around the origin in the complex plane. (If you have enough computer memory, you may want to increase the number of points in the grid.)
m ≡ 0 .. 159
n ≡ 0 .. 159
Z[m, n] ≡ (n - 80)/20 + (m - 80)/20*1i
# We define a function of z globally below and apply it to this grid Z.
# For magnitude we use the log magnitude so that the presence of near-poles in our grid won't make the rest of the picture dark. A small offset ε lets the log evaluate even if we land on a zero. The result is then scaled to a full dynamic display range.
ε := 10^-4
M := vectorize(ln(|F| + ε))
M := scale(M, 0, 255)
# The complex argument is given by Mathcad's arg function, which we extend by defining arg(0) to be 0. We add π and scale to put the values between 0 and 359.
ARG(z) := if(z == 0, 0, arg(z))
A := 359/(2*π)*(vectorize(ARG(F)) + π)
# To construct the image of the function, we apply it to our grid Z and assign the argument of the function value to the hue matrix, using the magnitude for both the lightness and saturation. Note that the hue wraps appropriately, since it's an angular scale like the argument.
f(z) ≡ sin(z^2)
F ≡ vectorize(f(Z))
Ftmp := augment3(A, M, M)
# [component: inputs augment3(A, M, M)]
# Here are some other interesting functions you can look at. Just change the definition of f above. These images are especially pretty if you use a color driver that supports 32768 colors.
sqrt(z^2 + 1)
exp(z)  # z^10
sec(z^3)
tan(exp(|3*z/2|))
# (What you see with the tan(exp(z)) function is really a kind of interference pattern generated when the rings of the image, which are correctly represented in the center, get closer together than adjacent grid points.)
exp(2i*π*|z|)*z^2
ln(sin(cosh(z)))
tan(z^2)^3
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