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# RESOURCES
# Useful Mathcad Constructs
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# In this section we present Mathcad implementations for a number of operations which can be useful in image processing as well as other applications. The functionality provided here ranges from simple array manipulation techniques to probabilistic and statistical methods.
# Matrix-Vector Conversions
# Here's a way to convert a matrix to a vector by stacking the matrix columns:
M := [10, 0.1, 11, 100, 1; 20, 0.2, 22, 200, 2; 30, 0.3, 33, 300, 3]
Unwrap(M) :=
    V ← M[:, 0]
    if cols(M) > 1
        for i ∈ 1 .. cols(M) - 1
            V ← stack(V, M[:, i])
    V
transpose(Unwrap(M)) = [10, 20, 30, 0.1, 0.2, 0.3, 11, 22, 33, 100, 200, 300, 1, 2, 3]
# Now convert a vector to a matrix by filling the matrix column-wise.
# Start with a vector:
V := transpose([24, 6, 7, 19, -10, -7, 125, 78, 92, 0, -38, 14, 25, 100, 10, 1, 0.1, 0.01, 0.04, 6, 11, 17, 82, 90])
length(V) = 24
# Specify the size (r × c) of the desired matrix:
r := 4
c := 6
# Verify the specified matrix size is compatible with the vector length:
r*c == length(V) = 1
# Fill the array:
Pack(V, p, q) :=
    M[p - 1, q - 1] ← 0
    "preallocating the matrix speeds the calculation"
    for j ∈ 0 .. q - 1
        for i ∈ 0 .. p - 1
            M[i, j] ← V[i + p*j] if i + p*j < rows(V)
            M[i, j] ← 0 otherwise
    M
Pack(V, r, c) = [24, -10, 92, 25, 0.1, 11; 6, -7, 0, 100, 0.01, 17; 7, 125, -38, 10, 0.04, 82; 19, 78, 14, 1, 6, 90]
# Matrix Statistics
# Below are expressions for computing basic statistics: mean, variance, and standard deviation of array data.
M := [
    0.2, 2.9, 1.7, 2.1, -5.3, 1.8, 14.3;
    8.1, 1.6, 7.3, 3.1, 5.8, -2.8, -3.8;
    -1.9, 3.7, 1.9, 4.1, 9.7, 4.5, 3.9;
    3.1, 8.1, 10.4, -5.9, -9.3, 9.0, 8.3;
    5.7, -0.5, 5.8, 2.6, 2.7, -4.5, 2.1
]
# Mean of array data:
mean(M) = 2.87143
# Variance of array data:
var(M) = 25.0546
# Standard deviation of array data:
stdev(M) = 5.00546
# Random Noise Generation
# Normally (Gaussian) Distributed Random Noise
# For a normal or Gaussian distribution having mean and standard deviation
μ := 2.3
σ := 1.2
# respectively, the function
rnorm(1, μ, σ) = [1.77324]
# generates a single random deviate. A matrix of such deviates can
# then be computed via the following:
N := 100
μ := 0
σ := 1
normal := Pack(rnorm(N^2, μ, σ), N, N)
mean(normal) = 0.00759616
stdev(normal) = 0.996395
# All Gaussian noise above the mean, 0, is positive (added to pixel values) and all Gaussian noise below the mean is negative (subtracted from pixel values).
# Exponentially Distributed Random Noise
# For an exponential distribution having mean
α := 50.3
# the function
rexp(1, 1/α) = [26.8432]
# returns a random deviate. A matrix of exponential noise is given by:
expo := Pack(rexp(N^2, 1/α), N, N)
mean(expo) = 49.919
stdev(expo) = 49.5583
# Poisson Distributed Random Deviates
# For a Poisson distribution having mean
λ := 1.2
# the function
rpois(1, λ) = [1]
# returns a random deviate. A matrix of Poisson noise is given by:
poisso := Pack(rpois(N^2, λ), N, N)
mean(poisso) = 1.2152
stdev(poisso) = 1.09348
# Locating Elements within an Array
# The expressions that follow determine the location, by specifying indices, of all elements of an array which satisfy a specified condition.
# For example, start with the array
W := [
    5.89, 9.57, 4.12, 4.21, 5.52, 3.91;
    7.56, 1.15, 9.33, 9.26, 5.42, 0.15;
    7.45, 0.26, 0.96, 5.41, 0.6, 9.45;
    1.22, 7.36, 7.96, 7.94, 2.91, 6.42;
    1.26, 2.36, 4.74, 3.07, 5.16, 7.97;
    5.83, 4.11, 3.78, 8.14, 0.43, 5.21;
    3.64, 9.93, 8.95, 9.73, 2.71, 6.09;
    5.13, 3.71, 5.78, 3.16, 9.57, 7.17
]
# Define a function which returns 1 if a particular value satisfies the desired condition, 0 otherwise. In this example we locate those entries with value between 2 and 4 inclusive.
# Condition the elements must match:
c(x) := (x ≥ 2)*(x ≤ 4)
c(2.5) = 1
c(0.3) = 0
c(4.1) = 0
# Locating function:
Locate(M, c) :=
    i ← 0
    L ← 0
    for m ∈ 0 .. rows(M) - 1
        for n ∈ 0 .. cols(M) - 1
            if c(M[m, n]) == 1
                L[:, i] ← [m; n]
                i ← i + 1
    L
Locate(W, c) = [0, 3, 4, 4, 5, 6, 6, 7, 7; 5, 4, 1, 3, 2, 0, 4, 1, 3]
# These elements can be highlighted within the array by:
vectorize(c(W)*W) = [
    0, 0, 0, 0, 0, 3.91;
    0, 0, 0, 0, 0, 0;
    0, 0, 0, 0, 0, 0;
    0, 0, 0, 0, 2.91, 0;
    0, 2.36, 0, 3.07, 0, 0;
    0, 0, 3.78, 0, 0, 0;
    3.64, 0, 0, 0, 2.71, 0;
    0, 3.71, 0, 3.16, 0, 0
]
# One common application of this construct is to locate occurrences of the maximum (or minimum) array value.
M := max(W)
M = 9.93
# In this case, define the condition:
c_max(x) := x == M
ind := Locate(W, c_max)
ind = [6; 1]
M = 9.93
W[ind[0], ind[1]] = 9.93
# In general, pixels satisfying a certain property may reside in a clearly selectable subimage of the original image. In this case or in situations where you are interested only in analyzing a certain subimage, the calculations above can be sped up considerably by visually selecting the appropriate subimage (submatrix) of the given image (matrix), performing the desired search on the subimage, then translating the resulting subimage coordinates to the full image coordinates.
# As an example, consider the usual pattern:
P := READ_IMAGE("pattern.bmp")
# [component: inputs P; outputs [Reg; SubP]]
# Using a selection rectangle, we select that subimage consisting of the long fuzzy rectangle in the middle, and output it from the Viewer component as matrix SubP. We also output the region coordinates as Reg.
# Next we locate the pixel(s) of minimum value within the subimage.
m := min(SubP)
m = 2
c_min(x) := x == m
ind := Locate(SubP, c_min)
ind = [18; 43]
m = 2
SubP[ind[0], ind[1]] = 2
# To translate these coordinates to those of the original image matrix P, adjust the row and column coordinates just determined by the region's upper left corner.
#
# The region is given as (left, top, right, bottom):
Reg = [3; 38; 105; 59]
left := Reg[0]
top := Reg[1]
# Note:
SubP[ind[0], ind[1]] = 2
P[ind[0] + top, ind[1] + left] = 2
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