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# CONVOLUTION AND FILTERING
# Convolution
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# Function Definitions and Syntax
# convolve3(M, K) | convolve5(M, K) | convol2d(M, K)
# These functions perform the convolution of a square kernel of specified size with the image matrix M. The last function, convol2d, convolves a kernel of arbitrary size, but takes longer than the functions specifically designed for 3 × 3 or 5 × 5 kernels. Convolution is an important filtering technique for smoothing, edge finding, and crisping.
# Arguments
# • M, the image matrix
# • K, the square kernel for convolve3 (3 × 3 kernel) or convolve5 (5 × 5 kernel), or an arbitrary kernel for convol2d.
# The functions return a matrix containing the image convolved with the kernel.
# Function Details
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# Two-dimensional convolution is one of the most common methods of filtering a digital image. Convolution is the process of sliding a filter matrix (called the kernel) across the image matrix, multiplying each element in the overlapping areas, summing the results, and inserting this sum into an element of the resulting matrix. This is illustrated in the drawing at right. A 3 × 3 kernel is used in this example. The colored squares in the convolved matrix correspond to the multiplication and summation in correspondingly colored regions.
# Convolution corresponds to multiplication in the spatial frequency domain. It is equivalent to filtering image components of some frequency. The exact type of filtering depends on the kernel used. Some kernels filter high-frequency components (image groupings which appear periodically with a small period), and some filter low-frequency components. Examples of different kernels are given here and in the next few sections.
# Function Details | convolve3(M, K)
# This function performs convolution of M with K, where K is a 3 × 3 matrix.
i := 0 .. 4
j := 0 .. 5
M[i, j] := floor(rnd(25))
# Define a kernel
K := [1, 2, -1; 1, 3, 1; 2, 4, 1]
CONV := convolve3(M, K)
M = [
    0, 4, 14, 8, 20, 4;
    17, 7, 2, 3, 24, 2;
    0, 13, 15, 4, 11, 1;
    19, 12, 21, 23, 13, 11;
    21, 19, 24, 15, 6, 21
]
CONV = [
    79, 90, 79, 98, 176, 88;
    67, 101, 130, 102, 174, 84;
    128, 190, 201, 169, 196, 112;
    159, 229, 286, 229, 173, 155;
    108, 124, 137, 129, 92, 104
]
# Notice that when part of the overlapped kernel lies outside the image M, the convolution sum contains fewer than nine terms. In effect we have padded the image with zeros. For example, the upper left output element is:
3*0 + 4*17 + 1*4 + 1*7 = 79
# In Mathcad, you could define the convolution function as
conv(i, j, n) := sum(sum(K[k, d]*M[k + i - 1, d + j - 1], d = 0 .. n - 1), k = 0 .. n - 1)
# where i and j are the row and column indices of the output matrix, and n is the size of the (square) kernel.
conv(2, 3, 3) = 169
CONV[2, 3] = 169
# If you give this function an i or j corresponding to an edge point, an error results, since we have only made an allowance for cases where the whole kernel overlaps.
# Function Details | convolve5(M, K)
# This function performs convolution of M with K, where K is a 5 × 5 matrix.
K := [2, 1, 0, 1, -3; 2, 1, 4, 1, 1; -1, -1, -2, 2, 0; 3, -1, 0, 5, 1; 0, -1, 1, -3, -1]
CONV := convolve5(M, K)
M = [
    0, 4, 14, 8, 20, 4;
    17, 7, 2, 3, 24, 2;
    0, 13, 15, 4, 11, 1;
    19, 12, 21, 23, 13, 11;
    21, 19, 24, 15, 6, 21
]
CONV = [
    -9, -20, 46, 102, -37, -61;
    40, -3, 11, 143, 74, 20;
    86, 64, 120, 113, 129, 128;
    134, 194, 158, 134, 202, 34;
    73, 103, 96, 149, 154, 59
]
# In this case, the outer two rows must follow a different formula because of kernel overlapping limitations.
# Function Details | convol2d(M, K)
# The convol2d function performs the same calculation as the other two functions, except that it allows a kernel of arbitrary size.
# For 3 × 3 and 5 × 5 kernels, convol2d is generally slower than the dedicated functions, but it can be used with kernels of arbitrary size, including nonsquare ones.
# One interesting kernel is the Gaussian kernel, which produces a smoothing effect. Here, a 5 × 5 kernel is generated.
i := 0 .. 4
j := 0 .. 4
K[i, j] := exp(-(i - 2)^2/1.5)*exp(-(j - 2)^2/1.5)
K = [
    0.00482795, 0.035674, 0.0694835, 0.035674, 0.00482795;
    0.035674, 0.263597, 0.513417, 0.263597, 0.035674;
    0.0694835, 0.513417, 1, 0.513417, 0.0694835;
    0.035674, 0.263597, 0.513417, 0.263597, 0.035674;
    0.00482795, 0.035674, 0.0694835, 0.035674, 0.00482795
]
M := READ_IMAGE("bear.gif")
# [component: inputs M]
cols(M) = 247
rows(M) = 357
# Convolve the Gaussian kernel with the image, to smooth the image:
CONV := convolve5(M, K)
# Compare this with the results of the convolution of general size. There is a slight difference in calculation time as well. Since the kernel is symmetric, the two convolutions give the same result.
CONV2 := convol2d(M, K)
# [component: inputs scale(CONV, 0, 255)]
# [component: inputs scale(CONV2, 0, 255)]
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