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# IMAGE ENHANCEMENT
# Machine Quality Control of Corn
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# Contributed by:
# Dr. John Reid
# Agricultural Engineering Department
# University of Illinois
# Urbana, Illinois
# Machine vision is the science of quantifying visual information electronically so that it can be used without human monitoring. Machine vision technology applies image processing for the purpose of extracting visual information for a variety of control and quantification applications. For example, automated visual inspection of dried corn is useful for monitoring the quality of various lots and for monitoring the storage and transportation of the lots.
# Before corn reaches commercial markets it is usually transported from farms to grain elevators. Handling can result in damage and breakage to the kernels which makes them susceptible to invasion from microorganisms. Corn that has been improperly dried has a higher risk of becoming damaged. Kernels of corn that have been improperly dried exhibit "stress cracks."
# Stress cracks are fissures that occur under the pericarp, or outer surface, of the corn kernel. By detecting the incidence of stress cracks in a sample or lot of grain, it is possible to evaluate if the corn has been improperly dried. Image analysis is a tool for automatically identifying the stress cracks in a grain sample.
# The stress cracks are visualized by backlighting the kernels. The amount of light transmitted through the kernels is dependent on the existence of a crack. Sufficient illumination is also provided on the surface (frontlighting), to visualize the kernel shape, but not mask out the stress crack effects.
# Here is an image of a normal kernel of corn under the lighting conditions described above.
normal := READ_IMAGE("corn1.bmp")
# The image cracked shows an image of a kernel with several internal stress cracks:
cracked := READ_IMAGE("corn2.bmp")
# [component: inputs normal]
# [component: inputs cracked]
# Using machine vision, stress crack detection can take place as an automated process. A sample of corn to be tested is placed in a machine that separates the kernels and delivers them individually to a viewing stage. Image analysis takes place on the viewing stage to determine the existence of stress cracks in a single kernel. The analysis of an entire sample provides statistical information that can be used in marketing decisions on when, how, and whether to sell the corn.
# Stress cracks appear visually as abrupt changes in intensity. Edge enhancement functions can be used to highlight these intensity changes.
edgeIM := kirsch(cracked)
# [component: inputs edgeIM]
# The edge-enhancement operation enhances both internal edges and the more predominant edges on the boundary of the kernel. These boundary edges will need to be removed before the machine can adequately check for the existence of cracks. To remove these edges, it's necessary to make a "mask" out of the silhouette of the corn kernel.
# If the image is uniformly illuminated, simple binarization can be used to segment the image into corn kernel and background. Automatic binarization can be successfully used to pick out the outline.
B := binarize_auto(cracked)
# [component: inputs B*255]
# The binary image forms a mask that represents the original kernel shape. The boundary of that shape occurs where the edges of the corn kernel occur. Image erosion can be used to reduce the size of the image mask. Then, a mask operation can be used to remove boundary edges from stress crack detection.
# First we create a 7 x 7 structuring element for erosion
i := 0 .. 6
j := 0 .. 6
se[i, j] := 1
# Now we apply erosion with the same structuring element twice using the
# center of the structuring element as the origin and 0.2 as a foreground value.
fg := .2
kernelMask := erode(B, se, 3, 3, fg)
kernelMask := erode(kernelMask, se, 3, 3, fg)
# Now use the mask image to extract the relevant part of the edge enhanced image to isolate edges that are within the kernel:
stressEdges := mask(edgeIM, kernelMask)
# [component: inputs kernelMask*255]
# [component: inputs scale(stressEdges, 0, 255)]
# Perform a histogram on the edges. In a real image, the edge-enhancement operation also enhances noise. The histogram is used to determine a distribution of edges so that a gradient threshold can be used to isolate the "true" edges representing the kernel damage. The low-frequency edges (close to gray level 0) are not of interest.
H := imhist(stressEdges, 256)
k := 0 .. rows(H) - 1
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eThresh := 8
bEdges := binarize(stressEdges, eThresh)
# Skeletonize the remaining connected pixels:
bEdges := skeleton(bEdges)
# [component: inputs bEdges*255]
# Project the remaining image signal onto the horizontal and vertical axes: sum all the rows, and then sum all the columns. If there is a significant distribution of pixels, then a stress crack has been detected within the kernel.
n := cols(bEdges) - 1
p := rows(bEdges) - 1
i := 0 .. n
j := 0 .. p
sigH[i] := sum(bEdges[j, i], j = 0 .. p)
sigV[j] := sum(bEdges[j, i], i = 0 .. n)
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count_H := sum(sigH[i], i = 0 .. n)
count_V := sum(sigV[j], j = 0 .. p)
count_H = 446
count_V = 446
# Statistical properties of these profile signatures can be used to make a decision on whether or not stress cracks exist in this kernel.
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