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# CONVOLUTION AND FILTERING
# Crisping
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# Function Definitions and Syntax
# orthocrisp(M) | diacrisp(M) | unicrisp(M) | orthocrisp5(M)
# These functions perform the convolution of a specific crisping kernel with an image matrix M. The number 5 indicates a 5 × 5 kernel is used instead of a 3 × 3 kernel. Crisping can be used to restore sharpness to an image which has degraded due to transmission or processing. It is the opposite of smoothing.
# Arguments
# • M, the image matrix
# The functions return a matrix containing the crisped image. Edges are unchanged, since the kernel does not overlap completely in these areas.
# Function Details
# These filters restore sharpness to images whose edges are ill-defined. They are related to edge-finding functions, whose kernels look somewhat similar. The edges of the image M are ignored.
# orthocrisp(M)
# This function convolves M with the kernel
K := [0, -1, 0; -1, 5, -1; 0, -1, 0]
# This convolution differs from the smoothing filters in the following way: instead of averaging surrounding pixels, this kernel replaces a pixel by the difference between it and its orthogonal neighbors, plus its original value.
i := 0 .. 6
j := 0 .. 6
M[i, j] := 100*exp(-(i - 3)^2/4)*exp(-(j - 3)^2/4)
N := orthocrisp(M)
M = [
    1.1109, 3.87742, 8.2085, 10.5399, 8.2085, 3.87742, 1.1109;
    3.87742, 13.5335, 28.6505, 36.7879, 28.6505, 13.5335, 3.87742;
    8.2085, 28.6505, 60.6531, 77.8801, 60.6531, 28.6505, 8.2085;
    10.5399, 36.7879, 77.8801, 100, 77.8801, 36.7879, 10.5399;
    8.2085, 28.6505, 60.6531, 77.8801, 60.6531, 28.6505, 8.2085;
    3.87742, 13.5335, 28.6505, 36.7879, 28.6505, 13.5335, 3.87742;
    1.1109, 3.87742, 8.2085, 10.5399, 8.2085, 3.87742, 1.1109
]
N = [
    -2.20034, -3.46582, -2.02532, -0.505332, -2.02532, -3.46582, -2.20034;
    -3.46582, 2.61184, 24.0694, 38.2188, 24.0694, 2.61184, -3.46582;
    -2.02532, 24.0694, 90.2042, 131.306, 90.2042, 24.0694, -2.02532;
    -0.505332, 38.2188, 131.306, 188.48, 131.306, 38.2188, -0.505332;
    -2.02532, 24.0694, 90.2042, 131.306, 90.2042, 24.0694, -2.02532;
    -3.46582, 2.61184, 24.0694, 38.2188, 24.0694, 2.61184, -3.46582;
    -2.20034, -3.46582, -2.02532, -0.505332, -2.02532, -3.46582, -2.20034
]
# The effect of the differencing is to pump up the value of the higher intensity pixels (foreground) and to slightly reduce the value of lower intensity (background) pixels.
# Now try this on a test image:
R := READ_IMAGE("clown.bmp")
# Blur the image:
R := orthosmooth5(R)
# And crisp the image:
orthogonal := orthocrisp(R)
# Since the crisping functions allow full floating point calculations, we want to rescale the result. And since the crisping may compress the image values (except for the edges), we equalize to spread the values out.
orthogonal := equalize(scale(orthogonal, 0, 255))
# [component: inputs R]
# [component: inputs orthogonal]
# diacrisp(M)
# Kernel:
[1, -2, 1; -2, 5, -2; 1, -2, 1]
# To economize on memory, do the calculations in one step:
dia := equalize(scale(diacrisp(R), 0, 255))
# unicrisp(M)
# Kernel:
[-1, -1, -1; -1, 9, -1; -1, -1, -1]
uni := equalize(scale(unicrisp(R), 0, 255))
# [component: inputs dia]
# [component: inputs uni]
# orthocrisp5(M)
# Kernel:
[0, -1, 1, -1, 0; -1, 2, -4, 2, -1; 1, -4, 13, -4, 1; -1, 2, -4, 2, -1; 0, -1, 1, -1, 0]
ortho5 := equalize(scale(orthocrisp5(R), 0, 255))
# You almost always have to scale images after crisping, since no averaging occurs. The smoothing functions do not suffer from this problem. Try different crispers on the blurred image above to see the various results they produce on this complex shape.
# The 5 × 5 crisping kernel is more prone to cause pseudo-resolution, that is, the illusion that there are additional lines between existing thin lines in an original picture.
# [component: inputs ortho5]
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