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# IMAGE FILTERING AND RESTORATION
# Removing Scanner Stripes
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# Contributed by:
# Dr. Michael Wegener
# Defense Science and Technology Organization
# Electronics and Surveillance Research Laboratory
# Land, Space and Optoelectronics Division
# Salisbury, South Australia 5108
# Introduction
# In many cases, visible and infrared images are obtained by using multisensor scanners. Some of these scanners are serial-parallel scanning devices such as the LANDSAT Multispectral Scanner (MSS), or the UK Common Module Thermal Imager (TICM). Scenes recorded by these devices tend to show scanner stripes caused by slightly different gains and biases of the individual detector-amplifier combinations, and due to minimal variations in the composition of each detector element's material.
# While striping induced by differences in the gains and biases of the individual detector-amplifier combinations can generally be described by a linear function, and removed by a two-point calibration, variations in the composition of the various detector elements induce higher order nonlinearities that cannot be removed easily. A probability-based model described by B. K. P. Horn in [1] and enhanced by M. Wegener in [2] will be used to compensate for these nonlinear variations in sensor output.
# Examine an image which has been artificially striped.
orig := READ_IMAGE("tank.bmp")
R := READ_IMAGE("stripe.bmp")
# [component: inputs orig]
# [component: inputs R]
# Notice the subtle horizontal striping in the second image. This makes it particularly difficult to tell which stripes are artifacts and which are actual tracks on the ground in the image.
# Destriping by Histogram Matching
# The destriping algorithm is based on the assumption that the radiance incident on a detector can be represented by a random variable, x, with probability density function (pdf) p(x). The detector output signal is then determined by the radiance incident on the detector and the nonlinear detector response, and is conveniently described by another random variable, y. The individual detector-amplifier combination's cumulative probability functions (cpf), which are required to perform the destriping operation, are found by dividing the cumulative histograms of the individual detector-amplifier combinations by the number of pixels recorded by each detector-amplifier combination.
#
# To achieve the destriping, cpfs of the individual detector-amplifier combinations are compared with that for a hypothetical average detector element: a detector element whose response is equal to the average response of all detectors making up the entire detector array. This process is called (cumulative) histogram matching. For each individual detector, we first need to find the value of the detector's individual cpf corresponding to a given pixel value (gray level). This value is then used to find the gray level that would have been produced by the hypothetical average detector. The hypothetical gray level is then used to replace the current gray value.
#
# The easiest and fastest way to implement the destriping algorithm is by the use of look-up tables. First, the cpfs for the individual sensors must be calculated.
# Calculate cpf for Each Detector
# Note: For this example we assume that there were four detector elements scanning the scene in a parallel-serial pattern, producing 256 shades of gray.
# Initialize number of detector elements:
detectors := 4
# Initialize number of gray levels:
levels := 256
# Get image dimensions:
last_col := cols(R) - 1
last_row := rows(R) - 1
# Divide the image up into four subimages, each of which was recorded by one of the individual sensor elements:
i := 0, detectors .. last_row  # Every fourth row was recorded by the same detector element.
j := 0 .. last_col
SI1[i/detectors, j] := R[i, j]
SI2[i/detectors, j] := R[i + 1, j]
SI3[i/detectors, j] := R[i + 2, j]
SI4[i/detectors, j] := R[i + 3, j]
# Calculate the histograms for each subimage:
H1 := imhist(SI1, levels)
H2 := imhist(SI2, levels)
H3 := imhist(SI3, levels)
H4 := imhist(SI4, levels)
# To build the cumulative histograms for each subimage, initialize the first entry with the contents of the first bin of the histogram:
C1[0] := H1[0]
C2[0] := H2[0]
C3[0] := H3[0]
C4[0] := H4[0]
# Adding subsequent entries in the four regular histograms creates the four cumulative histograms required for the matching process:
p := 1 .. levels - 1
C1[p] := H1[p] + C1[p - 1]
C2[p] := H2[p] + C2[p - 1]
C3[p] := H3[p] + C3[p - 1]
C4[p] := H4[p] + C4[p - 1]
# Convert the cumulative histograms into cpfs:
k := 0 .. levels - 1
cpf1[k] := C1[k]/C1[levels - 1]
cpf2[k] := C2[k]/C2[levels - 1]
cpf3[k] := C3[k]/C3[levels - 1]
cpf4[k] := C4[k]/C4[levels - 1]
# Calculate cpf for the Hypothetical
# Average Detector Element
# Now a reference cumulative histogram is needed for matching. This is calculated in the same sequence of steps as before, but for the whole image.
# Calculate the histogram of the entire image:
H := imhist(R, levels)
# and build the cumulative histogram:
C[0] := H[0]
C[p] := H[p] + C[p - 1]
cpf[k] := C[k]/C[levels - 1]
# For illustrative purposes, plot the reference cpf together with the individual detector cpfs:
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# Construct the Histogram Matching Lookup Tables
# In the third and final step, the lookup tables for the restoration of the individual sensor data values are constructed as follows:
#
# For each individual detector and for all possible output values (0 to 255 in this case) compare the value of the individual cpf with the reference cpf.
#
# If the reference cpf is either equal to or the smallest value greater than the sensor cpf, retrieve the corresponding table index (the gray level of the "average" detector).  This retrieval is performed by the following program:
LUT :=
    for q ∈ 0 .. detectors - 1
        for k ∈ 0 .. levels - 1
            LUT[q, k] ← -1
    for i ∈ 0 .. levels - 1
        for j ∈ 0 .. levels - 1
            LUT[0, i] ← j if (LUT[0, i] == -1)*(cpf1[i] ≤ cpf[j])
            LUT[1, i] ← j if (LUT[1, i] == -1)*(cpf2[i] ≤ cpf[j])
            LUT[2, i] ← j if (LUT[2, i] == -1)*(cpf3[i] ≤ cpf[j])
            LUT[3, i] ← j if (LUT[3, i] == -1)*(cpf4[i] ≤ cpf[j])
    LUT
# Notice what happens as each if instruction is executed; each time the average cpf is less than the individual cpf, a -1 is returned to the LUT. If, however, the average cpf is at some level greater than the individual cpf, the level, j, is returned and remains fixed in the table.
#
# Note: The construction of the lookup tables can probably be more efficiently coded as a C routine, which is easily linked into Mathcad Professional. See your Mathcad User's Guide.
# Destriping the Image
# Now destripe the image by replacing gray levels with corresponding levels in the LUT, as follows:
i := 0, detectors .. last_row
j := 0 .. last_col
U[i, j] := LUT[0, SI1[i/detectors, j]]
U[i + 1, j] := LUT[1, SI2[i/detectors, j]]
U[i + 2, j] := LUT[2, SI3[i/detectors, j]]
U[i + 3, j] := LUT[3, SI4[i/detectors, j]]
# Display the result:
# [component: inputs U]
# References
# [1] Horn, B. K. P., "Destriping LANDSAT MSS Images by Histogram Modification," Computer Graphics and Image Processing, 10, pp. 69-83, 1979.
# [2] Wegener, M., "Destriping Multiple Sensor Imagery by Improved Histogram Matching," International Journal of Remote Sensing, Vol. 11, No. 5, pp. 859-75, 1990.
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