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# EDGE FINDERS
# Convolution Edge Finders
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# Function Definitions and Syntax
# difedge(M) | freichen(M) | sobel(M)
# prewitt(M) | roberts(M)
# These functions detect edges in an image, M, by convolving various kernels in sequence over the matrix. Edge detection is used to enhance image readability for certain types of features that depend on boundaries.
# Arguments
# • M, the image matrix
# The functions return a matrix containing the detected edges. The perimeter of the image is untreated, since the kernels do not fully overlap there.
# Function Details | difedge(M)
# This function finds edges in M by convolving M with the following two kernels and then combining the result by finding the gradient magnitude elementwise between the two convolution matrices using the kernels:
K1 := [0, 0, 0; 0, 1, -1; 0, 0, 0]
K2 := [0, -1, 0; 0, 1, 0; 0, 0, 0]
# The output equals
# where C1 and C2 are the convolution matrices.
vectorize(sqrt(C1^2 + C2^2))
# The concept here is similar to that used in Laplacian (Differential) Edge Finders. Each of the kernels above takes a directional differential (K1 is horizontal, and K2 is vertical). The subsequent sum of squares makes the process directionally independent.
R := READ_IMAGE("brain.gif")
Rdif := difedge(R)
# The output of the edge finders is compared visually at the bottom of the page.
# freichen(M)
# This function convolves M with the two kernels
K1 := 1/(2 + sqrt(2))*[1, 0, -1; sqrt(2), 0, -sqrt(2); 1, 0, -1]
K2 := 1/(2 + sqrt(2))*[-1, -sqrt(2), -1; 0, 0, 0; 1, sqrt(2), 1]
Rfre := freichen(R)
# The freichen edge detector is useful for images in which there are a variety of intensity levels defining the various edges in the picture. These kernels show a greater sensitivity to the relative pixel values, independent of their brightness.
# The output of the edge finders is compared visually at the bottom of the page.
# sobel(M)
# This function convolves M with the two kernels
K1 := 1/4*[1, 0, -1; 2, 0, -2; 1, 0, -1]
K2 := 1/4*[-1, -2, -1; 0, 0, 0; 1, 2, 1]
Rsob := sobel(R)
# The sobel kernel gives a more uniform edge detection than difedge, although it still gives increased weight to the orthogonal pixels over the diagonal pixels.
# The output of the edge finders is compared visually at the bottom of the page.
# prewitt(M)
# This function convolves M with the two kernels
K1 := 1/3*[1, 0, -1; 1, 0, -1; 1, 0, -1]
K2 := 1/3*[-1, -1, -1; 0, 0, 0; 1, 1, 1]
Rpre := prewitt(R)
# The prewitt kernel considers the orthogonal and diagonal pixel differentials equally.
# The output of the edge finders is compared visually at the bottom of the page.
# roberts(M)
# This function convolves M with the two kernels
K1 := [0, 0, -1; 0, 1, 0; 0, 0, 0]
K2 := [-1, 0, 0; 0, 1, 0; 0, 0, 0]
Rrob := roberts(R)
# The roberts kernel considers only the diagonal pixel differentials, which emphasizes corners more clearly but can blur together small horizontal or vertical features.
# The output of the edge finders is compared visually at the bottom of the page.
# Comparison of Edge Finders
# We have calculated output of the difedge, freichen, sobel, prewitt, and roberts edge finders, and stored the output as Rdif, Rfre, Rsob, Rpre, and Rrob. Use the images below to compare various edge-finding routines visually. You may wish to adjust the contrast.
# [component: inputs R]
# [component: inputs Rdif]
# [component: inputs Rfre]
# [component: inputs Rsob]
# [component: inputs Rpre]
# [component: inputs Rrob]
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