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# IMAGE MANIPULATION
# Equalization
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# Function Definition and Syntax
# equalize(M)
# This function performs a histogram equalization. Equalization can be used as an advanced form of level mapping (see Function and Level Mapping) to enhance features of a picture, or use a particular display device more efficiently.
# Arguments
# • M, an image matrix, scaled between 0 and 255.
# The function returns a matrix which contains the equalized image.
# Function Details | equalize(M)
# Replaces elements of M by values such that the cumulative histogram of M gives a straight line. Relative light to dark values are preserved.
R := READ_IMAGE("arcs.bmp")
H := imhist(R, 256)
k := 0 .. rows(H) - 1
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# This image is very dark. It will be easier to make out features if we spread the intensities over a larger portion of the available spectrum. In this image, the cumulative histogram is given by the difference equation for C.
r := 0 .. 254
C[0] := H[0]
C[r + 1] := C[r] + H[r + 1]
# Cumulative histogram:
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# The goal is to make this cumulative histogram roughly linear.
Requal := equalize(R)
J := imhist(Requal, 256)
# The new image histogram is
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# The new cumulative histogram of equalized image is given by
D[0] := J[0]
D[r + 1] := D[r] + J[r + 1]
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# View the original and equalized images:
# [component: inputs R]
# [component: inputs Requal]
# The equalized image shows some details which the original does not. Adjusting the contrast can also help to show desired details, though it is always a linear transformation. This technique would work equally well for an image which contained mainly highlights and insufficient shadows, or any other image in which the full dynamic range of the picture is not used - for example, one containing large gaps where no intensities are used.
# You may find that, when equalizing some photographic images, some of the highlights or shadows are overexaggerated in the equalized image, simply because of the sensitivity of your eye or the screen which you are using. You could then perform one of the level maps described in the Function and Level Mapping section to try to correct this.
# The other techniques you've already seen for adjusting the dynamic range of an image are Scaling and Clipping. These are generally useful only when all of the intensities in an image are concentrated over a portion of the intensity spectrum narrower than 0 to 255. Equalization can be used even when intensity levels 0 and 255 are present.
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