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# MORPHOLOGICAL PROCESSING
# Erosion and Dilation
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# Function Definitions and Syntax
# erode4(M, b) | erode8(M, b) | dilate4(M, b) | dilate8(M, b)
# erode(M, Melem, r-origin, c-origin, b)
# dilate(M, Melem, r-origin, c-origin, b)
# These functions perform erosion or dilation, wearing away or adding to the edges of an image. The 4 or 8 in the function name indicate whether only orthogonal (4) or all 8 neighbors are considered. Erosion spreads light objects in an image further apart; dilation enlarges light objects, reassembling an image which has become disjointed.
# Arguments
# • M, the image matrix
# • b, intensity threshold at which to erode or dilate
# • Melem, a structuring element matrix
# • r-origin, the row-coordinate origin of Melem
# • c-origin, the column-coordinate origin of Melem
# The functions return a matrix which contains the eroded or dilated image.
# Function Details | erode4(M, b) | erode8(M, b)
# These functions scan an image M to find pixels with values less than the intensity threshold b, the background threshold of the image. In the case of erode4, if any of the background pixel's 4 neighbors have values greater than or equal to b (that is, they are foreground pixels), those neighbors are set equal to 0. The effect is to nibble away at edges of the foreground image. The same is true of erode8, but the 8-neighborhood of each pixel is considered, instead of the 4-neighborhood.
# Edge and corner pixels are treated appropriately.
M := [120, 30, 120, 45; 80, 140, 160, 65; 200, 130, 100, 110; 56, 130, 120, 20]
erode4(M, 100) = [0, 30, 0, 45; 80, 0, 0, 65; 0, 130, 100, 0; 56, 0, 0, 20]
erode8(M, 100) = [0, 30, 0, 45; 80, 0, 0, 65; 0, 0, 0, 0; 56, 0, 0, 20]
# Now examine the effect this has on an image. Let's use a two-dimensional sinc function.
f(x) := sinc(x*π/2)^2
# Range variables:
imax := 100
i := 0 .. imax
j := 0 .. imax
# Range of values:
r[i] := (i - imax/2)*.1
# Image matrix:
D[i, j] := 255*f(r[i])*f(r[j])
# Binarize the image, to clarify features:
M := 255*binarize(D, 4)
# [component: inputs M]
# Now apply the erosion:
b := 180
F := erode4(M, b)
G := erode8(M, b)
GG := erode8(G, b)
# [component: inputs F]
# [component: inputs G]
# [component: inputs GG]
# Erosion can be used to make a mask of an image for further binary processing. An example is shown in the example Machine Quality Control of Corn.
# Function Details | dilate4(M, b) | dilate8(M, b)
# Dilation is the opposite of erosion. The dilation functions find pixels with values less than intensity b, the background threshold of the image. In the case of dilate4, if any of the background pixel's 4 neighbors have values greater than or equal to b (that is, they are foreground pixels), the background pixel is promoted to have value b. The effect is to build up the edges of the foreground image. The same is true of dilate8, but the 8-neighborhood of each pixel is considered, instead of the 4-neighborhood.
d := 255
D4 := dilate4(M, d)
D8 := dilate8(M, d)
D888 := dilate8(dilate8(dilate8(M, d), d), d)
# [component: inputs D4]
# [component: inputs D8]
# [component: inputs D888]
# Function Details
# erode(M, Melem, r-origin, c-origin, b)
# dilate(M, Melem, r-origin, c-origin, b)
# Instead of considering the 4- or 8-neighborhood of a pixel, erode and dilate use a neighborhood specified by the matrix Melem, with origin given by (r-origin, c-origin). Also, the erode and dilate functions are true morphological binary functions, producing output that is always binarized. (See the section on grayscale morphology for functions that work with grayscale images.) Pixels near the boundary may be invalid in output.
# Here is a horizontal neighborhood matrix used with the dilate function. The matrix considers the pixel at the origin of the neighborhood matrix, in this example, at (3,0), and the 3 pixels to the left and right of the origin, respectively (recall that matrix indices begin at 0 and not 1).
Melem := [1, 1, 1, 1, 1, 1, 1]
M1 := dilate(M, Melem, 0, 3, 100)
# [component: inputs M]
# [component: inputs M1*255]
# Since the neighborhood matrix is a row vector, objects in the image expand horizontally, but are unchanged vertically. There is also a slight displacement of the image from center.
# Next, consider erosion with a vertical neighborhood structuring element:
Melem := [1; 1; 1; 1; 1; 1; 1]
M1 := erode(M, Melem, 3, 0, 100)
# [component: inputs M]
# [component: inputs M1*255]
# Objects on the image contract vertically, but horizontal size is unchanged. Also, several small objects in the image disappeared due to erosion because their vertical dimension was smaller than the vertical dimension of the structuring element.
# We can also use the general erode and dilate functions to mimic the behavior of the erode4, erode8, dilate4, and dilate8 functions, when applied to binary images, by creating the appropriate structuring element. For instance, to mimic erode4, we use:
Melem := [0, 1, 0; 1, 1, 1; 0, 1, 0]
# Compare:
e4 := erode4(M, 100)
eg := 255*erode(M, Melem, 1, 1, 100)
# They should be identical except on the image boundary:
sum(sum(|e4[i, j] - eg[i, j]|, j = 1 .. 99), i = 1 .. 99) = 0
# Similarly for dilate8:
Melem := [1, 1, 1; 1, 1, 1; 1, 1, 1]
d8 := dilate8(M, 255)
dg := 255*dilate(M, Melem, 1, 1, 100)
# They should be identical except on the image boundary:
sum(sum(|d8[i, j] - dg[i, j]|, j = 1 .. 99), i = 1 .. 99) = 0
# Note that when you use erode4, erode8, dilate4, and dilate8 you must first manually binarize the image at the threshold in order to see the same results as those given by erode and dilate, which binarize automatically.
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