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# IMAGE ENHANCEMENT
# Fading In and Out
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# This section demonstrates crossfading two images using Mathcad's animation feature. Given two image arrays of the same size, a weighted average of the two with time-variable weighting produces the desired effect. Below is an illustration with a vertical bar that fades into a horizontal bar.
i := 0 .. 50
j := 23 .. 27
Im1 := identity(51)*0 + 255
Im1[i, j] := 0
Im2 := transpose(Im1)
# Im1 is a vertical bar
# [component: inputs Im1]
# while Im2 is a horizontal bar
# [component: inputs Im2]
# The weighting starts at zero,
w := 0
I := (1 - w)*Im1 + w*Im2
# and the cross-faded image I produces only Im1.
# [component: inputs I]
# Adjust the value of w above between 0 and 1 to see other stages in the cross fade.
# The ability to fade becomes interesting when combined with animation. We can use the range of FRAME values to generate weighted image averages with weights running from 0 to 1. Below are a number of examples for you to animate.
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# Creating an Animation
# First we define a function for computing the weighted average of two images.
Fade(Im1, Im2, w) := (1 - w)*Im1 + w*Im2
# Next we read in our standard example images.
# The model
L := READ_IMAGE("lena.bmp")
# and the dog
W := READ_IMAGE("weederma.tga")
# In animating the examples below, first set the value for Nframes, the number of frames. A large number of frames makes the fading appear smoother when played but is more memory intensive. Once Nframes is set, animate the desired picture letting FRAME run from 0 to the value of Nframes.
# In the first example you can watch the model's face fade in from an all-black background. Use a range for FRAME from 0 to 30 in the Animate dialog box.
Black := L*0
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w := FRAME/30
# Creating an Animation
Nframes := 30
Im := Fade(Black, L, FRAME/Nframes)
# [component: inputs Im]
# By simply reversing the image arguments to Fade, you can have the image fade to black.
Nframes := 300
Im := Fade(L, Black, FRAME/Nframes)
# [component: inputs Im]
# You can also fade into or out from a white background, demonstrating another tip in animating.
# If you start with a white background
White := L*0 + 255
# here is what you see
# [component: inputs White]
# It is very hard to select all of this region when animating since it is essentially invisible. You could change the background color of your document or you could add a border to the white background.
# The expressions below set up the fade for animating and begin with a white background whose border is identical to the final image border.
BWhite := White
i := 0 .. cols(BWhite) - 1
BWhite[0, i] := L[0, i]
BWhite[rows(BWhite) - 1, i] := L[rows(BWhite) - 1, i]
BWhite[i, 0] := L[i, 0]
BWhite[i, cols(BWhite) - 1] := L[i, cols(BWhite) - 1]
Nframes := 300
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Im := Fade(BWhite, L, FRAME/Nframes)
# Creating an Animation
# [component: inputs Im]
# Last, the two images are faded into one another.
# The first, the model's face
MF := submatrix(L, 100, 210, 90, 180)
# [component: inputs MF]
# and the second, the dog's face
WF := submatrix(W, 60, 170, 150, 60)
# [component: inputs WF]
# which have been selected to be the same size
rows(MF) = 111
cols(MF) = 91
rows(WF) = 111
cols(WF) = 91
# The usual setup appears below.
Nframes := 50
I := Fade(MF, WF, FRAME/Nframes)
# [component: inputs I]
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