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# GEOMETRIC TRANSFORMS
# Flipping Images
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# Function Definitions and Syntax
# horzflip(M) | vertflip(M)
# These functions allow you to flip a whole image. horzflip(M) flips the image around a vertical center line; the resulting image is flipped from left to right. vertflip(M) flips the image around a horizontal center line; the result is upside-down.
# Arguments
# •  M, the image matrix
# The functions return another matrix, which is flipped.
# Function Details | horzflip(M)
# Flips the image horizontally.
R := READ_IMAGE("pattern.bmp")
H := horzflip(R)
# [component: inputs R]
# The original image:
# [component: inputs H]
# The horizontally flipped image:
i := 0 .. 2
j := 0 .. 3
M[i, j] := mod(i + j^2, 256)
M = [0, 1, 4, 9; 1, 2, 5, 10; 2, 3, 6, 11]
horzflip(M) = [9, 4, 1, 0; 10, 5, 2, 1; 11, 6, 3, 2]
# Function Details | vertflip(M)
# Flips the image vertically.
V := vertflip(R)
# [component: inputs R]
# The original image:
# The vertically flipped image:
# [component: inputs V]
M = [0, 1, 4, 9; 1, 2, 5, 10; 2, 3, 6, 11]
vertflip(M) = [2, 3, 6, 11; 1, 2, 5, 10; 0, 1, 4, 9]
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