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# THE TRANSFORM DOMAIN
# Filtering in the Fourier Transform Domain
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# Function Definitions and Syntax
# funconv(M, f) | funcdeconv(M, f, ε)
# matconv(M, E) | matdeconv(M, E, ε)
# These functions convolve, or deconvolve, an image with a function, f, or mask, E, by multiplying the two together in spatial frequency (the Fourier transform domain). Filtering in the frequency domain can result in a variety of smoothing, edge detection, and periodic noise-reduction operations, depending upon the chosen function or mask. It is often mathematically more efficient to filter in the transform domain, or easier to define filters, than by using convolution in the image domain.
# Arguments
# • M, the image matrix
# • f, a function in spatial frequency
# • E, the frequency-domain mask, and
# • ε, an error-correction factor for deconvolution routines, to avoid divide-by-zero errors
# The functions return a matrix containing the convolved image in the image domain.
# Mathcad Fourier transforming algorithms in two dimensions return the zero-frequency component in the upper left-hand corner.
# Function Details | funconv(M, f)
# This function filters an image M with a function in spatial frequency. The real-valued function, f, is used to construct a mask, E, the same size as M. M is Fourier-transformed, then multiplied termwise by the mask.
# The mask is constructed by passing arguments to f which are the normalized distance from the upper-left corner of M. This process continues to the center of the mask, at which point the mask is duplicated in four pieces symmetrically. This process is used because the upper left-hand corner is DC (zero frequency).
# To see a method for recentering a frequency-domain image, see Centering a Transformed Image.
# To see how the mask is constructed, use a test image matrix, M.
rowmax := 4
colmax := 5
i := 0 .. rowmax
j := 0 .. colmax
M[i, j] := i*j
# Now find the pixel which will be considered the center of the matrix.
r := ceil(rowmax/2)
c := ceil(colmax/2)
r = 2
c = 3
# Create new range variables which only go from the upper left-hand corner to the "center."
I := 0 .. r
J := 0 .. c
# Use these, and a specified masking function, to create the upper-left quadrant of the mask. Note that the (0, 0) entry is f(0), and the (r, c) entry is f(1).
f(x) := x^2 + x + 1
Mask[I, J] := f(sqrt((I^2 + J^2)/(r^2 + c^2)))
Mask = [1, 1.35427, 1.86239, 2.52436; 1.35427, 1.54608, 2.00479, 2.64629; 1.86239, 2.00479, 2.39985, 3]
# The rest of the Mask matrix is made of reflections of this upper quadrant.
n := (r + 1) .. rowmax
m := (c + 1) .. colmax
Mask[n, J] := Mask[rowmax - n + 1, J]
Mask[i, m] := Mask[i, colmax - m + 1]
# The full frequency-domain mask:
Mask = [
    1, 1.35427, 1.86239, 2.52436, 1.86239, 1.35427;
    1.35427, 1.54608, 2.00479, 2.64629, 2.00479, 1.54608;
    1.86239, 2.00479, 2.39985, 3, 2.39985, 2.00479;
    1.86239, 2.00479, 2.39985, 3, 2.39985, 2.00479;
    1.35427, 1.54608, 2.00479, 2.64629, 2.00479, 1.54608
]
# Transform the image, and find the filtered result:
MT := cfft(M)
output := icfft(vectorize(MT*Mask))
output = [
    -1.2207, -1.65581, -2.58041, -3.50292, -4.42752, -4.86262;
    -2.32123, 0.817988, 1.60708, 3.19173, 3.98082, 7.12004;
    -3.95769, 2.10727, 3.49188, 6.50812, 7.89273, 13.9577;
    -5.59414, 3.39654, 5.37668, 9.82451, 11.8046, 20.7953;
    -6.69468, 5.87034, 9.56417, 16.5192, 20.213, 32.778
]
# Compare this procedure with the output of the built-in function.
F := funconv(M, f)
F = [
    -1.2207, -1.65581, -2.58041, -3.50292, -4.42752, -4.86262;
    -2.32123, 0.817988, 1.60708, 3.19173, 3.98082, 7.12004;
    -3.95769, 2.10727, 3.49188, 6.50812, 7.89273, 13.9577;
    -5.59414, 3.39654, 5.37668, 9.82451, 11.8046, 20.7953;
    -6.69468, 5.87034, 9.56417, 16.5192, 20.213, 32.778
]
# The steps above are provided simply for your understanding of the workings of the function. There is no need to recreate them every time - just use funconv. In general you may need to scale the output matrix to the range [0, 255], since the convolution may expand the image scale.
# Function Details | funcdeconv(M, f, ε)
# The corresponding deconvolution function takes a frequency-domain image and a frequency-domain function and deconvolves them. The argument ε is a small term which is added to all expressions in denominators during all divisions in the routine. Therefore as a starting point you should always try a value of 0 for ε; if you use funcdeconv and receive a divide-by-zero error message, try a small value for ε.
DE := funcdeconv(F, f, 0)
DE = [0, 0, 0, 0, 0, 0; 0, 1, 2, 3, 4, 5; 0, 2, 4, 6, 8, 10; 0, 3, 6, 9, 12, 15; 0, 4, 8, 12, 16, 20]
M = [0, 0, 0, 0, 0, 0; 0, 1, 2, 3, 4, 5; 0, 2, 4, 6, 8, 10; 0, 3, 6, 9, 12, 15; 0, 4, 8, 12, 16, 20]
# Function Details | matconv(M, E) | matdeconv(M, E, ε)
# These functions perform the same frequency-domain multiplication and transforms as the previous two, but they accept a mask as input instead of a function. The dimensions of the mask must be the size as the original image for the function to work; you supply just the upper-left quadrant of this mask.
R := READ_IMAGE("times.bmp")
r := rows(R)
c := cols(R)
# The dimensions of the mask supplied to the functions are as follows:
r_mask := ceil((r + 1)/2)
c_mask := ceil((c + 1)/2)
ii := 0 .. r_mask - 1
jj := 0 .. c_mask - 1
C[ii, jj] := 1/(1 + (ii^2 + jj^2)/r)
# Try this highpass filter as well:
100*ii*jj
# You only need to make the top left-hand quadrant of the mask. The convolution function does the rest for you.
W := matconv(R, C)
# [component: inputs R]
# [component: inputs W]
# [component: inputs C]
# To recover the original image, we use matdeconv. Since deconvolution potentially involves division by elements with zero intensity, the third argument is added to the denominator of each division to eliminate this problem.
V := matdeconv(W, C, TOL)
# [component: inputs V]
# To see an example of simple convolution in the image domain with a kernel matrix, see Convolution.
# Experiment with other filter functions, keeping in mind that the upper left-hand corner of the mask corresponds to low frequencies, and the lower right-hand corner corresponds to high frequencies. Try different images.
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