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# THE TRANSFORM DOMAIN
# Gaussian Kernel Filtering
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# Function Definitions and Syntax
# gaussconv(M, s) | gaussdeconv(M, s, ε)
# These functions convolve (or deconvolve) an image with a Gaussian kernel with half-width s. Convolution is accomplished by multiplying the Matrix and gaussian in spatial frequency (the Fourier transform domain). Gaussian filtering can result in smoothing, edge detection, or noise reduction, depending upon the chosen half-width. Gaussian filters are important analytically because their transforms are also Gaussian.
# Arguments
# • M, the image matrix
# • s, a control for the Gaussian half-width
# • ε, an error-correction factor for deconvolution routines, to avoid divide-by-zero errors
# The functions return a matrix containing the convolved image in the image domain.
# Function Details | gaussconv(M, s)
# This function performs function convolution by multiplication in the transform domain using a Gaussian filter function with half-width determined by s. Specifically, the half-width is:
1/sqrt(2*s)
# A large value of s corresponds to a narrow Gaussian in transform space. Narrow gaussians may result in lost image information as the filter sets elements in transform space close to zero, except for the DC component at 0,0.
# funconv performs the same function given a Gaussian for f(x). Compare the two:
s := 5
f(x) := exp(-x^2*s)
i := 0 .. 3
j := 0 .. 4
M[i, j] := floor(rnd(256))
M = [0, 49, 149, 89, 210; 44, 181, 77, 23, 37; 253, 30, 2, 136, 154; 42, 115, 14, 200, 133]
G := gaussconv(M, s)
G = [
    75.6984, 80.6079, 98.0051, 109.443, 104.097;
    94.4208, 95.8588, 84.1197, 79.2866, 88.5832;
    124.628, 89.4789, 70.3237, 99.2786, 125.893;
    100.043, 77.1304, 85.142, 124.518, 131.442
]
gaussf := funconv(M, f)
gaussf = [
    75.6984, 80.6079, 98.0051, 109.443, 104.097;
    94.4208, 95.8588, 84.1197, 79.2866, 88.5832;
    124.628, 89.4789, 70.3237, 99.2786, 125.893;
    100.043, 77.1304, 85.142, 124.518, 131.442
]
# Remember that displayed precision is not the same as the precision used for the calculation. You can display up to 15 decimals, if you like.
test := READ_IMAGE("tools.bmp")
G1 := gaussconv(test, s)
# Convolution with a Gaussian is equivalent to low-pass filtering an image. Look at what it does to the sharp edges in the picture.
# [component: inputs test]
# [component: inputs G1]
# Function Details | gaussdeconv(M, s, ε)
# This function performs deconvolution. The argument ε is a small term which is added to all expressions in denominators during all divisions in the routine. Therefore as a starting point you should always try a value of 0 for ε; if you use gaussdeconv and receive a divide-by-zero error message, try a small value for ε.
I := gaussdeconv(G, s, 0)
I - M = [
    1.49214e-13, -2.41585e-13, 1.98952e-13, -8.52651e-14, -5.68434e-14;
    -7.10543e-14, 1.13687e-13, -5.68434e-14, -1.20792e-13, 9.9476e-14;
    8.52651e-14, -2.13163e-13, 2.41585e-13, 0, 5.68434e-14;
    -8.52651e-14, 1.42109e-13, -1.13687e-13, -5.68434e-14, 8.52651e-14
]
Q := gaussdeconv(G1, s, TOL)
# [component: inputs Q]
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