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# EDGE FINDERS
# Row and Column Gradients
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# Function Definitions and Syntax
# rowgrad(M) | colgrad(M)
# These functions find the row and column gradients of an image, M, resulting in a horizontally or vertically selective edge detection. Edge detection is used to enhance image readability for certain types of features that depend on boundaries. Gradients also result in a visual embossing effect.
# Arguments
# • M, the image matrix
# The functions return a matrix containing the row or column differences. The first row/column is set to zero.
# Function Details
# These two functions create row and column differences in an image, M, by subtracting successive rows (or columns) from each other.
# In each case the resulting matrix has one undefined row or column. This is set equal to zero.
# rowgrad(M)
# This function subtracts adjacent rows in an image matrix to form the output matrix. The first row is zero.
M := [1, 2, 4; 1, 6, 3; 1, 2, 2]
rowgrad(M) = [0, 0, 0; 0, 4, -1; 0, -4, -1]
# colgrad(M)
# This function subtracts adjacent columns in an image matrix to form the output matrix. The first column is zero.
colgrad(M) = [0, 1, 2; 0, 5, -3; 0, 1, 0]
# Notice the edge-detection effects for each of these functions. They very sharply find the horizontal (in the case of rowgrad) or vertical (in the case of colgrad) edges in the image.
R := READ_IMAGE("pattern.bmp")
Row := rowgrad(R)
Col := colgrad(R)
# [component: inputs R]
# [component: inputs Row]
# [component: inputs Col]
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