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# MORPHOLOGICAL PROCESSING
# Grayscale Morphology
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# Function Definitions and Syntax
# gray_erode(M, Melem, r-origin, c-origin)
# gray_dilate(M, Melem, r-origin, c-origin)
# gray_open(M, Melem) | gray_close(M, Melem)
# The grayscale morphology functions here are extensions of binary morphological functions (see the erode, dilate, open and close functions).  They can be used in extracting image components and describing object shapes, primarily picking out small bright or dark features in an image.
# Arguments
# •  M, the image matrix
# •  Melem, a structuring element matrix
# •  r-origin, the row-coordinate origin of Melem
# •  c-origin, the column-coordinate origin of Melem
# Each function returns a matrix containing the result of the morphological operation.
# Function Details | gray_erode(M, Melem, r-origin, c-origin)
# In binary erosion, a structuring element is used to define a neighborhood around each pixel in which the presence of any background pixels cause the foreground to become background. Grayscale erosion is an extension of this, where the structuring element's pixel values are subtracted from the input image's pixel values.  The output is the minimum resulting pixel value within the boundary of the structuring element.
# The effects of grayscale erosion, if the structuring element has all positive values, are (1) to reduce the overall brightness of the image,
# (2) to eliminate bright regions in the image that are smaller than the structuring element, and (3) to expand dark regions of the image. If the grayscale image and structuring element are thought of as surfaces whose heights at each point are their grayscale values, grayscale erosion causes the height of the input surface to be reduced by the height of the structuring element, and small, tall features to be completely eroded away.
#
# Image boundaries are treated as though they extend outwards with zero grayscale values, so output pixels nearer to the edges of the image than the size of the structuring element may be invalid.
# Let's try an example. First create a 5-by-4 sequential matrix:
i := 0 .. 4
j := 0 .. 3
M[i, j] := i*4 + j
M = [0, 1, 2, 3; 4, 5, 6, 7; 8, 9, 10, 11; 12, 13, 14, 15; 16, 17, 18, 19]
# Next create a simple structuring element (SE):
Melem := [1, 1; 1, 1]
# Finally, perform grayscale erosion with the origin of the SE at (0,0):
M1 := gray_erode(M, Melem, 0, 0)
# The resulting matrix should be equal to M-1 except the at the rightmost column and bottommost row (boundary conditions):
sum(sum(|M1[i, j] - M[i, j] + 1|, j = 0 .. 2), i = 0 .. 3) = 0
M1 = [-1, 0, 1, -1; 3, 4, 5, -1; 7, 8, 9, -1; 11, 12, 13, -1; -1, -1, -1, -1]
# Now lets try eroding a more realistic image with a 5 x 5 centered SE:
i := 0 .. 4
j := 0 .. 4
Lelem[i, j] := 1
L := READ_IMAGE("lena.bmp")
Le := gray_erode(L, Lelem, 2, 2)
# [component: inputs L]
# [component: inputs Le]
# As expected, we notice that the image has darkened in general, the darker regions have expanded, and some brighter details have disappeared.
# Function Details | gray_dilate(M, Melem, r-origin, c-origin)
# In binary dilation, a structuring element is used to define a neighborhood around each pixel in which the presence of any foreground pixel causes the background to become foreground. Grayscale dilation is an extension of this, where each pixel in the output is produced by rotating the structuring element by 180 degrees, and centering it on a pixel, and adding its pixel values to the input image.  The output pixel value is the maximum resulting pixel value within the boundary of the structuring element.
# The effects of grayscale dilation, if the structuring element has all positive values, are (1) to increase the overall brightness of the image,
# (2) to eliminate dark regions in the image that are smaller than the structuring element, and (3) to expand bright regions of the image. If the grayscale image and structuring element are thought of as surfaces whose heights at each point are their grayscale values, grayscale dilation causes the height of the input surface to be increased by the height of the structuring element and small, deep valleys to be completely filled in.
#
# Note that image boundaries are treated as though they extended outwards with zero grayscale values, so output pixels nearer to the edges of the image than the size of the structuring element may be invalid.
# Let's try it out on the same matrix used previously:
Melem = [1, 1; 1, 1]
M = [0, 1, 2, 3; 4, 5, 6, 7; 8, 9, 10, 11; 12, 13, 14, 15; 16, 17, 18, 19]
M1 := gray_dilate(M, Melem, 0, 0)
# The resulting matrix should be equal to M + 1 except the rightmost column and the bottommost row (boundary conditions):
M1 = [1, 2, 3, 4; 5, 6, 7, 8; 9, 10, 11, 12; 13, 14, 15, 16; 17, 18, 19, 20]
sum(sum(|M1[i, j] - M[i, j] - 1|, j = 0 .. 3), i = 0 .. 4) = 0
# We can also apply it to the image we used before:
Ld := gray_dilate(L, Lelem, 2, 2)
# [component: inputs L]
# [component: inputs Ld]
# Notice that the dilation results in an increased overall brightness, expanded bright regions, and loss of small dark details.
# Function Details | gray_open(M, Melem) | gray_close(M, Melem)
# Grayscale opening and closing are defined in an analogous way to opening and closing in binary morphology; opening is grayscale erosion followed by grayscale dilation, and closing is grayscale dilation followed by grayscale erosion.  Note that because of the 180-degree rotation of the structuring element in dilation, both open and close operations are invariant to the origin of the structuring element.
# The main effect of grayscale opening is to remove small, bright features from the image, while leaving the overall brightness unchanged. The main effect of grayscale closing is to remove small, dark features from the image, while leaving the overall brightness unchanged. Image boundaries are handled as if the image extended outward with zero grayscale value, so the output pixels nearer to the edges of the image than the size of the structuring element may be invalid.
# Apply grayscale open and close to the sequential matrix to see that they are equivalent to erosion and dilation combined:
M2 := gray_open(M, Melem)
M1 := gray_erode(M, Melem, 0, 0)
M1 := gray_dilate(M1, Melem, 0, 0)
sum(sum(|M1[i, j] - M2[i, j]|, j = 0 .. 3), i = 0 .. 4) = 0
M2 := gray_close(M, Melem)
M1 := gray_dilate(M, Melem, 0, 0)
M1 := gray_erode(M1, Melem, 0, 0)
sum(sum(|M1[i, j] - M2[i, j]|, j = 0 .. 3), i = 0 .. 4) = 0
# And finally, apply the functions to the test image, and compare the dilated, eroded, opened, and closed images:
Lo := gray_open(L, Lelem)
Lc := gray_close(L, Lelem)
# [component: inputs Ld]
# [component: inputs Le]
# [component: inputs Lc]
# [component: inputs Lo]
# Observe that opening and closing result in no overall brightness change, while dilation and erosion change the brightness. Both dilation and closing enhance bright and reduce dark features in the image, while erosion and opening enhance dark and reduce bright features.
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