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# IMAGE MANIPULATION
# One- and Two-Dimensional Histograms
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# Function Definitions and Syntax
# imhist(M, n) | imhist2(M, n) | hist2d(M, N, n)
# These functions show you the intensity levels in an image, divided into n bins. Histograms shows concentrations of gray levels or colors in an image. They can be used to determine the type of image, or to find an appropriate threshold for filtering or equalization. Two-dimensional histograms show the degree of similarity (in intensity or texture) between two images.
# Arguments
# • M, the image matrix, or M and N, two image matrices of the same size, and
# • n, the number of bins into which the intensities are partitioned
# The one-dimensional histogram functions return a vector, n elements long, containing the number of intensity levels in each bin. For imhist, the n bins are spaced between intensity levels of 0 and 255, and for imhist2 they are spaced in the actual range of intensities in the matrix. The two-dimensional histogram returns an n×n matrix, which contains an entry i,j, the number of pixels in corresponding locations which are in bin i in image M and bin j in image N.
# Function Details | imhist(M, n)
# This function generates a histogram for the elements of M by dividing the intensity range into n bins. A histogram is a vector of n elements, or bins, where each bin contains the number of pixels which have intensity levels in that bin. So, for example, if n = 256, there will be one bin for each possible intensity level in an 8-bit grayscale image. If there are fewer than 256 bins, then the intensity levels are divided into bins in the following way:
bin_label(intensity, n) := floor(intensity/256*n)
# If there are more than 256 bins, the bin sizes are smaller than 1.
# We use a small matrix as an example to see the relationship between values and the appearance of the histogram.
n := 256
P := [30, 150, 200; 40, 150, 0; 120, 150, 240]
H := imhist(P, n)
label := 0 .. rows(H) - 1
bin_label(150, n) = 150
# The only bin which should have more than one count is 150. Try setting n to be a small number, such as 5, to see the difference.
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# Remember that bin labeling begins with 0.
# In an image with a lot of white space, like the test pattern used in several examples of other functions, there is a large spike at the top of the histogram.
M := READ_IMAGE("pattern.bmp")
# [component: inputs M]
H := imhist(M, 256)
k := 0 .. rows(H) - 1
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# The white background in this image shows up as the large spike on the right, along with several other distinct gray tones.
# The function imhist2 may be used to bin data with values outside the range from 0 to 255. As an example, consider the matrix:
M := [15, 0.5, 451, 88; 21.7, 9, 25, 671.35; 195, 0.3, 28, 50; 300, 77, 200, 5]
# We can compute an n-bin histogram by calling:
n := 5
H := imhist2(M, n)
# The endpoints of the n bins are given by
i := 0 .. n
a := min(M)
b := max(M)
bins[i] := a + i*((b - a)/n)
bins = [0.3; 134.51; 268.72; 402.93; 537.14; 671.35]
H = [11; 2; 1; 1; 1]
# Function Details | hist2d(M, N, n)
# This function generates a two-dimensional histogram of two images M and N, creating n bins in each dimension. M and N must be the same size. If the two images have similar numbers of pixels at similar intensities, the output matrix from hist2d has a strong diagonal.
#
# A two-dimensional histogram starts by calculating the one-dimensional histogram for each input image. Like the imhist function, hist2d divides the range 0 to 255 into n bins, so we can use the vectorize operator with the bin_number function we defined above to calculate the bin numbers:
n := 5
P = [30, 150, 200; 40, 150, 0; 120, 150, 240]
Q := [150, 20, 20; 150, 0, 0; 150, 255, 255]
Pbins := vectorize(bin_label(P, n))
Qbins := vectorize(bin_label(Q, n))
Pbins = [0, 2, 3; 0, 2, 0; 2, 2, 4]
Qbins = [2, 0, 0; 2, 0, 0; 2, 4, 4]
# The two-dimensional histogram is an n × n matrix, with a count at column c and row r whenever there is an element of Pbins with bin number c, and the corresponding element of Qbins has count r. For instance, the first elements of Pbins and Qbins are 0 and 2, so they generate one count at column 0 and row 2. We can calculate this by first generating a matrix of zeros and then adding the counts:
i := 0 .. 2
j := 0 .. 2
k := 0 .. (n - 1)
l := 0 .. (n - 1)
hist[k, l] := 0
hist[Qbins[i, j], Pbins[i, j]] := hist[Qbins[i, j], Pbins[i, j]] + 1
# Compare with the output of the built-in function:
H := hist2d(P, Q, n)
hist = [1, 0, 2, 1, 0; 0, 0, 0, 0, 0; 2, 0, 1, 0, 0; 0, 0, 0, 0, 0; 0, 0, 1, 0, 1]
H = [1, 0, 2, 1, 0; 0, 0, 0, 0, 0; 2, 0, 1, 0, 0; 0, 0, 0, 0, 0; 0, 0, 1, 0, 1]
# For a more concrete example, consider the following color image:
test := READRGB("smallwar.gif")
# [component: inputs test]
# Extracting the green and blue components separately allows a comparison of the two color components.
G := extract(test, 2)
B := extract(test, 3)
# Here is the two-dimensional histogram shown as a surface plot and as an image of intensities on a log scale. The strong diagonal in this two-dimensional histogram means that most pixels in corresponding locations had similar intensities. This is not unreasonable in two color components from the same photograph. The diagonal would be less prominent in two images with very different textures.
H := hist2d(G, B, 30)
min(H) = 0
# [component: inputs H]
max(H) = 7383
Hlog := vectorize(log(H + 10^-5))
# [component: inputs Hlog]
# Try zooming in on the image Hlog a couple of times for a better view of the
# histogram.
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