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# INTRODUCTORY MATERIAL
# HLS and HSV Color Systems
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# Function Definitions and Syntax
# rgb_to_hls(RGB) | hls_to_rgb(HLS)
# rgb_to_hsv(RGB) | hsv_to_rgb(HSV)
# This section describes functions related to HLS and HSV image color systems. They take images or color vectors stored in one color representation as input, and return an image or color vector in a different color representation.
# Arguments
# • RGB, HLS, or HSV, an image matrix, in the specified color system, or a length-3 vector in the specified color system
# HLS and HSV Color Representations
# RGB is the most common representation of color in digital image files, partly because the human eye perceives color using red-, green-, and blue-sensitive photoreceptive cones, and partly because it is easy to display on computer monitors (which have red, green, and blue phosphors, roughly corresponding to the cones in the eye). However, there are many other ways to represent color in images.
#
# The HLS and HSV models, for instance, instead of representing colors as superpositions of three primary colors, instead have values for the hue of the color, the degree of saturation, and the intensity. This type of representation was developed to be more intuitive than RGB, though it suffers from some difficulties for image computation, such as a discontinuity in hue value at 360 (since the hue is represented as an angle, see below). However, it may have advantages for some types of image calculations where it is useful to have the hue, saturation, and intensity separate.
# Smith's hue, saturation, value (HSV) model uses the hex-cone shown at right. Saturation is the length of the radial line from white to the pixel color. Value is the height from the apex of the hex-cone. Hue is the angle in degrees measured from the line between white and red. Under HSV, maximum saturation can occur only if value is at its maximum of 1.0 (255 in a 0-255 scale).
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# HSV Hex-Cone
# The hue, lightness, saturation (HLS) model is almost identical to the HSV model except that a double hex-cone is used instead of an inverted hex-cone. Hue and saturation are defined in the same way for both systems. Value and lightness are slightly different. Under HLS, maximum saturation can only occur at a lightness of 0.5 (127 in a 0-255 scale). At higher lightness values, the colors become diluted by white light.
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# HLS Double-Hex Cone
# Note that neither HLS nor HSV has an intensity value that compensates for the relative difference in perceived brightness of red, green, and blue of the human eye, so if you create colors of constant HLS lightness or HSV value, they do not appear equally bright.
# Converting Between RGB and HLS/HSV: Single Colors
# rgb_to_hls(RGB) | hls_to_rgb(HLS)
# rgb_to_hsv(RGB) | hsv_to_rgb(HSV)
# Individual RGB colors can be converted to and from HLS and HSV using the rgb_to_hsv, rgb_to_hls, hsv_to_rgb, and hls_to_rgb functions:
Red := [255; 0; 0]
Green := [0; 255; 0]
Blue := [0; 0; 255]
rgb_to_hsv(Red) = [0; 255; 255]
rgb_to_hls(Red) = [0; 127.5; 255]
rgb_to_hsv(Green) = [120; 255; 255]
rgb_to_hls(Green) = [120; 127.5; 255]
rgb_to_hsv(Blue) = [240; 255; 255]
rgb_to_hls(Blue) = [240; 127.5; 255]
hsv_to_rgb(rgb_to_hsv(Blue)) = [0; 0; 255]
hls_to_rgb(rgb_to_hls(Blue)) = [0; 0; 255]
# Creating Color Maps
# We can also use the hsv_to_rgb function to generate a color map palette to view a grayscale image in false color. For instance, let's generate a 256-color palette where the saturation and value are both 255, and the hue varies from 0 to MAXH, which is globally defined below:
I := 0 .. 255
S[I] := 255
V[I] := 255
H[I] := |I*MAXH/255 - MAXH|
# Augment them together and transpose to make a 3 x 256 array:
HSV := transpose(augment3(H, S, V))
rows(HSV) = 3
cols(HSV) = 256
# Use hsv_to_rgb to create a 3 x 256 RGB matrix of palette entries:
RGB[:, I] := hsv_to_rgb(HSV[:, I])
# Transpose the matrix to make a 256 x 3 matrix, and then put the index column on the left to make the 256 x 4 color map:
x[I] := I
PAL := augment(x, transpose(RGB))
PAL = [
    0, 85, 255, 0;
    1, 87, 255, 0;
    2, 88, 255, 0;
    3, 90, 255, 0;
    4, 92, 255, 0;
    5, 93, 255, 0;
    6, 95, 255, 0;
    7, 97, 255, 0;
    8, 98, 255, 0;
    9, 100, 255, 0
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]
# Now we can use this palette to view an image in false color, and experiment with different values of MAXH to see the effect on the image.
graybridge := READ_IMAGE("bridge.bmp")
palbridge := gray_to_rgb(graybridge, PAL)
# [component: inputs palbridge]
MAXH ≡ 100
# Viewing HLS and HSV Images
# HLS and HSV images can be viewed in a picture region by setting the input type to HLS or HSV. Let's generate an HSV image from three separate submatrices, and view it.
size := 200
# Range variables:
i := 0 .. size
j := 0 .. size
r[i] := (i - size/2)
# Image matrix:
Smat[i, j] := sqrt(r[i]^2 + r[j]^2)
Smat := scale(threshold(Smat, -100), 0, 255)
Hmat[i, j] := angle(i - size/2 + .00001, j - size/2)/deg
Hmat := rotate90(Hmat)
Vmat[i, j] := 255
wheel := augment3(Hmat, Smat, Vmat)
# Here's the image we've created. Note that although the intensity value is constant for the whole image, not all parts appear equally bright to the eye, as mentioned above. You can see that the picture region below is set to view HSV images by right-clicking it and choosing Properties.
# [component: inputs wheel]
# Converting Between RGB and HLS/HSV: Entire Images
# rgb_to_hls(RGB) | hls_to_rgb(HLS)
# rgb_to_hsv(RGB) | hsv_to_rgb(HSV)
# RGB images can be converted to and from HLS and HSV using the functions above. As an example, we can read in an RGB photo and convert it to HLS and HSV:
rgbimg := READRGB("strike.tif")
hlsimg := rgb_to_hls(rgbimg)
hsvimg := rgb_to_hsv(rgbimg)
rgbimg2 := hls_to_rgb(hlsimg)
rgbimg3 := hsv_to_rgb(hsvimg)
# You can change the image type and image input matrix here to verify that all the images above are the same.
# [component: inputs hsvimg]
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