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# IMAGE FILTERING AND RESTORATION
# Homomorphic Filtering
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# Homomorphic filtering is an image crisping technique. Using the Fourier transform of the log of an image, it's possible to identify the frequencies that correspond to resolution or image crispness. Homomorphic filtering enhances the signal in those frequencies, then restores the image through the inverse transform.
#
# Taking the log of an image has the following result on the frequency content: lower frequencies correspond to illumination, while higher frequencies represent the reflectance of objects in the scene. Since reflectance typically changes sharply at the edges of objects or features in an image, filtering with a high-pass filter should lower the dynamic range but increase contrast. The result should be a darker, but clearer, image.
A := READ_IMAGE("hamlet.bmp")
# [component: inputs A]
# The frequency mask for highpass filtering scales with a cosine curve from value a at low frequencies to value b at high frequencies. To speed up recomputation, the "basic" mask runs from 0 to 2. It is rescaled from a to b. The values of a and b are set with global definitions near the end of the document, so you can change them on the same screen with the filtered image.
# Build the upper left corner of the mask, based on the dimensions of the image:
nmax := rows(A)/2
mmax := cols(A)/2
n := 0 .. nmax
m := 0 .. mmax
f(x) := 1 - cos(π*x)
M[n, m] := f(sqrt(n^2 + m^2)/(128*sqrt(2)))
M := (a + (b - a)*M)
# Take a look at the high-pass filter:
# [component: inputs scale(M, 0, 255)]
# It's necessary to increase the value of any image pixels of value 0, so the log function doesn't encounter a 0.
g(x) := if(x == 0, 1, x)
# Now, transform the log of the image, multiply by the mask M, and take the inverse transform.
f(x) := ln(g(x))
A := funmap(A, f)
C := matconv(A, M)
# Exponentiate and scale to get the filtered image.
f(x) := exp(x)
C := scale(funmap(C, f), 0, 255)
# [component: inputs C]
# Notice that the filtered image looks more subdued in dynamic range, but the details are sharper. Examine the effects of the degree of filtering of the low (luminance) and high (crispness) frequencies by changing the values of a and b below.
a ≡ 0.6
b ≡ 1.4
# For more on this technique, see Gonzalez and Wintz, Digital Image Processing (Addison-Wesley, 1977).
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