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# IMAGE ENHANCEMENT
# Correcting a CCD Image
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# Contributed by:
# Dr. Martin Zombeck
# Smithsonian Astrophysical Observatory
# Cambridge, Massachusetts
# Introduction
# Computer processing of astronomical images was, until recently, the sole province of professional astronomers working at universities and institutions with mainframe computers or powerful workstations. The advent of fast and relatively inexpensive PCs and interactive image-processing software has brought the powerful tool of digital image processing into the hands of amateur astronomers. The coincidental development of the CCD or solid-state TV camera has also placed into the hands of the amateur the means for directly making digitized images of celestial objects. Since the sensitivity of CCDs is about 100 times that of photographic film, the amateur's telescope of moderate aperture outfitted with a CCD camera (for under $1000) becomes a source of useful astronomical data.
# We demonstrate what can be done to enhance an astronomical image using a picture of Jupiter taken when the fragments of the comet Shoemaker-Levy were plunging toward the planet. (Sorry, this image was not taken by an amateur. It was taken by NASA's Hubble Space Telescope [HST] on May 18, 1994! It's such a beautiful image that we couldn't avoid using it. We have taken the liberty of adding imperfections to the image provided by NASA to produce a pseudo-"raw" image similar to that which one might obtain with a run-of-the-mill CCD.)
# CCDs are not perfect imaging detectors and substantial imperfections are present in the initial "raw" images. These imperfections must be removed before one can obtain a faithful record of the imaged object. These imperfections consist, among others, of geometric defects in the "chip," electronic offsets or "bias," thermally induced signals, noise, and pixel-to-pixel variations in sensitivity across the field of view. The latter imperfection is the result of the combined effect of CCD chip sensitivity variations and the optical system of the telescope.
#
# To remove these effects, one usually makes a "dark frame" (an exposure with the telescope cap on for the same duration as the observational exposure) and a "flat-field frame" (an exposure taken with the telescope pointed at a uniformly illuminated object, for example, a screen painted white). Subtracting the dark frame from the raw image removes the electronic and thermal offsets. Dividing the raw image by the flat-field frame removes the effects of variations in sensitivity. The raw image is now calibrated and is ready for further processing steps to remove the effects of random noise and extract specific information or emphasize specific features in the image. In professional applications, several more "reduction" steps beyond those described above are taken. The bibliography at the end of this document contains several references that discuss these steps in technical detail.
# Display the Raw Image
# Read in the raw image:
R := READ_IMAGE("rawimage.bmp")
# Determine the number of rows and columns in the image and the minimum and maximum pixel values:
rows(R) = 256
cols(R) = 178
min(R) = 0
max(R) = 237
# [component: inputs R]
# The black dot in the first quadrant of the image is the shadow of one of Jupiter's moons, the inner moon Io. Io is barely visible in the image, slightly up and to the right of its shadow, approximately 1/6 the diameter of Jupiter away from the shadow.
# We have purposely degraded the image received from NASA by introducing imperfections to mimic what a home astronomer might be able to achieve. One can clearly see "smudges" and a diagonal line running across the right hemisphere. Also, the image as received from NASA had some "pepper" noise introduced in the reproduction process at several locations in the image.
# Calibration of the Image
# The next image is a flat-field frame of the simulated response of the camera. Warning: This is not the response of the CCD camera on board the HST. It is an example of what one might obtain with a commercial CCD camera.
# Read in the flat-field frame:
Flat := READ_IMAGE("flat.bmp")
# [component: inputs Flat]
# The flat-field image shows some ugly features. The diagonal stripe of bad pixels is probably due to a cleavage plane in the silicon used to manufacture the chip. The dark lines and columns are due to defects in the CCD that prevent the transfer of electrical charge in the device. The large-scale nonuniformities are due to nonuniformities in the optical system. The "doughnuts" are due to dust particles on an optical element near the focal plane.
# To gauge the magnitude of the irregularities in the flat-field image, it is useful to make a few profiles, cross-sections, or "slices" of the image. We will make three cuts along three rows:
n := cols(Flat) - 1
n = 177  # The maximum column index in the image array
j := 0 .. n
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# One profile shows peak-to-peak variations as large as 50%. In general the variations are about 10%.
# To use the flat-field image to correct the raw image, it must first be normalized, that is, the average value of all pixels in the image is calculated and a new image is created by dividing each pixel by the average:
# the maximum row index in the image array
m := rows(Flat) - 1
m = 255
# the maximum column index in the image array
n := cols(Flat) - 1
n = 177
pixelavg := sum(sum(Flat[i, j], j = 0 .. n), i = 0 .. m)/(m*n)
pixelavg = 162.714
F := Flat/pixelavg
# To correct the raw image, divide it by the normalized flat field:
i := 0 .. m
j := 0 .. n
J[i, j] := R[i, j]/F[i, j]
J := scale(J, 0, 255)  # ...rescale the image
# and view it:
# [component: inputs J]
# All the "imperfections" have now been removed. It is easier to see the image of Io. We still have to remove the noise.
# Noise Removal, or Spatial Filtering
# Spatial filters incorporate neighborhood operations on pixels. A new value for a pixel is calculated from the value of the pixel and that of its nearest neighbors. The two most widely used filters are the mean and median filter. The mean filter performs a neighborhood average. This filter blurs edges and other details. The median filter replaces a pixel value with the median of the pixel value and that of the neighboring pixel values. This filter is especially useful when the noise is "spiky" ("salt-and-pepper" or "shot" noise) and the sharpness of edges needs to be preserved. Here we use the median filter because of the nature of the noise in the image, and view the median-filtered image:
Filt := medfilt(J)
# [component: inputs Filt]
# The median filter has, unfortunately, managed to remove Io and made the comet fragments very faint. For further image processing it will be better to use the unfiltered image. This is always a judgment call. The interactive nature of this software package makes it relatively easy to try different solutions, and we suggest you experiment with both the filtered and unfiltered image here.
# Image Enhancement
# The preceding sections dealt with the restoration of the image or the recovery from defects. During the restoration, a feature was removed from the image. Image enhancement deals with increasing the visibility of a feature or features in the image, usually at the expense of others.
# Image enhancement usually starts with a quantitative examination of the image. A very useful tool for this is the generation of an image histogram.
H := imhist(J, 256)
k := 0 .. rows(H) - 1
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# The histogram is fairly uniform, so it is not useful to use the technique of histogram equalization (a special scaling of the gray levels that generates a flat image histogram).
# A useful image statistic is the minimum and maximum pixel values:
min(J) = 0
max(J) = 255
# Knowledge of the minimum and maximum values can be useful when you want to use the full range of pixel values available (0 to 255). This scaling operation is known as stretching.
# We will now exercise some useful enhancement techniques to better distinguish the features of this image.
# Image Inversion
# The conversion of a "positive" image into a "negative" image often brings out faint details.
IJ := invert(J)
# [component: inputs IJ]
# The comet fragments' tails are now very easy to see and the faint fragments nearest Jupiter's surface are now clearly visible. Fourteen fragments are visible! The shadow of Io is very apparent and the image of Io is now a dark spot.
# Image Scaling
# As shown in the section Function and Level Mapping, adjusting the shape of the intensity curve can improve feature visibility in an image, either because of the response of a particular electronic viewing system or because of the response of your eye. Here we use a logarithmic transformation on our image:
f(x) := (255/log(255))*if(x == 0, 0, log(x))
L := Re(funmap(J, f))
# [component: inputs L]
# Now additional comet fragments can be seen in the image.
# Convolution Edge Finder
# We can isolate certain features (discontinuities) in the image using edge detection. This is called image segmentation. Applying the Sobel gradient operator to the image gives
Sob := sobel(J)
# [component: inputs Sob]
# The shadow of Io and the comet segments are now very clearly delineated. Note that as usual, we view edge images in reverse video.
# Bibliography
# Berry, Richard, "Image Processing in Astronomy," Sky and Telescope, April 1994.
# Buil, C., CCD Astronomy, Willman-Bell, 1991.
# In Astronomical CCD Observing and Reduction Techniques, ASP Conference Series, Vol. 23, 1992, Steve B. Howell, ed.
# Hanisch, R. J., "Image Processing, Data Analysis Software, and Computer Systems for CCD Data Reduction and Analysis."
# Gilliland, R. L., "Details of Noise Sources and Reduction Processes."
# Massey, P., and G. H. Jacoby, "CCD Data: The Good, the Bad, and the Ugly."
# Image Credits
# H. A. Weaver, T. E. Smith (Space Telescope Science Institute)
# J. T. Trauger, R.W. Evans (Jet Propulsion Laboratory) NASA
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