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# EDGE FINDERS
# Laplacian (Differential) Edge Finders
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# Function Definitions and Syntax
# laplace4(M) | laplace8(M) | laplace24(M)
# These functions perform edge detection by convolution of a Laplacian kernel with an image matrix, M. The numbers in the function name indicate the size and elements in the kernel. Laplacian edge detection is frequently used to detect zero crossings for further edge-finding operations.
# Arguments
# • M, the image matrix
# The functions return a matrix containing the image edges. The outside edge of the image is discarded, since the kernel does not overlap completely in these areas.
# Function Details | laplace4(M)
# Laplacian edge finders are based on Laplace's equation: they find second derivative information about the intensity changes in an image through a difference equation. The difference between the center pixel and every surrounding pixel is averaged. At the edges of image features this differential is large, and elsewhere it is small, leaving highlights only in the areas where sharp differentials, or edges, occur.
# The kernel for this function is
K := 1/4*[0, -1, 0; -1, 4, -1; 0, -1, 0]
R := READ_IMAGE("fingerp.gif")
L4 := equalize(scale(laplace4(R), 0, 255))
# [component: inputs R]
# [component: inputs L4]
# The difference between this kernel and the one used for crisping (see Crisping) is that only the differences are retained here. In the crisping function the original value of the pixel is also retained, since the center of the orthocrisp kernel is a 5, not a 4.
# laplace8(M)
# The kernel used here is
K := 1/8*[-1, -1, -1; -1, 8, -1; -1, -1, -1]
L8 := equalize(scale(laplace8(R), 0, 255))
# [component: inputs L8]
# laplace24(M)
# In this case the kernel is the 5×5 matrix
K := 1/24*[-1, -1, -1, -1, -1; -1, -1, -1, -1, -1; -1, -1, 24, -1, -1; -1, -1, -1, -1, -1; -1, -1, -1, -1, -1]
L24 := equalize(scale(laplace24(R), 0, 255))
# The correct choice of kernel depends on the picture. Experimentation is usually the best way to determine which edge finder is the best for a particular application.
# [component: inputs L24]
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