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# COMBINATIONS OF IMAGES
# Error and Noise Measurement
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# Function Definition and Syntax
# relerror(M, Q) | immse(M, Q) | imsnr(M, Q)
# These functions calculate the relative error (squared error ratio), the mean squared error, and the signal-to-noise ratio between two images. They can be used to determine the level of noise which affects an image after it is transmitted or processed. Examples are shown below.
# Arguments
# • M, the first image matrix
# • Q, the second image matrix, the same size as the first
# The functions return a number which represents the relative error, the mean squared error, or the signal-to-noise ratio (SNR) between M and Q. In the case of SNR, the returned value are in decibels (dB).
# Function Details | relerror(M, Q)
# This function returns the squared error ratio over all elements of the two matrices M and Q. The squared error ratio is as follows:
RE(A, B) := (A - B)^2/A^2
RE(3, 5) = 0.444444
# Over two matrices, this function can be defined as:
i := 0 .. 5
j := 0 .. 4
M[i, j] := 2
N := addnoise(M, .1, 100)
ratio := sum(sum((M[i, j] - N[i, j])^2, j), i)/sum(sum(M[i, j]^2, j), i)
ratio = 166.767
err := relerror(M, N)
err = 166.767
# To see the effect of this function, read in an image.
R := READ_IMAGE("pattern.bmp")
# Add some random noise to this image.
Q := addnoise(R, .05, 128)
# Try different manipulations on the image, R, or adding more noise, to see what the error between the original image and the processed one is. You could try inverting or rotating the original matrix, for example.
err := relerror(R, Q)
err = 0.0106074
# Function Details | immse(M, Q)
# Returns the mean squared error between images M and Q. For example, let's say we want to determine the error introduced into an image if we quantize it with fewer levels.
# Read the image and re-quantize it to 12 levels:
M := READ_IMAGE("mona.bmp")
Q := imquant(M, 12)
# [component: inputs M]
# [component: inputs Q]
# The mean squared error (MSE) is defined as follows:
I := 180
J := 216  # Dimensions of images
i := 0 .. (I - 1)
j := 0 .. (J - 1)
MSE := sum(sum((M[i, j] - Q[i, j])^2, j), i)/(I*J)
MSE = 43.6933
# Calculating the MSE with the built-in function we obtain the same result:
MSE2 := immse(M, Q)
MSE2 = 43.6933
# Function Details | imsnr(M, Q)
# This function calculates the signal-to-noise ratio of an image in decibels (dB). For example, consider the same image of the Mona Lisa as above. Let's assume that we want to transmit the image over a communication channel, and that at the receiver we observe the same image, but corrupted by some noise due to interference. We can model the noisy image as follows:
Q := addnoise(M, 0.3, 150)
# [component: inputs Q]
# The signal-to-noise ratio (SNR) is defined as the ratio of the average power in the original image to the average power of the noise. The noise is obtained by subtracting the original image from the noisy image. All these operations are carried out by the following function:
SNR := imsnr(M, Q)
SNR = 6.41691
# Try changing the amount of noise in the noisy image.
# Note: If you try to calculate the SNR and the noise power is zero, then the SNR is infinite. For example, if you provide two identical images as the original and noisy images, then you get an error:
SNR0 := imsnr(M, M)  # error: infinite signal to noise ratio
SNR0 =  # error: bad_variable
# Peak Signal-to-Noise Ratio
# Another commonly used measure of image quality is peak signal-to-noise ratio (PSNR). This measure can be easily computed using the mean squared error (MSE) computed by the immse function. PSNR is defined as follows:
PSNR(M, Q, A) := 10*log(A^2/immse(M, Q))
# where A is the maximum possible value of input image. For example, for an 8-bit image A = 255 should be used to computer the PSNR. For a 12-bit image, A = 4095 should be used to compute the PSNR.
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