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# VISION AND SEGMENTATION
# Machine Vision: Locating Holes
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# Machine vision is the application of image processing techniques to allow a computer to interpret visual information and act upon it the way a human would. In this example, we explore machine vision by locating the holes in a machine part. This could be a first step to using a robot arm to put bolts in the holes, and is typical of the types of tasks involved in machine vision. For another, very different type of example, see Machine Quality Control of Corn.
# A first step is to binarize the image of a machine part, and use morphological closing to remove spurious features.
part := READ_IMAGE("part.gif")
binpart := binarize_auto(part)
se := [1, 1, 1; 1, 1, 1; 1, 1, 1]
cleanpart := close(binpart, se, 1)
# [component: inputs part]
# [component: inputs cleanpart*255]
# Next, connected component labeling is used to identify the features in the image. Foreground pixels are labeled with value 1 to verify that there is only one part present, but the background pixels of value 0 are of real interest, since these represent the holes in the part.
clabfg := concomp(cleanpart, 8, 1)
max(clabfg) = 1
clabbg := concomp(cleanpart, 8, 0)
num_holes := max(clabbg) - 1
num_holes = 3
# Let's take a look at the components in false color:
colormap := [0, 0, 0, 0; 1, 128, 128, 128; 2, 255, 0, 0; 3, 0, 255, 0; 4, 0, 0, 255]
color_clab := gray_to_rgb(clabbg, colormap)
# [component: inputs color_clab]
# Finally, we can use the shape feature function to find the X and Y coordinates of the centroids of the holes:
fea := shape_features(clabbg)
i := 0 .. 1
hole1[i] := fea[2, i]
transpose(hole1) = [158.708, 103.338]
hole2[i] := fea[3, i]
transpose(hole2) = [199.069, 129.431]
hole3[i] := fea[4, i]
transpose(hole3) = [159.356, 156.667]
# A machine receiving this breakdown of the image information would not only know the number, but also the exact location of the centers of the holes in this part. It could subsequently manipulate the part based on the hole location, insert other parts into the holes, and so on. This type of analysis would be particularly useful, for example, if many of the same part were moving down a conveyor belt, all with different orientations, and all requiring the addition of a new part in one or more of the holes.
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