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# IMAGE MANIPULATION
# Function and Level Mapping
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# Function Definitions and Syntax
# funmap(M, f) | levelmap(M, vec)
# These functions map a function of intensity, or a vector of new intensity levels, onto an existing image. Function and level maps specify a uniform transformation on intensity levels in an image or image transform. They can also be used like equalization, to optimize the display of an image.
# Arguments
# • M, the image matrix
# • f, the function to perform at each entry, or vec, a vector of 256 levels used to map the original intensities.
# Each function returns an image matrix which contains the specified intensity transformation.
# Function Details | funmap(M, f)
# Replaces M_ij by f(M_ij).
# Construct a test matrix:
i := 0 .. 3
j := 0 .. 4
M[i, j] := i*j*6
M = [0, 0, 0, 0, 0; 0, 6, 12, 18, 24; 0, 12, 24, 36, 48; 0, 18, 36, 54, 72]
# Now define a function in Mathcad.
f(x) := x^2
# The function map performs this function on every element of the matrix.
funmap(M, f) = [0, 0, 0, 0, 0; 0, 36, 144, 324, 576; 0, 144, 576, 1296, 2304; 0, 324, 1296, 2916, 5184]
# Note that this function performs the same task as using Mathcad's vectorize operator:
vectorize(f(M)) = [0, 0, 0, 0, 0; 0, 36, 144, 324, 576; 0, 144, 576, 1296, 2304; 0, 324, 1296, 2916, 5184]
# The vectorize operator used here is available by typing [Ctrl][-].
# Now try the same function on an image:
R := READ_IMAGE("arcs.bmp")
# Change the function to see different maps. Try some of those listed below the definition.
f(x) := 255*x^2/(x^2 + 160)
255*e^(-(x - 159)^2/10)
255*cos(π*x/160)
255*sin(π*x/160)
fmap := Re(funmap(R, f))
# [component: inputs R]
# [component: inputs fmap]
# Function Details | levelmap(M, vec)
# This function replaces the intensities in the image M by the intensity levels given by a vector, vec. For example, the 100th element in vec gives the new level for pixels with intensity 100. The entries of M must be between 0 and the length of vec minus 1. So, for example, if we wish to compensate an image with a squared intensity scale, we'd create the vector
r := 0 .. 255
vec[r] := 255*log(r/255*9 + 1)
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# Here are some other typical intensity compensation scales for better screen and printing resolution:
255*sqrt(r/255)
255*(r/255)^2
255*10^((r - 255)/200)
# A particular function map or lookup table might be provided with a monitor or sensor, which maps irregularities caused by the display to their correct values.
# Recall that
M = [0, 0, 0, 0, 0; 0, 6, 12, 18, 24; 0, 12, 24, 36, 48; 0, 18, 36, 54, 72]
# So that
levelmap(M, vec) = [
    0, 0, 0, 0, 0;
    0, 21.2717, 39.1084, 54.4669, 67.9526;
    0, 39.1084, 67.9526, 90.8153, 109.756;
    0, 54.4669, 90.8153, 118.136, 140.033
]
# See the effect this has on our test image.
level := levelmap(R, vec)
# [component: inputs level]
# Try changing the mapping vector to one of the other suggested functions. Does it do what you expect? In some sense, this is the same as funmap, if you structure the mapping vector correctly.
# For another example of a function which maps levels in an image, see Equalization. This function maps levels so that the cumulative histogram is linear.
# Choosing and creating level maps is an important science for many applications. For a few examples of what can be accomplished, see Mapping Image Intensities.
# A function map might be considered a kind of lookup table which can be generated based on knowledge of the way an image was formed, and can correct for variations across an image. See the example Removing Scanner Stripes.
# Note that levelmap does not use the built-in variable ORIGIN, which specifies the starting index of an array for other functions.
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