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# CONVOLUTION AND FILTERING
# Median and Quantile Filtering
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# Function Definitions and Syntax
# medfilt(M) | getnoise(M) | quantfilt(M, elem, quantile)
# The first two functions find the median intensity (0.5 quantile) of each element in an image and its eight nearest neighbors (3 × 3 square kernel). medfilt returns the filtered image, while getnoise returns the difference between the original and filtered image. The quantfilt function allows a user-defined kernel and quantile instead of the median. In addition to removing noise, median filtering also tends to remove sharp, small features from a picture.
# Arguments
# • M, an image matrix
# • elem, a kernel matrix
# • quantile, an intensity percentage between 0 and 1
# The functions return an image matrix which contains the specified intensity transformation.
# Median filtering is a good way to filter random salt-and-pepper noise, for example, because it does not change the intensity levels in the image; it only uses available levels. If local differences between intensities are not too great, it will not shift the edges of the image significantly. It may also be useful, for the purposes of analysis, to know the noise, the difference between the original and filtered image.
# Function Details
# medfilt(M)
# Replaces each element of M with the median of the element and its 8 neighbors which is approximately the highest valued pixel minus the lowest valued divided by two. On the edges of the image, each element is replaced by the median of the element and the number of pixels that it touches. This is a good method for smoothing while maintaining edges, as well as for noise reduction. The function takes longer on large images because it performs a sort at each pixel.
# Let's look at an image whose quality has been degraded by the addition of some random noise.
M := READ_IMAGE("fruit.bmp")
noisy := addnoise(M, .1, 200)
# [component: inputs M]
# [component: inputs noisy]
# Then filter the image with medfilt.
F := medfilt(noisy)
# [component: inputs F]
# getnoise(M)
# Subtracts the original version of M from its median filtered version.
Noise := getnoise(noisy)
# [component: inputs Noise]
# Notice that this function is the same as the expression
Noise := F - noisy
# It may also be useful to view the absolute difference between the two images:
Anoise := vectorize(|noisy - F|)
# [component: inputs Anoise]
# quantfilt(M, elem, quantile)
# In some cases, the median filter with square 3 × 3 kernel may not be general enough to do the correct filtering. For instance, if an image with many sharp corners is filtered in this way, corner pixels are often removed. This effect can be avoided by using the quantfilt function with a plus-shaped median filtering kernel rather than the uniform 3 × 3 kernel specified above.
# As an example, consider the usual pattern and add some noise to it:
P := READ_IMAGE("pattern.bmp")
noisy2 := addnoise(P, .1, 200)
# [component: inputs P]
# [component: inputs noisy2]
# We filter it with two different kernels using the quantfilt function: a 3 × 3 square kernel, and a cross-shaped kernel. In both cases, we use the 0.5 quantile to use the median value.
square3 := [1, 1, 1; 1, 1, 1; 1, 1, 1]
cross3 := [0, 1, 0; 1, 1, 1; 0, 1, 0]
Psquare := quantfilt(noisy2, square3, 0.5)
# Note that this is the same as using the medfilt function.
Pcross := quantfilt(noisy2, cross3, 0.5)
# [component: inputs Psquare]
# [component: inputs Pcross]
# The square kernel degrades the square edges, lines, and corners much more than the cross-shaped kernel.
# Another application of the quantfilt function is to choose quantiles other than the median (0.5) value, which changes the overall intensity of the image. For instance, if we choose the 0.0 quantile, we take the minimum value of the pixel and its neighbors; the 1.0 quantile gives the maximum value. (These are somewhat similar to gray-scale morphological erosion and dilation; see the section on grayscale morphology for more information.)
# Let's try a couple of examples, filtering the original pattern (without noise).
# Cause darker regions to dilate and lighter regions to erode by choosing 0.0:
Pdark := quantfilt(P, cross3, 0.0)
# Cause lighter regions to dilate and darker regions to erode by choosing 1.0:
Plight := quantfilt(P, cross3, 1.0)
# [component: inputs P]
# [component: inputs Pdark]
# [component: inputs Plight]
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