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# FEATURE EXTRACTION
# Moment Invariants
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# Function Definition and Syntax
# moment_invariant(M)
# This function computes seven invariant spatial moments for an image M. Invariant moments are features of an image that are unchanged under translation, rotation, and scaling of the image. These moments are very useful in pattern-recognition problems, such as optical character recognition (OCR).
# Arguments
# •  M, an image matrix
# The function returns a 1-by-7 column vector of invariant moments. In this function we calculate the seven typical invariant moments (up to the third order) developed by Hu in 1962.
# Function Details | moment_invariant(M)
# This function computes the seven typical invariant spatial moments defined by Hu in 1962. These moment features are invariant under translation, rotation, and scaling of the input image and are combinations of normalized spatial moments up to the third order. The normalized spatial moments, which are invariant under translation and scaling of the input image, are defined as follows:
η[p, q] := μ[p, q]/μ[0, 0]^γ  # disabled
γ := (p + q + 2)/2  # disabled
# where p and q are the orders of the normalized moment in the horizontal and vertical directions, and μ[p, q] is the spatial central moment of order (p,q).
# The central moment is defined as:
μ[p, q] := sum(sum((j - c[j])^p*(i - c[i])^q*M[i, j], j = 0 .. ncol - 1), i = 0 .. nrow - 1)  # disabled
# where nrow and ncol are the number of rows and columns of the
# input image M, and (c[j],c[i]) is the center of mass of the image.
# Next we describe some examples of the use of these invariant moments.
# Let's first generate a simple image, M.
i := 0 .. 29
j := 0 .. 39
M[i, j] := i*40 + j
# [component: inputs M]
# Calculate the moments up to the second order:
nrow := rows(M)
ncol := cols(M)
# Compute the center of mass of the image:
mnc := sum(sum(j*M[i, j], j = 0 .. ncol - 1), i = 0 .. nrow - 1)/sum(sum(M[i, j], j = 0 .. ncol - 1), i = 0 .. nrow - 1)
mnr := sum(sum(i*M[i, j], j = 0 .. ncol - 1), i = 0 .. nrow - 1)/sum(sum(M[i, j], j = 0 .. ncol - 1), i = 0 .. nrow - 1)
# Compute the central moments up to the third order:
p := 0 .. 3
q := 0 .. 3
μ[p, q] := sum(sum((j - mnc)^p*(i - mnr)^q*M[i, j], j = 0 .. ncol - 1), i = 0 .. nrow - 1)
# The normalized moments are computed as:
η[p, q] := μ[p, q]/μ[0, 0]^((p + q + 2)/2)
# and the first moment invariant is calculated as:
φ1 := η[2, 0] + η[0, 2]
φ1 = 0.000254561
# Now we call the moment_invariant function and compare the result:
P := moment_invariant(M)
|P[0, 0] - φ1| = 2.71051e-19
# We see that the first moment invariant exactly matches the definition.
# Now let's use another image.
M := READ_IMAGE("flower.bmp")
# Perform three types of geometric transforms on the image - translation, rotation, and scaling - and show that the invariant moments are unchanged.
M1 := translate(M, -10, -5, 0)
M2 := zoom(M, 0.8, 0.8)
M3 := rotate(M, 45)
# [component: inputs M]
# [component: inputs M1]
# [component: inputs M2]
# [component: inputs M3]
Φ := moment_invariant(M)
Φ1 := moment_invariant(M1)
Φ2 := moment_invariant(M2)
Φ3 := moment_invariant(M3)
Φ = [0.00181407, 1.30754e-6, 1.21126e-9, 4.60925e-10, 0, 2.99235e-13, 0]
Φ1 = [0.00181407, 1.30754e-6, 1.21126e-9, 4.60925e-10, 0, 2.99235e-13, 0]
Φ2 = [0.00181496, 1.30711e-6, 1.21275e-9, 4.62005e-10, 0, 2.99854e-13, 0]
Φ3 = [0.00182157, 1.36068e-6, 1.22758e-9, 4.63337e-10, 0, 3.27921e-13, 0]
# The above results are in reasonable agreement with the invariants computed from the original image. The small errors are due to zero-padding and pixel interpolation that take place in the
# transformations.
# In the next step, we combine all these three transformations together
# and compare the moment invariants to the original ones:
M1 := rotate(M, -60)
M2 := zoom(M1, 0.75, 0.75)
M3 := translate(M2, -10, 10, 0)
# Here is the final image:
# [component: inputs M3]
Φ := moment_invariant(M)
Φ1 := moment_invariant(M1)
Φ2 := moment_invariant(M2)
Φ3 := moment_invariant(M3)
Φ = [0.00181407, 1.30754e-6, 1.21126e-9, 4.60925e-10, 0, 2.99235e-13, 0]
Φ1 = [0.00181486, 1.31092e-6, 1.21608e-9, 4.6371e-10, 0, 2.97579e-13, 0]
Φ2 = [0.00181605, 1.31111e-6, 1.21633e-9, 4.63792e-10, 0, 2.97606e-13, 0]
Φ3 = [0.00181605, 1.31111e-6, 1.21633e-9, 4.63792e-10, 0, 2.97606e-13, 0]
# The above results are also in reasonable agreement with the invariants
# computed from the original image.
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