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# EDGE FINDERS
# Convolution and Comparison Edge Finders
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# Function Definitions and Syntax
# kirsch(M) | robinson3(M)
# compgrad(M) | robinson5(M)
# These functions detect edges in image M by convolving eight kernels in sequence over the matrix and then comparing the results. Comparison edge detection is used to enhance image readability for certain types of features that depend on boundaries and directions of boundary gradients.
# Arguments
# • M, an image matrix
# The functions return a matrix containing the maximum among the eight convolutions at each pixel. The perimeter of the image is untreated, since the kernels do not fully overlap there. These edge finders take a little longer to calculate than those described in the Convolution Edge Finders, since they have to make eight convolutions per pixel.
# Function Details
# These edge finders convolve M with eight different kernels and compare the results of these eight convolutions. The final assigned value at each pixel has the maximum absolute value of each of the convolved results. This makes these edge finders sensitive not only to large differentials, but also to the direction of the differential.
# kirsch(M)
# The kirsch edge finder uses the following eight kernels:
1/15*[5, -3, -3; 5, 0, -3; 5, -3, -3]
1/15*[5, 5, -3; 5, 0, -3; -3, -3, -3]
1/15*[5, 5, 5; -3, 0, -3; -3, -3, -3]
1/15*[-3, 5, 5; -3, 0, 5; -3, -3, -3]
1/15*[-3, -3, 5; -3, 0, 5; -3, -3, 5]
1/15*[-3, -3, -3; -3, 0, 5; -3, 5, 5]
1/15*[-3, -3, -3; -3, 0, -3; 5, 5, 5]
1/15*[-3, -3, -3; 5, 0, -3; 5, 5, -3]
M := READ_IMAGE("lena.bmp")
M := submatrix(M, 30, 220, 50, 200)
Mkir := equalize(kirsch(M))
# [component: inputs M]
# [component: inputs Mkir]
# robinson3(M)
# This edge finder uses the following eight kernels:
1/3*[1, 0, -1; 1, 0, -1; 1, 0, -1]
1/3*[1, 1, 0; 1, 0, -1; 0, -1, -1]
1/3*[1, 1, 1; 0, 0, 0; -1, -1, -1]
1/3*[0, 1, 1; -1, 0, 1; -1, -1, 0]
1/3*[-1, 0, 1; -1, 0, 1; -1, 0, 1]
1/3*[-1, -1, 0; -1, 0, 1; 0, 1, 1]
1/3*[-1, -1, -1; 0, 0, 0; 1, 1, 1]
1/3*[0, -1, -1; 1, 0, -1; 1, 1, 0]
Mrob3 := equalize(robinson3(M))
# [component: inputs Mrob3]
# robinson5(M)
# This edge finder uses the following eight kernels:
1/4*[1, 0, -1; 2, 0, -2; 1, 0, -1]
1/4*[2, 1, 0; 1, 0, -1; 0, -1, -2]
1/4*[1, 2, 1; 0, 0, 0; -1, -2, -1]
1/4*[0, 1, 2; -1, 0, 1; -2, -1, 0]
1/4*[-1, 0, 1; -2, 0, 2; -1, 0, 1]
1/4*[-2, -1, 0; -1, 0, 1; 0, 1, 2]
1/4*[-1, -2, -1; 0, 0, 0; 1, 2, 1]
1/4*[0, -1, -2; 1, 0, -1; 2, 1, 0]
Mrob5 := equalize(robinson5(M))
# [component: inputs Mrob5]
# compgrad(M)
# The compgrad edge finder uses the following eight kernels:
1/5*[1, 1, -1; 1, -2, -1; 1, 1, -1]
1/5*[1, 1, 1; 1, -2, -1; 1, -1, -1]
1/5*[1, 1, 1; 1, -2, 1; -1, -1, -1]
1/5*[1, 1, 1; -1, -2, 1; -1, -1, 1]
1/5*[-1, 1, 1; -1, -2, 1; -1, 1, 1]
1/5*[-1, -1, 1; -1, -2, 1; 1, 1, 1]
1/5*[-1, -1, -1; 1, -2, 1; 1, 1, 1]
1/5*[1, -1, -1; 1, -2, -1; 1, 1, 1]
Mcomp := equalize(compgrad(M))
# [component: inputs Mcomp]
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