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# IMAGE ENHANCEMENT
# Mapping Image Intensities
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# This document illustrates some techniques for controlling the intensity distribution in a grayscale image. It's possible to distribute intensities according to common formulas, such as with the equalize function, which spreads intensities uniformly. For other applications, it may also be desirable to create a new function to remap image intensities to produce a given-intensity histogram. Several classes of intensity maps are demonstrated, along with the most efficient ways to apply them using the Image Processing Pack.
# We start with the famous "camera" image, shot on the campus of MIT in Cambridge, Mass.
Q := READ_IMAGE("camera.bmp")
# [component: inputs Q]
# Equalizing an Image with a Narrow Range
# The first experiment is to compress all intensity values in an image linearly by a factor of N, centered on 128 and using the floor function to produce an image with just a few midrange gray values.
# Range compression function:
F(x, N) := 128 + (x - 127)/N
# Factor for compression:
N := 32
# The remapped image is C.
C := vectorize(floor(F(Q, N)))
# [component: inputs C]
# Now we display the image histograms, dividing the compressed histogram by 10 to fit the same vertical scale.
hq := imhist(Q, 256)
hc := imhist(C, 256)
k := 0 .. 255
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# The distribution in the original image changes rapidly at low values (the large area of black) and midrange (the gray sky). In the compressed-range image, all values are concentrated in a narrow band in the middle. There are only
256/N = 8
# different values in the image C.
# Now we equalize the all-gray version of the image.
J := equalize(C)
# [component: inputs J]
# The equalized image J is still quantized into only 8 levels, but the range has been expanded and the image is quite legible. We can plot a cumulative histogram as shown in the section Equalization:
hj := imhist(J, 256)
m := 1 .. 255
cj[0] := 0
cj[m] := cj[m - 1] + hj[m]
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# Using Power Functions to Remap Image Intensities
# As a second experiment, we rescale the intensities so that almost all the values are either very low or very high. Some image-processing software allows you to draw the desired intensity mapping with the mouse. In Mathcad we can draw our maps with simple functions. The advantage of this is that our function can include one or more parameters that will give us a whole family of maps for the price of one.
# The map we want looks something like this:
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# To get a map with a variable parameter, a couple of power functions can be glued together; the exponent is the variable parameter. For convenience, the function is defined so that it maps [0, 1] into [0, 1], and then scales appropriately when applied to an image.
f(x, n) := if(x < 1/2, (2*x)^n/2, 1 - (2*(1 - x))^n/2)
# Experiment with this map f by changing n. Using n = 1 gives the identity map (the image is unchanged). Higher powers push the values further toward the high and low ends. What happens when n is a fraction like 1/10?
n := 3
x := 0, .01 .. 1
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# Applying the map to the camera image, scaling down to [0, 1] and then scaling back up yields:
n := 2
q := 0 .. 255
vec[q] := f(q/255, n)*255
map := levelmap(Q, vec)
# [component: inputs map]
# Experiment by changing n; try large integers as well as some fractions. Notice that a value like n = 0.4 brings out detail in the coat that is invisible in the original image. Very small values like .02 produce an image similar to our narrow-band image C. Large values like 20 yield images that resemble a binarized picture.
V2 := 255*binarize(Q, 128)
# [component: inputs V2]
# Piecewise Linear Remapping
# Another useful class of maps expands the grayscale in one particular range. The prototype might look something like this:
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# Here the values around t are stretched and the others are correspondingly compressed. A restriction is imposed on the stretched section: it must be positioned so that the compressed sections have the same slope; this makes the arithmetic a bit more complicated. Here it's easier to work directly with the gray values in the range [0, 255]. We use a range of 10 on either side of t and expand this to 40 on either side. If p is the height of the graph at x = t, the condition of equal slopes is
(255 - (p + 40))/(255 - (t + 10)) == (p - 40)/(t - 10)
# We use Mathcad's symbolic processor to solve for p, which after simplifying yields
p(t) := 35/47*t + 1530/47
# The slope of the flatter segments is
slp := (255 - 81)/(255 - 21)
# The mapping function, g, is:
g(x, t) := if(|x - t| ≤ 10, p(t) + 4*(x - t), if(x < t - 10, slp*x, 255 - slp*(255 - x)))
# Try changing t to numbers between 10 and 245 and see how the mapping function adjusts.
t := 110
x := 0 .. 255
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# Now experiment with expanding the scale in different ranges of the camera image by changing the definition of t below. For example, notice that t = 20 brings out the detail in the coat and glove, while t = 182 stretches the values in the taller building in the background.
t := 20
vec[q] := g(q, t)
expand := levelmap(Q, vec)
# [component: inputs expand]
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