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# IMAGE MANIPULATION
# Addition and Measurement of Noise
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# Function Definition and Syntax
# addnoise(M, p, n)
# This function adds random (salt-and-pepper) noise of a given intensity to an existing image. Noise is added to images to simulate distortion, or to demonstrate the effectiveness of particular types of filters.
# Arguments
# • M, an image matrix
# • p, the probability that noise will be added to or subtracted from a pixel
# • n, the intensity of the noise
# The function returns an image matrix that contains the specified intensity transformation.
# Function Details | addnoise(M, p, n)
# This function adds or subtracts noise of magnitude n (where n is any real number) to each element of M with probability p/2. The noise has equal probability of being added or subtracted (total probability p of either). The function also clips the resulting noisy image from 0 to 255.
i := 0 .. 4
j := 0 .. 4
M[i, j] := 127
N := addnoise(M, .5, 50)
N = [
    177, 127, 127, 127, 177;
    127, 177, 77, 177, 127;
    77, 177, 177, 127, 127;
    127, 127, 127, 127, 127;
    127, 127, 77, 77, 127
]
# Applied to a real image matrix:
M := READ_IMAGE("camera.bmp")
N := addnoise(M, .3, 150)
# [component: inputs M]
# [component: inputs N]
# To see the effect of the noise mathematically, look at the difference between the histograms of the two images:
H1 := imhist(M, 256)
H2 := imhist(N, 256)
k := 0 .. rows(H1) - 1
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# You can see the large spikes of difference at 0 and 255 resulting from the clipping performed by the addnoise function.
# We could also look at the correlation between the noisy and the original image. The images are still highly correlated in their intensity levels. Try changing the values of p and n to see how the two-dimensional histogram is affected.
p := 0.3
n := 150
N := addnoise(M, p, n)
corr := hist2d(M, N, 30)
# [component: inputs corr]
# You can generate other types of noise in Mathcad using the functions at your disposal. For example, to generate Gaussian noise use the following:
gnoise(A, σ) := A + σ*sqrt(-2*ln(rnd(1)))*cos(2*π*rnd(1))
# where A is the mean value of the noise, and σ is the standard deviation. You might apply this noise by generating a noise matrix and adding it to the image:
i := 0 .. rows(M) - 1
j := 0 .. cols(M) - 1
A := 0
σ := 10
noise[i, j] := gnoise(A, σ)
min(noise) = -42.2047
max(noise) = 44.9977
his := imhist(noise, 256)
k := 0 .. length(his) - 1
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M2 := M + noise
# [component: inputs M2]
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