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# MORPHOLOGICAL PROCESSING
# Morphological Opening and Closing
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# Function Definitions and Syntax
# open(M, Melem, b) | close(M, Melem, b)
# These functions perform binary morphological opening and closing. Open performs an erosion followed by a dilation (see the section on the erode and dilate functions) while close performs dilation followed by erosion using threshold b in a neighborhood defined by Melem. The open and close operations are very similar to band-pass filtering, useful for cleaning up the result of thresholding operations.
# Arguments
# • M, an image matrix
# • Melem, a matrix defining the neighborhood for opening or closing
# • b, an intensity threshold at which to open or close
# The functions return an image matrix which contains the opened or closed image. As with the erode and dilate functions, pixels near the image boundary may be invalid.
# Function Details | open(M, Melem, b) | close(M, Melem, b)
# In the open and close functions, morphological opening or closing is performed using a structuring element Melem to define the pixel neighborhood. Pixels in the input image M whose grayscale values are below the threshold b are considered background pixels, and above b are foreground; the output image is always binary, with 0 for background and 1 for foreground.
#
# Opening causes foreground features smaller than the structuring element to be eliminated, and closing causes background features smaller than the structuring element to be eliminated. Opening smoothes contours, suppresses small features in the image, and removes sharp protrusions of shapes. It is ideal for studying the size distribution of objects in images. Closing blocks up narrow channels in shapes and is ideal for studying interobject distances.
# The matrix M below contains two features: one of them is an isolated nonzero pixel and the other is a light area with a small hole. We can use closing and opening to clean up the image by removing the isolated noise pixel and the hole.
# Define the following 2 x 2 structuring element:
M := [
    0, 0, 0, 0, 0, 0, 0;
    0, 0, 0, 0, 1, 0, 0;
    0, 0, 0, 0, 0, 0, 0;
    0, 1, 1, 1, 0, 0, 0;
    0, 1, 0, 1, 0, 0, 0;
    0, 1, 1, 1, 0, 0, 0;
    0, 0, 0, 0, 0, 0, 0
]
SE := [1, 1; 1, 1]
# Closing removes the hole in the left object, while opening removes the isolated spots.
M1 := close(M, SE, 0.5)
M2 := open(M, SE, 0.5)
M1 = [
    0, 0, 0, 0, 0, 0, 0;
    0, 0, 0, 0, 1, 0, 0;
    0, 0, 0, 0, 0, 0, 0;
    0, 1, 1, 1, 0, 0, 0;
    0, 1, 1, 1, 0, 0, 0;
    0, 1, 1, 1, 0, 0, 0;
    0, 0, 0, 0, 0, 0, 0
]
M2 = [
    0, 0, 0, 0, 0, 0, 0;
    0, 0, 0, 0, 0, 0, 0;
    0, 0, 0, 0, 0, 0, 0;
    0, 0, 0, 0, 0, 0, 0;
    0, 0, 0, 0, 0, 0, 0;
    0, 0, 0, 0, 0, 0, 0;
    0, 0, 0, 0, 0, 0, 0
]
# In a more sophisticated image example,
M := READ_IMAGE("sinc_touch.bmp")
# [component: inputs M]
Melem := [1, 1, 1; 1, 1, 1; 1, 1, 1]
# Closing removes dark spots and connects the channels between lobes, while opening removes the connections between the lobes:
M1 := close(M, Melem, 100)
M2 := open(M, Melem, 100)
# [component: inputs M1*255]
# [component: inputs M2*255]
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