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# VISUALIZATION AND SYNTHETIC IMAGES
# Image Distortions
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# Commercial PC imaging programs often provide "effects" that include geometric distortions of the image. To see how these might be generated by some simple mathematics, we take an image of a dog and subject it to some transformations. Here's the original undistorted image:
A := READ_IMAGE("weederma.tga")
# [component: inputs A]
# Cylinder
# For the first example, the image is wrapped around the surface of a cylinder and then viewed looking perpendicular to the axis of the cylinder; this fattens up the central portion of the image and reduces the left and right edges. The sine function would map the horizontal coordinate of a point on a vertical half-cylinder onto the axial plane, so, to make the cylindrical image, the inverse sine can be used to find the pre-image on the cylinder of each column of pixels on the axial plane. The column coordinates of these pre-images are not usually integers, so the columns are averaged with the two nearest integer coordinates. It's been assumed that the image has an even number of columns.
W := cols(A)
coord := 0 .. W - 1
fl(c) := floor((W - 1)/2 + (W - 1)/π*asin((2*c - W + 1)/(W - 1)))
fh(c) := ceil((W - 1)/2 + (W - 1)/π*asin((2*c - W + 1)/(W - 1)))
C[:, coord] := 1/2*(A[:, fl(coord)] + A[:, fh(coord)])
# [component: inputs C]
# The cylinder image seems wider, but if you line up images C and A vertically you'll see that they have the same number of pixels both vertically and horizontally.
# Sphere
# Next we try wrapping the image on a hemisphere. This transformation is more complicated. To keep things simple we extract a square subimage.
rows(A) = 256
cols(A) = 384
S := submatrix(A, 0, 179, 0, 179)
# Now we have to range not just over columns but over every pixel of our distorted image, so the calculation takes a while. Here's one way of carrying out the arithmetic.
D := cols(S)
m := 0 .. D - 1
n := 0 .. D - 1
# For convenience we store the image coordinates in the matrix I as complex numbers, centering the image at the origin. Then we can carry out transformations on the coordinates just by applying complex functions to I.
I[m, n] := (m + 1i*n)/(D - 1) - (1 + 1i)/2
# The mapping we have chosen is the inverse of
f(z) := z/sqrt(1 - |z|^2)
# To form Q, we scale and map the coordinates by f and then translate the origin back to the lower left corner.
Q := vectorize(f(1.6*I))*((D - 1)/2) + ((D - 1)/2)*(1 + 1i)
# Now we build the distorted image as follows: We treat the mapped coordinates in Q as coordinates in the original image. They won't usually be integers, so we round them to the nearest integer. If these coordinates fall outside the original image, we set the new pixel to black, otherwise we set it to the pixel value in the original image. The function rd rounds and T checks whether the mapped coordinates are in the original image.
rd(x) := floor(x + .5)
T(z) := (Re(z) ≥ 0)*(Re(z) ≤ D - 1)*(Im(z) ≥ 0)*(Im(z) ≤ D - 1)
F[m, n] := if(T(Q[m, n]) == 1, S[rd(Re(Q[m, n])), rd(Im(Q[m, n]))], 0)
# Here is the result:
# [component: inputs F]
# Swirl
# Another popular effect is a rotation that spirals out from the center of the image. We can generate this effect by using a mapping that rotates the complex coordinates by an amount proportional to the square of their distance from the origin:
f(z) := 1.4*z*exp(3i*π*|z|^2)
Q1 := vectorize(f(I))*((D - 1)/2) + ((D - 1)/2)*(1 + 1i)
F1[m, n] := S[rd(Re(Q1[m, n])), rd(Im(Q1[m, n]))]
# Here is the swirled image:
# [component: inputs F1]
# Ripples
# Finally, we illustrate another radial transform, one that imitates ripples on the surface of a pond.
f(z) := 1.8*(z + .02*z/|z|*(1 - cos(20*π*|z|)))
Q2 := vectorize(f(I))*((D - 1)/2) + ((D - 1)/2)*(1 + 1i)
F2[m, n] := S[rd(Re(Q2[m, n])), rd(Im(Q2[m, n]))]
# [component: inputs F2]
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