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# VISION AND SEGMENTATION
# Machine Grading of Potatoes
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# Potatoes are graded for quality, in part, based on their size and color. The image-processing functions in this Extension Pack can be used to judge potato quality from a digital image. Using this information, a determination could be made as to whether the potato should be destined for french fries or the dinner table.
#
# We thank Professor Yongmin Kim of the University of Washington for the image file used in this example.
# Here is the potato we will analyze:
potato := READRGB("potato.gif")
# [component: inputs potato]
# Our first task is to separate the potato from the background in the image. Since it is a color image, one way to separate the regions is to use region color. Region color is quite different, by design, for the potato and the background. One good measure of color is the hue of the HSV representation of the image (see the section on HSV color for more information):
hue_potato := extract(rgb_to_hsv(potato), 1)
# [component: inputs hue_potato]
# To separate the potato from the background, we binarize using a threshold of 100, and then use morphological processing with a circular structuring element to clean up the result and remove noise.
bin_potato := 1 - binarize(hue_potato, 100)
i := 0 .. 8
j := 0 .. 8
se[i, j] := 0
se[i, j] := if((i - 4)^2 + (j - 4)^2 < 16, 1, 0)
bin_potato1 := open(bin_potato, se, 1)
bin_potato2 := close(bin_potato1, se, 1)
# [component: inputs bin_potato2*255]
# Now we can measure the size of the potato in pixels:
nr := rows(bin_potato2)
nc := cols(bin_potato2)
area := sum(sum(bin_potato2[i, j], j = 0 .. nc - 1), i = 0 .. nr - 1)
area = 12778
# The second task is to determine how green the potato is. To do this, we mask the hue image so that just the potato remains and threshold with a smaller value to pick out the green pixels. We can also visually compare to the original potato to verify the methodology.
hue_potato1 := mask(hue_potato, bin_potato2)
green_potato := binarize(hue_potato1, 50)
# [component: inputs green_potato*255]
# [component: inputs potato]
# And finally, we can see what fraction of the area is green:
green_area := sum(sum(green_potato[i, j], j = 0 .. nc - 1), i = 0 .. nr - 1)
fraction_green_area := green_area/area
fraction_green_area = 0.286899
# This potato is about 29% green, by our measure.
# For further reading, see Liyong Zhoi, Vikram Chalana, and Yongkim Kim, "PC-Based Machine Vision System for Real-Time Computer-Aided Potato Inspection," International Journal of Imaging System Technology, vol. 9, pp. 423-33, 1998.
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