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# COMBINATIONS OF IMAGES
# Replacing Part of an Image
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# Function Definition and Syntax
# putregion(M, N, row, col)
# This function replaces part of one image with another by inserting a matrix N into M at position (row, col).
# Arguments
# • M, an image matrix
# • N, the replacement image matrix,
# • row, the uppermost row at which to insert the image
# • col, the leftmost column at which to insert the image
# The function returns an image matrix which contains image M with image N inserted into it, replacing the original pixel values.
# Function Details | putregion(M, N, row, col)
# This function inserts matrix N into M at position (row, col). M must be large enough to contain all of N when inserted at the given position.
# Read in a starting image:
R := READ_IMAGE("camera.bmp")
rows(R) = 256
cols(R) = 256
# Create a second image, smaller than the first.
N := submatrix(READ_IMAGE("mona.bmp"), 70, 100, 60, 140)
col := 170
row := 90
cols(N) = 81
rows(N) = 31
# Make sure that
col + cols(N) - 1 = 250
# is less than
cols(R) = 256
row + rows(N) - 1 = 120  # is less than
rows(R) = 256
# Now insert matrix N:
C := putregion(R, N, row, col)
# [component: inputs R]
# [component: inputs C]
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