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# VISUALIZATION AND SYNTHETIC IMAGES
# A Demonstration of Ray Tracing
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# Ray tracing is a method of rendering an image of an object with realistic shading. The image at right is a ray-traced sphere which was created in Mathcad using the steps presented in this document.
# Although the tools are available in Mathcad to ray trace an image, doing so is time-consuming. Accordingly, the examples created in this document are intentionally small - the point is to give you some insight into the method itself.
# Theory
# Ray tracing methodology describes both the "scene" and an imaginary camera or "eye" whose view of the scene matches the image we wish to create. Since whatever the eye "sees" is the result of light bouncing off of the objects in the scene, creating the image amounts to describing the rays which bounce off the object and hit the eye.
# The following rough drawing illustrates the situation:
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# When a digital image is created, only a finite amount of data can be used. Not all the light rays which reach the eye can be rendered, only a finite number. To cut down the number of rays, set an imaginary frame in front of the eye, and treat only those light rays which pass through the frame, and, only a finite number of pixels within the frame. Here is a frame with 24 pixels covering it.
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# For each pixel in the frame, the single light ray is followed until it hits the object being rendered. At the point of contact, a model finds the intensity of light reflected and perhaps also the color of the object. This intensity value determines the pixel value in the rendered image.
# Example - a sphere
# For simplicity, the sphere is of radius 1 with its center at the origin. The equation of this sphere is:
x^2 + y^2 + z^2 == 1
# The sphere is represented by the coordinates of its center and its radius. These parameters can be expressed as a vector:
sphere := [0; 0; 0; 1]
# The number of pixels is 64 x 64, a relatively small image, to reduce calculation time.
numRows := 64
numCols := 64
# The position of the eye (viewpoint) and the position of the frame are defined so that the frame is perpendicular to the x axis. It can be described by giving the coordinates of its upper left and lower right-hand corners:
vR := [3, 3; 1, -1; 1, -1]  # The x, y and z coordinates of the upper left and lower right corners of the frame.
eye := [5; 0; 0]  # The position of the eye.
# Now for the light rays: light travels in a straight line, so the equation for a light ray can be written:
ray(t) == x + t*v
# where x is the position of the ray at time 0 and v is the direction of the ray.
# In this example, every ray starts at the eye and passes through a pixel in the frame. If the pixels are numbered in increasing order, traversing the frame from left to right starting at the upper left-hand corner, then the pixel positions are:
i := 0 .. numRows - 1
j := 0 .. numCols - 1
pixel(i, j) := [
    vR[0, 0];
    vR[1, 0] + i*((vR[1, 1] - vR[1, 0])/numRows);
    vR[2, 0] + j*((vR[2, 1] - vR[2, 0])/numCols)
]
# The corresponding rays are:
ray_ij(t) == eye + t*(pixel(i, j) - eye)
# For reasons that will become clear below, rays are represented by stacking the initial position and the velocity vector on top of one another.
ray_ij(t) == [eye; pixel(i, j)]
# After casting out a ray, we need to figure out if and when the ray intersects the objects in the scene, in this case, the sphere. Finding the intersection is a matter of simple algebra. The equation of the sphere is:
x^2 + y^2 + z^2 == 1
# or in terms of vectors and dot products:
v*v == 1
# To find the intersection of a ray whose equation is
ray(t) == x + t*v
# substitute the equation for the ray into the equation for the sphere and solve the resulting quadratic equation for t:
(v*v)*t^2 + 2*(x*v)*t + (x*x) - 1 == 0
# There are two subtleties to this result. First, a quadratic equation may not have a solution! In this case, it simply means that the ray may not intersect the sphere, signified by setting the time of intersection to be t = ∞. Second, there are usually two solutions to a quadratic equation, and only one of them is the physical one. To resolve this, recall that the eye only sees reflections from the first intersection of the light ray with the sphere. Therefore, the correct solution is the smaller of the two intersection times. The following functions implement these ideas to find the time of intersection of a ray with the unit sphere and the point at which the intersection occurs:
Sdisc(x, v) := (x*v)^2 - (v*v)*((x*x) - 1)
Stime(x, v) := if(Sdisc(x, v) < 0, ∞, (-(x*v) - sqrt(Sdisc(x, v)))/(v*v))
Sint(x, v, t) := (t == ∞)*[∞; ∞; ∞; ∞; ∞; ∞] + (t ≠ ∞)*stack(x + t*v, v)
# Here's a test run of the ray tracing in which a pixel is set to white if it sees the sphere and to black if it doesn't see the sphere. The function that colors the pixel according to this rule is given by:
testColor(t) := (t == ∞)*0 + (t ≠ ∞)*255
Test[i, j] := testColor(Stime(eye, pixel(i, j) - eye))
# [component: inputs Test]
# As you see, there is a circle in the middle of the view which is painted white corresponding to the eye's view of the sphere.
# Ray tracing really comes alive after introducing a shading or coloring model for the scene. In this example, all light comes from a single point source with position and intensity:
source := [7; 3; 2]  # The position of the light source
int_s := 50  # The intensity of the point light source
# This model also allows for the existence of ambient omnidirectional light. The ambient light helps to prevent shadows in a rendered image from becoming too drastic.
int_amb := 10  # Intensity of the ambient light
# The question remains as to how the reflected light intensity is to be computed (previously, it was assumed that 100% of the light was reflected). This model actually allows for three different types of reflection, each of which contributes to the total intensity of light seen by the eye. The following utility functions help to define reflection:
vecnorm(w) := sqrt(w*w)  # Computes the length of a vector
Slight(ray) := source - submatrix(ray, 0, 2, 0, 0)
# Computes the vector pointing from the initial position of ray to the light source.
# In the above and in what follows, the vector ray is the output vector from a call to the function Sint. This means that ray is the result of stacking the initial position and direction of a light ray on top of one another.
# The first kind of reflection in our model is the ambient reflection. The percentage of ambient light which bounces off of an object depends on the characteristics of the material from which the object is made, and is quantified by an "ambient reflection coefficient." This tells us how shiny the object is with respect to ambient light. The intensity of reflected ambient light is then ambient reflection coefficient times the ambient light source intensity:
R_amb := 10
Scolor_a(ray) := R_amb*int_amb
# The next type of light reflection has to do with the reflection of light from a point source. This type of reflection is "diffuse" or "scattering" reflection. In this type of reflection, light interacts with the material out of which the object is made and is emitted from the object in all directions. As with ambient reflections, the intensity of light emitted depends on the intensity of the point source as well as a "diffuse reflection coefficient." But, for diffuse reflection, the intensity of emitted light also depends on the relative orientation of the light source and the object. This dependence is known as Lambert's Law, which states that the reflected intensity is proportional to the angle between the point light source and the perpendicular vector to the object at the point of reflection. The total equation for diffuse scattering is then:
R_diff := 50  # Diffuse reflection coefficient
Scolor_d(ray) := int_s*R_diff*(Slight(ray)*submatrix(ray, 0, 2, 0, 0)/(vecnorm(Slight(ray))*vecnorm(submatrix(ray, 0, 2, 0, 0))))
# The last kind of reflection is specular reflection. Specular reflection is the highly directional reflection that is described by Snell's Law: angle of reflection equals angle of incidence. The direction vector of specularly reflected light can be found by
Sreflect(ray) := -Slight(ray) + 2*(Slight(ray)*submatrix(ray, 0, 2, 0, 0))*submatrix(ray, 0, 2, 0, 0)/vecnorm(submatrix(ray, 0, 2, 0, 0))^2
# Additionally, in computing the intensity of specularly reflected light, the vector of reflected light doesn't necessarily point in the direction of the eye. Only a component of the vector of reflected light actually reaches the eye. A little vector algebra can be used to grab the component of the vector of reflected light which is in the direction of the eye. Multiplying this component by the source intensity and a "specular reflection coefficient" gives the intensity of reflected light at the eye:
R_spec := 20  # Specular reflection coefficient of the sphere
Scolor_s(ray) := int_s*R_spec*(-(Sreflect(ray)*submatrix(ray, 3, 5, 0, 0))/(vecnorm(Sreflect(ray))*vecnorm(submatrix(ray, 3, 5, 0, 0))))
# The overall intensity can now be computed. The first step is a test to determine whether a given light ray intersects the sphere. If it does not, intensity 0 is assigned to the associated pixel. If it does, the ambient, diffuse and specular reflection intensities are computed and summed at the point of intersection.
color(ray) :=
    0 if ray[0] == ∞
    Scolor_a(ray) + Scolor_d(ray) + Scolor_s(ray) otherwise
# With this enhanced color model, the final sphere will be ray traced:
i := 0 .. numRows - 1
j := 0 .. numCols - 1
M[i, j] := color(Sint(eye, pixel(i, j) - eye, Stime(eye, pixel(i, j) - eye)))
# [component: inputs scale(M, 0, 255)]
# To get a feel for the shading model, you can go through this example using different values for the light source intensities (point source and ambient) and the various reflection coefficients. You can also move the position of the eye and frame to get a different view of the sphere (although due to symmetry of the sphere you won't see many changes). Projects for the more adventurous are to ray trace other geometric solids. The key difference for each solid is the formula for the intersection of a ray with the solid.
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