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# INTRODUCTORY MATERIAL
# Reading and Writing Images
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# Function Definitions and Syntax
# READ_IMAGE(filename) | WRITEBMP(filename):=M
# READRGB(filename) | WRITERGB( filename):=M
# READRAW(filename, rows, cols, bits, endian, skip)
# WRITERAW( filename):=(M, bits, endian)^T
# These functions allow you to read and write image files in a variety of formats.
# Arguments
# • filename, the name of a file, in quotes
# • rows, cols, the number of rows and columns in a raw binary image file
# • bits, the number of bits per pixel (8 or 16)
# • endian, "big" or "little," indicating data storage order
# • skip, the number of bytes in the file header to skip
# The image reading functions return an image matrix, while the writing functions return nothing, but write a file to the hard disk containing the contents of M.
# Function Details | READ_IMAGE(filename)
# Reads an image file as a grayscale matrix, and returns the matrix.
# The READ_IMAGE function can be used to read an image file in any of the following formats. The format is determined by the three-letter file extension, and an error occurs if the file's data is not in the correct format.
#
# BMP: Windows Bitmap images
# GIF: GIF images
# JPG: JPEG images
# TGA: Targa images
# PBM: Portable Bitmap images
# PCX: Paintbrush images
# PGM: Portable Gray Map images
# PPM: Portable Pixmap images
# TIF: Tagged Image File Format images
# When you use the READ_IMAGE function with a color image, it is converted to a grayscale image.
mat1 := READ_IMAGE("bridge.bmp")
mat2 := READ_IMAGE("planet.ppm")
mat3 := READ_IMAGE("strike.tif")
# [component: inputs mat3]
# Tip: Change the variable name at the bottom of the Image Viewer to change which image you are viewing.
# Function Details | READRGB(filename)
# Reads an image file as an RGB color matrix, and returns the matrix.
# The READRGB function can be used to read an image file in any of the following formats. The format is determined by the three-letter file extension, and an error occurs if the file's data is not in the correct format.
#
# BMP: Windows Bitmap images
# GIF: GIF images
# JPG: JPEG images
# TGA: Targa images
# PBM: Portable Bitmap images
# PCX: Paintbrush images
# PGM: Portable Gray Map images
# PPM: Portable Pixmap images
# TIF: Tagged Image File Format images
# When you use the READRGB function, the red, green, and blue color components are returned side by side in a single matrix, so if the image is N rows by M columns, the matrix is of size N x 3M.
cmat1 := READRGB("bridge.bmp")
cmat2 := READRGB("planet.ppm")
cmat3 := READRGB("strike.tif")
# [component: inputs extract(cmat2)]
# In order to view these images in color, you must enter the red, green and blue matrices separated by commas, or in a nested matrix. The extract function is designed to do this. Entering the image name directly automatically extracts the components.
#
# Change the variable name at the bottom of the Image Viewer to change which image you are viewing.
# Function Details | WRITEBMP( filename):=M
# Writes a grayscale image matrix to an image file by putting the function on the left-hand side of the definition block, and defining it as the image matrix.
# The WRITEBMP function can be used to write a grayscale image matrix to an image file in any of the following formats. The format is determined by the three-letter file extension.
#
# BMP: Windows Bitmap images
# PBM: Portable Bitmap images
# PGM: Portable Gray Map images
# TIF: Tagged Image File Format images
# In order to write a matrix to a BMP file, the data in the matrix must be integers between 0 and 255.
#
# The PBM format is a binary (fax-like) format where the data values are either 0 or 1. When you write a matrix to PBM using the WRITEBMP function, pixels with values below 0.5 are treated as zeros, and pixels with values above 0.5 are treated as ones. If you wish to use a different threshold, you should binarize your matrix before calling WRITEBMP. See the section on binarization for more information.
#
# When you use the WRITEBMP function to write a PGM or TIF image, the data is written as an 8-bit image if it is in the range 0 to 255, and a 16-bit image if not. Real numbers are truncated to integer values, but values in your matrix outside the range of 0 to 65535 are not allowed.
WRITEBMP("out.bmp") := mat1  # disabled  # Note: Evaluation of these functions has been disabled for the E-book.
WRITEBMP("out.pgm") := mat1  # disabled
# Function Details | WRITERGB(filename):=M
# Writes an RGB image matrix to an image file by putting the function on the left-hand side of the definition block, and defining it as the image matrix.
# The WRITERGB function can be used to write an RGB color image matrix to an image file in any of the following formats. The format is determined by the three-letter file extension.
#
# BMP: Windows Bitmap images
# PPM: Portable Pixmap images
# TIF: Tagged Image File Format images
# In order to write a matrix to a BMP file, the data in the matrix must be integers between 0 and 255.
#
# When you use the WRITERGB function to write a PPM or TIF image, the data is written as an 8-bit image if it is in the range 0 to 255, and a 16-bit image if not. Real numbers are truncated to integer values, but values in your matrix outside the range of 0 to 65535 are not allowed.
WRITERGB("out.tif") := cmat1  # disabled  # Note: Evaluation of these functions has been disabled for the E-book.
WRITERGB("out.ppm") := cmat1  # disabled
# It is also possible to use this function on the right-hand side of the definition, by supplying a dummy variable on the left, and the image matrix as an additional argument, e.g.:
Dummy := WRITERGB("out.tif", cmat1)  # disabled
# Function Details
# READRAW(filename, rows, cols, bits, endian, skip)
# Reads a raw binary image file as a matrix, and returns the matrix.
# This function can be used to read images stored in user-defined or special formats not supported by the READRAW function, where the image matrix is stored as a block of binary integer data. It can read 8-bit or 16-bit images, and 16-bit images can be in either Big-Endian (high byte first) or Little-Endian (low byte first) order. The function can skip headers of fixed size in image data files as well. The arguments are:
#
# • filename: The name of the image file
# • rows, cols: The number of rows and columns in the image matrix
# • bits: The number of bits used per pixel, either 8 or 16.
# • endian: Whether the data is "Big-Endian" or "Little-Endian". This is specified as a string. Only the first character of the string is used (B or L, case-insensitive), and the value is irrelevant if the data is 8-bit.
# • skip: The number of bytes of header to skip in the file before reading the image data.
# As an example, we can read the Crater PGM file, which is a 256 x 256 8-bit image file with 15 bytes of header before the binary data:
mat4 := READRAW("crater.pgm", 256, 256, 8, "B", 15)
# [component: inputs mat4]
# Function Details | WRITERAW( filename):=(M, bits, endian)^T
# Writes a matrix as a raw binary image file.
# This function can be used to write images as blocks of binary integer data. It can write 8-bit or 16-bit images, and 16-bit images can be written in either Big-Endian (high byte first) or Little-Endian (low byte first) order. The values in the matrix are truncated to integer values of the appropriate range before writing. The arguments are:
#
# • filename: The name of the image file
# • bits: number of bits per pixel, either 8 or 16
# • endian: Whether the data is "Big-Endian" or "Little-Endian." This is specified as a string. Only the first character of the string is used (B or L, case-insensitive), and the value is irrelevant if the data is 8-bit.
#
# This function appears on the left-hand side of a Mathcad definition block, with matrix containing the image data on the right-hand side:
# • M: matrix to write
WRITERAW("out.raw", 8, "B") := mat1  # disabled  # Note: The evaluation of these functions has been disabled for the E-book.
WRITERAW("out.raw", 16, "L") := mat1  # disabled
Dummy := WRITERAW("out.raw", 16, "L", mat1)  # disabled
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