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# INTRODUCTORY MATERIAL
# Tools for Packed Matrices
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# Function Definitions and Syntax
# extract(M, n) | replace(M, N, n)
# augment(X, Y, Z) | subcolor(M, ir, jr, ic, jc)
# These functions allow you to extract or insert a single component matrix from a packed matrix comprising a color image, to pack three color components together, and to selected subsets of packed color matrices.
# Arguments
# • M, an image matrix
# • N, a single color or intensity component of a packed matrix
# • n, the location (1, 2 or 3) from which to extract or insert the component (regardless of the value of the built-in variable ORIGIN),
# • r1, r2, c1, c2: the starting and ending rows and columns for subsetting
# • X, Y, Z: three matrices to pack together.
# These functions are utilities designed to help you create or manipulate packed matrices more easily. They return the appropriate packed or unpacked matrix components.
# To learn more about packed color image matrices, see the Introduction.
# Function Details | extract(M, n)
# Read in a packed-color RGB color matrix.
M := READRGB("strike.tif")
# [component: inputs M]
# Now, suppose just the red component of this image is of importance. We can use the extract function to extract it:
red := extract(M, 1)
# Now we have the red values, but our matrix is not in RGB color format. So to view it as red, we have two choices. One way is to make it into an RGB image by supplying zeros for the blue and green components:
pad := red*0
red1 := augment(red, pad, pad)
# [component: inputs red1]
# A second possibility is to view it as a grayscale image, but with a false color mapping using the Grayscale Colormap option in the Properties dialog:
# [component: inputs red]
# Function Details | replace(M, N, n)
# After removing particular components from a packed color matrix, the individual colors can be manipulated and reassembled. As an example, the intensity of the red component in this image will be halved.
newred := red/2
new := replace(M, newred, 1)
# [component: inputs new]
cols(M) = 768
cols(new) = 768
# The red component of image matrix M has been completely replaced by newred. You could replace any matrix - either the red (1), green (2), or blue (3) - in this way. You could also replace any component matrix in an HLS, HSV, or other representation. For a review of these other color systems, see Manipulating Color in Images.
# Function Details | augment(X, Y, Z) | subcolor(M, ir, jr, ic, jc)
# The augment function is used to combine three matrices, for example representing red, green, and blue, into one color matrix. This was demonstrated above to pad a red component of an RGB matrix. It can be used for RGB, HLS, HSV, YIQ, and YCbCr images, and it simply pastes the three matrices together side by side.
# The subcolor function is used to subset a color matrix (RGB, HLS, etc.) by taking the proper submatrix from each of the three color sections of the combined matrix.
# First, we will create an HSV image by combining separate H, S, and V parts using augment:
size := 200
i := 0 .. size
j := 0 .. size
r[i] := (i - size/2)
Smat[i, j] := sqrt(r[i]^2 + r[j]^2)
Smat := scale(threshold(Smat, -100), 0, 255)
Hmat[i, j] := angle(i - size/2 + .00001, j - size/2)/deg
Hmat := rotate90(Hmat)
Vmat[i, j] := 255
wheel := augment(Hmat, Smat, Vmat)
# Select a subset of this image in two ways: subcolor, or augment3 of three submatrix calls. These produce the same result.
start := 30
end := 130
wheelsub1 := subcolor(wheel, start, end, start, end)
Hsub := submatrix(Hmat, start, end, start, end)
Ssub := submatrix(Smat, start, end, start, end)
Vsub := submatrix(Vmat, start, end, start, end)
wheelsub2 := augment3(Hsub, Ssub, Vsub)
# View the whole image and its two identical subsets:
# [component: inputs wheel]
# [component: inputs wheelsub1]
# [component: inputs wheelsub2]
# It is also possible to subset an image graphically by selecting and dragging a selection region on it. See the section on Viewing Images for more information.
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