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# GEOMETRIC TRANSFORMS
# Rotating Images
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# Function Definitions and Syntax
# rotate90(M) | rotate180(M) | rotate270(M) | rotate(M, angle)
# These functions allow you to rotate an image counterclockwise through a specified angle.
# Arguments
# • M, an image matrix
# • angle, number of degrees to rotate the image
# They return a matrix, which contains the rotated image, generally not of the same dimensions as the input. For rotations that are not multiples of 90 degrees, the extra pixels are set to zero
# Function Details | rotate90(M)
# Rotates an image 90 degrees counterclockwise.
R := READ_IMAGE("pattern.bmp")
R90 := rotate90(R)
# The original image:
# [component: inputs R90]
# The 90-degree rotated image:
# [component: inputs R]
i := 0 .. 2
j := 0 .. 3
M[i, j] := mod(i + j^2, 256)
M = [0, 1, 4, 9; 1, 2, 5, 10; 2, 3, 6, 11]
rotate90(M) = [9, 10, 11; 4, 5, 6; 1, 2, 3; 0, 1, 2]
# Function Details | rotate180(M)
# Rotates an image 180 degrees counterclockwise.
R := READ_IMAGE("pattern.bmp")
R180 := rotate180(R)
# The original image: | The 180-degree rotated image:
# [component: inputs R180]
# [component: inputs R]
M = [0, 1, 4, 9; 1, 2, 5, 10; 2, 3, 6, 11]
rotate180(M) = [11, 6, 3, 2; 10, 5, 2, 1; 9, 4, 1, 0]
# Function Details | rotate270(M)
# Rotates an image 270 degrees counterclockwise.
R270 := rotate270(R)
# The original image: | The 270-degree rotated image:
# [component: inputs R270]
# [component: inputs R]
M = [0, 1, 4, 9; 1, 2, 5, 10; 2, 3, 6, 11]
rotate270(M) = [2, 1, 0; 3, 2, 1; 6, 5, 4; 11, 10, 9]
# Function Details | rotate(M, angle)
# Rotates an image by an arbitrary angle counterclockwise, and sets the boundary area to black. If you wish to rotate by a multiple of 90 degrees, you should use the rotate90 or rotate270 functions instead, as they are more accurate and faster for those angles.
R35 := rotate(R, 35)
# The original image:
# The 35-degree rotated image:
# [component: inputs R35]
# [component: inputs R]
M = [0, 1, 4, 9; 1, 2, 5, 10; 2, 3, 6, 11]
rotate(M, 35) = [
    2.29431, 8.91517, 2.27245, 0;
    3.07535, 6.98048, 6.65517, 1.85393;
    2.57143, 5.04823, 4.93575, 1.22158;
    2.33599, 1.65706, 0, 0;
    0, 0, 0, 0
]
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