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# IMAGE MANIPULATION
# Scaling and Clipping
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# Function Definitions and Syntax
# scale(M, Min, Max) | clip(M, Min, Max)
# These functions scale an image's intensity levels to lie between a minimum and maximum, or truncate them to a minimum and maximum. Many of the functions in this Function Pack work in full floating point arithmetic; it is often desirable to scale or clip a processed image to a standard grayscale range of 0 - 255.
# Arguments
# • M, an image matrix
# • Min, the lowest value in the output intensity scale
# • Max, the highest value in the output intensity scale
# The functions return another matrix, an image with the specified scaled or clipped intensity range.
# Function Details | scale(M, Min, Max)
# This function converts the relative intensities of an image to lie between the values Min and Max, using the following algorithm:
(Max - Min)*((M - min(M))/(max(M) - min(M))) + Min
M := [12, 50, 1610; 490, 3000, -3; -490, 287, 0]
# Scaling into the range 0 - 255 yields:
scale(M, 0, 255) = [36.6791, 39.4556, 153.438; 71.6046, 255, 35.5831; 0, 56.7722, 35.8023]
# Function Details | clip(M, Min, Max)
# This function truncates all intensities below value Min to Min, and all intensities above value Max to Max. Clipping the example matrix M above yields:
clip(M, 0, 255) = [12, 50, 255; 255, 255, 0; 0, 255, 0]
# Clipping can be used to remove unwanted features, noise, or extraneous information from an image. Suppose, for example, we'd like to remove the bright spots from the following picture:
M := READ_IMAGE("tank.bmp")
max(M) = 255
Mclip := clip(M, 0, 220)
max(Mclip) = 220
# [component: inputs M]
# [component: inputs Mclip]
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