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# FEATURE EXTRACTION
# Shape Features
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# Function Definition and Syntax
# shape_features(M)
# This function computes a variety of shape-related features, such as centroids, spatial variances and moments, and so on, of an input image M. This function can be used, along with image morphology and connected component labelling, to classify objects in an image.
# Arguments
# • M, an image matrix
# The function returns a keyed matrix of features, as described below.
# Function Details | shape_features(M)
# This function calculates a variety of shape-related features of an input image, M. The image is treated as a connected component image where the components are labeled with consecutive integers, and the features are calculated for each component. The rows of the resulting matrix correspond to the component labels in the image, and the columns correspond to the calculated features. Here is a table of the column locations of the calculated features:
# Col  Feature
# 0  X centroid
# 1  Y centroid
# 2  X direction spatial variance
# 3  Y direction spatial variance
# 4  Spatial variance along component's principal axis
# 5  Spatial variance perpendicular to component's principal axis
# 6  Area
# 7  Ratio of the area of the component to the area of the entire image
# 8  Orientation of the principal axis from horizontal (radians)
# 9  Eccentricity of the component
# 10  Leftmost point
# 11  Rightmost point
# 12  Uppermost point
# 13  Lowest point
# 14  Standard spatial moment 00
# 15  Standard spatial moment 01
# 16  Standard spatial moment 10
# 17  Standard spatial moment 11
# 18  Standard spatial moment 02
# 19  Standard spatial moment 20
# 20  Standard spatial moment 12
# 21  Standard spatial moment 21
# 22  Standard spatial moment 03
# 23  Standard spatial moment 30
# 24  Central spatial moment 00
# 25  Central spatial moment 01
# 26  Central spatial moment 10
# 27  Central spatial moment 11
# 28  Central spatial moment 02
# 29  Central spatial moment 20
# 30  Central spatial moment 12
# 31  Central spatial moment 21
# 32  Central spatial moment 03
# 33  Central spatial moment 30
# 34  Normalized central spatial moment 00
# 35  Normalized central spatial moment 01
# 36  Normalized central spatial moment 10
# 37  Normalized central spatial moment 11
# 38  Normalized central spatial moment 02
# 39  Normalized central spatial moment 20
# 40  Normalized central spatial moment 12
# 41  Normalized central spatial moment 21
# 42  Normalized central spatial moment 03
# 43  Normalized central spatial moment 30
# 44  Invariant moment 1
# 45  Invariant moment 2
# 46  Invariant moment 3
# 47  Invariant moment 4
# 48  Invariant moment 5
# 49  Invariant moment 6
# 50  Invariant moment 7
# Let's try it out on an image. First, we read in an image. Then we turn it into a simple, connected component image by binarizing, using morphology functions to simpify it, and calling the connected component function.
M := READ_IMAGE("part.gif")
Mclean := erode4(dilate4(binarize_auto(M), 1), 1)
Mcomp := concomp(Mclean, 8, 0)
# [component: inputs Mclean*255]
# [component: inputs scale(Mcomp, 0, 255)]
# The connected component image is shown in false color to make the five different connected components more obvious.
# Now call the shape_features function:
fea := shape_features(Mcomp)
# The output is a 5-row matrix, with one row per connected component. Let's pick out a few features of the components:
# Centroid coordinates:
Xcent := fea[:, 0]
Ycent := fea[:, 1]
Xcent = [125.472; 127.604; 158.593; 199.039; 159.358]
Ycent = [127.995; 117.492; 103.23; 129.473; 156.776]
# Spatial variances:
Xvar := fea[:, 2]
Yvar := fea[:, 3]
Xvar = [41.5062; 79.579; 2.92953; 2.85408; 2.91523]
Yvar = [24.5388; 75.9259; 3.67966; 3.5874; 3.66232]
# Areas:
Area := fea[:, 6]
Area = [11281; 49761; 135; 129; 134]
# Invariant Moment 1:
M1 := fea[:, 44]
M1 = [0.206092; 0.243113; 0.163867; 0.162909; 0.163516]
# Note that shape_features does not use the built-in variable ORIGIN, which specifies the starting index of an array for other functions.
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