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# MORPHOLOGICAL PROCESSING
# Thinning and Skeletonization
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# Function Definition and Syntax
# thin(M,b) | skeleton(B) | skeleton2(M,b)
# These functions transform objects in an image into a set of lines that run roughly down the center of each object. The thin and skeleton2 functions binarize the image first, then thin or skeletonize. This is useful for image analysis in pattern recognition, for example, for optical character recognition (OCR). Thinning and skeletonization are extreme forms of morphological processing, and are used when only the fundamental shape of an object on the image is of interest.
# Arguments
# • M, a grayscale image matrix
# • b, an intensity threshold for binarization
# • B, an image matrix binarized to ones and zeros
# The functions return a binary matrix containing the thinned or skeletonized image.
# Function Details | thin(M,b)
# Thinning algorithms transform objects on a binary image to a set of simple digital lines (or arcs), which lie roughly along the objects' medial axis (center line). The structure obtained is not influenced by small inflections on the image object. The algorithm used here recursively deletes simple border points that have more than one neighbor. With this algorithm, the end points of thin arcs are not deleted. See any standard image processing text, such as Anil K. Jain's Fundamentals of Digital Image Processing, for more details.
# This function first binarizes the input image based on the threshold value b. The output is a binary image of structure lines or arcs of intensity 1, and background pixels of intensity 0.
# An example of thinning an image of a rectangular box is shown as follows:
i := 0 .. 6
j := 0 .. 10
S[i, j] := 0
m := 2 .. 4
n := 3 .. 7
S[m, n] := 1
S = [
    0, 0, 0, 0, 0, 0, 0, 0, 0, 0, 0;
    0, 0, 0, 0, 0, 0, 0, 0, 0, 0, 0;
    0, 0, 0, 1, 1, 1, 1, 1, 0, 0, 0;
    0, 0, 0, 1, 1, 1, 1, 1, 0, 0, 0;
    0, 0, 0, 1, 1, 1, 1, 1, 0, 0, 0;
    0, 0, 0, 0, 0, 0, 0, 0, 0, 0, 0;
    0, 0, 0, 0, 0, 0, 0, 0, 0, 0, 0
]
S1 := thin(S, 1)
# From the results shown below, we can see that thinning a rectangle results in a single line that approximates the medial axis of the rectangle.
S1 = [
    0, 0, 0, 0, 0, 0, 0, 0, 0, 0, 0;
    0, 0, 0, 0, 0, 0, 0, 0, 0, 0, 0;
    0, 0, 0, 0, 0, 0, 0, 0, 0, 0, 0;
    0, 0, 0, 0, 1, 1, 1, 0, 0, 0, 0;
    0, 0, 0, 0, 0, 0, 0, 0, 0, 0, 0;
    0, 0, 0, 0, 0, 0, 0, 0, 0, 0, 0;
    0, 0, 0, 0, 0, 0, 0, 0, 0, 0, 0
]
# To illustrate the application of thinning in optical character recognition technologies, we apply thinning to an image containing the letter "D" and a period:
D := READ_IMAGE("d_bw.bmp")
D1 := thin(D, 128)
# [component: inputs D]
# [component: inputs D1*255]
# We can see from the thinning results that thinning preserved the basic shape and structure of the objects on the image. Let's try it on something more complex:
M := READ_IMAGE("pinetree.bmp")
M1 := thin(M, 128)
# [component: inputs M]
# [component: inputs M1*255]
# Function Details | skeleton(B)
# This function is a simple form of skeletonization - erosion of the edges of a binarized image until there is nothing left but the central lines. (Note that an image can be binarized in several ways - see the section on Binarization.) The skeleton function works best on a white image against a black background.
M1 := skeleton(binarize(M, 128))
# [component: inputs M1*255]
# Function Details | skeleton2(M,b)
# The skeleton2 function uses a more advanced skeletonization algorithm, where the skeleton of an object is defined as the set of points whose distance to the nearest boundary is a local maximum. It is possible to recover the original binary image given its skeleton and the distance of each skeleton point to its contour by taking the union of the circular neighborhoods centered on the skeleton points with radii equal to the associated contour distance. The skeleton, in this case, is a regenerative representation of an image object. See any book on image processing such as Anil K. Jain's Fundamentals of Digital Image Processing for more details about skeletonization.
#
# This function first binarizes the input image based on the threshold value b. The output is a binary image of structure lines or arcs of intensity 1 and background pixels of intensity 0.
S1 := skeleton2(S, 1)
S1 = [
    0, 0, 0, 0, 0, 0, 0, 0, 0, 0, 0;
    0, 0, 0, 0, 0, 0, 0, 0, 0, 0, 0;
    0, 0, 0, 1, 0, 0, 0, 1, 0, 0, 0;
    0, 0, 0, 0, 1, 1, 1, 0, 0, 0, 0;
    0, 0, 0, 1, 0, 0, 0, 1, 0, 0, 0;
    0, 0, 0, 0, 0, 0, 0, 0, 0, 0, 0;
    0, 0, 0, 0, 0, 0, 0, 0, 0, 0, 0
]
# Note that unlike the thinning operation, skeleton retains the size of the input object, and the end points of the skeleton extend all the way to the edges of the input object.
D := READ_IMAGE("flower.bmp")
D1 := skeleton2(D, 128)
# [component: inputs D]
# [component: inputs D1*255]
# And finally, skeletonize the pine tree image:
M1 := skeleton2(M, 128)
# [component: inputs M]
# [component: inputs M1*255]
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