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# CONVOLUTION AND FILTERING
# Smoothing
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# Function Definitions and Syntax
# unismooth(M) | centsmooth(M) | orthosmooth(M)
# unismooth5(M) | orthosmooth5(M)
# These functions perform the convolution of a specified smoothing kernel with an image matrix M. The names indicate whether smoothing is uniform, orthogonal to the center, or weighted at the center, and the number 5 indicates a 5 × 5 kernel is used instead of a 3 × 3 kernel. Smoothing is an important technique for noise reduction and differentiating artifacts in an image. Smoothing eliminates minor random noise, but is most effective on uniform, smoothly varying types of noise, like Gaussian noise.
# Arguments
# • M, an image matrix
# The functions return a matrix containing the smoothed image. At the edges of the image, the kernel does not completely overlap the image; therefore, these edge pixels are only convolved with a subset of the kernel and divided by the appropriate normalizing factor.
# Function Details
# Each of these functions uses averaging to replace the value at a pixel by a weighted average involving its value and that of its neighbors. In each case the weights are stored in a square matrix which is convolved with the image to produce the smoothed image. For more information on this process, see Convolution.
# unismooth(M)
# The output of this function is the convolution of M with the following kernel matrix:
K := 1/9*[1, 1, 1; 1, 1, 1; 1, 1, 1]
# This matrix gives equal weight to the central pixel and each of its 8 neighbors when it averages to get a new value.
M := [0, 4, 8, 12, 12, 11; 1, 5, 9, 12, 12, 10; 2, 6, 10, 12, 12, 9; 3, 7, 11, 12, 12, 8]
unismooth(M) = [
    2.5, 4.5, 8.33333, 10.8333, 11.5, 11.25;
    3, 5, 8.66667, 11, 11.3333, 11;
    4, 6, 9.33333, 11.3333, 11, 10.5;
    4.5, 6.5, 9.66667, 11.5, 10.8333, 10.25
]
# The smoothed value at (2,2):
(5 + 9 + 12 + 6 + 10 + 12 + 7 + 11 + 12)/9 = 9.33333
# The smoothed value at (3,5):
(12 + 9 + 12 + 8)/4 = 10.25
# Since the pixel (3,5) lies at the bottom-right corner of the matrix, where only 4 pixels of the kernel overlap, the above sum is divided by 4 to get the smoothed value.
# Repeated applications of any of the smoothing functions results in increased blurring, or smoothing. Here are three applications of the uniform weighting function on the following image with noise added. Change the input variables on the image viewer to compare them.
R := READ_IMAGE("pattern.bmp")
R := addnoise(R, .01, 150)
RS := unismooth(R)
RSS := unismooth(RS)
RSSS := unismooth(RS)
# [component: inputs R]
# [component: inputs RSSS]
# The rest of the smoothing functions work the same way, with different kernels.
# centsmooth(M)
# This function convolves M with the kernel
K := 1/10*[1, 1, 1; 1, 2, 1; 1, 1, 1]
# which gives more weight to the center pixel.
# orthosmooth(M)
# This function convolves M with the kernel
K := 1/16*[1, 2, 1; 2, 4, 2; 1, 2, 1]
# The kernel gives added weight both to the center and to the orthogonal neighbors, which retains image quality more satisfactorily in some images.
# unismooth5(M)
# This function convolves M with the kernel
K := 1/25*[1, 1, 1, 1, 1; 1, 1, 1, 1, 1; 1, 1, 1, 1, 1; 1, 1, 1, 1, 1; 1, 1, 1, 1, 1]
# The 5×5 kernel may result in more uniform smoothing of images with small sharp features (such as noise) in uniform backgrounds. It is a better lowpass filter than the 3×3 kernel. To understand why this is true, consider the comments on convolution and its equivalent in the frequency domain, as discussed in Convolution.
# orthosmooth5(M)
# This function convolves M with the kernel
K := 1/32*[1, 1, 1, 1, 1; 1, 1, 2, 1, 1; 1, 2, 4, 2, 1; 1, 1, 2, 1, 1; 1, 1, 1, 1, 1]
# As with centsmooth and orthosmooth, this kernel may retain image features more appropriately because of the additional weight given to the center pixels.
# See if you can readily distinguish the effects of the various smoothing kernels. Examine their effects particularly at edges of an image and in noisy regions.
central := centsmooth(R)
orthogonal := orthosmooth(R)
uniform := unismooth5(R)
orthog5 := orthosmooth5(R)
# Remember that you can design and try out your own smoothing filters using the convolution functions described in Convolution.
# [component: inputs R]
# [component: inputs central]
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