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# VISUALIZATION AND SYNTHETIC IMAGES
# Imaging a Speech Spectrogram
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# Contributed by:
# Dr. Margaret Mortz
# Department of Electrical Engineering
# University of Denver
# Denver, Colorado
# Image-processing techniques can be applied to other types of signals in an effort to visualize and enhance the salient properties of the signal. In this particular case, we examine a speech spectrogram. A speech spectrogram is a time-frequency display which shows how the frequency of a spoken phrase changes as a function of time. The intensity of the spectrogram measures how much energy is in each frequency bin for each time frame.
# Spectrogram Particulars
# The example spectrogram provided is based on a recording of the phrase "image processing." The original recording was made using a 16-bit analog-to-digital converter (ADC) taking 8000 samples/second. The ADC used has an anti-aliasing filter which removes any frequencies greater than 4000 Hz. To create the spectrogram, the digitized signal was broken into time frames of 128 samples with 50% overlap, that is, every two frames have 64 samples in common. The data used came from the file image8.prn.
samps := 128
i := 0 .. samps - 1
# [component: outputs data]
# To view or edit the data in the Input Table component, just double-click on it and use the scroll bars.
times := length(data)/128
j := 0 .. times - 1
# The time matrix of sound data is then:
sample[i, j] := data[i + j*samps/2]
# A Hamming window is used to filter the data.
# Rectangular window:
R(n, N) := (n ≥ 0)*(n ≤ N - 1)
# Hamming window:
Hm(n, N) := (.54 - .46*cos(2*π*n/(N - 1)))*R(n, N)
# The Hamming coefficients over the specified time domain are:
w[i] := Hm(i, samps)
# The filtered sound matrix is then:
a[i, j] := sample[i, j]*w[i]
# Taking the fast Fourier transform (FFT) to find the frequency components:
spectra[:, j] := vectorize(|fft(a[:, j])|)
# Find the amplitude in decibels to get the spectrogram.
dB(x) := 20*log(x)
spectra := funmap(spectra, dB)
# Each column in the spectrogram matrix represents a single time frame. The frequencies are represented by the rows of the matrix. The lowest frequencies are the highest row numbers. There are 65 frequency bins (since there are 65 rows in the matrix: a result of the FFT) ranging from DC to 4000 Hz, in steps of
4000*Hz/64 = 62.5 Hz
# There are 290 time samples (rows), and each time sample represents a step of 8 msec.
sim := Re(spectra)
sim := scale(sim, 0, max(sim))
# The goal of the following processing steps is to make the features of the spectrogram as clear as possible. First, look at the original image:
# [component: inputs scale(sim, 0, 255)]
# In this image, the vowels are the dominant features. There is a noticeable pause between the word "image" and the word "processing." The clip function can be used to reduce the noise, which helps us see the features of the image more clearly. First, find the intensity range of the original:
max(sim) = 89.6207
min(sim) = 0
# Clip the intensity to values above the noise. There do not seem to be any bright noise glints, so allow the intensity to go all the way to the top of the intensity range: 255.
clipSim := clip(sim, 60, 255)
# [component: inputs scale(clipSim, 0, 255)]
# This did reduce the noise, but the image contrast is poor. The scale function can stretch the intensities in the image to take advantage of the full dynamic range.
scClSim := scale(clipSim, 1, 254)
# [component: inputs scClSim]
# This did improve the visual contrast, but brought some sections below the visible brightness threshold. Depending on which features are most interesting to you, this could be either an advantage or a disadvantage.
# An alternate method to scale the image to the full dynamic range is to use the equalize function:
equal := equalize(sim)
eqScCl := equalize(scClSim)
# [component: inputs equal]
# [component: inputs eqScCl]
# The noise in the original image is more obvious in the equalized view. Equalizing the clipped image shows how the noise was reduced.
# A different way to remove the noise is through median filtering. This tends to be effective on impulsive noise. Impulsive noise produces grainy, bright spots. Let's test this on the original spectrogram, and then the clipped, scaled, and equalized spectrograms.
medSim := medfilt(sim)
medEqual := medfilt(equal)
# [component: inputs scale(medSim, 0, 255)]
# [component: inputs medEqual]
# The median filter on the original signal does a good job of noise removal. The clipping could be avoided entirely using this method.
# Sometimes the most interesting aspects of a spectrogram are the boundaries. Many clues to a characteristic speech sound lie in the transitions between two adjacent sounds. The duration, frequency content, and strength of a transition region can carry information about the sound that will be produced. This is due to smooth changes in the vocal tract as a new sound is begun. Transition regions can also be useful for specifying segmentation of sounds for automatic speech recognition.
#
# Edge detectors can enhance these boundaries, facilitating their analysis. For example, here are the results of the kirsch edge detector applied to both the original, and the scaled, clipped original.
kirschSim := equalize(kirsch(sim))
kirScClSim := equalize(kirsch(scClSim))
# [component: inputs kirschSim]
# [component: inputs kirScClSim]
# Note that the edge images had to be equalized for better visualization. Their dynamic ranges were somewhat compressed by the edge-detection process. You might try some of the other edge finders built into this Extension Pack to see the difference.
# Another type of processing which can enhance specific features is morphological filtering. Morphological filtering can be thought of as a way of enhancing the shapes of image segments. It is a type of nonlinear filtering where a certain reference shape is compared to a each section of the image. It can be used to fill in small gaps in line segments and remove unwanted bumps. Wide lines can be reduced to narrow lines, and vice-versa by erosion and dilation operators.
# Morphological processing is useful for analyzing many key speech features which have characteristic frequency patterns as a function of time. For example, vowels and other voiced sounds have several frequency peaks, called formants, which are due to resonances of the vocal tract. As the vocal tract changes shape, the formant "tracks" change in frequency. The general formants can usually be picked out by thresholding but often appear blurry. Morphological filtering can be used to sharpen the "tracks" and make it easier to trace the dynamics of the speech signal.
#
# Erosion is used here to narrow down the boundary edges. The erosion function will simultaneously perform some clipping; the clipping threshold is set to 55 to reduce most of the background noise.
erodeSim := erode4(sim, 55)
# [component: inputs scale(erodeSim, 0, 255)]
# In this case, the results do not seem that different from simple clipping.
# A related process is skeletonization. This requires that the image be converted to a binary image. In order to make the final binary image visible, the results are multiplied by 255.
bsim := binarize(sim, 65)
skelBsim := skeleton(bsim)
# [component: inputs skelBsim*255]
# The skeleton results are quite interesting, though probably too complicated for easy interpretation. It will improve the clarity of the skeletonized image if the original is prefiltered to smoother regions before performing the binarization and skeletonization.
bScCl := binarize(scClSim, 50)
# [component: inputs bScCl*255]
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