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# VISUALIZATION AND SYNTHETIC IMAGES
# Ray Tracing and Mapping
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# It is possible to generate images by combining a "natural" image with a mathematically generated image, a technique frequently employed in digital art and advertising. Here we demonstrate the mathematics of the process. As an illustration, the Mona Lisa is reflected off the surface of a sphere. First, a square subimage of the original is loaded.
S := submatrix(READ_IMAGE("mona.bmp"), 0, 179, 0, 179)
# [component: inputs S]
D := cols(S)
D = 180
# For convenience, image coordinates are stored as complex numbers, and transformations are carried out by applying complex functions.
# Here the number of pixels in the synthetic image is set equal to the "natural" source image, though there's no reason these numbers need to be the same. The number of pixels is
D^2 = 32400
# The pixel coordinates are stored in the array I:
m := 0 .. D - 1
n := 0 .. D - 1
I[m, n] := (n + 1i*(D - 1 - m))/(2*(D - 1)) - (1 + 1i)/4
# The ray tracing model has the following geometry: the viewer's eye is 2 units from the center of a sphere of radius 1. The image plane, .5 units on a side, lies halfway between the viewpoint and the surface of the sphere, 1.5 units from the center of the sphere. One unit behind the viewpoint is a plane which contains the image of the Mona Lisa. The model will reflect this image off the sphere onto the image plane.
# If a ray misses the picture in this calculation, the pixel is set to black, otherwise, it follows the calculation. The reflected pixels are combined with the pixels that define the surface of the sphere.
# The following two functions do the ray tracing:
θ(z) := 2*atan(1/6*(1 - sqrt(1 - 12*|z|^2))/|z|)
α(z) := atan(2*|z|)
# The constant d, computed below, gives the size of the image of the sphere, that is, the distance from the center of the image plane of a pixel whose associated ray just grazes the surface of the sphere.
u := .2
d := root(2*θ(u) + α(u) - π/2, u)
# The sphere is given a realistic shape by making the brightness fall off from a point on the upper left. The function sphere takes care of this: The constant -0.1i + 0.1 determines the lighting direction, and the random term dithers the gray levels. (If you delete this term, you'll see distinct rings marking the transitions between levels.)
sphere(z) := 235/(1 + |(z - .1i + .1)*6|^2) + rnd(6)
# A mask function applies sphere to just those pixels which belong to the image of the sphere.
MI := vectorize(|I| < d)
K := vectorize(MI*sphere(I))
# For viewing, a gray background may be used instead of black. Here's the completed sphere:
Sphere := K + 150*(1 - MI)
# [component: inputs Sphere]
# The reflected image is constructed using the function P, which gives the intersection point for a light ray and z with the plane containing the Mona Lisa picture. The real part of the value of P is the horizontal coordinate and the imaginary part is the vertical coordinate.
P(z, theta) := (sin(theta) + (3 - cos(theta))*tan(α(z) + 2*theta))*z/|z|
# P is applied to every pixel, generating a matrix R of corresponding locations on the plane behind the view point. For pixels outside the sphere, the results are nonsense, but these will be masked. Ray-tracing calculations are typically very time-consuming, and even this simple example takes quite a while, since we're following 32,400 rays.
R := vectorize(P(I, θ(I)))
# The size and location on the plane of the Mona Lisa picture are specified by the constants size, up, and right. Increasing size corresponds to making the painting larger, and positive values for up and right move it in those directions. You can experiment by changing these values after following through with the original calculation.
size := 1
up := 20
right := 50
R := 20/size*R + 90 + up + (90 + right)*1i
# The intersection of each ray with the plane containing the picture is determined. If the ray falls within the picture, the image is given the value of the closest picture coordinate, otherwise the image value is set to 0. This step also takes a while to compute.
rd(x) := floor(x + .5)
T(z) := (Re(z) ≥ 0)*(Re(z) ≤ D - 1)*(Im(z) ≥ 0)*(Im(z) ≤ D - 1)
F[m, n] := if(T(R[n, m]), S[rd(Re(R[n, m])), rd(Im(R[n, m]))], 0)
# These image values are combined with the values defining the sphere. The values can simply be ORed together, while setting the background to an intermediate gray as was done before. Here's the result.
View1 := or(vectorize(F*MI), K) + 150*(1 - MI)
# [component: inputs View1]
# An alternative approach is to boost the reflected values where the sphere values are high, using a function like g:
g(a, b) := 255 - (255 - b)*((255 - a)/255)^(2/3)
H[m, n] := if(T(R[n, m]), g(K[m, n], S[rd(Re(R[n, m])), rd(Im(R[n, m]))]), K[m, n])
View2 := vectorize(H*MI) + 150*(1 - MI)
# [component: inputs View2]
# Neither of these approaches is particularly realistic - this sphere has a matte surface, whereas a reflected image assumes a mirror-like surface, so the combination looks a bit strange. But the 3D illusion is still fairly strong and could be embellished by better specifying the quality and quantity of light reflected from the sphere, as described in the section on ray tracing.
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