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# INTRODUCTORY MATERIAL
# Television Image Color Standards
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# This section describes functions for using the YIQ and YCbCr television color representations.
# Function Definitions and Syntax
# rgb_to_yiq(RGB) | yiq_to_rgb(YIQ)
# rgb_to_ycbcr(RGB) | ycbcr_to_rgb(YCbCr)
# The arguments to these functions are color matrices of one representation, and the functions return equivalent color matrices in a different representation.
# Function Details
# rgb_to_yiq(RGB) | yiq_to_rgb(YIQ)
# rgb_to_ycbcr(RGB) | ycbcr_to_rgb(YCbCr)
# Most computer-generated color images are in RGB format, where each pixel is represented by three numbers: red, green, and blue color intensities, which add together to make the color of the pixel. RGB is not what is used in color television, however. Instead, there are various color representation standards where there is a luminance or brightness value (symbol Y) that is used for black-and-white televisions, and two chrominance or color values.
# The human visual system has less acuity for spatial variation of color
# than for brightness. Therefore, instead of using RGB, it is better to use a
# single channel for brightness (luma) and use two other channels for the
# color information. In order to compress the images we can simply downsample the color information without losing much perceptual quality.
#
# Several type of channels can be used, and some of the most common ones are YIQ and YUV where Y is the luma and IQ and UV are the chroma channels (those which could be downsampled).
#
# Standard video equipment uses this type compression whether it is digital or analog.
# In North America, the NTSC has a standard known as YIQ, which is a linear transformation of RGB, as follows:
YIQmat := [0.2989, 0.5866, 0.1144; 0.5959, -0.274, -.3218; 0.2113, -0.5227, 0.3113]
RGB_in := [255; 255; 0]
YIQ_in := [0.9; 0.3; -0.3]
YIQ_out := YIQmat*RGB_in/255
RGB_out := 255*YIQmat^-1*YIQ_in
YIQ_out = [0.8855; 0.3219; -0.3114]
RGB_out = [255.163; 258.33; 14.8196]
# You can adjust the RGB_in and YIQ_in values above and see what the equivalent YIQ and RGB output values are. Normally, you would also want to round the calculated RGB values to integers.
# RGB image matrices can also be transformed to YIQ, and YIQ to RGB, using the rgb_to_yiq and yiq_to_rgb functions. Like Mathcad RGB, HLS, and HSV matrices, the YIQ matrices are stored with the Y, I, and Q submatrices pasted together side by side.
rgbplan := READRGB("planet.ppm")
yiqplan := rgb_to_yiq(rgbplan)
rgbplan2 := yiq_to_rgb(yiqplan)
# For digital television, the standard known as CCIR 601 stores images in a format called YCbCr, which is a linear transformation of RGB, with a more uniform range for the outputs, as follows:
YCbCr_coeff := [65.481, 128.553, 24.966; -37.797, -74.203, 112.0; 112.0, -93.786, -18.214]
YCbCr_offset := [16; 128; 128]
YCbCr_in := [210; 16; 146]
RGB_in := [255; 255; 0]
YCbCr_out := YCbCr_offset + YCbCr_coeff*RGB_in/255
RGB_out := 255*YCbCr_coeff^-1*(YCbCr_in - YCbCr_offset)
YCbCr_out = [210.034; 16; 146.214]
RGB_out = [254.619; 255.134; -0.0395897]
# You can adjust the RGB_in and YCbCr_in values above and see what the equivalent YCbCr and RGB output values are. Normally, both YCbCr and RGB values would be rounded to the nearest integer. RGB values range from 0 to 255, Y values range from 16 to 235, and Cb and Cr values range from 16 to 240 (the extremes of the range are used for other purposes in the signal).
# RGB image matrices can also be transformed to YCbCr, and YCbCr to RGB, using the rgb_to_ycbcr and ycbcr_to_rgb functions. Like Mathcad RGB, HLS, and HSV matrices, the YCbCr matrices are stored with the Y, Cb, and Cr submatrices pasted together side by side.
ycbcrplan := rgb_to_ycbcr(rgbplan)
rgbbuild3 := ycbcr_to_rgb(ycbcrplan)
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