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# IMAGE MANIPULATION
# Thresholding and Inversion
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# Function Definitions and Syntax
# threshold(M, thresh) | invert(M) | invert2(M)
# These functions allow you to discard all of an image's intensity levels below or above a threshold, or to invert them. Thresholding can be used to remove background features (or noise) in an image or to shift its intensity spectrum. Inversion can be used to enhance details.
# Arguments
# • M, an image matrix
# • thresh, the threshold level
# They return another matrix, which is an image with the specified transformation applied.
# Function Details | threshold(M, thresh)
# This function can be used in two ways. When thresh is positive, elements of M less than thresh are set to zero; otherwise they retain their original value. When thresh is negative, elements of M greater than the absolute value of thresh are set to zero; otherwise they retain their original value. When thresh is zero, all elements are set to zero.
# Read in a test image:
M := READ_IMAGE("earth.bmp")
# [component: inputs M]
# Set the cutoff threshold:
thresh := 160
Mtr := threshold(M, thresh)
# [component: inputs Mtr]
# Experiment with the value of the thresh above to see the effect on the image. Try some negative numbers, too.
# Function Details | invert(M)
# Returns the inverse levels of the image: 255 - level. The elements of M must be between 0 and 255 inclusive.
# For grayscale images, this is equivalent to a "photographic" negative.
Minv := invert(M)
# [component: inputs Minv]
# For color images, the effect is simply to replace all colors with their color complements.
Q := READRGB("apecolor.gif")
# [component: inputs Q]
colinv := invert(Q)
# [component: inputs colinv]
# Function Details | invert2(M)
# Returns the inverse of an image, similarly to the function invert, but obtained as max(M) - M + min(M) (the invert function always assumes the maximum value is 255). Thus images with values within any range can be inverted.
# Change range of an image:
Qs := scale(Q, 30, 200)
# [component: inputs Qs]
# Invert rescaled image:
Qsinv := invert2(Qs)
# [component: inputs Qsinv]
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