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# GEOMETRIC TRANSFORMS
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# Translating Images
# Function Definitions and Syntax
# translate(M, rows, cols, pad)
# This function allows you to translate, or move, an image within its matrix.
# Arguments
# • M, an image matrix
# • rows, cols, integers indicating number of rows and columns to translate
# • pad, the value assigned to "uncovered" areas of the image
# The returned matrix contains the translated image and is the same size as the input matrix.
# Function Details | translate(M, rows, cols, pad)
# The translate function can be used to translate matrices and pad the new part with any value. The part of the matrix that is moved outside of the original matrix bounds is discarded.
M2 := [1, 2, 3; 4, 5, 6; 7, 8, 9; 10, 11, 12; 13, 14, 15]
translate(M2, 2, -1, 150) = [150, 150, 150; 150, 150, 150; 2, 3, 150; 5, 6, 150; 8, 9, 150]
# In this example, we translate up by 50 rows and right by 89 columns, and pad with black pixels (0). Try different values for rows, cols, and pad, and see what happens.
CAM := READ_IMAGE("camera.bmp")
# [component: inputs CAM]
CAMt := translate(CAM, -50, 89, 0)
# [component: inputs CAMt]
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