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# VISUALIZATION AND SYNTHETIC IMAGES
# Bitmapped Type
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# The type on this screen is a simple image in which each pixel is either on (and possibly colored) or off (white). You can produce some interesting effects by applying some of the functions in this Extension Pack to a sample of bitmapped type. Here is a sample containing a few words in various fonts and line weights:
A := READ_IMAGE("type.bmp")
# [component: inputs A]
# Now we'll try some basic transformations:
# Make the type thicker:
# [component: inputs erode4(A, 100)]
# Generate outline type:
# [component: inputs 255 - (A - erode4(A, 100))]
# Put a shadow behind the type:
T := putregion(A, submatrix(A, 0, rows(A) - 3, 0, cols(A) - 3), 2, 2)
S := scale(T, 160, 255)
# [component: inputs and(S, A)]
# Make a cross-stitch sampler effect:
# [component: inputs diacrisp(A)]
# Fill the image with randomly placed copies of the original type:
# Set the number of copies:
N := 6
k := 0 .. N - 1
H[rows(A) - 1, cols(A) - 1] := 0
# The FFT can be used to make the copies
H[floor(rnd(rows(A) - 1)), floor(rnd(cols(A) - 1)) + 0*k] := 1  # recompute for different patterns
P := Re(ICFFT(vectorize(CFFT(A)*CFFT(H))))
# [component: inputs P*10000]
# Make an embossed effect using the row and column gradient functions:
GR := rowgrad(A)
GC := colgrad(A)
G := gaussconv(-or(GR, GC), .0003)
# [component: inputs scale(G, 0, 255)]
# All of these mimic the sort of text manipulation features you might expect to find in a reasonable painting program. The only trouble is, they don't conserve font features, that is, they readily round corners on sans serif fonts, and square edges on serif fonts. This may give you some insight as to why PostScript and TrueType fonts are required for more sophisticated font processing.
# A different approach to modifying the type image is to transform
# the locations of the black pixels directly. In Mathcad, it's easiest to do this if each pixel is stored as a complex number, since one value can then hold two coordinates. These values can be generated by making a list of complex numbers representing the coordinates within the image of each black pixel. The origin is the lower left corner.
#
# This computation takes a while, but once the locations are stored, subsequent interesting transformations are very speedy.
H := rows(A) - 1
W := cols(A) - 1
C :=
    p ← 0
    C[p] ← 0
    for m ∈ 0 .. H
        for n ∈ 0 .. W
            if A[H - m, n] == 0
                p ← p + 1
                C[p] ← n + 1i*(m - (H + 1)/2)
    C
r := 1 .. rows(C) - 1
m := 0 .. H
n := 0 .. W
# Now we're in business. Most transformations move the black pixels to noninteger locations, so each location is rounded to the nearest integer-coordinate point. A function that does this is
# Rounding:
rd(x) := floor(x + .5)
# A simple transformation makes italic type:
# Set the degree of slant (between -1 and 1):
s := .5
# The transformation:
f(z) := z + s*Im(z)
# Apply the transformation and display:
T1 := vectorize(f(C))
# Pixels are redistributed into the image matrix: a complicated expression, but it works.
U1[H, W] := 0
U1[rd((H + 1)/2 - Im(T1[r])), rd(Re(T1[r]))] := 255
# [component: inputs 255 - U1]
# Here are some other effects:
# Wave:
g(z) := z + 2i*sin(Re(z)/10)
T1 := vectorize(g(C))
U1[m, n] := 0
U1[rd((H + 1)/2 - Im(T1[r])), rd(Re(T1[r]))] := 255
# [component: inputs 255 - U1]
# Shrinking:
h(z) := Re(z) + Im(z)*1i/(1 + Re((z - .5*W)/50)^2)
T1 := vectorize(h(C))
U1[m, n] := 0
U1[rd((H + 1)/2 - Im(T1[r])), rd(Re(T1[r]))] := 255
# [component: inputs 255 - U1]
# Curving:
p(z) := exp(1i*(.5 - (2*π*z/(4*W))))*100
T1 := vectorize(p(C))
U1[m, n] := 0
U1[rd((H + 1)/2 - Im(T1[r])), rd(Re(T1[r]))] := 255
# [component: inputs 255 - U1]
# Twisted:
t(z) := Re(z) + 1i*Im(z)*sin(Re(z)/W*2*π)
T1 := vectorize(t(C))
U2[m, n] := 0
U2[rd((H + 1)/2 - Im(T1[r])), rd(Re(T1[r]))] := 255
# [component: inputs 255 - U2]
# You can make your own image affects using the setup given here. Just remember that the construction of the transformed array assumes that all the transformed pixels have nonnegative coordinates. If you see an error, some pixel has been mapped to a negative coordinate.
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