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# INTRODUCTORY MATERIAL
# Viewing Images in Mathcad
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# To view images in Mathcad, insert a picture region by choosing Picture from the Insert menu. The region appears empty, with a placeholder at the bottom.
#
# Enter the name of your image matrix into the placeholder. If you instead want to view an image from another application, copy it to the Clipboard then choose Paste or Paste Special from the Edit menu.
#
# If you want to output a section of the image that you select, check "Output Selected Matrix" in the Properties dialog. If you want the component to return the coordinates for a section of the image that you select, check "Output Selected Coordinates."
#
# If you selected "Output Selected Matrix" or "Output Selected Coordinates," you will also see placeholders for the names of variables for the matrix or coordinates. Fill those in.
#
# We will show several examples of image viewing below, and also discuss how to manipulate images.
# Note that the Picture region is similar in behavior to Mathcad components. For general information on working with either images or Mathcad components, refer to the Mathcad User's Guide.
# Grayscale Image Viewing
# A synthetic image is used for demonstration - one created by mathematics rather than by a physical process. For example, a Gaussian dot is constructed.
# Function for a Gaussian:
f(x) := e^(-x^2/4)
x := -20 .. 20
# To make an "image," construct a matrix of Gaussian values, which have a Gaussian profile in two dimensions:
# Range variables:
i := 0 .. 50
j := 0 .. 50
# Range of values:
r[i] := (i - 25)*.15
# Image matrix:
M[i, j] := 255*f(r[i])*f(r[j])
# This matrix is constructed here in 8-bit grayscale, as described in Introduction to Image Processing in Mathcad, although that is not strictly necessary for viewing.
# [component: inputs M]
# Here is the image as a surface plot of the gray levels:
# And here is the image, displayed in a picture region, with input type set to grayscale. Notice that, just as in the surface plot, the name of the input matrix variable, M, appears below the image. To view another matrix, change the name to a different variable.
# [component: inputs M]
# The image can be output to a file and read again later using the commands
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WRITEBMP("gaussian.bmp") := M  # disabled
# Enable Evaluation
Q := READ_IMAGE("gaussian.bmp")
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# as described in Reading and Writing Images.
# Writing from a CD
# Color Image Viewing
# Consider again the example of the 24-bit color square discussed in Introduction to Image Processing in Mathcad. We construct a slightly larger square this time:
redsquare[i, j] := 0
greensquare[i, j] := 0
bluesquare[i, j] := 0
q := 0 .. 25
v := 0 .. 25
value := 255
redsquare[q + 10, v + 10] := value
greensquare[q + 10, v + 10] := value - 100
bluesquare[q + 10, v + 10] := value
square := augment3(redsquare, greensquare, bluesquare)
# Here is the square, viewed as an image:
# [component: inputs square]
# Try changing the values of redsquare, greensquare, and bluesquare to adjust the mix of colors in the inner square. Try changing the entire greensquare matrix to be 0; now try the entire bluesquare matrix. Do you see what you expected given the additive color properties of your screen?
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WRITEBMP("square.bmp") := square  # disabled
# Enable Evaluation
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inner := READRGB("square.bmp")
# Writing from a CD
# Features of the Picture Regions
# An image in a picture region updates automatically if the mathematical expression that generates it in the Mathcad document is modified or updated, just like any other Mathcad component or expression.
# Besides changing its input matrix, the view of the image can also be modified in other ways. These are detailed below.
# For illustration purposes, we will use a new image in this section, and convert it to all four available image formats:
rgbimg := READRGB("strike.tif")
hlsimg := rgb_to_hls(rgbimg)
hsvimg := rgb_to_hsv(rgbimg)
grayimg := rgb_to_gray(rgbimg)
# Scaling
# Mathcad does not scale images automatically. Therefore, you see a completely black image when viewing a matrix full of 0's and 1's, or a completely white one when viewing a matrix of 255's and 256's, for example. To scale the image in the viewer, you can use the scale function to scale over the spectrum from 0 to 255. For example:
M := binarize(grayimg, 100)  # The binarize function creates a matrix of 0's and 1's.
# Scaled | Not Scaled
# [component: inputs M]
# [component: inputs scale(M, 0, 255)]
# Alternatively, you can multiply the argument to the viewer by 255 or another constant:
# [component: inputs M]
# [component: inputs M*255]
# Activation, Toolbars, and Menus
# Most of the commands below require that the image is "activated" beforehand. To activate an image, simply click it. A resizable border appears around the image, and the Picture toolbar becomes visible. The viewing operations can be performed with the toolbar, in most cases (see below).
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# With the image is active and the toolbar in view, as you move the mouse over the image, you will see the location of the mouse cursor and the image pixel value (red, green, and blue values if it is a color image) displayed in the lower half of the toolbar.
# Commands for image processing are also located on the menu that you see when you right-click an image.
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# Displayed Matrix and Color Interpretation
# The image matrix displayed in the picture region is governed by the variable name in the lower left corner, just like a Mathcad component.
#
# The image can be interpreted as RGB color, HSV color, HLS color, or grayscale. (See the section on systems of color images for more information.) You can change the color setting by right-clicking the image, selecting Properties and selecting another color option in the Inputs section. Click "OK" to close the dialog.
#
# Try changing the viewers below to different settings and input matrices and see how the viewer displays them. (You may want to adjust the brightness and contrast or the size of the image after changing the image type - see below.)
# [component: inputs grayimg]
# [component: inputs rgbimg]
# [component: inputs hlsimg]
# [component: inputs hsvimg]
# Size, Scale, and Displayed Portion of the Image
# There are several ways you can manipulate the size, scale, and displayed portion of an image.
#
# The amount of space the image takes up in the Mathcad document can be changed by activating the image (see above), and then resizing the image using its resize border. Doing so leaves the zoom factor (scale) of the image unchanged, but if you make the box smaller, you may only see part of the image. The image is not redrawn until you have indicated to Mathcad that you are done editing, by clicking outside the image.
#
# To change which part of the image is displayed, activate it and use the mouse to pan the image until the desired portion is displayed (hold the left mouse button down on the image, and move the mouse, and the image moves with the mouse; release the mouse when finished).
#
# Here is an image that is only partly displayed. Try displaying more or less of the image, or a different part of it.
# [component: inputs rgbimg]
# The scaling, or zoom factor, of the image can also be changed by using the zoom buttons on the left side of the Picture toolbar. Try adjusting the zoom factor on the image above.
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# Zoom buttons: Zoom In, Zoom Out,
# Zoom to Window, and Reset Zoom Factor.
# Orientation of Image
# The image is normally viewed in its natural orientation - the same orientation as you would see it if you looked at the numbers in the matrix in Mathcad. However, you can also view it in flipped, transposed, or rotated orientations by using the orientation buttons in the Picture toolbar. Try adjusting the orientation on the image below.
# [component: inputs rgbimg]
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# Orientation toolbar buttons: Rotate Counterclockwise, Rotate Clockwise, Flip Horizontally, Flip Vertically, Transpose (exchange x and y), and Reset Orientation.
# Brightness, Contrast, and Colormap
# There are also other ways to change the brightness contrast, and color mapping of images. First, you can adjust the brightness and contrast by selecting the Window/Level (Brightness/Contrast) toolbar button. Doing so brings up a dialog box showing the contrast window over a histogram of the pixel values, and you can move the edges to change the brightness and contrast.
#
# The brightness and contrast can also be reset to their full dynamic range by selecting the Reset Window/Level toolbar button.
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# Histogram for adjusting brightness and contrast that appears in the dialog box. The red edges of the contrast window represent the maximum input pixel level to be mapped to black, and the minimum to be mapped to white (or red/green/blue).
# Window/Level (Brightness/
# Contrast) and Reset Window/Level
# [component: inputs grayimg]
# Try adjusting the brightness and contrast on this image. The brightness and contrast changes as you move the contrast window edges in the dialog, unless you un-check the "Continuous Apply" option (in which case it only updates when you click the "Apply" button in the dialog box).
# For grayscale images, besides adjusting the brightness and contrast, you can also use the Grayscale Colormap menu item or toolbar button to view them in false color. The dialog box has several components. First, it allows you to adjust the brightness and contrast as above, to pick which pixel values in your image are mapped to black, and which to white. Then, it allows you to choose colors to represent black and white in your image, and the number of distinct colors to use when interpolating between the two colors. Below is an example of a false-color view of a grayscale image, using 10 colors between red and blue. You can try adjusting the colormap to other values.
# [component: inputs grayimg]
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# Grayscale Colormap and Reset Grayscale Colormap buttons
# The Reset Grayscale Colormap toolbar button and menu item can be used to reset to black-and-white viewing.
# Selection, Output, Copy, and Paste
# You can select part or all of your image, and perform various operations on it.
#
# You can use the commands in the Select/Pan section of the context menu, or the corresponding toolbar buttons, to choose what type of region you would like to select: a rectangle, a column, a row, or a single pixel (column and row are relative to the currently displayed orientation of the image). Once the type is selected, each time you hold down the left mouse button on the image and drag the mouse, you draw a selection region.
#
# There are also a Select All menu item and corresponding toolbar button that causes the entire image to be selected. If you choose Select All to select the entire image, you can deselect the entire image by double-click on it. Then you can make a different selection.
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# Select Rectangle, Pixel, Column, and Row
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# Select All
# Once you have a region of interest selected in your image, there are several things you can do with it. First, you can copy it to the Windows Clipboard as a bitmap image, and paste it into Mathcad or any other application that can display bitmap images. To copy a selection, choose Copy Selection from the Select/Pan section of the image's menu or the Copy Selection button on the toolbar. (Choosing Copy from the Edit menu copies the entire region to the clipboard.) The copied bitmap will have the displayed brightness, contrast, and colormap, but the image's native orientation and zoom factor.
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# Copy Selection
# You can also output the pixel values in the selection and/or the coordinates of the corners of the selection region directly as Mathcad variables. To do so:
#
# 1. Right-click on the image and choose Properties from the menu.
# 2. Check the "Output Selected Matrix" and/or "Output Selected Coordinates" boxes.
# 3. Click "OK."
#
# The picture will have spaces for output variable names at the
# upper left corner. An example is shown below. If you change the selection region (and click outside the image to tell Mathcad you are done editing), the outputs update automatically.
# [component: inputs grayimg; outputs [outcoords; outmatrix]]
outcoords = [0; 0; 255; 199]
outmatrix = [
    0, 0, 0, 0, 0, 0, 0, 0, 0, 0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;
    0, 0, 0, 0, 0, 0, 0, 0, 0, 0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;
    0, 0, 0, 0, 0, 0, 0, 0, 0, 0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;
    0, 0, 0, 0, 0, 0, 0, 0, 0, 0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;
    0, 0, 0, 0, 0, 0, 0, 0, 0, 0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;
    0, 0, 0, 0, 0, 0, 0, 0, 0, 0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;
    0, 0, 0, 0, 0, 0, 0, 0, 0, 0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;
    0, 0, 0, 0, 0, 0, 0, 0, 0, 0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;
    0, 0, 0, 0, 0, 0, 0, 0, 0, 0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;
    0, 0, 0, 0, 0, 0, 0, 0, 0, 0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]
# You can now use the output matrix or coordinates in subsequent Mathcad calculations.
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