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# IMAGE FILTERING AND RESTORATION
# Wavelet Smoothing
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# A wavelet-based method for smoothing or "de-noising" an image has been developed for images corrupted by Gaussian noise or uniformly distributed noise. It involves thresholding in the transform domain.
# A noisy version of a good image is created by using uniformly distributed noise in the range 0 to 150 generated by the Mathcad random number generating function rnd.
M := READ_IMAGE("bridge.bmp")
i := 0 .. rows(M) - 1
j := 0 .. cols(M) - 1
noise[i, j] := 150
N := vectorize(M + rnd(noise))
# Here are the original and noisy versions of the image:
# [component: inputs M]
# [component: inputs scale(N, 0, 255)]
# The method of smoothing we are going to use is "soft-thresholding" of wavelet transform coefficients, as suggested by the statisticians D. Donoho and I. Johnstone. The first step is to take the wavelet transform of the image:
Q := wave2d(N, 7)  # error: The type initializer for "Efi.Image" threw an exception.
# To begin noise removal, a guess is made as to how much the average wavelet coefficient has been corrupted by the added noise. This will be used in the thresholding steps.
thresh := 40
# The thresholding comprises two different operations. First, if a wavelet coefficient is smaller than the threshold, it is assumed to be an artifact of the noise and is set to zero. On the other hand, theory dictates that the noise is distributed over all the coefficients; even if a coefficient is larger than the threshold, the supposed contribution from the noise must be subtracted from it. The formula which describes these operations is:
η(coeff, thresh) == sign(coeff)*min(|coeff| - thresh, 0)
# In Mathcad this operation can be performed using the vectorize operator, as follows:
temp := vectorize((2*Φ(Q) - 1)*(|Q| - thresh)*(|Q| > thresh))  # error: bad_variable
# Finally, inverse wavelet transform back to the image domain. Be sure to rescale the image before viewing.
recons := iwave2d(temp, 7)  # error: bad_variable
# [component: inputs scale(recons, 0, 255)]
# As with most filtering methods, there are tradeoffs between the amount of noise removed and the amount of detail retained in the original image. In this method this tradeoff is captured by the choice of thresholding parameter. The larger the value of thresh, the more noise is removed and the more details are lost.
# It is interesting to compare the performance of soft-thresholding of wavelet coefficients to some of the other smoothing methods provided in the Image Processing Pack. First, compare the method with smoothing with one of the averaging filters:
Ncons := scale(orthosmooth5(N), 0, 255)  # error: The type initializer for "Efi.Image" threw an exception.
# [component: inputs Ncons]
# This filter does a good job of removing the noise, but at the expense of feature blurring. In particular, the averaging filter has smoothed out the edges in the railing on the bridge. The wavelet-based smoothing retains those edges in much more detail.
# As a last comparison let's try to use a median filtering scheme to do the smoothing:
Nmed := scale(medfilt(N), 0, 255)  # error: The type initializer for "Efi.Image" threw an exception.
# [component: inputs Nmed]
# Median filtering has not really eliminated any of the noise in the image. Its performance on this example is poor, as expected, since almost every pixel in this image is corrupted with a nontrivial amount of noise, so the chance of a median filter consistently finding uncorrupted pixel values is slim.
# Wavelet smoothing techniques appear promising, but are in their infancy and are primarily a tool for researchers. There are a wide variety of techniques, including the algorithms used in this pack, to explore. In contrast to research papers on the subject of smoothing by wavelet thresholding, the wavelet transform used here is not an orthonormal wavelet; instead, a biorthogonal wavelet based on the Laplacian pyramid filter is used. Most of the theoretical results of these papers do not strictly hold for this wavelet. However, the biorthogonal Laplacian pyramid wavelet is close to being orthonormal, so the deviation from theoretical predictions should not be large.
# In this example the wavelet thresholding method was better than, or competitive with, other smoothing algorithms. The technique is not useful with salt-and-pepper noise, or other sorts of impulsive noise. The strengths of wavelet smoothing are removal of nonimpulsive noise and preservation of detail. For more comparisons and discussions of noise removal, see the example on Filtering Noise.
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