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# THE TRANSFORM DOMAIN
# Wavelet Transform Filtering
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# Function Definitions and Syntax
# wave2d(M, j) | iwave2d(M, j) | wavescale(M, j, Min, Max)
# The first two functions compute the j-level wavelet and inverse wavelet transform, respectively. The wavelet used is the biorthogonal wavelet basis derived from the Burt-Adelson Laplacian Pyramid. The third function is a utility provided to better view images in the transform domain. Wavelet transforms can sometimes represent images more compactly than a standard Fourier transform.
# Arguments
# • M, an image matrix: number of rows and columns must be divisible by 2^j.
# • j, the wavelet level
# • Min, Max, the minimum and maximum intensity scale for viewing
# The functions return a matrix containing the transformed image.
# Function Details | wave2d(M, j)
# As an example of the use of the wavelet transform, consider the blue subimage of the ultraviolet picture of Jupiter:
Mfull := READRGB("jupiter2.gif")
M := extract(Mfull, 3)
# [component: inputs M]
# One can simply choose the number of levels one desires, and then apply the transforms:
level := 1
N := wave2d(M, level)
# [component: inputs scale(N, 0, 255)]
# Function Details | iwave2d(M, j)
# Verify that the reconstructed image is identical with the original:
Rec := iwave2d(N, level)
Rabs := vectorize(|Rec|)
# [component: inputs Rabs]
# The absolute value of the reconstructed image was taken before viewing. Even though the wavelet transform theoretically guarantees perfect reconstruction, there are errors due to round-off in the computer. The presence of very small negative numbers in the reconstructed image will cause distortions unless the image is rescaled or viewed as an absolute value. (Try removing the absolute value and take a look!) In any case, the round-off errors are very small, as we can see:
maxErr := max(vectorize(|Rec - M|))
maxErr = 2.27374e-13
# Since the wavelet transform has both positive and negative values, it is helpful to rescale before viewing. However, doing this naively often results in hidden information, as in the scaled transform image above.
# What you see is typical of the wavelet transform: the region is broken up into four distinct regions corresponding to the different combinations of low-pass and band-pass filtering in the horizontal and vertical directions of the image. Only the upper left corner (the low-pass/low-pass part) is significant, due to the coefficients in that part of the transformed image, which tend to be larger than in the other parts and hence obscure the smaller coefficients when scaled. To remedy this masking effect, a routine is included which scales each subimage of a transform independently of others.
# Function Details | wavescale(M, j, m, n)
indep := wavescale(vectorize(|N|), level, 0, 255)
# You can clearly sees the improvement in the display when independence among subimages is maintained. If one increases the level of the wavelet transform, there are even greater benefits to using the function wavescale(N, j, m, n) instead of scale(N, m, n).
# [component: inputs scale(indep, 0, 255)]
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