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# GEOMETRIC TRANSFORMS
# Zooming and Scaling
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# Function Definitions and Syntax
# zoom(M, hscale, vscale)
# This function scales an image, with independent scales in the horizontal and vertical dimensions.
# Arguments
# •  M, an image matrix
# •  hscale, vscale, horizontal and vertical scales for zooming (ratio of output to input size)
# The function returns the scaled image, which is a different size matrix from the input.
# Function Details | zoom(M, hscale, vscale)
# Expands or contracts an image horizontally and/or vertically, changing its dimensions.
R := READ_IMAGE("pattern.bmp")
Rz := zoom(R, 2, .5)
# The original image:
# [component: inputs R]
# The zoomed image:
# [component: inputs Rz]
i := 0 .. 2
j := 0 .. 3
M[i, j] := mod(i + j^2, 256)
M = [0, 1, 4, 9; 1, 2, 5, 10; 2, 3, 6, 11]
zoom(M, 2, 3) = [
    0, 0, 0, 1, 1, 1, 4, 4, 4, 9, 9, 9;
    0, 0, 0, 1, 1, 1, 4, 4, 4, 9, 9, 9;
    1, 1, 1, 2, 2, 2, 5, 5, 5, 10, 10, 10;
    1, 1, 1, 2, 2, 2, 5, 5, 5, 10, 10, 10;
    2, 2, 2, 3, 3, 3, 6, 6, 6, 11, 11, 11;
    2, 2, 2, 3, 3, 3, 6, 6, 6, 11, 11, 11
]
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