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# COMBINATIONS OF IMAGES
# Boolean Operations
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# Function Definitions and Syntax
# and(M, N) | or(M, N)
# These functions combine two binary (pixel intensities of 0 and 255 only) images according to the Boolean AND and OR functions. AND and OR functions can be used, for example, to find features in color images, by thresholding the three colors (RGB) separately, and ANDing or ORing the three binary images.
# Arguments
# • M, the first image matrix
# • N, the second image matrix, of the same size as the first
# The functions return a binary image matrix which contains either the Boolean operation M AND N or the Boolean operation M OR N. Note: Nonbinary image inputs to and(M, N) find the minimum of the two images on a pixel-by-pixel basis; likewise, or(M, N) finds the maximum.
# Function Details | and(M, N)
# This function performs a Boolean AND on binary (0/255) images and a minimization function on grayscale images. M and N must be the same size. If either of the two corresponding pixels in the images is zero, this function returns zero; if they are both 255, it returns 255. Otherwise, the function returns min(M_ij, N_ij). For example:
A := [0, 40, 0; 10, 255, 129; 23, 255, 250]
B := [0, 20, 50; 10, 255, 129; 154, 0, 27]
and(A, A) = [0, 40, 0; 10, 255, 129; 23, 255, 250]
and(A, B) = [0, 20, 0; 10, 255, 129; 23, 0, 27]
# For a larger example, let's construct a binary image:
M[200, 200] := 0
i := -30 .. 30
j := -10 .. 10
M[100 + i, 100 + j] := 255
M[50 + i, 50 + j] := 255
M[150 + i, 150 + j] := 255
M[50 + i, 150 + j] := 255
M[150 + i, 50 + j] := 255
# [component: inputs M]
# Now construct a second image, to AND with the first:
r := 0 .. 200
c := 0 .. 200
N[r, c] := |[r - 100; c - 100]|*255/(100*sqrt(2))
N := 255*binarize(N, 100)
O := and(M, N)
# [component: inputs N]
# [component: inputs O]
# Function Details | or(M, N)
# This function performs a Boolean OR. M and N must be the same size. If corresponding pixels of M and N are both zero, the function returns zero; otherwise it returns max(M_ij, N_ij).
or(A, A) = [0, 40, 0; 10, 255, 129; 23, 255, 250]
or(A, B) = [0, 40, 50; 10, 255, 129; 154, 255, 250]
OR := or(M, N)
# [component: inputs OR]
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