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# VISUALIZATION AND SYNTHETIC IMAGES
# Instant "Art"
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# Some of the functions in this Extension Pack allow you to create images that bear some resemblance to various schools of modern art. A few are illustrated here.
# RGB Color Fields
# Three random images are smoothed and quantized to generate contours with a given level; the red, green, and blue components of these images are combined to get an interesting layered color image.
# The most efficient way to make random arrays is to apply a random number function to an empty array using Mathcad's vectorize operator.
f(x) := rnd(256*L)
E[127, 127] := 0
A := vectorize(f(E))
B := vectorize(f(E))
C := vectorize(f(E))
# A mask for smoothing with smoothing degree N is set below.
i := 0 .. 64
j := 0 .. 64
mask2[i, j] := (i < N)*(j < N)
# Each random array is filtered using the FFT, and the result quantized. The variable levels is set below.
AA := matconv(A, mask2)
AA := imquant(scale(AA, 0, 255), levels)
BB := matconv(B, mask2)
BB := imquant(scale(BB, 0, 255), levels)
CC := matconv(C, mask2)
CC := imquant(scale(CC, 0, 255), levels)
# Now view the result:
# [component: inputs augment3(AA, BB, CC)]
# The integer N controls the degree of smoothing; higher N gives less smoothing.
N ≡ 3
# The variable levels sets the number of levels in each color:
levels ≡ 8
# To recompute with the same N and levels but new random images, click the definition of L below and press [F9] to recompute.
L ≡ 1
# HSV Stripes and Plaids
# Pretty patterns of random stripes reminiscent of the paintings of Gene Davis result when the columns of the hue matrix in an HSV image are divided into sections of random length and filled with a random hue value. The following arithmetic carries out this scheme.
a[0] := 1
M :=
    m ← 0
    M[0] ← 0
    m ← m + 1
    while M[m - 1] ≤ 160
        M[m] ← M[m - 1] + 1 + floor(rnd(12))
        m ← m + 1
    M[m] ← M[m - 1] + 1 + floor(rnd(12))
    M
# The vector M contains the boundaries between the stripes. Random hues, one for each stripe, are assigned in the vector H. The hist function picks out the hue corresponding to each column, so this hue can be multiplied by a column of 1's.
n := 0 .. rows(M) - 2
i := 0 .. M[rows(M) - 1]
u[i] := 1
H[n] := rnd(360)
HI[:, i] := u*(hist(M, a*i)*H)
# To give the saturation and value some variety, the same process is repeated on these components, biasing the values toward the high end of the scale:
S[n] := 200 + rnd(56)
SI[:, i] := u*(hist(M, a*i)*S)
V[n] := 200 + rnd(56)
VI[:, i] := u*(hist(M, a*i)*V)
# The H, S, and V matrices are recombined for viewing. To turn the stripes into plaid, we average each matrix with its transpose. To generate a new random stripe pattern and the associated plaid, click in the definition of K below and then press [F9] to recalculate.
# [component: inputs augment3(HI, SI, VI)]
# [component: inputs augment3((HI + transpose(HI))/2, (SI + transpose(SI))/2, (VI + transpose(VI))/2)]
K ≡ 1
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