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# IMAGE MANIPULATION
# Binarization and Quantization
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# Function Definitions and Syntax
# binarize(M, thresh) | binarize_auto(M)
# binarize2(M, lowThresh, highThresh, inValue, outValue)
# imquant(M, n) | imquant2(M, v)
# These functions allow you to change the number of gray (or color) levels in an image. Binarization produces an image with only two levels. Quantization produces an image with n levels. Binarization and quantization can be used for enhancing features of an image by choosing the appropriate threshold or number of levels. They can also be a first step in analysis of an image.
# Arguments
# • M, an image matrix, and
# • thresh, the threshold level for binarization, or
# • n, integer number of levels in the final quantized image, or
# • lowThresh, highThresh, outValue, inValue, or
# • v, a vector of code book values.
# Each function returns another matrix, which is an image with the specified transformation applied.
# Function Details | binarize(M, thresh)
# For each element, returns 0 if the element ≤ thresh; 1 otherwise.
# Read in an example bitmap:
bridgegray := READ_IMAGE("bridge.bmp")
# [component: inputs bridgegray]
# Set a threshold:
thresh := 128
# Produce a binarized image:
B := binarize(bridgegray, thresh)
# [component: inputs scale(B, 0, 255)]
# Try changing the value of thresh to see the effect on this grayscale image.
# Function Details | binarize_auto(M)
# This function works like binarize, but it chooses a threshold value automatically, assuming a bimodal distribution of "foreground" and "background" pixels. The algorithm uses a criterion due to Kittler and Illingworth that minimizes the fit between the actual pixel histogram and the assumed bimodal distribution (see R. M. Harlick and L. G. Shapiro, Computer and Robot Vision, Vol. 1, Addison-Wesley, 1992).
#
# Automatic binarization is useful in machine vision applications to pick out items of interest. Let's apply it to a grayscale digitized photo of an industrial part:
partgray := READ_IMAGE("part.gif")
partbin := binarize_auto(partgray)
# Input image with contrast adjusted to see grayscales: | Binarized image:
# [component: inputs partgray]
# [component: inputs partbin*255]
# Function Details | binarize2(M, lowThresh, highThresh, inValue, outValue)
# This is a more flexible version of binarize. It sets all levels between lowThresh and highThresh to inValue, and all the rest of the image to outValue. The values for the input parameters are arbitrary and do not have to be between 0 and 255. outValue and inValue may be the same, in which case the entire image is set to one level only.
# Set the image levels between 50 and 150 to 25, and the rest of the levels to 200:
B2 := binarize2(bridgegray, 50, 150, 25, 200)
# Note that the contrast was automatically adjusted in the picture operator, so that the pixels with value 25 are black and value 200 are white.
# [component: inputs B2]
# This function may be useful to emphasize or de-emphasize particular ranges of levels.
# Function Details | imquant(M, n)
# Replaces the levels of M with n levels 2 ≤ n ≤ 256. n must be an integer.
n := 4
M := [0, 100, 98; 23, 39, 148; 242, 255, 32]
imquant(M, n) = [0, 85, 85; 0, 0, 170; 255, 255, 0]
# Try changing the value of n and see how this changes the output.
# Now, experiment with the effect this produces on the grayscale image used above.
levels := 3
Q := imquant(bridgegray, levels)
# [component: inputs Q]
# Function Details | imquant2(M, v)
# imquant2 works similarly to imquant, but allows you to specify the quantization levels (also called code book levels) explicitly. You can specify the levels in the vector v, which is just a one-column matrix. The values in v must be
# strictly ascending, but they may be any real number. This specification is useful if you want to use quantization levels which are not uniformly spaced within the range of the given image.
# Define vector of 3 quantization levels:
v := [33; 122; 200]
Q2 := imquant2(bridgegray, v)
# [component: inputs Q2]
# Compare this 3-level quantization with the previous one.
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