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# EDGE FINDERS
# Canny Edge Detector
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# Function Definition and Syntax
# canny(M, sigma, low, high)
# This function uses Canny's algorithm for detecting edges in an image. The algorithm has several steps involving convolution with a derivative-of-Gaussian kernel, and several thresholding steps. This edge-detection algorithm can be used to find boundaries of objects in an image.
# Arguments
# • M, the image matrix.
# • sigma, the standard deviation of the derivative-of-Gaussian kernel. Large values result in coarser edges and small values in finer edges. Value is greater than 0, typically between 0 and 2. It should also be true that: 4*ceil(sigma) ≤ min(rows(M), cols(M))
# • low, the lower threshold value for intensity gradients: values are real and low < high.
# • high, the upper threshold value for intensity gradients: values are real and low < high.
# The function returns a binary image matrix containing the detected edges, where the edge points have value 1 and the background has value 0. The perimeter of the image will have undefined values, since the kernels will not fully overlap the image there.
# Function Details
# canny(M, sigma, low, high)
# This function uses Canny's algorithm for detecting edges in an image, M. This algorithm finds locations of edges very accurately and minimizes the appearance of false edges.
#
# Canny's edge detection algorithm consists of three stages.
#
# 1. Convolution of the input image with a derivative-of-Gaussian kernel, where sigma is the standard deviation of the Gaussian. sigma plays the role of a scale parameter for the edges: large values of sigma produce coarser scale edges and small values of sigma produce finer scale edges. Larger values of sigma also result in greater noise suppression.
#
# 2. Nonmaxima suppression along the direction of the intensity gradient for each pixel.
#
# 3. Hysteresis thresholding using the low and high threshold values. In hysteresis thresholding, the magnitudes of the intensity gradients are first thresholded using the lower threshold value. Then, pixels that have gradient magnitudes above the lower threshold, but with connected segments having at least one pixel with gradient magnitude larger than the higher threshold are retained.
# Here is an example of Canny's edge detection on an artificial image.
R := READ_IMAGE("pattern.bmp")
E := canny(R, .2, 0.1, 0.2)
# [component: inputs R]
# [component: inputs E*255]
# You can observe the effect of changing the parameter values on the edges in the output image. For example, increasing the value of sigma produces coarser edges (better for the noisy horizontal strip), but a loss of detail elsewhere (for example, two edges may start merging into one). Increasing the value of the lower threshold leads to a cleaner edge image because only edges above a certain gradient value are retained. Increasing the value of the upper threshold illustrates the effect of hysteresis thresholding. Larger values of high result in the complete disappearance of edges corresponding to objects with no pixel on a connected edge of intensity greater than high.
# Next we show applications of Canny's edge detection on natural images.
R := READ_IMAGE("brain.gif")
E := canny(R, 1.0, 5, 10)
# [component: inputs R]
# [component: inputs E*255]
# Application of this algorithm on the brain image, above, shows that it can detect
# the most salient edges on the image, including boundaries of the head and the
# boundaries of the brain. By adjusting the values of the various parameters,
# we can get more or less detail, as needed.
# Now let's apply the algorithm to a fingerprint image:
R := READ_IMAGE("fingerp.gif")
E := canny(R, 2.0, 2, 5)
# [component: inputs R]
# [component: inputs E*255]
# Again, the application of this algorithm finds the boundaries of the major contours on the fingerprint image, which can then be input to a pattern-recognition system.
# Finally we show the application of this edge-detection algorithm on the
# photograph of Lena.
R := READ_IMAGE("lena.bmp")
E := canny(R, 0.5, 10, 20)
# [component: inputs R]
# [component: inputs E*255]
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