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# FEATURE EXTRACTION
# Convex Hull
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## Function Definitions and Syntax
# cnvxhull(M, fg)
# This function computes the convex hull of an image. The convex hull is a way of characterizing the shape of an image by determining which pixels are adjacent to other pixels of the same intensity. This is a good way to find holes and convex features in an image.
## Arguments
# • M, an image matrix
# • fg, intensity value of foreground pixels
# The function returns a binary image matrix that contains the convex hull of M, with foreground pixels set to value 1 and background to 0.
# Function Details | cnvxhull(M, fg)
# This function finds the convex hull of the pixels with foreground intensity value fg in matrix M. The output is binarized with values of 1 inside the convex hull and 0 outside. The algorithm used is described in Digital Picture Processing by A. Rosenfeld and A. C. Kak, page 269, 1982.
#
# The hull is found by choosing P1 as the leftmost and topmost point of the set of pixels in M and L1 as the horizontal line through P1. Then it rotates L1 about P1 until it hits the value fg in the set of pixels. Calling the resulting rotated line L2 and letting P2 be the point farthest from P1 along L2, the algorithm then repeats, until Pn = P1. The union of {P1,P2, ... , Pn-1} are the vertices of the convex hull.
# For example:
D := [0, 0, 1, 0, 1, 2; 0, 0, 0, 1, 0, 0; 2, 1, 2, 0, 1, 1; 0, 0, 0, 1, 0, 0; 0, 0, 2, 1, 0, 0]
# Compute the convex hull of the set with foreground pixel value 1:
D1 := cnvxhull(D, 1)
D1 = [0, 0, 1, 1, 1, 0; 0, 1, 1, 1, 1, 1; 0, 1, 1, 1, 1, 1; 0, 0, 1, 1, 1, 0; 0, 0, 0, 1, 0, 0]
# Notice that the convex hull contains all the pixels of 1 in the original matrix, and it is the smallest convex set.
# If we select the foreground pixel value as 2, we have a different convex hull:
D1 := cnvxhull(D, 2)
D1 = [0, 0, 1, 1, 1, 1; 0, 1, 1, 1, 1, 1; 1, 1, 1, 1, 1, 0; 0, 1, 1, 1, 0, 0; 0, 0, 1, 0, 0, 0]
# In the next example, a binary image of a kernel of corn is superimposed with its convex hull, demonstrating the usefulness of the hull in describing the contour and holes in an image:
M := READ_IMAGE("corn1.bmp")
Mbin := binarize_auto(M)
# Find the convex hull of the white (1) pixels in the binarized image, and then subtract the image from the hull to find the convex deficiency. Instead of subtracting directly, the binarized image and convex hull are scaled so the area outside the hull is gray, the image pixels black, and the convex deficiency white:
Mcvx := cnvxhull(Mbin, 1)
Mdef := scale(127*Mcvx - 255*Mbin, 0, 255)
# [component: inputs M]
# [component: inputs Mbin*255]
# [component: inputs Mdef]
# The outside of the hull is gray, the image is black, and the convex deficiency appears in white in the final image, Mdef.
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