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# FEATURE EXTRACTION
# Connected Component Labeling
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# Function Definitions and Syntax
# concomp(M, con, fg)
# This function performs connected component labeling of an image. Two pixels are connected if they have the same value, and connectivity can be classified as 4 (only horizontal or vertical neighbors) or 8 (diagonal neighbors as well). Connected components are a useful way to automate image feature recognition, bounding like areas and holes in the image.
# Arguments
# • M, an image matrix
# • con, the connectivity type: 4 or 8
# • fg, the target foreground intensity value
# The function returns a matrix which contains the connected component labels as unique integers.
# Function Details | concomp(M, con, fg)
# Connected component labeling of an image M is an operation on a binary image, which for purposes of this function means it considers one pixel value (fg) from the image to be foreground and everything else to be background. The algorithm finds the 4- or 8-connected components of the foreground pixels and assigns each component a unique integer label, starting with 1, in the output. Background pixels are assigned label 0.
# As an example, try a small matrix with several fg = 100 values:
M := [130, 100, 65; 150, 100, 90; 100, 40, 50]
concomp(M, 4, 100) = [0, 1, 0; 0, 1, 0; 2, 0, 0]
concomp(M, 8, 100) = [0, 1, 0; 0, 1, 0; 1, 0, 0]
# In this example, there are two 4-connected components with pixel value 100, but only one component if 8-connectedness is used.
# Now let's visually examine the effect this has on a binary image. Let's use a two-dimensional sinc function:
f(x) := sinc(x*π/2)^2
# Range variables:
imax := 100
i := 0 .. imax
j := 0 .. imax
# Range of values:
r[i] := (i - imax/2)*.1
# Image matrix:
D[i, j] := 255*f(r[i])*f(r[j])
# Binarize the image, and look at it:
M := binarize(D, 4)
# [component: inputs M*255]
# Now apply the connected-components labeling algorithm to this image. Counting distinct regions, we expect there to be 9 unique connected components in this image.
cimg := concomp(M, 4, 1)
# Verify the number of components found by the algorithm:
max(cimg) = 9
# And look at the connected-component image using false color to enhance the components visually:
colormap := [
    0, 0, 0, 0;
    1, 255, 255, 255;
    2, 255, 0, 255;
    3, 0, 255, 255;
    4, 255, 255, 0;
    5, 0, 0, 255;
    6, 0, 255, 0;
    7, 255, 0, 0;
    8, 128, 128, 128;
    9, 128, 0, 128;
    10, 0, 128, 0
]
# [component: inputs gray_to_rgb(cimg, colormap)]
# Now let us compute the size of the various components
i := 1 .. 9
size[i] := norm1(vectorize(cimg == i))
size = [0; 3; 13; 35; 21; 21; 5; 5; 13; 3]
# Finally, let us extract the largest single component (the component with the label 3 and size 35 pixels) from this image and display it, again in false color:
comp := vectorize(cimg == 3)
# [component: inputs comp*255]
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