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# CONVOLUTION AND FILTERING
# 2D Image Correlation
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# Function Definitions and Syntax
# correl2d(M, K)
# This function performs the correlation of an arbitrary-sized kernel, K, with the image matrix M . Correlation is an important filtering technique for template (or prototype) matching.
# Arguments
# • M, the image matrix, and
# • K, an arbitrary kernel, which should be smaller than the image M.
# The function returns a matrix of the same size as M containing the image correlated with the kernel.
# The correlation is performed in the spatial domain, and image boundaries are treated by zero padding the input image; however, the size of the output image is the same as the input image. The origin of the kernel is assumed to be at the center of the kernel which ensures a zero-phase-shift correlation output (that is, the corresponding features in the input and output images are not shifted with respect to each other.)
# Function Details
# correl2d(M, K)
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# Correlation is very similar to convolution (see the convol2d function). Like convolution, it is the process of sliding a filter matrix (called the kernel) across an image matrix, multiplying each element in the overlapping areas, summing these results, and inserting this sum into an element of the resulting matrix. This is illustrated in the drawing to the right with a 3 × 3 kernel, where the colored squares in the correlated matrix correspond to the multiplication and summation in correspondingly colored overlap regions.
# The difference between correlation and convolution is that correlation checks the kernel against the image for similarity, while convolution involves flipping the kernel in order to correspond to multiplication in the transform domain.
# Suppose we are trying to locate the position of a template, K, on the input matrix, M. The center position where M is most similar to K is given by the point in the correlated output matrix that has the largest value.
K := [1, 1, 3; 1, 2, 1; 1, 1, 2]
M := [3, 1, 2, -1, 0; 0, 1, 1, 3, 1; 1, 1, 2, 1, 2; -1, 1, 1, 2, -2; 3, -1, 1, 3, -2]
correl2d(M, K) = [9, 10, 12, 6, 3; 10, 19, 11, 16, 7; 7, 11, 23, 12, 9; 4, 14, 17, 12, 2; 7, 5, 12, 2, -1]
# The largest value in the correlation output is 23, which occurs at location (2,2). As can be seen from the input matrix M, the template does occur at that location in the image.
# When part of the overlapped kernel lies outside the image M, the correlation sum contains fewer than nine terms. This is equivalent to padding the input image with zeros. For example, the upper left output element is:
2*3 + 1*1 + 0*1 + 1*2 = 9
# In Mathcad, you could define the correlation function as
mcad_corr2d(i, j, m, n) := sum(sum(K[k, d]*M[k + i - floor(m/2), d + j - floor(n/2)], d = 0 .. n - 1), k = 0 .. m - 1)
# where i and j are the row and column indices of the output matrix, and the kernel size is m by n.
mcad_corr2d(2, 3, 3, 3) = 12
correl2d(M, K)[2, 3] = 12
# Notice that if you give this Mathcad function an i or j corresponding to an edge point, an error results, since we have only made an allowance for the case where the whole kernel overlaps.
# One interesting kernel is the Gaussian kernel, which produces a smoothing effect. Here, a 5 × 5 kernel is generated.
M := READ_IMAGE("bear.gif")
i := 0 .. 4
j := 0 .. 4
K[i, j] := exp(-(i - 2)^2/1.5)*exp(-(j - 2)^2/1.5)
K = [
    0.00482795, 0.035674, 0.0694835, 0.035674, 0.00482795;
    0.035674, 0.263597, 0.513417, 0.263597, 0.035674;
    0.0694835, 0.513417, 1, 0.513417, 0.0694835;
    0.035674, 0.263597, 0.513417, 0.263597, 0.035674;
    0.00482795, 0.035674, 0.0694835, 0.035674, 0.00482795
]
# Take just a small portion of the picture, to speed the calculation:
M := submatrix(M, 100, 230, 100, 230)
CORR := correl2d(M, K)
# Compare the result of correlation with the results of the convolution function. Since the kernel is symmetric, the two functions, convolution and correlation give the same result:
CONV := convol2d(M, K)
# [component: inputs M]
# [component: inputs scale(CORR, 0, 255)]
# [component: inputs scale(CONV, 0, 255)]
# Let's verify that the maximum difference between the two images is indeed
# very small (almost zero):
max(vectorize(|CONV - CORR|)) = 0
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