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# THE TRANSFORM DOMAIN
# Discrete Cosine Transform
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# Function Definition and Syntax
# dct2d(M) | idct2d(M)
# These functions calculate the 2D discrete cosine transform and the inverse transform, respectively. This transform has the advantage of concentrating most of the image "energy," or information, in a few frequency components, making a good choice for encoding.
# Arguments
# • M, the image matrix, at least two rows and two columns wide
# The functions return a matrix containing the transformed image.
# Function Details
# This implementation of the cosine transform uses the type II DCT. If matrix M_(n,p) is of size N × P, suppose
M := [90, 100; 100, 105]
N := rows(M)
P := cols(M)
n := 0 .. N - 1
p := 0 .. P - 1
u := 0 .. N - 1
v := 0 .. P - 1
c(x) := if(x == 0, 1/sqrt(2), 1)
CU[u] := c(u)
CV[v] := c(v)
CV := transpose(CV)
G := 2*CU*CV/sqrt(N*P)
DCT[u, v] := G[u, v]*sum(sum(M[n, p]*cos((2*n + 1)*u*π/(2*N))*cos((2*p + 1)*v*π/(2*P)), p = 0 .. P - 1), n = 0 .. N - 1)
# The maximum error between this analytic formula and the dct2d function is
max(DCT - dct2d(M)) = 4.44089e-15
# Example
# The cosine transform has very good energy-compaction properties, which means that it concentrates most of the energy in the first few coefficients of the transform. Consider the following example:
M := [10, 20, 30; 40, 50, 60; 70, 80, 90; 100, 110, 120; 130, 140, 150]
Mt := dct2d(M)
Mt = [309.839, -31.6228, 0; -163.653, 0, 0; 0, 0, 0; -14.7566, 0, 0; 0, 0, 0]
# The above example shows that most of the energy, which is related to the
# coefficient values, is concentrated in the first few elements.
# The inverse DCT is used to recover an original image from its transform. Consider the following example, which transforms a black-and-white version of the Mona Lisa and then recovers it.
M := READ_IMAGE("mona.bmp")
Mdct := dct2d(M)
Mrec := idct2d(Mdct)
# [component: inputs Mrec]
# [component: inputs Mdct]
# We can verify the energy-compaction property of the DCT by looking at histograms of the transformed and original images, as follows:
H := imhist(Mdct, 256)
Horig := imhist(M, 256)
k := 0 .. rows(H) - 1
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# The transformed image concentrates most of the energy in the first few bins
# of the histogram, while the distribution of the original image is spread out. This makes the transformed image a better candidate for encoding or transmission, since most of the image information can be relayed with very few frequency components. For this reason the DCT is used for image compression.
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