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# FEATURE EXTRACTION
# Euclidean Distance Transform
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# Function Definitions and Syntax
# distform(M, fg)
# This function performs a Euclidean distance transform of a binary image. The output matrix values represent the distance from each pixel to the nearest foreground pixel. Distance transformation is frequently used for matching two images or computing the edge distance between two images.
# Arguments
# • M, the image matrix
# • fg, the intensity value of foreground pixels
# The function returns an image matrix which contains the approximate Euclidean distance transform for a binary image.
# Function Details | distform(M, fg)
# Calculates the distance transform of M, considering pixels with value fg to be foreground pixels.
# To illustrate, let's try a small example:
M := [130, 100, 65; 150, 100, 90; 100, 40, 50]
distform(M, 100) = [1, 0, 1; 1, 0, 1; 0, 1, 1.41421]
# In this example, the value of each output pixel is the distance to the closest input foreground (value 100) pixel. For input foreground pixels, the output distance is zero; for horizontal and vertical neighbors, the distance is 1; for diagonal neighbors, the distance is sqrt(2) = 1.41421.
# As another example of distance transform, we consider an image with a single, nonzero pixel:
i := 0 .. 9
j := 0 .. 9
pimg[i, j] := 0
pimg[4, 4] := 1
dimg := distform(pimg, 1)
pimg = [
    0, 0, 0, 0, 0, 0, 0, 0, 0, 0;
    0, 0, 0, 0, 0, 0, 0, 0, 0, 0;
    0, 0, 0, 0, 0, 0, 0, 0, 0, 0;
    0, 0, 0, 0, 0, 0, 0, 0, 0, 0;
    0, 0, 0, 0, 1, 0, 0, 0, 0, 0;
    0, 0, 0, 0, 0, 0, 0, 0, 0, 0;
    0, 0, 0, 0, 0, 0, 0, 0, 0, 0;
    0, 0, 0, 0, 0, 0, 0, 0, 0, 0;
    0, 0, 0, 0, 0, 0, 0, 0, 0, 0;
    0, 0, 0, 0, 0, 0, 0, 0, 0, 0
]
dimg = [
    5.65685, 5.24264, 4.82843, 4.41421, 4, 4.41421, 4.82843, 5.24264, 5.65685, 6.65685;
    5.24264, 4.24264, 3.82843, 3.41421, 3, 3.41421, 3.82843, 4.24264, 5.24264, 6.24264;
    4.82843, 3.82843, 2.82843, 2.41421, 2, 2.41421, 2.82843, 3.82843, 4.82843, 5.82843;
    4.41421, 3.41421, 2.41421, 1.41421, 1, 1.41421, 2.41421, 3.41421, 4.41421, 5.41421;
    4, 3, 2, 1, 0, 1, 2, 3, 4, 5;
    4.41421, 3.41421, 2.41421, 1.41421, 1, 1.41421, 2.41421, 3.41421, 4.41421, 5.41421;
    4.82843, 3.82843, 2.82843, 2.41421, 2, 2.41421, 2.82843, 3.82843, 4.82843, 5.82843;
    5.24264, 4.24264, 3.82843, 3.41421, 3, 3.41421, 3.82843, 4.24264, 5.24264, 6.24264;
    5.65685, 5.24264, 4.82843, 4.41421, 4, 4.41421, 4.82843, 5.24264, 5.65685, 6.65685;
    6.65685, 6.24264, 5.82843, 5.41421, 5, 5.41421, 5.82843, 6.24264, 6.65685, 7.07107
]
# The distance increases monotonically as we move away from the foreground pixel (the center pixel) in the input image.
# The distance transform produces an approximately Euclidean distance. In the above example, we can see that the exact Eulidean distance transform
# output for matrix location (0,1) should be: sqrt((4 - 0)^2 + (4 - 1)^2) = 5, whereas in our output image the value is 5.24264.
# Now, let us examine the distance transform for an image of a circular object.
# Let us first create an image of a circle:
imax := 100
i := 0 .. imax
j := 0 .. imax
r := 15
cx := 50
cy := 50
C[i, j] := if((i - cx)^2 + (j - cy)^2 ≤ r^2, 1, 0)
Cdist := distform(C, 1)
# [component: inputs scale(C, 0, 255)]
# [component: inputs scale(Cdist, 0, 255)]
# As you can see in the distance transform image, the distance values are zero for all points within the circle and increase monotonically as we move outward, but they are not exactly equal to the Euclidean distance, or the output would be radially symmetric.
# Next we illustrate how to use the distance transform to measure the distance
# between two binary images of a single object.
D1 := READ_IMAGE("flower.bmp")
# We now create translated versions of this image:
D2 := translate(D1, 4, 5, 0)
D3 := translate(D1, 10, 15, 0)
# [component: inputs D1]
# [component: inputs D2]
# [component: inputs D3]
# To compute distance between D1 and D2, we first compute the distance transform of D1.
D1dist := distform(D1, 255)
# Next we mask the distance transform image with the image D2 (and D3) and compute the mean of the entire image. This represents a measure of the distance between the two images.
mean(mask(D1dist, D1)) = 0
mean(mask(D1dist, D2)) = 0.125277
mean(mask(D1dist, D3)) = 0.619505
# The distance between D1 and D1 is zero, and the distance between D1 and the other images increases with the degree of translation.
#
# Instead of using the mean in the above formula, if we use the maximum, we get what is known as the Hausdorff distance between the two images. Hausdorff distance between two sets is defined as the the maximum of the closest distance between points in two sets. It is easy to see that masking the distance transform of an image with another image measures the set of closest point distances between two images. Taking the maximum of that set is the Hausdorff distance between the two sets. In the examples above the Hausdorff distance is computed as:
max(mask(D1dist, D1)) = 0
max(mask(D1dist, D2)) = 6.65685
max(mask(D1dist, D3)) = 18.5563
# In another application of the distance transform we show how it can be used to compute the distance between two edge images. Computing the distance between two edge images is useful to compare the performance of edge detectors. Once again, we can either use the mean of masked distances or the maximum of the masked distances as a measure of the edge distance. We apply two different edge detectors to the Lena image and measure the overall distance between the edges.
lena := READ_IMAGE("lena.bmp")
E1 := canny(lena, 0.5, 10, 25)
E2 := binarize(sobel(lena), 40)
# [component: inputs E1*255]
# [component: inputs E2*255]
mean(mask(distform(E1, 1), E2)) = 0.284951
max(mask(distform(E1, 1), E2)) = 41.2426
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