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# VISION AND SEGMENTATION
# A Simple Letter Detector
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# Optical Character Recognition (OCR) has created a revolution in digital text processing in the business environment. The most common application of OCR is the automatic conversion of scanned images of printed or hand-written text into ASCII characters without human intervention. This example demonstrates a simple shape-based letter detector that manages a common problem in OCR: images that contain additive noise or imperfect scanning, producing fuzzy, blurred, or otherwise difficult-to-read images.
# In OCR, the general principle is to scan a document into digital format, separate it into character images, and compare each images with a "code book" containing prototypes of each character. For the sake of argument, here is a two-character code book:
C := READ_IMAGE("codebook.bmp")
# [component: inputs C]
# The goal is to find the letter M and the number 8 in the following sample document. The sample is contaminated by additive noise, and there are holes in some of the letters.
M := READ_IMAGE("letters.bmp")
# [component: inputs M]
# First, remove the noise and binarize the image. The gray-level histogram shows where to set the binarization level.
hist := imhist2(M, 255)
k := 0 .. rows(hist)
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# Additive noise pixels are mostly at intensity 100, so it is sensible to binarize just above that value, making most of the noise black:
M1 := binarize(M, 101)
# [component: inputs M1*255]
# Close the holes in the letters using binary morphology:
K := [1, 1; 1, 1]
M := close(M1, K, 1)
# [component: inputs M*255]
# Now each letter is well connected, so we can use the 8 neighbor connected components algorithm to separate the image and code book into letters:
Mcomp := concomp(M, 8, 1)
Ccomp := concomp(C, 8, 255)
max(Mcomp) = 24
max(Ccomp) = 2
# The results show that there are 24 letters in the image and 2 in the code book, as expected. Extracting each letter separately,
i := 0 .. (max(Mcomp) - 1)
mobj[i] := vectorize(Mcomp == (i + 1))
j := 0 .. (max(Ccomp) - 1)
cobj[j] := vectorize(Ccomp == (j + 1))
# Here are what the two letters in the code book look like:
# [component: inputs cobj[0]*255]
# [component: inputs cobj[1]*255]
# The next step is to characterize each letter in the code book, and match the the image to the code. For this purpose, calculate the shape features for the connected components in the image and code book.
m_fea := shape_features(Mcomp)
c_fea := shape_features(Ccomp)
# Matching is based on the invariant moments of each letter (shape features 44 to 50), and the shape measures of the letters (features 2 to 9), and we measure the "distance" between this vector of features between the letters in the image and the code book:
dist_8[i] := sum((m_fea[i + 1, j] - c_fea[1 + 1, j])^2 + sum((m_fea[i + 1, j] - c_fea[1 + 1, j])^2, j = 44 .. 50), j = 2 .. 9)
dist_M[i] := sum((m_fea[i + 1, j] - c_fea[0 + 1, j])^2 + sum((m_fea[i + 1, j] - c_fea[0 + 1, j])^2, j = 44 .. 50), j = 2 .. 9)
dist_8 = [2719.23; 4.96808; 406.802; 1160.93; 1159.68; 227.409; 1228.39; 363.443; 2719.23; 1092.75; 16.9296; 16.2951; 1.00176; 227.409; 1227.3; 227.409; 227.165; 1.00176; 225.912; 1.00176; 1.00176; 144.536; 227.165; 4797]
dist_M = [49.021; 1858.76; 4265.25; 6278.81; 6275.13; 3622.17; 6429.86; 4116.44; 49.021; 6118.4; 1690.93; 1697.57; 1951.72; 3622.17; 6425.11; 3622.17; 3621.75; 1951.72; 3621.56; 1951.72; 1951.72; 3264.35; 3621.75; 13064.1]
# The smallest "distances" for each letter dictate the codebook match. Components numbered 12, 17, 19, and 20 have the minimum distance to the "8" character, and components numbered 0 and 8 have the minimum distance to the "M" character. Verify the match by displaying the selected components:
obj8 := mobj[12] + mobj[17] + mobj[19] + mobj[20]
objM := mobj[0] + mobj[8]
# [component: inputs obj8*255]
# [component: inputs objM*255]
# This is a very simplified view of what actually goes on inside a commercial OCR system, but it gives you a taste for the complexity of the problem, and some of the issues to be solved to make the system successful.
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