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# IMAGE SEGMENTATION
# Region Growing
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# Function Definitions and Syntax
# reg_grow(M, x_gridsize, y_gridsize, num_regions)
# This function divides an image into several homogenous connected regions using a region-growing algorithm. Region-based segmentation is used to group regions in an image that bear homogeneous properties, such as intensity, texture, and so on.
# Arguments
# • M, an image matrix
# • x_gridsize, partition grid size in the horizontal (X) direction
# • y_gridsize, partition grid size in the vertical (Y) direction
# • num_regions, number of regions
# The function returns an image matrix whose pixel values are labels for the connected regions resulting from region growing.
# Function Details | reg_grow(M, x_gridsize, y_gridsize, num_regions)
# The function implements a region-growing algorithm to segment an image M into num_regions regions using x_gridsize and y_gridsize as the spacings for the initial partition grid. The grid sizes must be positive and a divisor of the image size, and the number of desired regions must be larger than 1. Adjacent regions are merged recursively until the image has the desired number of regions.
# The key for region-based segmentations is to select the best criterion for merging or splitting. The algorithm starts out with a large number of regions and recursively merges adjacent regions based on the homogeniety of the two regions and the length of the boundary separating the two regions. Regions with similar average intensities separated by short boundaries are more likely to be merged with each other compared to regions differing widely in intensity or regions separated by long boundaries. This region merging procedure stops when the desired number of regions, num_regions, has been found.
# First, create an image with several rectangular boxes:
i := 0 .. 79
j := 0 .. 99
M[i, j] := 0
i := 0 .. 19
j := 0 .. 19
M[i, j] := 4
i := 20 .. 60
j := 20 .. 80
M[i, j] := 1
i := 60 .. 79
j := 0 .. 19
M[i, j] := 5
i := 30 .. 50
j := 40 .. 60
M[i, j] := 2
i := 0 .. 19
j := 80 .. 99
M[i, j] := 6
i := 60 .. 79
j := 80 .. 99
M[i, j] := 3
# Add zero-mean uniform-distributed noise within [-0.1 0.1]:
noise := runif(8000, -0.1, 0.1)
mean(noise) = 9.83377e-5
i := 0 .. 79
j := 0 .. 99
N[i, j] := noise[i*100 + j]
M := M + N
# Now view the image:
# [component: inputs scale(M, 0, 255)]
# Now try the region-grow algorithm, asking for 10 regions. We view the output in false color to make the region labels more obvious.
M1 := reg_grow(M, 2, 2, 10)
# [component: inputs scale(M1, 0, 255)]
# Verify the number of regions found by the algorithm and then take a look at the histogram:
min(M1) = 1
max(M1) = 10
H := imhist(M1, 256)
transpose(H) = [
    0, 400, 1200, 400, 800, 2000, 800, 400, 400, 1200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]
# As in the input matrix, there are five regions with area of 400, two regions of 800,
# and three regions of 2000.
# Now let's try applying this segmentation to a real image, an MRI image of a
# person's head. The following example shows how we use this segmentation function to extract the brain region out of the entire head image.
head := READ_IMAGE("brain.gif")
rows(head) = 257
cols(head) = 256
# This image has an odd number of rows, so we extract the first 256 rows from it:
T := submatrix(head, 0, 255, 0, 255)
rows(T) = 256
cols(T) = 256
# Now we apply the region growing procedure to this image starting with
# an initial 2 x 2 partition and finally desiring 20 regions:
T1 := reg_grow(T, 2, 2, 20)
# We display the original image and the segmented and scaled image below, and using the
# selection feature of the picture region, we select a point inside the brain in the
# segmented image.
T1s := (T1 - min(T1))/(max(T1) - min(T1))*255
# [component: inputs T]
# [component: inputs T1s; outputs spoint]
# Next we select all points in the segmented image which have the
# same value as the selected point.
spoint = 0
T2 := vectorize(round(T1s) == spoint)
# The image T2 is a binary image (as shown below), and we use it to mask the
# original image in order to select the brain region out of the original image.
brain := mask(T, T2)
# [component: inputs T2*255]
# [component: inputs brain]
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