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# INTRODUCTORY MATERIAL
# Grayscale and Color in Images
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# Function Definitions and Syntax
# rgb_to_gray(RGB) | gray_to_rgb(gray, colormap)
# These functions convert between grayscale and color in images. One function takes an RGB color image and converts it to a grayscale image, and the other does the reverse. These functions are useful for converting one type of image to another, and also for false color imaging.
# Arguments
# • RGB, or gray, an image matrix
# • colormap, a 256 by 4 matrix lookup table mapping grayscale values to RGB colors
# The functions return an image matrix in the specified color domain.
# Function Details | rgb_to_gray(RGB)
# The most commonly used representation for color images is called RGB, where each pixel is represented by three values: the amount of red, green, and blue in the pixel. A grayscale image has only one value for each pixel, giving the intensity or grayscale level. An RGB color image, represented by a packed matrix with 3 image representations, can be converted to grayscale by using the rgbmat_to_gray function.
rgbimg := READRGB("smallwar.gif")
grayimg := rgb_to_gray(rgbimg)
# The RGB values are converted to grayscale using the NTSC formula of 0.299 * Red + 0.587 * Green + 0.114 * Blue, which closely represents the average person's relative perception of the brightness of red, green, and blue light.
#
# The two images here can be compared by viewing them in the Image Viewer:
# [component: inputs rgbimg]
# [component: inputs grayimg]
# Function Details | gray_to_rgb(gray, colormap)
# Converting a grayscale matrix to RGB is usually done by assigning false colors to the intensity levels in the image. There are two ways to do that in Mathcad. First, the Image Viewer itself can be used to make a simple false color representation that interpolates linearly between two reference colors, for example, red to blue. This process is explained more fully in the section on viewing images. Here is an example using 10 distinct colors between red and green for false color on a grayscale image:
graybridge := READ_IMAGE("bridge.bmp")
# [component: inputs graybridge]
# More flexible false color imaging can be done using the gray_to_rgb function. The first argument is the grayscale matrix, and the second is a colormap matrix, which has four columns. The first column gives grayscale intensity values, ranging from 0 to 255, and the remaining three columns give the red, green, and blue RGB values that will be placed in the output matrix for pixels having that intensity value.
#
# As an example, we can read in a file that has a rainbow spectrum colormap in it (see the section on HLS and HSV for one way to create your own colormaps), and use it to view the same image:
specmap := READPRN("spec.prn")
specbridge := gray_to_rgb(graybridge, specmap)
# [component: inputs specbridge]
specmap = [
    0, 124, 0, 255;
    1, 124, 0, 255;
    2, 124, 0, 255;
    3, 124, 0, 255;
    4, 124, 0, 255;
    5, 124, 0, 255;
    6, 120, 0, 254;
    7, 115, 0, 255;
    8, 111, 0, 254;
    9, 106, 0, 255
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]
# Note that gray_to_rgb does not use the built-in variable ORIGIN, which specifies the starting index of an array for other functions.
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