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# VISION AND SEGMENTATION
# Tracking Moving Objects in Aerial Images
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# Tracking and monitoring traffic flows from aerial image sequences is of interest for surveillance, traffic control, and military applications. The current manual approach is labor-intensive, costly in terms of time and data storage, and can be inaccurate. This example demonstrates a feasible way of tracking moving vehicles from two consecutive aerial image frames by applying the image-processing techniques available in the Image Processing Extension Pack.
# The following two images are consecutive frames captured from a TV broadcast of a police highway tracing video. The monitoring camera is moving, and the second frame is slightly blurred due to motion. Typical methods for matching depend on small relative motion between adjacent frames, and will fail in this case. Instead, feature-based matching of segmented regions will be applied between these two frames.
M1 := READ_IMAGE("frame1.bmp")
M2 := READ_IMAGE("frame2.bmp")
# [component: inputs M1]
# [component: inputs M2]
# To begin the matching, energy-based region-growing segmentation can segment the two images into homogenous regions. First, the image size is used to set reasonable initial segmentation grids:
rows(M1) = 200
cols(M1) = 200
# Now region growing is performed on the two images, using a 2-by-2
# initial grid, and choosing to grow to 10 distinct regions.
RM1 := reg_grow(M1, 2, 2, 10)
RM2 := reg_grow(M2, 2, 2, 10)
# Here are the images after segmentation viewed in false color to highlight the region boundaries:
# [component: inputs scale(RM1, 0, 255)]
# [component: inputs scale(RM2, 0, 255)]
# In a fully automatic application, we could use shape or size information to pick cars out of each image for tracking, but in this example we can double-click on the RM1 image and move the mouse over the two cars, to see that they are regions 6 and 7.
# To confirm this, they can be picked out of the image using masking:
R1 := 6
mask1 := vectorize(RM1 == R1)
car1 := M1 + 255*mask1 - mask(M1, mask1)
R2 := 7
mask2 := vectorize(RM1 == R2)
car2 := M1 + 255*mask2 - mask(M1, mask2)
# [component: inputs car1]
# [component: inputs car2]
# Next, we need to find the corresponding objects among the regions in the second frame. First, we extract all these region labels:
i := 0 .. max(RM2) - 1
reg[i] := vectorize(RM2 == i)
# Then, extract the shape features from all the regions in both frames - see the section on shape features for more information:
shape1 := shape_features(RM1)
shape2 := shape_features(RM2)
# Since different shape features vary widely in scale, we use the normalized "distance" between the feature vectors for the two frames as criteria for finding the best match between regions. We don't want to consider the shape features that locate the region (for example, centroid and bounding box). These are excluded from the shape vector; only columns 2 through 9 are considered, containing only relevant features such as area and spatial variance. The normalized distance between each of the features in frame 2 and frame 1 is given by
dist1[i] := sum(|shape2[i, j] - shape1[R1, j]|/|shape1[R1, j]|, j = 2 .. 9)
dist2[i] := sum(|shape2[i, j] - shape1[R2, j]|/|shape1[R2, j]|, j = 2 .. 9)
# The best match to each car is the region with the lowest total distance:
min1 := min(dist1)
idx1 := vectorize(dist1 == min1)
min2 := min(dist2)
idx2 := vectorize(dist2 == min2)
idx1 = [0; 0; 0; 0; 0; 0; 1; 0; 0; 0]
idx2 = [0; 0; 0; 0; 0; 0; 0; 1; 0; 0]
# The above results show that the best match for car 1 is region #6 in frame 2, and the one for car 2 is region #7. The following visual inspection, using the same masking technique as before, verifies the results.
reg_car1 := M2 + 255*reg[6] - mask(M2, reg[6])
reg_car2 := M2 + 255*reg[7] - mask(M2, reg[7])
# [component: inputs car1]
# [component: inputs reg_car1]
# [component: inputs car2]
# [component: inputs reg_car2]
# Once the corresponding objects have been identified from frame to frame, an analysis can be performed that finds the distance traveled by each object between frames. Using the time from frame to frame, it is then possible to tell the velocity of the objects.
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