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# GEOMETRIC TRANSFORMS
# Bilinear Warping
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# Function Definition and Syntax
# warp(M, T)
# This function performs image warping, a geometric transformation akin to projecting an image on a sheet of rubber and then stretching the sheet. The "tiepoints" are four pairs of points in the input image and corresponding positions in the output image. Image warping is commonly used for image registration and image distortion correction.
# Arguments
# • M, a grayscale image matrix
# • T, the 8 x 2 matrix containing the four pairs of tiepoints.
# The function returns a matrix containing the warped image.
# Function Details | warp(M, T)
# Image warping is a geometric transformation that can be viewed as a process of projecting an image on a sheet of rubber and then stretching the sheet. The "tiepoints," T, are four points in the input image and the corresponding positions of the four points for the output image; they are used to compute coefficients for a bilinear warping equation that transforms the input to the output. Since the output positions for each input pixel do not necessarily correspond to integer coordinates, the output pixel values are calculated as weighted sums of the four nearest corresponding input pixels, with higher weight given to nearer pixels.
# Bilinear warping using the following equations to transform a pixel at (x,y) to its new location (u,v):
u := c[1]*x + c[2]*y + c[3]*x*y + c[4]  # disabled
v := c[5]*x + c[6]*y + c[7]*x*y + c[8]  # disabled
# The coefficients c are estimated from the four pairs of tie points, which are given as the second input of the function (stored with the row and column input coordinates in the first four rows, and the row and column output coordinates in the last four rows).
# Since u and v calculated from the equations above are usually not integers, the actual output pixels are weighted combinations of the four nearest destination pixels. Boundaries of the image are treated as extending out with zero grayscale level.
# Create a simple sequential matrix:
i := 0 .. 4
j := 0 .. 6
M[i, j] := i*5 + j
M = [
    0, 1, 2, 3, 4, 5, 6;
    5, 6, 7, 8, 9, 10, 11;
    10, 11, 12, 13, 14, 15, 16;
    15, 16, 17, 18, 19, 20, 21;
    20, 21, 22, 23, 24, 25, 26
]
# As a first warping example, make the input and output tie points equal:
T := [1, 1; 1, 2; 2, 1; 2, 2; 1, 1; 1, 2; 2, 1; 2, 2]
M1 := warp(M, T)
# The result should be the same as the input, except at the boundaries, and neglecting roundoff errors:
M1 = [
    0, 1, 2, 3, 4, 5, 6;
    5, 6, 7, 8, 9, 10, 11;
    10, 11, 12, 13, 14, 15, 16;
    15, 16, 17, 18, 19, 20, 21;
    20, 21, 22, 23, 24, 25, 26
]
sum(sum(|floor(M1[i, j] + 0.5) - M[i, j]|, j = 1 .. 5), i = 1 .. 3) = 0
# The same transformation on a real image:
B := submatrix(READ_IMAGE("bridge.bmp"), 0, 100, 0, 100)
B1 := warp(B, T)
# [component: inputs B]
# [component: inputs B1]
# This warping stretches the image horizontally by a factor of two:
i := 4 .. 7
T[i, 1] := T[i - 4, 1]/2
T[i, 0] := T[i - 4, 0]
M1 := warp(M, T)
B1 := warp(B, T)
T = [1, 1; 1, 2; 2, 1; 2, 2; 1, 0.5; 1, 1; 2, 0.5; 2, 1]
M1 = [
    0, 0.5, 1, 1.5, 2, 2.5, 3;
    5, 5.5, 6, 6.5, 7, 7.5, 8;
    10, 10.5, 11, 11.5, 12, 12.5, 13;
    15, 15.5, 16, 16.5, 17, 17.5, 18;
    20, 20.5, 21, 21.5, 22, 22.5, 23
]
# [component: inputs B]
# [component: inputs B1]
# The resulting image is expanded horizontally by a factor of 2 as expected. If we want to see the whole image in the output, we have to pad the matrix with zeros before warping, because the output image is always the same size as the input image, and pixels may be lost.
# This warping is a translation up and to the right:
i := 4 .. 7
T[i, 1] := T[i - 4, 1] - 1
T[i, 0] := T[i - 4, 0] + 1
M1 := warp(M, T)
T = [1, 1; 1, 2; 2, 1; 2, 2; 2, 0; 2, 1; 3, 0; 3, 1]
M1 = [
    0, 5, 6, 7, 8, 9, 10;
    0, 10, 11, 12, 13, 14, 15;
    0, 15, 16, 17, 18, 19, 20;
    0, 20, 21, 22, 23, 24, 25;
    0, 0, 0, 0, 0, 0, 0
]
# To have a better visualization of the translation on the bridge image, we increase the amount of translation:
i := 4 .. 7
T[i, 1] := T[i - 4, 1] - 20
T[i, 0] := T[i - 4, 0] + 10
B1 := warp(B, T)
T = [1, 1; 1, 2; 2, 1; 2, 2; 11, -19; 11, -18; 12, -19; 12, -18]
# [component: inputs B]
# [component: inputs B1]
# As expected, the image is shifted to the right by 20 pixels and up
# by 10 pixels.
# This warping example rotates clockwise by 45 degrees:
i := 4 .. 7
T[i, 1] := 0.7071*(T[i - 4, 0] + T[i - 4, 1])
T[i, 0] := 0.7071*(T[i - 4, 0] - T[i - 4, 1])
T = [1, 1; 1, 2; 2, 1; 2, 2; 0, 1.4142; -0.7071, 2.1213; 0.7071, 2.1213; 0, 2.8284]
B1 := warp(B, T)
# [component: inputs B]
# [component: inputs B1]
# More general affine transformations using warping:
i := 4 .. 7
T[i, 1] := 0.6*T[i - 4, 1] + 0.8*T[i - 4, 0]
T[i, 0] := 1.2*T[i - 4, 0] + 5
B1 := warp(B, T)
# [component: inputs B]
# [component: inputs B1]
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