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# CONVOLUTION AND FILTERING
# Wiener Filtering
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# Function Definition and Syntax
# wiener2d(M, win_h, win_w)
# This function performs pixel-by-pixel 2D adaptive Wiener filtering. Wiener filtering was one of the first methods developed to reduce additive random noise in images.
# Arguments
# • M, an image matrix
# • win_h, the height of the local window - not larger than rows(M)
# • win_w, the width of the local window - not larger than cols(M)
# The function returns a Wiener-filtered image matrix.
# Function Details | wiener2d(M, win_h, win_w)
# Wiener filtering was one of the first methods developed to reduce additive random noise in images. It works on the assumption that additive noise is a stationary random process, independent of pixel location; the algorithm minimizes the square error between the original and reconstructed images. Wiener filtering is a low-pass filter, but instead of having a single cutoff frequency, it is a space-varying filter designed to use a low cutoff in low-detail regions and a high cutoff to retain detail in regions with edges or other high-variance features. The window size determines the overall frequency cutoff: larger windows correspond to lower cutoff frequencies, and therefore more blurring and noise reduction.
# There are several possible implementations for Wiener filtering. The one used in this Mathcad function is the pixel-by-pixel 2-D adaptive Wiener filtering proposed by Lee in 1980 (see Two-Dimensional Signal and Image Processing, by Jae S. Lim, pages 536-40), where a space-varying filter is used, and the additive noise is assumed to be white and zero-mean.
# In this algorithm, a pixel y in the filtered image is derived from a pixel x in the noisy input image by the following transformation:
y := μ[x] + (x - μ[x])*v[x]/(v[x] + v[n])  # disabled
# where μ[x]and v[x] are the mean and variance of x in a neighborhood around the pixel (the neighborhood size is given by the win_h and win_w arguments to the function), and v[n] is the variance of the additive noise, estimated from the input image. Each pixel in the output is the sum of the local mean from a neighborhood of the input pixel and a local contrast term (x - μ[x]) that is scaled so that in high-detail regions, where noise variance (v[n]) is much smaller than image variance (v[x]), the scaling factor is very close to 1 and the output pixel y is very close to the input pixel x with little filtering, but in low-detail regions, where the image variance is lower, the output pixel tends to be more like the local mean (that is, it is low-pass filtered).
# Boundaries of the image are treated as extending with zero grayscale values, which may make output pixels near the image boundaries invalid (up to the size of the neighborhood window). Also, the neighborhood window should not be larger than the input image.
# Now let's try some examples. As a test image, create a simple rectangular box, and add some noise to it:
i := 0 .. 79
j := 0 .. 99
M[i, j] := 0
i := 20 .. 60
j := 20 .. 80
M[i, j] := 1
noise := runif(8000, -0.1, 0.1)
mean(noise) = -0.000558762
i := 0 .. 79
j := 0 .. 99
N[i, j] := noise[i*100 + j]
L := M + N
# Try using a 7 x 7 window Wiener filter on the image:
F := wiener2d(L, 7, 7)  # error: The type initializer for "Efi.Image" threw an exception.
# [component: inputs scale(L, 0, 255)]
# [component: inputs scale(F, 0, 255)]
# Notice that the outlines of the square have not been blurred, but the noise has been smoothed. However, the noise is not filtered out near the square outlines for a neighborhood the size of the filtering window. So let's try a smaller window, say 3 x 3:
F := wiener2d(L, 3, 3)  # error: The type initializer for "Efi.Image" threw an exception.
# [component: inputs scale(F, 0, 255)]
# In this image, there is less overall smoothing, but it extends nearer to the square outlines.
# Let's try a real image, degraded by the addition of some random white Gaussian noise.
M := READ_IMAGE("fruit.bmp")
sizeM := rows(M)*cols(M)
noise := rnorm(sizeM, 0, 25)
i := 0 .. rows(M) - 1
j := 0 .. cols(M) - 1
N[i, j] := noise[i*cols(M) + j]
L := M + N
# [component: inputs scale(M, 0, 255)]
# [component: inputs scale(L, 0, 255)]
# Now we suppress the noise using Wiener filtering with a 5 x 5 window:
F := wiener2d(L, 5, 5)  # error: The type initializer for "Efi.Image" threw an exception.
# [component: inputs scale(F, 0, 255)]
# Wiener filtering preserves edges and other high-variance features well, so for comparison, try uniform smoothing with a 5 x 5 kernel. Notice that the fruits in this image have more blurry outlines than the Wiener-filtered result, although the noise reduction is comparable.
F2 := unismooth5(L)  # error: The type initializer for "Efi.Image" threw an exception.
# [component: inputs scale(F2, 0, 255)]
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