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# SECTION 2 - FAST FOURIER TRANSFORM
# FFTs: An Introduction
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# Demonstrates Mathcad FFTs using some common transform pairs, and discusses the DFT as opposed to analog Fourier transforms.
# Fast Fourier transforms (FFTs) are a numerical method for expressing the frequency content of a set of data measured over time. The data are often continuous, constituting a waveform. To work with the data numerically, they are sampled at regular time intervals at some sample rate. The figures below illustrate some sampled waveforms and the magnitudes of their Fourier transforms plotted against frequency.
N := 50
k := 0 .. N - 1
# Distance between samples:
T := .5
n[k] := T*k
# Sample Rate:
f_s := 1/T
freq[k] := k/N*f_s
T = 0.5
# Waveform:
ω_0 := π/4
f(t) := sin(ω_0*t)
x[k] := f(n[k])
X := CFFT(x)
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# Try these, and other, waveforms in place of the sine wave above:
f(t) := cos(ω_0*t)
f(t) := if(7 ≤ t ≤ 25, 1.3, 0)
f(t) := e^(-.050*|t|)
# Discrete Fourier transforms (DFTs), represent a discrete sample of a continuous process. If the sampled data are contained in the vector x, the kth element of its DFT is computed by using a sum of the form
sum(x[m]*exp(2*π*1j*k/N*m), N)
# using either + or - in the exponentiation. N denotes the number of data points sampled, m runs over the indices of x and j is the imaginary unit. The sum may also have a scaling factor like 1/N in front of it.
# A fast Fourier transform (FFT) computes a DFT it in a clever, numerically economical way, so that, even for a large number of points, a result is returned quickly.
# The following sections describe Mathcad's routines for computing FFTs, give some examples of their use, introduce common terminology in signal analysis, and discuss conventions common to all of Mathcad's Fourier transform functions.
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