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# SECTION 2 - FAST FOURIER TRANSFORM
# Forward Transform CFFT
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# CFFT(A)
# Returns the complex Fourier transform of A, where
# • A, a real or complex-valued vector or matrix of any size, with constant time or space between samples
# The result has the same number of rows and columns as A. For matrix arguments, CFFT returns the two-dimensional Fourier transform. The algorithm used is a prime divisor algorithm.
# Notes
# • For real-valued vectors with length 2^m, use FFT instead for speed.
#
# • Results need to be recentered.
# Example - 1-D complex sinusoidal data
# Create some simulated complex data with N data points at sample spacing T:
N := 100
k := 0 .. N - 1
T := .5
t[k] := T*k  # (times at which samples are collected)
ω_0 := π/8
ω_0 = 0.392699
d[k] := exp(1j*ω_0*t[k])
# In the time domain, our sample appears as
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# Applying the CFFT function transforms data to the frequency domain,
D := CFFT(d)
# returning a complex vector in frequency space. The sampling frequency and the frequency corresponding to the kth entry in the transformed vector are then given by
f_s := 1/T
f_s = 2
freq[k] := k/N*f_s
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# The upper half of the frequency-domain samples represent the negative frequencies. Note that this complex signal has no negative frequency content.
# The calculations underlying the transformation can be computed directly. The vector DD below contains the result of a direct Mathcad calculation of the Fourier transform of the vector d.
DD[k] := 1/N*sum(d[m]*exp(-2*π*1i*k/N*m), m = 0 .. N - 1)
# Comparing a particular sample in the vectors,
D[25] = -0.00284359 - 0.00531999i
DD[25] = -0.00284359 - 0.00531999i
D[29] = -0.00188185 - 0.00492162i
DD[29] = -0.00188185 - 0.00492162i
# As you may have noticed, the computation using sums takes longer than the CFFT function since the function computes the sums indirectly, in an efficient manner.
# Example - 2D real data
# The CFFT function also works for complex data and for two- dimensional arrays of data. For example, we can transform a two-dimensional rectangular window.
N := 19
B[0, 0] := 0
B[N - 1, N - 1] := 0
i := (N - 1)/3 .. 2*(N - 1)/3
j := (N - 1)/3 .. 2*(N - 1)/3
B[i, j] := 1
# [component: inputs B]
# Computing the CFFT:
CB := CFFT(B)
# and plotting magnitude as a surface (note the use of the vectorize operator):
# [component: inputs vectorize(|CB|)]
# The transform of the 2D boxcar above should be a 2D sinc function. You may notice that the image above doesn't match that expectation. The frequency origin for the 2D transform is at (0,0). To shift the origin to the center, use the recenter function.
CB_ctr := recenter(CB)
# [component: inputs vectorize(|CB_ctr|)]
# Computationally, the two-dimensional case can be calculated directly in a fashion similar to the one-dimensional case, but it can take longer for large arrays.
k1 := 0 .. N - 1
k2 := 0 .. N - 1
SB[k1, k2] := 1/N^2*sum(sum(B[ii, jj]*exp(-2*π*1i*k1/N*ii)*exp(-2*π*1i*k2/N*jj), ii = 0 .. N - 1), jj = 0 .. N - 1)
# Comparing samples, we see
SB[5, 9] = -0.00101954 + 0.00110751i
CB[5, 9] = -0.00101954 + 0.00110751i
SB[17, 3] = 0.00422362 + 0.000704797i
CB[17, 3] = 0.00422362 + 0.000704797i
SB[0, 0] = 0.135734
CB[0, 0] = 0.135734
# Properties of the CFFT
# 1.
# For real data vector x, the vector CFFT(x) is, in general, complex. It is conjugate symmetric about the middle value. In the case of a two-dimensional real array, each column of the result is conjugate symmetric.
# 2.
# For any square array input A, CFFT(A) is symmetric. That is,
transpose(CFFT(A)) == CFFT(A)
# 3.
# According to the Nyquist sampling theorem, the sampling frequency must be at least twice the highest frequency you wish resolved by the Fourier transform.
# 4.
# Last, we point out a problem that you may or may not come across. The nature of the prime divisor algorithm used in the fast Fourier transform is such that it will slow down when the number of data points is a large prime number. Bear this in mind if you need to work with very large prime numbers of data points.
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