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# SECTION 2 - FAST FOURIER TRANSFORM
# The Inverse Transformation ICFFT
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# ICFFT(A)
# ICFFT maps data in the frequency domain to the time domain, and is the inverse of the CFFT function.
# • A, a real or complex-valued vector or matrix of any size, with constant frequency between samples
# The result has the same number of rows and columns as A. For matrix arguments, CFFT returns the two-dimensional Inverse Fourier transform.
# Example - 1D and 2D Data
# Since the ICFFT is the inverse transform of the CFFT, we'd expect ICFFT to restore the original data input to the complex transform.
k := 0 .. 7
m := 0 .. 2
n := 0 .. 2
d[k] := exp(1j*π/3*k)
C[m, n] := 0
C[1, 1] := 1 + 1j
d = [1; 0.5 + 0.866025i; -0.5 + 0.866025i; -1; -0.5 - 0.866025i; 0.5 - 0.866025i; 1; 0.5 + 0.866025i]
ICFFT(CFFT(d)) = [1; 0.5 + 0.866025i; -0.5 + 0.866025i; -1; -0.5 - 0.866025i; 0.5 - 0.866025i; 1; 0.5 + 0.866025i]
# Swap in the variable C in place of d in the equations above to see this example for a complex matrix.
# Just as with CFFT, the underlying sum behind ICFFT can be easily demonstrated in Mathcad.
# In the one-dimensional case,
k := 0 .. 7
N := 8
Cd := CFFT(d)
ICd[k] := sum(Cd[j]*exp(2*π*1i*k/N*j), j = 0 .. N - 1)
ICd = [1; 0.5 + 0.866025i; -0.5 + 0.866025i; -1; -0.5 - 0.866025i; 0.5 - 0.866025i; 1; 0.5 + 0.866025i]
ICFFT(Cd) = [1; 0.5 + 0.866025i; -0.5 + 0.866025i; -1; -0.5 - 0.866025i; 0.5 - 0.866025i; 1; 0.5 + 0.866025i]
# In the two-dimensional case, we have
N := 3
CC := CFFT(C)
ICC[m, n] := sum(sum(CC[ii, jj]*exp(2*π*1i*m/N*ii)*exp(2*π*1i*n/N*jj), jj = 0 .. N - 1), ii = 0 .. N - 1)
ICC = [
    4.16334e-17 + 2.77556e-17i, 5.55112e-17 - 5.55112e-17i, 3.46945e-17 + 2.08167e-17i;
    -2.08167e-17i, 1 + 1i, -3.46945e-16 + 1.38778e-16i;
    4.16334e-17 + 4.16334e-17i, -3.05311e-16 + 1.66533e-16i, 4.85723e-17 - 4.16334e-17i
]
ICFFT(CC) = [
    4.16334e-17 + 4.16334e-17i, -2.4037e-17 - 2.4037e-17i, 2.4037e-17 + 2.4037e-17i;
    -5.55112e-17 - 5.55112e-17i, 1 + 1i, -5.55112e-17 - 5.55112e-17i;
    4.16334e-17 + 4.16334e-17i, 9.85056e-17 + 9.85056e-17i, 2.63945e-17 + 2.63945e-17i
]
# Example - Filtering in Frequency
# Generally, the ICFFT is used to obtain a time-domain result after modifying transformed data in the frequency domain by filtering or windowing. For example, the signal
N := 500
i := 0 .. N - 1
t[i] := i*2*π/N
x[i] := cos(10*t[i]) + 1j*sin(4*t[i]) + rnd(2) - 1
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# is transformed to the frequency domain
Fx := CFFT(x)
# Here's the transform. Most of the weight being is at the low signal frequencies.
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# We'll multiply the transform by a windowing function that rejects frequencies over 1. Since the frequency corresponding to element number i is
f[i] := i/(2*π)
# all transform elements except those with indices i less than or equal to 6 or greater than or equal to N - 6 must be zeroed.
W(i) := if(i ≤ 6, 1, if(i ≥ N - 6, 1, 0))
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# We multiply the transform by the window W:
Fx[i] := W(i)*Fx[i]
# and then transform back to the time domain using ICFFT:
X := ICFFT(Fx)
# The filtered waveform looks like
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