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# SECTION 2 - FAST FOURIER TRANSFORM
# FFT and IFFT
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# FFT(v) | IFFT(V)
# Returns the Fourier Transform or Inverse Fourier Transform, where
# • v, a real-valued vector of size 2^m, with constant time between samples
# • V, a real or complex-valued vector of size 2^(m-1)+1 with constant frequency between samples
# Results of the FFT are of length 2^(m-1) + 1, representing only the positive frequency values. Results of the IFFT are of length 2^m.
# Notes
# • The FFT is a specific subset of the general function CFFT.
# Example - Gaussian FFT
# Generate Gaussian data and compute its transform:
N := 16
m := 0 .. N - 1
x[m] := exp(-(m - 8)^2/8)
X := FFT(x)
# Note this vector has 16 elements - a power of 2 as required:
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# The net result of the computation is the same sum computed by CFFT, namely the kth element of FFT(x), is given by
transform(k) := 1/N*sum(x[m]*exp(-2*π*1i*k/N*m), m = 0 .. N - 1)
# For example, the kth frequency element is
k := 4
transform(k) = 0.00223292
X[k] = 0.00223292
# You can see from the graph of the transform above how the FFT achieves is efficiency. Since Fourier transforms of real sequences have symmetric real parts and antisymmetric complex parts (conjugate symmetric), it's sufficient to compute half of the spectrum, corresponding to the positive frequencies.
# Given the values of the transform up to the middle value, you can easily reproduce the second half of the spectrum. .
M := last(X)
h := 1 .. M
M = 8
Xtot := X
Xtot[M + h] := conj(Xtot[M - h])
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# For a very large array of data, this format saves space by returning an array about half the size.
# Example - Gaussian IFFT
# The function IFFT is the inverse transformation for FFT. Therefore, IFFT requires a vector input compatible with the output of FFT.
# The routine IFFT accepts a real or complex vector of length 2^(n-1) +1 as its argument and returns a vector of length 2^n.
# The inverse transformation should follow
IFFT(FFT(x)) == x
# Returning to the example above:
IFFT(FFT(x)) = [0.000335463; 0.00218749; 0.011109; 0.0439369; 0.135335; 0.324652; 0.606531; 0.882497; 1; 0.882497; 0.606531; 0.324652; 0.135335; 0.0439369; 0.011109; 0.00218749]
x = [0.000335463; 0.00218749; 0.011109; 0.0439369; 0.135335; 0.324652; 0.606531; 0.882497; 1; 0.882497; 0.606531; 0.324652; 0.135335; 0.0439369; 0.011109; 0.00218749]
# The summation behind IFFT is
sum(X[m]*exp(2*π*1i*k/N*m), m = 0 .. N - 1)
# where X represents the total Fourier transform of a set of time domain data and the summation computes the kth element of the vector IFFT(X). In our example, we have
Ix := IFFT(X)
k := 3
invtransform(k) := sum(Xtot[m]*exp(2*π*1i*k/N*m), m = 0 .. N - 1)
Ix[k] = 0.0439369
invtransform(k) = 0.0439369
# Note that in computing the summation, the total transform had to be used, not the abbreviated vector returned by FFT(x).
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