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# SECTION 2 - FAST FOURIER TRANSFORM
# Lowercase FFT Functions
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# cfft(A)  icfft(A)  fft(v)  ifft(v)
# Returns the complex or real Fourier Transform or Inverse Fourier Transform. These functions normalize by 1/√N, instead of 1/N, in the 1D case, and normalize by 1/N, instead of 1/N^2 (CFFT) or 1 (ICFFT).  They also reverse the sign of the exponent for the transform, with
# •  A, a real or complex-valued vector or matrix of any size, with constant time, space, or frequency between samples
# •  v, a real-valued vector of size 2^m, with constant time between samples
# •  V, a real or complex-valued vector of size 2^(m-1)+1 with constant frequency between samples
# Results of the cfft and icfft have the same number of rows and columns as A. For matrix arguments, cfft returns the two dimensional Fourier transform.  The algorithm used is a prime divisor algorithm.
#
# Results of fft are of length 2^(m-1) + 1, representing only the positive frequency values.  Results of the ifft are of length 2^m.
# Notes
# • The more general Fourier Transform function CFFT.
# Algorithms
# The defining formulas for 1D fft, cfft, icfft, and ifft are
fft(x)[k] == 1/sqrt(N)*sum(x[m]*exp(2*π*1i*k/N*m), m)
ifft(x)[k] == 1/sqrt(N)*sum(x[m]*exp(-2*π*1i*k/N*m), m)
# Both transformations use the same scale factor 1/√N as opposed to 1/N for FFT and 1 for IFFT, and reverse the sign of the exponent.
# For a 2D array of data, the defining formulas for cfft and icfft are
cfft(C)[m, n] == 1/N*sum(sum(C[s, r]*exp(2*π*1i*m/N*s)*exp(2*π*1i*n/N*r), s), r)
icfft(C) == 1/N*sum(sum(C[s, r]*exp(-2*π*1i*m/N*s)*exp(-2*π*1i*n/N*r), s), r)
# Example - 1D complex sinusoidal data
# Create some simulated complex data with N data points at sample spacing T:
N := 100
k := 0 .. N - 1
T := 1
t[k] := T*k
ω_0 := π/8
d[k] := exp(1j*ω_0*t[k])
# Applying both the CFFT and cfft functions transforms data to the frequency domain,
D := CFFT(d)
DD := cfft(d)
# returning a complex vector in frequency space.  The sampling frequency and the frequency corresponding to the kth entry in the transformed vector are then given by
f_s := 1/T
f_s = 1
freq[k] := k/N*f_s
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# Note the effect of the negative sign in the exponent in shifting the frequency information to the negative part of the spectrum.
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