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# SECTION 2 - FAST FOURIER TRANSFORM
# Lowpass Filtering Using the FFT
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# Demonstrates a lowpass Hanning window filter applied to a boxcar by multiplying in the transform domain.
# Our signal is a single square pulse. We'd like to lowpass filter the pulse, smoothing the corners. Since we're using the Mathcad function FFT, the number of sample points must be a power of 2. The signal is a pulse of width 40 centered at 100. To get a clean-looking plot, we've used the step trace type.
N := 2^8
N = 256
n := 0 .. N - 1
s[n] := |n - 100| ≤ 20
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# First, take the transform:
S := FFT(s)
# Then create a new range variable to plot the frequency domain:
m := 0 .. N/2
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# The boxcar transforms to a sinc function, as expected.
# Window this transform with a Hanning window that saves only the low-frequency information. The cosine function gives a smooth transition from 1 at the low-frequency end to 0 at the midrange frequency which we've chosen, in this case, at index 16.
W[m] := (1 + cos((1*(-m/16))*π))/2*if(0 ≤ m ≤ 16, 1, 0)
# Here's the window, W, and the magnitude of the windowed transform, NT:
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SW := vectorize(S*W)
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# Now inverse transform the windowed frequency information and plot the resulting filtered signal along with the original.
sw := IFFT(SW)
# The sharp transitions on the edge of the square pulse represent high frequencies, so they've been rounded, as well as spread in time.
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