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# SECTION 2 - FAST FOURIER TRANSFORM
# Filtering vs. Exponential Smoothing
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# Compares smoothing by detrending and lowpass filtering in the transform domain to a time-domain iterative exponential smoothing algorithm.
# In this example, we illustrate the technique of smoothing a time series by windowing the discrete Fourier transform of the series. We also compare the results with another common time-domain smoothing technique: exponential smoothing. First generate some sample data:
n := 0 .. 99
f(x) := sin(x)^12 + 2 + rnd(1) + .1*x
d[n] := f(n/100*3*π)
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# The first step in smoothing by filtering is to remove the linear trend; otherwise, the transform will mostly display frequency components of the linear signal, and not the higher frequency content. Make a vector representing the time of each sample and use the slope function:
t[n] := n/100*3*π
r := slope(t, d)
# Remove the trend:
dd := d - t*r
# Take the transform:
D := cfft(dd)
# Window the transform by zeroing the elements in the middle, saving only the beginning and the end, which represent the low frequencies:
DW[n] := if(|n - 50| < 40, 0, D[n])
# Now invert and add the trend back in. (Note that since vectors add element wise, we can do this with a single plus.) The smoothed data is in the vector S:
dw := icfft(DW) + t*r
# Before we plot, we'll try another smoothing technique that uses Mathcad's seeded iteration.
# To get seed values for the iteration, estimate the stationary and trend values, s and b, by looking at the beginning of the series:
k := 0 .. 10
y[k] := d[k]
x[k] := t[k]
b[0] := slope(x, y)
s[0] := intercept(x, y)
# Choose the two smoothing constants (the closer α is to 1, the more closely the smoothed curve tracks the original data):
α := .4
β := .1
m := 1 .. 99
[s[m]; b[m]] := [α*d[m] + (1 - α)*(s[m - 1] + b[m - 1]); α*β*(d[m] - (s[m - 1] + b[m - 1])) + b[m - 1]]
P[0] := s[0]
P[m] := s[m - 1] + b[m - 1]
# P is the exponentially smoothed version of the original time series.
# Now compare the two smoothing techniques. We've offset the upper traces by 4 so that we can display them on the same graph.
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# Note that the exponential smoothing doesn't begin to track the data effectively until enough points have been averaged by the smoothing coefficients, α and β, at about time 1.
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