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# SECTION 2 - FAST FOURIER TRANSFORM
# Filtering an Image
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# Demonstrates filtering in the the Fourier transform domain in two dimensions.
# In this example, we convolve a two-dimensional image with a window using inverse FFTs. The filter we use is a square aperture, a lowpass filter.
#
# First, here is the image, plotted with a grayscaled patch plot.
m := -12 .. 12
n := -4 .. 4
I[44, 44] := 0
I[m + 22, n + 22] := -1
I[n + 22, m + 22] := -1
# [component: inputs I]
# Now define a square aperture 7 units on a side:
p := -3 .. 3
q := -3 .. 3
A[44, 44] := 0
A[22 + p, 22 + q] := 1
# [component: inputs A]
# The 2D boxcar transforms to a 2D sinc function, with most of its frequency content in the low frequencies (in the center), which makes it an adequate lowpass filter. To convolve the image with the aperture, transform both, multiply the transforms elementwise using Mathcad's vectorize operator, and then take the inverse transform.  We can do this all with a single statement:
IW := icfft(vectorize(cfft(A)*cfft(I)))
# Before we plot, we'll recenter the image, since the convolution has spread it to the corners
p := 0 .. 44
q := 0 .. 44
I2 := recenter(IW)
# [component: inputs I2]
# The new image has lost its high-frequency content, that is, its sharp edges.
# We can reverse the process by deconvolution, which we carry out by dividing the image transform elementwise by the aperture transform (we add a small amount to each element to make sure there's no division by 0):
DC := icfft(vectorize(cfft(I2)/(cfft(A) + .00001)))
# Again we recenter before plotting the restored image:
I3 := recenter(DC)
# [component: inputs I3]
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