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# SECTION 3 - SPECTRAL ANALYSIS
## Cepstrum and Complex Cepstrum
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## cepstrum(x)
## ccepstrum(x)
# Compute the cepstrum and complex cepstrum of a real-valued, multichannel signal. They take only one argument:
# • x, a real-valued vector or matrix. cepstrum accepts only vectors. ccepstrum accepts vectors and matrices, and acts upon the individual columns if x is a matrix.
# Returns another vector or matrix, containing the cepstrum or complex cepstrum of each column. The cepstrum maps convolution and deconvolution to addition and subtraction in the frequency domain, and has applications in speech and geophysical signal processing.
## Example - cepstrum(x) Function
# The cepstrum of a sequence x(n) is defined as
c[x]*n := (1/(2*π))*integral(ln(|X(ω)|)*e^jωn, ω = -π .. π)  # disabled
# where X(ω) is the Fourier transform of the sequence x(n).
# This is the definition of the Inverse transform after applying a natural logarithm to the Fourier transform of x(n). The logarithm maps convolution in the time domain to addition in the cepstral domain, making the cepstrum is a convenient tool for signal deconvolution, which is mapped to subtraction.
n := 0 .. 499
x[n] := 100/(n + 100)*sin(n/5)
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# Calculate the cepstrum and recenter the result:
y := cepstrum(x)
y := recenter(y)
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# The original signal cannot be recovered from the cepstrum, because the phase information is not retained. The complex cepstrum, shown below, is invertible.
## Example - Complex cepstrum
# The complex cepstrum is similar to the cepstrum, but it uses the complex logarithm.
cc(n)[x] := (1/(2*π))*integral((ln(|X(ω)|) + j*phase(X(ω)))*e^jωn, ω = -π .. π)  # disabled
# The following example simulates a signal going through a
# communication channel which introduces echoes (following section 12.8.1 of Oppenheim and Schaefer, Prentice-Hall, 1989). Comparing the complex cepstrum of the output signal to those of the input and channel sequences demonstrates that output complex cepstrum is the sum of the complex cepstra of the input and channel. This is similar to adding the spectra of two signals in the frequency domain, but it is done in the time-domain.
#
# First, define the channel response as an FIR filter that introduces attenuated copies of another sequence (echoes).
n := 0 .. 100
p[n] := 0
p[20] := 1
β := 0.9
N0 := 15
p[N0 + 20] := β
p[2*N0 + 20] := β^2
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# Here is the sequence that will be convolved with the channel response:
r := 0.9
b0 := 0.98
b1 := 1
θ := π/6
n := 0 .. 100
w[n] := (r^n/(4*sin(θ)^2))*(cos(θ*n) - cos(θ*(n + 2)))
n1 := 1 .. 100
m := 0 .. 100
v[m] := 0
v[0] := b0*w[0]
v[n1] := b0*w[n1] + b1*w[n1 - 1]
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# The resultant sequence is the convolution of the input and channel. Expect to see a signal consisting of the original signal plus delayed replicas. Note that the length of the output sequence is length(p) + length(v) - 1.
x := response(p, v, length(p) + length(v) - 1)
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# Compare the complex cepstrum of the output signal to the cepstra of the original sequences. Results are recentered for comparison.
Xccep := ccepstrum(x)
X2 := recenter(Xccep)
Pccep := ccepstrum(p)
P2 := recenter(Pccep)
Vccep := ccepstrum(v)
V2 := recenter(Vccep)
k := 0 .. length(X2) - 1
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# The plots above show that the complex cepstrum of the output signal is the sum of the complex cepstra of the two sequences that were convolved with each other.
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