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# SECTION 3 - SPECTRAL ANALYSIS
# The Chirp z-Transform
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# chirpz(x, lo, hi, δ)
# The chirp z-transform takes the spectrum of a sampled signal and interpolates at uniformly spaced frequency values over a small frequency interval.
# • x, a real- or complex-valued array
# • lo, hi, positive, real values for the endpoints of the frequency range, normalized so the sampling frequency is 1; hi is never greater than 0.5.
# • δ, positive real value frequency step size, such that (hi - lo)/δ should be at least 2.
# Returns a vector containing the interpolated spectrum with length
(hi - lo)/δ
# Notes
# • chirpz takes the FFT of an array with length of the original input signal plus the number of points in the interpolated spectrum minus one. If this number exceeds the maximum array size in your version of Mathcad, an error message results.
# • If the total length of the array delivered to the FFT is prime or has few factors, this calculation will be slow.
# • The algorithm used is the chirp z-transform described by Samuel Stearns and Ruth David in Signal Processing Algorithms (Prentice-Hall, Inc.).
# Example
# Following an example in Stearns and Ruth, a decaying sine wave signal is created:
K := 1000
k := 0 .. K - 1
f1 := 1/250
f2 := 1/100
# Sampled signal:
x[k] := exp(-f1*k)*sin(2*π*f2*k)
# Plot of the signal:
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# Calculate the FFT:
X := K*CFFT(x)
# Plot the spectrum. The frequency is normalized so that 1 represents the sampling frequency. We expect a peak at the frequency of the sine wave, convolved with the spectrum of the exponential.
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# To get a closer look at the spectrum around the peak, use the chirp z-transform. Set the frequency range and step.
lo := .005
hi := .015
delta := 10^-5
# Compute the spectrum using the chirp z-transform
S := chirpz(x, lo, hi, delta)
# Our interpolated spectrum has
length(S) = 999  # points.
# The original spectrum had only
K*(hi - lo) = 10  # points in this frequency range.
# We plot the spectrum using
m := 0 .. length(S) - 1  # as a range.
# The argument on the frequency axis is
lo + m*delta
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