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# SECTION 5 - TIME SERIES ANALYSIS
# Correlation and Partial Autocorrelation
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# lcorr(x, y) | plcorr(x)
# Calculates the lagged sample correlation, and partial autocorrelation, respectively.
# • x, y, real vectors with the same number of elements
# Return a vector of the same size as the input(s). The sample partial autocorrelation plcorr(x) is useful in determining the order for autoregressive models, useful in linear prediction methods. For definitions and examples see Time Series Analysis by Bowerman and O'Connell (Duxbury) and Forecasting Economic Time Series by Granger and Newbold (Academic Press).
# Example - lcorr
# The k^th component of lcorr(x, y) measures the linear relationship between x and the values of y lagged by k units. Hence, lcorr(x, y)_k is referred to as the sample correlation at lagk.
# Suppose an input signal in the form of a windowed sine wave pulse. This pulse might be used, for example, as a sonar test signal. The return signal travels some distance, bounces off the object under investigation, and returns to the source, lagged (because of the travel time), attenuated, and noisy. By correlating the received signal with the test signal, it's possible to determine the lag, and hence the distance to the object under test.
N := 1000
n := 0 .. N - 1
t[n] := n/200
pulselen := 200
m := 0 .. pulselen
x[N - 1] := 0
x[m] := 3*sin(4*π*t[m])
window := hanning(pulselen)
window[N - 1] := 0
x := vectorize(window*x)
# The return is delayed, attenuated, and contaminated by random noise.
y[n] := rnd(.6) - .3
lag := 300
m := lag .. pulselen + lag
y[m] := y[m] + .1*x[m - lag]
# If we didn't know the lag time, that is, if these signals were measured instead of simulated, it would be difficult to say where the return pulse was in the noisy plot below.
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# At or around the lag time, we would expect the linear correlation of x and y to be a maximum compared with other correlated samples, since the correlation slides one signal across another, multiplying and summing to arrive at each sample. When the lag time is reached, the overlap is at a maximum.
detect := lcorr(x, y)
max(detect) = 0.273084
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# Example - autocorrelation using lcorr
# The vector lcorr(x, x) is the autocorrelation of x. As an example, we use the autocorrelation to estimate the order of a moving-average process. To generate the data we smooth a random sequence using the movavg function, with a window width of N (this gives a process of order N - 1):
i := 0 .. 500
X[i] := rnd(1)
N := 7
Y := movavg(X, N)
# Here's a plot of the moving average process:
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# Now compute the autocorrelation:
A := lcorr(Y, Y)
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t := 0 .. N
A[t] = [1; 0.805318; 0.636962; 0.453156; 0.28419; 0.127555; -0.0255421; -0.169624]
# The first N values of the autocorrelation form a more or less straight line declining to near 0 at N. If we didn't know N we could use this behavior to make a good estimate. For reference we compute the slope of this initial segment compared to -1/N,
R[t] := A[t]
p[t] := t
slope(p, R) = -0.167129
-1/N = -0.142857
# Note that autocorrelation is a Fourier transform of the spectrum of the signal. It can, therefore, be efficiently computed using the FFT.
# Example - plcorr
# The partial autocorrelation is used to estimate the order of the model that can best fit an autoregressive time series, and to help compute the model parameters. The partial autocorrelation sequence, also known as the reflection coefficient sequence, represents the correlation between values of the time series at times t and t-k, after
# those values have been adjusted by subtracting the forward and backward predictions. The predictions are based on the values of the series at the intermediate times. For additional technical details refer, for example, to D. B. Percival and A. T. Walden, "Spectral Analysis for Physical Applications," p. 409, Cambridge University Press, 1993, which describes the use of Levinson-Durban recursion for autoregressive models.
# To illustrate the sample partial autocorrelation plcorr(x) we construct an autoregressive process as follows:
# Define coefficients for the process:
c := [.1; -.3; .2; .2; -.3; .1]
# Initialize the time series:
i := 0 .. 5
b[i] := rnd(.4) - .2
# Generate the rest of the series by using the autoregression plus noise:
k := 5 .. 500
b[k + 1] := sum(c[i]*b[k - i], i) + rnd(.4) - .2
# Here are 200 steps of the process:
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# Now compute the autocorrelation and partial autocorrelation:
A := lcorr(b, b)
P := plcorr(b)
# The plots below display the first 50 elements of each correlation vector:
j := 0 .. 30
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# Note that for the autoregressive process b the autocorrelation oscillates but the partial autocorrelation essentially cuts off after 6. Thus the partial autocorrelation gives information about the order of the process, which could then be used, for example, with the burg predictor.
# Economic time series are often fitted and analyzed using low-order models, for which only a few of the plcorr coefficients will be nonzero. For data whose plcorr coefficients do not drop off quickly, the data might reflect nonlinear phenomena. A common technique in this case is to difference the data and analyze the differenced data for correlations.
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