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# SECTION 5 - TIME SERIES ANALYSIS
# Linear Detrending
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# detrend(x)
# Approximates and removes a linear trend from data using a least squares best-fit line.
# • x, a real- or complex-valued data array of length ≥ 3
# Returns the corresponding vector of residuals of the same length as x. Pictorially, detrend(x) causes sloped data to appear flatter, as in the example.
# This process is useful, for instance, in some spectral estimation methods that are sensitive to the presence of linear trends and can be unreliable for low frequencies if the trend is not removed.
# Example
# Create some sample data contaminated by white noise.
i := 0 .. 100
Y[i] := e^(i/100)
t[i] := i
Y := Y + .5*whiten(101)
yd := detrend(Y)
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# The disappearance of the linear trend can be further demonstrated by looking at the least squares line before and after trend removal.
# Before trend removal the slope and intercept of the least squares line are
slope(t, Y) = 0.0171621
intercept(t, Y) = 0.864207
# After trend removal we have
slope(t, yd) = -1.77429e-17
intercept(t, yd) = 9.23418e-16
# This is always the case. The output of detrend is a vector whose least squares line is the horizontal line through the origin, that is, the slope and intercept are both 0.
# An effect of detrend is that the mean has been removed from the input data as seen by looking at the DC term before and after trend removal
CFFT(Y)[0] = 1.72231
CFFT(yd)[0] = 3.07785e-17
# The DC (first) term is now 0.
# The detrend(x) function performs a simple "preprocessing" task that often precedes a smoothing operation. As mentioned above, detrending is also often a useful first step in spectral estimation.
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