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# SECTION 4 - DIGITAL FILTERING
# FIR Filter Design
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# lowpass(f, N, [w]) | highpass(f, N, [w])
# bandpass(f_1, f_2, N, [w]) | bandstop(f_1, f_2, N, [w])
# These functions use windowing of the impulse response of an ideal filter to generate coefficients for an FIR filter of the given type.
# • f, f_1, f_2, real-valued cutoff or bandpass frequencies, given as fraction of the sampling frequency, between 0 and 0.5
# • N, integer >2 number of coefficients for the filter
# • w, (optional) windowing function index. Rectangular window if unspecified.
# Argument
# 1
# 2
# 3
# 4
# 5
# 6
# 7
# Window
# rectangular (the default)
# tapered rectangular
# triangular
# Hanning
# Hamming
# Blackman
# Nuttall
# Return an N-element vector containing the filter coefficients.
# Notes
# • For definitions and plots of available windows, see the section on Signal Windowing.
# • If the window type is not specified, the functions use the current default as set by the function setwindow. However, note that this function is now deprecated and future versions of the Extension Pack may not support it. To ensure compatibility with the future versions, do not use setwindow to change the default window type.
# Example - Lowpass Filter Window Comparison
# Calculate coefficients for a lowpass filter using two different windows, rectangular and Blackman. The normalized cutoff frequency is .2
# Set the cutoff frequency and number of coefficients.
f := 0.2
N := 31
# Calculate the coefficients with rectangular and Blackman windows.
c1 := lowpass(f, N, 1)
c2 := lowpass(f, N, 6)
# Define a range for displaying the coefficients and computing the frequency response.
k := 0 .. length(c1) - 1
# The coefficients:
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# Now we calculate the phase and magnitude of the frequency responses. See the Elementwise magnitude and phase section for a discussion of mag, phase, and phasecor. See the Filter Gain section for the gain function and the Filter Response section for more details on computing the response function.
m := 0 .. 300
f[m] := m/600
r1[m] := gain(c1, f[m])
r2[m] := gain(c2, f[m])
# Magnitude:
M1 := mag(r1)
M2 := mag(r2)
# Phase:
P1 := phasecor(phase(r1))
P2 := phasecor(phase(r2))
# Plots of magnitude, dB magnitude and phase of frequency response:
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# Example - Filtering by Convolution
# Convolution can be used to apply these FIR coefficients. Consider a signal with low, middle, and high frequencies normalized with respect to the sampling frequency.
f1 := 0.02
f2 := 0.05
f3 := .1
N := 501
n := 0 .. N - 1
x[n] := sin(2*π*f1*n) + sin(2*π*f2*n) + sin(2*π*f3*n)
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# Now we generate filter coefficients using a Hamming window (number 5):
# Normalized filter cutoff frequencies are used to generate the coefficients.
f_low := 0.03
f_high := 0.075
w := 5
L := lowpass(f_low, 51, w)
H := highpass(f_high, 51, w)
S := bandstop(f_low, f_high, 51, w)
P := bandpass(f_low, f_high, 51, w)
# To filter the signal, convolve the filter impulse responses with x using convol for the first two and response for the second two, demonstrating two approaches to this task. See Filter Response for a discussion of response function).
Lout := convol(x, L)
Hout := convol(x, H)
Sout := response(x, S, N)
Pout := response(x, P, N)
# The outputs of convol have length equal to one less than the sum of the lengths of x and the coefficient array. For more on the convolution and correlation functions see Convolution and Correlation in Section 1.
# Define a range for plotting:
n := 0 .. length(Lout) - 1
# Examine the lowpass output. Just the low frequency component of the signal is plotted in blue for comparison. The sine wave is shifted to the right by 25 to allow for the delay introduced by the filter. The filter passes essentially only the low frequency, with some attenuation.
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# Examine the effectiveness of the bandpass filter by comparing the spectrum of the original signal with the spectrum after filtering. Only the first 80 spectrum values are shown.
I := CFFT(x)
O := CFFT(Pout)
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# Most of the low frequency and all of the high frequency have been successfully attenuated.
# This plot compares the highpass output with the high frequency signal component. Although the output of the filter is delayed by the expected 25 samples, the frequencies are the same.
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# Finally, we compare the spectrum of the original signal with the spectrum of the output of the bandstop filter S, showing the attenuation of the central frequency.
I := CFFT(x)
O := CFFT(Sout)
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# setwindow(w) - DEPRECATED
# This function lets you change the value of the default window used to design FIR filters. It is now DEPRECATED, and you should avoid using it. Instead, if you want to use windows other than the rectangular one when designing FIR filters, specify the window type as an optional argument into the FIR filter design
# function.
#
# When a new document is opened, the default window is rectangular (window number 1). To use a Hamming window, use setwindow(5). To make the setting take effect, you must actually calculate the function by typing an equals sign. Mathcad confirms the setting by showing the new value.
setwindow(5) = 5
# To find out what the current window is, use an argument of 0:
setwindow(0) = 5
# Note that you can set the window once for your whole document by calculating setwindow at the top of the document. This is convenient if you plan to use the same window in all calculations. However, if you want to change windows, as we will do here, you can calculate setwindow again with a different argument . This new setting will be in effect for any new calculations, or any old ones which you explicitly recalculate by clicking on the filter function and pressing [F9].
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