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# SECTION 1 - SIGNALS AND SYSTEMS
# Elementwise Magnitude and Phase
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# mag(x) | phase(x)
# phasecor(phasevec) | makeri(magvec, phasevec)
# These functions return, respectively, magnitudes, phase angles, phase angles corrected for jump discontinuities, and a restored data vector given vectors of magnitude and phase.
# • x, a real or complex-valued array of any size
# • phasevec, a real-valued array of elementwise phases
# • magvec, a real-valued array of element-wise magnitudes of the same length as phasevec
# Each phase angle generated by phase is selected in the range -π < θ ≤ +π. The function makeri(magvec, phasevec) reverses the action of mag and phase. These functions are useful for manipulating the output of Fourier transform functions.
# Notes
# • Ambiguity in angle selection can cause the phase of the output vector to differ from the phase of the input vector. The two vectors agree up to multiples of 2π.
# • If an element in magvec is negative, its absolute value is interpreted as the desired magnitude, and the corresponding element in phasevec is advanced π radians.
# Example - Four-Element Vector
# Here's a simple complex vector that can be used to demonstrate the functions.
X := [-3.7; 3 + 4j; 1.6 - 2.9j; 0.4]
# The mag function will find the element-wise magnitudes, and the phase function the element-wise phases.
Mag := mag(X)
θ := phase(X)
Mag = [3.7; 5; 3.3121; 0.4]
θ = [1; 0.295167; -0.339519; 0]*π
# Typically phase computations are done elementwise without regard to past phase history. This results in large jump discontinuities in the resulting phase data due to the change in angle from +π to -π when you cross the negative real axis. For example:
Y := [-1 + 1j; -1 + 0.01j; -1 - 0.01j; -1 - 1j]
phase(Y) = [2.35619; 3.13159; -3.13159; -2.35619]
# The function phasecor(x) eliminates these jump discontinuities. phasecor takes a real vector representing phase information as argument then walks through the vector adding multiples of 2π (maintaining the integrity of the data) when necessary to produce a continuous data set. For example, with the small vector above we have
phasecor(phase(Y)) = [2.35619; 3.13159; 3.15159; 3.92699]
# The function makeri(magvec, phasevec) reverses the action of mag and phase. Arguments x and y, real vectors of the same length, are interpreted as the magnitude and phase data respectively of a complex data vector. makeri(x, y) returns this complex vector.
# For example:
makeri(Mag, θ) = [-3.7; 3 + 4j; 1.6 - 2.9j; 0.4]
X = [-3.7; 3 + 4j; 1.6 - 2.9j; 0.4]
# Example - Noisy Signal
# Construct an example signal and add white noise:
k := 6
N := 301
n := 0 .. N - 1
x[n] := ceil(n*k/N)*sin(2*k*π*n/N)
x := x + 4*whiten(N)
# Function whiten is one of the pseudo-random signal generators included in this Extension Pack. Then take the Fourier Transform using CFFT:
f := CFFT(x)
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# The magnitude of our signal's Fourier transform looks like
mg := mag(f)
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# The peaks are at k and N - k, as we would expect. It may be more convenient to display the spectrum recentered so that the dc term is in the middle. For this, we use the recenter function.
mg1 := recenter(mg)
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# The phase data for the FFT is plotted below:
ph := phase(f)
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# To correct the phase into a continuous signal,
phc := phasecor(ph)
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# Of course the phasecor function can be fooled if the phase changes too rapidly. Change the value of the fractional frequency f_0 in the definition below from 0.4 to 0.5 and notice what happens.
f_0 := 0.4
m := 0 .. 20
r[m] := exp(2*π*1j*f_0*m)
pr := phase(r)
cor[m] := phasecor(pr)[m]
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# Given the magnitude and phase vectors of our sample signal, we can use makeri to reconstruct the FFT of the original signal.
f2 := makeri(mg, ph)
# A segment of both the inverse FFT construction and the original forward one is displayed below.
k := 35 .. 44
f2[k] = [-0.0718641 - 0.0625191j; 0.0215273 - 0.0270222j; -0.0024459 + 0.0453736j; -0.0254481 - 0.010003j; -0.0434257 - 0.0286946j; 0.0105535 - 0.0100092j; 0.0763733 + 0.0240172j; -0.0746514 - 0.012243j; -0.0134637 + 0.0427011j; 0.103094 + 0.0115411j]
f[k] = [-0.0718641 - 0.0625191j; 0.0215273 - 0.0270222j; -0.0024459 + 0.0453736j; -0.0254481 - 0.010003j; -0.0434257 - 0.0286946j; 0.0105535 - 0.0100092j; 0.0763733 + 0.0240172j; -0.0746514 - 0.012243j; -0.0134637 + 0.0427011j; 0.103094 + 0.0115411j]
# The inverse Fourier transform can then be used to recover the original signal.
x2 := ICFFT(f2)
x2[k] = [0.403991; -1.03964; -0.0220271; -1.16699; -0.00753351 - 4.00838e-16j; -0.559919; 0.0280335; -0.563998; -2.1756; -0.997162]
x[k] = [0.403991; -1.03964; -0.0220271; -1.16699; -0.00753351; -0.559919; 0.0280335; -0.563998; -2.1756; -0.997162]
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