# Title: Filter Gain
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# SECTION 4 - DIGITAL FILTERING
# Filter Gain
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# gain(C, f)
# Computes the complex gain of a digital FIR or IIR filter.
# • C, a real or complex-valued vector or array of filter coefficients.
# FIR filter: C has one column
# IIR filter: C has column pairs
# col. 1: numerator coefficients
# col. 2: denominator coefficients
# • Note: IIR transfer functions must be normalized so that the constant term in the denominator is 1.
# • f, a positive real number between 0 and 1, the frequency as a fraction of the sampling frequency. Frequency is generally between 0 and 0.5. f may be defined as a range variable.
# The gain function returns the gain at the single frequency, or a vector of gains - the transfer function - if a vector of frequencies is used. This is useful for plotting. See FIR Filter Design and IIR Filter Design, also in section 4, for more on these filter-generating functions.
# Example - Gain of a Lowpass Filter
# The array A gives the coefficients of a second order lowpass Butterworth filter with cutoff frequency f:
# IIR filter cutoff frequency:
f := 0.2
A := iirlow(butter(2), f)
# The filter coefficients are
A = [0.206572, 1; 0.413144, -0.369527; 0.206572, 0.195816]
# so the transfer function is
(.207 + .413*z^-1 + .207*z^-2)/(1 - .37*z^-1 + .196*z^-2)
# The magnitude of the gain over frequencies ranging from 0 to half the sampling frequency is shown.
x := 0, .001 .. .5
G1(x) := gain(A, x)
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# If you prefer to scale the frequency so that the sampling frequency is represented as 2π, you can define your range variable accordingly and then divide the frequency argument to the gain function by 2π:
ω := 0, .005 .. π
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# Example - Higher Order Lowpass Filters
# The next example is a sixth-order lowpass filter with three sections corresponding to three quadratic factors of the numerator and denominator of the transfer function:
# IIR filter cutoff frequency:
f := 0.2
C := iirlow(butter(6), f)
C = [
    0.277247, 1, 0.206572, 1, 0.18007, 1;
    0.554494, -0.495954, 0.413144, -0.369527, 0.36014, -0.322119;
    0.277247, 0.604941, 0.206572, 0.195816, 0.18007, 0.0423996
]
# For this sixth-order filter the response falls off much more rapidly than for the second-order filter defined by the array A. Here's a plot of the gain of both filters compared.
G2(x) := gain(C, x)
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# Finally we compute the gain for an FIR filter designed using the function bandpass.
# Compute coefficients for a length 51 bandpass filter using a Blackman window with passband between f_low and f_high:
f_low := 0.2
f_high := 0.4
F := bandpass(f_low, f_high, 51, 6)
# Plot the gain in dB:
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# Function Definition
# You can compute gains directly from the definition of the transfer function, using the summation operator. For example, the gain of the filter F at a frequency x is given by
n := 0 .. 50
g(x) := sum(exp(-2*π*1j*n*x)*F[n], n)
# This is the transfer function evaluated at z = 2πjx.
g(.25) = -0.999006j
gain(F, .25) = -0.999006j
g(.2) = 0.500014
gain(F, .2) = 0.500014
# gain is faster than the summation operator, so it's convenient when you want to compute the gain at a large number of frequencies, for example when plotting the frequency response. For very long filters even the computation with gain will take a while, so choose a fairly coarse grid (say .01) for plotting.
# Example - FIR Filter Phase
# The phase of the complex gain represents the phase shift of the filter.
# FIR filter cutoff frequency:
f := 0.3
# Compute coefficients for a lowpass filter, using a Hanning window (last argument of 4) in the lowpass function:
G := lowpass(f, 37, 4)
# Plot the phase change using the arg function:
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# The phase is linear in the passband, as we'd expect, but we're seeing the effect of the filter delay. We can compute the complex gain relative to the delayed signal by dividing by the transfer function of the delay D, which is
z^(-D)
# where
z == exp(1j*ω) == exp(1j*2*π*x)
# For this length 37 filter the delay D is 18, so the relative phase shift is
gain(G, x)/exp(-1j*2*π*x*18)
# When the gain is real and negative, roundoff errors in the gain computation can leave a tiny positive or negative imaginary part, so the phase may jump arbitrarily between π and -π. To make sure these values get handled uniformly, redefine the arg as follows:
arg0(z) := arg(z + 1j*10^-15)
# Now plot the magnitude of the gain in decibels and the phase shift relative to the delayed signal.
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