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# SECTION 6 - ADDITIONAL TRANSFORMS
# The Hartley Transform
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# dht(x) | idht(x)
# The Discrete Hartley Transform and its inverse, respectively.
# • x, a real-valued input array
# Returns the transformed array, a real array having the same number of elements as the input. The Hartley transform was designed to contain the information inherent to the Fourier transform but to avoid entering the complex domain. In order to accomplish the latter goal, the Hartley transform restricts its attention to real input data.
# Notes
# The defining sum for the Hartley transform is analogous to the discrete Fourier transform sum. It is
dht(x)[n] == 1/N*sum(x[k]*(cos(2*π*n*k/N) + sin(2*π*n*k/N)), k == 0 .. N - 1)
# where N is the number of elements in the real data array x.
# Example
# The Hartley transform for a sum of sine waves is compared with the magnitude of the complex Fourier transform.
N := 201
i := 0 .. N - 1
t[i] := i/(N - 1)
x[i] := sin(14*π*t[i]) + sin(4*π*t[i])
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# The Hartley transform shows the discrete frequencies represented in the two sine waves.
hx := recenter(dht(x))
freq[i] := i - N/2
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# The discrete Fourier Transform produces much the same result, as we'd expect from the definitions.
dft := recenter(CFFT(x))
mf := mag(dft)
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# The close relationship between the Hartley transform and the Fourier transform can be demonstrated by showing how to compute phase and magnitude from the Hartley transform. This is done below with a small data set.
N := 7
i := 0 .. N - 1
v[i] := e^(-i) + rnd(1)
# Compute and recenter the discrete Hartley transform
hv := recenter(dht(v))
# Then compute the odd and even parts of the discrete Hartley transform (these formulas assume an odd value of N)
O[i] := (hv[i] - hv[N - 1 - i])/2
E[i] := (hv[i] + hv[N - 1 - i])/2
# The corresponding phase and magnitude vectors are given by
φ[i] := angle(E[i], -O[i])
m[i] := sqrt(O[i]^2 + E[i]^2)
# respectively.
# We compare the results to that obtained via the Fourier transform by employing the Signal Processing Extension Pack's functions phase, mag and phasecor: the results will agree or in some cases differ by 2π.
phs2 := phasecor(phase(recenter(CFFT(v)))) + 2*π
augment(phasecor(φ), phs2) = [
    1.54784, 1.54784;
    1.98259, 1.98259;
    2.13534, 2.13534;
    2, 2;
    1.86466, 1.86466;
    2.01741, 2.01741;
    2.45216, 2.45216
]*π
augment(m, mag(recenter(CFFT(v)))) = [
    0.132585, 0.132585;
    0.0972429, 0.0972429;
    0.0747784, 0.0747784;
    0.631129, 0.631129;
    0.0747784, 0.0747784;
    0.0972429, 0.0972429;
    0.132585, 0.132585
]
# For a thorough treatment of the Hartley transform and its applications, see Ronald Bracewell's book The Hartley Transform (Oxford University Press).
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