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# SECTION 6 - ADDITIONAL TRANSFORMS
# The Hilbert Transform
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# hilbert(x)
# Creates the Hilbert transform of x, a real vector y such that the DFT of the analytic signal x + jy has magnitude zero at negative frequencies.
# • x, a complex-valued data array
# Returns an array for which the negative frequency components exactly cancel those of the input x. Hilbert-transformed analytic signals are useful for avoiding aliasing.
# Example
i := 0 .. 100
x[i] := sin(2*π*i/20) + cos(2*π/30*i) + rnd(1)
# Compute the transform:
y := hilbert(x)
# Build the complex signal:
z := x + 1j*y
# Find the spectrum:
Z := CFFT(z)
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# Note that the magnitude of the analytic signal, z, is the complex envelope of the original signal, x.
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# The new signal that is created by hilbert, y, is related to the original signal, x, in the transform domain in the following way
Y(e^(1j*ω)) == H(e^(j*ω))*X(e^(1j*ω))
# where H is know as the Hilbert transformer, a filter with the frequency response
H(e^(1j*ω)) == -1j  # for
0 ≤ ω ≤ π
H(e^(1j*ω)) == 1j
# for
π ≤ ω ≤ 2*π
# It's possible to build H in Mathcad through the filter design procedures and functions in this pack. Rabiner and Gold (Theory and Application of Digital Signal Processing, Prentice-Hall, Inc.) give coefficients for an ideal Hilbert transformer. The examples below are based on the treatment in Section 14.4 of Signal Processing Algorithms, by Stearns and David (Prentice-Hall). We window and shift the coefficients of the ideal filter to get a causal filter of odd length N:
# length:
N := 99
# center:
C := (N - 1)/2
C = 49
# unwindowed coefficients h:
k := 1, 3 .. C
h[C - k] := -2/(k*π)
h[C + k] := 2/(k*π)
h[N - 1] := -h[0]
# Window the coefficients with a Hamming window, using Mathcad's vectorize operator to multiply h and the window element by element:
h := vectorize(h*hamming(N))
i := 0 .. N - 1
# The gain and phase of the filter look like this, where we plot frequency normalized to sampling frequency = 1.
x := 0, .001 .. .5
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# The filter has a delay of C, and we compute the phase shift of the filter relative to the delayed signal. The delay has transfer function
z^(-C)
# where
z == exp(1j*ω) == exp(1j*2*π*x)
# So the phase shift in degrees is:
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# The shift is -90 deg over almost the whole frequency range.
# To test the filter, make a real signal with low frequency noise. We generate the noise by building its transform T, using random phases and unit magnitudes for the first 200 elements after the first. Putting the conjugates of these elements in the last 200 places guarantees a real result when we invert (use the Re function to remove the small imaginary roundoff error). Put the cursor on rnd and recalculate to see a different random signal X.
m := 0 .. 1000
d := 1 .. 200
T[d] := exp(2*π*1i*rnd(1))
T[1001 - d] := conj(T[d])
x := Re(icfft(T))
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# Now run x through the Hilbert transformer h, and build a complex signal z out of x and its Hilbert transform y. We add j times an 800-element chunk of the filter output y beginning at delay C to the corresponding chunk of x:
y := response(x, h, 800 + C)
w := 0 .. 799
b[w] := y[w + C]
a[w] := x[w]
z := a + 1j*b
# Here's the spectrum of the complex signal z, plotted as the magnitude of the FFT:
S := CFFT(z)
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# As you can see, the original 200 points that were used to generate the signal in the transform domain are shown here. The upper half of the spectrum is essentially zero, so the Hilbert transformer filter has done its job.
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