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# SECTION 4 - DIGITAL FILTERING
# IIR Filter Design
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# butter(N) | bessel(N, scale) | cheby1(N, ε) | cheby2(N, scale, atten)
# iirlow(C, f) | iirhigh(C, f)
# iirpass(C, lowf, highf) | iirstop(C, lowf, highf)
# Generate coefficients for IIR filters. butter, bessel, cheby1, and cheby2 produce coefficients for an analog lowpass filter of the given type. These coefficients are used as an argument to one of the iir functions, which scale and perform bilinear transformation to produce the required frequency response.
# • N, integer filter order,
# for bessel filters, between 1 and 35,
# for all others, between 1 and 200
# • ε, positive real number, allowable passband ripple
# • scale, for bessel filters, a real number greater than 0 which sets the lower edge of the stopband.
# • scale, for cheby2 filters, a calculated real number greater than 1 setting the lower edge of the stopband. Calculations for each type of filter are shown in the examples.
# • atten, real number greater than 1, the stopband attenuation factor
# • C, coefficient array produced by one of the first four functions
# • f, lowf, highf, real frequencies, normalized to the sampling frequency, between 0 and 0.5
# Produce coefficient arrays with an even number of columns. If there are two columns, as in the output of bessel, the filter consists of a single section: column 1 contains coefficients of the transfer function numerator, column 2 contains denominator coefficients. If there are more than two columns, each pair represents a section of a filter in cascade form.
#
# For lowpass and highpass filters with even N, all sections are second-order, with three coefficients in each column. If the order is odd, the last section is first-order. For bandpass and bandstop filters, the conversion to a digital filter doubles the order of each section.
# Notes
# • These functions implement algorithms in Chapter 7 of Signal Processing Algorithms by Samuel Stearns and Ruth David (Prentice-Hall, Inc.).
# • The functions gain and response accept coefficient arrays in the form produced by these functions. Complex gain is found by multiplying section gains, and response by feeding each section's response into the next section.
# Example - Lowpass Chebyshev Type I Filter
# These examples are based on examples in Chapter 7 of Stearns and David. See this book for a clear and interesting treatment of the mathematics of digital filtering and IIR filter design in particular.
# For a Chebyshev Type I filter.
# Choose the order:
N := 8
# Choose the parameter ε:
ε := .5
# Choose cutoff frequency:
f := .25
# Generate the filter coefficients:
A := iirlow(cheby1(N, ε), f)
A = [
    0.430774, 1, 0.376071, 1, 0.207861, 1, 0.0497443, 1;
    0.861548, -0.00497802, 0.752142, -0.286355, 0.415723, -0.801346, 0.0994886, -1.30217;
    0.430774, 0.931457, 0.376071, 0.790639, 0.207861, 0.632791, 0.0497443, 0.501151
]
# The filter A has the expected four quadratic sections. Plot the magnitude of the gain, and put a marker at the ripple specified by the choice of ε, which is
ripple := 1/sqrt(1 + ε^2)
x := 0, .001 .. .5
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# (For more on the gain function, see Filter Gain.)
# Since the transfer function is given as a product of quadratic factors, it's straightforward to plot the poles on the complex plane. To find the complex roots of each factor of the denominator, define
R(v) := (-v[1] - sqrt(v[1]^2 - 4*v[2]))/2
# The poles of the transfer function of the filter A are the roots of quadratics with coefficients given by the odd-numbered columns of A, with the coefficient of the quadratic term first.
# Find one root for each factor of the denominator:
i := 0 .. 3
r[i] := R(A[:, 2*i + 1])
# Fill in the conjugate roots:
r[i + 4] := conj(r[i])
# Below we display the transfer function poles and plot them on the complex plane.
k := 0 .. 7
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r = [0.00248901 - 0.965117j; 0.143177 - 0.877576j; 0.400673 - 0.687206j; 0.651087 - 0.277915j; 0.00248901 + 0.965117j; 0.143177 + 0.877576j; 0.400673 + 0.687206j; 0.651087 + 0.277915j]
# The pole plot shows that all the poles are inside the unit circle, so the filter is stable, as required. We can also verify this numerically by computing
max(vectorize(|r|)) = 0.96512
# To plot the impulse response of the filter A, use the response function, giving it a vector of length 1 representing a unit impulse as the first argument. Here's a plot of the first 100 terms of the impulse response:
# Length of the response signal to be computed:
N := 100
t[0] := 1
res := response(t, A, N)
q := 0 .. N - 1
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# Although the response is infinite in length, it has dropped to nearly 0 after the first 80 terms. The stability condition guarantees that
sum(|res|)
# is bounded.
# Example - Lowpass Chebyshev Type II Filter
# Set the parameters for a Type II Chebyshev filter.
pass := .1
stop := .18
atten := 5
# Compute the scale (see Stearns and David for the theory behind this computation; this number will be greater than 1):
scale := tan(π*stop)/tan(π*pass)
scale = 1.95316
# We try a fifth-order filter, which has two quadratic sections and one linear section:
order := 5
C := iirlow(cheby2(order, scale, atten), pass)
C = [
    0.760559, 1, 0.51212, 1, 0.57207, 1;
    -0.583857, -0.846084, 0.0783685, -0.23012, 0.57207, 0.14414;
    0.760559, 0.783346, 0.51212, 0.332729, 0, 0
]
# A plot of the response shows how well the design criteria are met. By setting the axis markers to pass, stop and 1/atten we can see that the stopband begins at the required location (the intersection of the stop and 1/atten lines) and that the passband ends to the right of the cutoff .1.
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# For a larger attenuation, say 1000, a higher order would be needed to get the transition band down to the required width. We plot the gains in dB, marking the desired 30 dB attenuation:
C1 := iirlow(cheby2(5, scale, 1000), pass)
C2 := iirlow(cheby2(8, scale, 1000), pass)
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# Computing the Scale Factor
# Here's how to compute the scale factor for the other three filter types. Only the first equation below is activated. If you want to activate the second or third equation, then right-click on the equations and select Enable Evaluation.
# For a highpass filter:
scale := tan(π*pass)/tan(π*stop)
# For a bandpass filter the parameters pass1 and pass2 are the lower and upper edges of the passband and the parameters stop1 and stop2 are the edges of the two stopbands.
scale := min([
    |(tan(π*stop1)^2 - tan(π*pass1)*tan(π*pass2))/((tan(π*pass2) - tan(π*pass1))*tan(π*stop1))|;
    |(tan(π*stop2)^2 - tan(π*pass1)*tan(π*pass2))/((tan(π*pass2) - tan(π*pass1))*tan(π*stop2))|
])  # disabled
# For a bandstop filter the parameters pass1 and pass2 are the edges of the two passbands and the parameters stop1 and stop2 are the lower and upper edges of the stopband.
scale := min([
    |(tan(π*pass2) - tan(π*pass1))*tan(π*stop1)/(tan(π*stop1)^2 - tan(π*pass1)*tan(π*pass2))|;
    |(tan(π*pass2) - tan(π*pass1))*tan(π*stop2)/(tan(π*stop2)^2 - tan(π*pass1)*tan(π*pass2))|
])  # disabled
# As an example, compute coefficients for a bandpass filter with the following parameters:
stop1 := 0.1
pass1 := 0.15
atten := 100
stop2 := 0.35
pass2 := 0.3
scale := min([
    |(tan(π*stop1)^2 - tan(π*pass1)*tan(π*pass2))/((tan(π*pass2) - tan(π*pass1))*tan(π*stop1))|;
    |(tan(π*stop2)^2 - tan(π*pass1)*tan(π*pass2))/((tan(π*pass2) - tan(π*pass1))*tan(π*stop2))|
])
scale = 1.85184
C3 := iirpass(cheby2(6, scale, atten), pass1, pass2)
C3 = [
    0.549582, 1, 0.372475, 1, 0.252639, 1;
    -0.197501, -0.462004, -0.0940739, -0.408944, -0.0124154, -0.367954;
    0.0604213, 0.703461, -0.192616, 0.378936, -0.432383, 0.130636;
    -0.197501, -0.358369, -0.0940739, -0.157285, -0.0124154, -0.0293141;
    0.549582, 0.704863, 0.372475, 0.283312, 0.252639, 0.0356015
]
# Plot the response in dB.
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# The right stopband edge falls exactly at the correct location. The left stopband edge is just above the target value, so this transition band is narrower than required.
# Example - Lowpass Bessel Filter
# A Bessel filter is returned as a single section. Set the parameters. The scale parameter can be used to control the gain at the cutoff, as we see below.
order := 6
scale := 1
f := .1
B := iirlow(bessel(order, scale), f)
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B = [
    0.0695945, 1;
    0.417567, 1.43189;
    1.04392, 1.23079;
    1.39189, 0.584108;
    1.04392, 0.176174;
    0.417567, 0.0289543;
    0.0695945, 0.0021359
]
# For this Bessel filter the gain at the cutoff is
|gain(B, f)| = 0.95534
# Trade a lower gain at the cutoff for increased attenuation in the stopband using the scaling factor. The gain of the analog transfer function R corresponding to the analog coefficients is
BA := bessel(6, 1)
k := 0 .. 6
R(ω) := BA[0, 0]/sum(BA[k, 1]*(1j*ω)^k, k)
# To get a gain at f of 0.8 for our digital filter, we find the point where the analog gain is 0.8, using Mathcad's root function. We start with a guess value of 1:
w := 1
ω := 0, .1 .. 6
scale := root(|R(w)| - .8, w)
scale = 2.18679
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# The plot shows that we've found the right value. Now we recompute our digital filter coefficients using this scale factor.
# Using the scale factor
scale = 2.18679
# compute the coefficients
B1 := iirlow(bessel(order, scale), f)
# The gain plot shows the changed frequency response, with the gain at f now being 0.8:
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|gain(B1, f)| = 0.8
# Example - Bandpass, Bandstop, and Highpass Butterworth filters
# Note that the order of the input coefficients is doubled by the iirpass and iirstop functions, so fourth-order analog coefficients result in an eighth-order filter.
# Set the parameters:
order := 8
f_low := .15
f_high := .35
# Compute the coefficients:
D := iirpass(butter(order/2), f_low, f_high)
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D = [
    0.253302, 1, 0.183903, 1;
    0, 0, 0, 0;
    -0.506603, 0.45312, -0.367806, 0.328976;
    0, 0, 0, 0;
    0.253302, 0.466326, 0.183903, 0.0645877
]
# The next example is a 16th-order Butterworth bandstop filter, with the same band edges. The filter has four 4th-degree sections.
F := iirstop(butter(8), .15, .35)
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F = [
    0.552075, 1, 0.428237, 1, 0.365489, 1, 0.338635, 1;
    0, 0, 0, 0, 0, 0, 0, 0;
    1.10415, 0.521309, 0.856474, 0.404372, 0.730978, 0.345121, 0.677271, 0.319764;
    0, 0, 0, 0, 0, 0, 0, 0;
    0.552075, 0.686992, 0.428237, 0.308576, 0.365489, 0.116835, 0.338635, 0.0347777
]
# The last example is a 10th order Butterworth highpass filter, with 5 quadratic sections.
F := iirhigh(butter(10), .35)
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F = [
    0.182953, 1, 0.150742, 1, 0.131106, 1, 0.119771, 1, 0.114564, 1;
    -0.365906, 1.04351, -0.301484, 0.859784, -0.262213, 0.747789, -0.239543, 0.683138, -0.229128, 0.653437;
    0.182953, 0.775319, 0.150742, 0.462752, 0.131106, 0.272215, 0.119771, 0.162223, 0.114564, 0.111694
]
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