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# SECTION 5 - TIME SERIES ANALYSIS
# Linear Prediction Methods
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# yulew(s, N) | burg(s, N)
# Generate coefficients for the named linear prediction model.
# • s, real-valued vector of sample data to be predicted
# • N, an integer 1 < N < length(s), the order of the model
# Returns a vector c of length N + 1 giving the prediction coefficients. Predicted data values, x_n, are computed from earlier values by the sum
k == 1 .. N
x[n] == sum(-c[k]*x[n - k], k)
# This approximation is the equivalent of an all-pole IIR filter, or an autoregressive (AR) model. It is useful for representing data in a compact way, as filter coefficients, c, in the frequency domain, rather than a long data train.
# Notes
# • To calculate predicted values, ignore the zeroth element of the output coefficient vector, which is always 1.
# • These functions implement the Yule-Walker algorithm and Burg's method. For a description of these algorithms and the mathematics behind them, see Optimum Signal Processing by Sophocles J. Orfanidis (Macmillan).
# Example - Yule-Walker Prediction
# As an example, we take only the first few samples of the following noisy cosine, and generate a set of coefficients that adequately represent the signal.
n := 0 .. 100
X[n] := cos(2*π*n/12) + rnd(.4) - .2
# The .2 is subtracted from the signal to center the random component around 0 amplitude. Take a short sample set from the beginning of the signal.
M := 20
m := 0 .. M - 1
sample[m] := X[m]
# Prediction order:
N := 6
# Compute the coefficients using Yule-Walker:
c := yulew(sample, N)
# The coefficients are
c = [1; -0.804382; 0.145237; 0.108742; 0.0830971; 0.154011; 0.10058]
# These coefficients are for an all-pole filter which approximates the original signal. As expected, there is one large pole, representing the cosine, and several smaller ones, approximating the noise.
#
# The order N determines the number of consecutive values used to predict the next value in the sequence. The first through sixth elements of the coefficient vector are used, ignoring the zeroth element, which is always 1. This 1 is needed when c is used as a prediction error filter to generate the complete set of prediction errors.
# Compare the predicted points, calculated using the previous N points in the signal, to the original data. This shows how good the filter would be if used in place of the signal X.
k := 1 .. N
y[0] := 0
y[n] := -sum(if(n - k ≥ 0, c[k]*X[n - k], 0), k)
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# The approximation is very good, even using only the first 20 points in the data.
# The prediction errors for the Yule-Walker coefficients can be generated using the coefficient array as a filter, then computing the response with the sample as input. The full coefficient array is sometimes called a prediction-error filter. We can use either the convol function or response.
PE := response(X, c, 100)
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# We can verify that these errors do indeed give the difference between the two graphs on the preceding screen. For example:
point := 20
PE[point] = -0.112034
X[point] - y[point] = -0.112034
# The Yule-Walker algorithm minimizes the sum the of the squares of the prediction errors:
SS := sum(vectorize(PE^2))
SS = 3.87564
# We can "spot check" the minimization by perturbing c (adding a small random amount to all coefficients except the first) and recomputing the sum (put the cursor on rnd below and press [F9] a few times):
k := 1 .. N
r[k] := rnd(.1) - .05
c1 := c + r
P1 := response(sample, c1, N + M)
sum(vectorize(P1^2)) = 2.43181
# Example - Burg Prediction
# To provide an example for Burg's method, we construct a sequence for which linear prediction ought to work well: an autoregressive process with known coefficients (we've used the same example to illustrate the partial autocorrelation function plcorr).
# Define coefficients for the process:
c := [.1; -.3; .2; .2; -.3; .1]
# Initialize the time series:
i := 0 .. 5
b[i] := rnd(.4) - .2
# Generate the rest of the series by using the autoregression plus noise:
k := 5 .. 498
b[k + 1] := sum(c[i]*b[k - i], i) + rnd(.4) - .2
# Here we take our whole time series as the sample and compute coefficients for a model of order 6:
# Prediction order:
N := 6
# Compute the coefficients using Burg's method:
C := burg(b, N)
# The coefficients are
# Compare the coefficients that actually generated the process, using the sign convention of this document. (Note that we are leaving out the zeroth coefficient of the true parameters at right, since it is always equal to one.)
C = [1; -0.0740535; 0.287483; -0.164923; -0.21611; 0.30732; -0.0642545]
-c = [-0.1; 0.3; -0.2; -0.2; 0.3; -0.1]
# As before, we can use the Burg coefficient vector C to generate all the prediction errors:
FE := response(b, C, 500)
# Burg's method assigns 0 weight to the first N errors, so the minimization is not affected by the zero-padding of the sample, as is the minimization carried out by Yule-Walker. The Burg criterion also involves both the forward errors FE and the backward errors BE computed by
BE := response(b, reverse(C), 500)
# Use the prediction errors FE to compute the actual predictions P, and plot a piece of the predicted and actual series starting at the Nth term:
P := b + FE
j := N .. 50
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# Spectral Estimation
# The coefficients generated by these linear prediction methods can be used to estimate the power spectrum of the process being modeled. In this context the Burg algorithm is known as maximum entropy spectrum analysis (MESA), and in some cases it can more accurately determine the spectra of short time series than can the FFT. As an example, we estimate the power spectrum of a process consisting of a sum of sinusoids with Gaussian noise added:
t := 0 .. 999
# Define the sine components:
y[t] := sin(2*π*t*250/1000) + sin(2*π*t*90/1000)
# Add the noise:
y := y + 2*gaussn(1000)
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# Now we estimate the spectrum with autoregressive models of two different orders, using the whole time series as the sample.
F1 := burg(y, 6)
F2 := burg(y, 20)
# Here are the corresponding power spectra, calculated as the squared magnitude of the transfer function defined by the coefficient arrays F1 and F2:
spec1(x) := |1/gain(F1, x)|^2
spec2(x) := |1/gain(F2, x)|^2
f := 0, .002 .. .5
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# For more on this method of spectral estimation, see Digital Spectral Analysis with Applications by S. Lawrence Marple, Jr. (Prentice-Hall, Inc).
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