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# SECTION 1 - SIGNALS AND SYSTEMS
# Noise Generators
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# whiten(N) | gaussn(N) | onefn(N)
# These functions simulate, respectively, white noise, Gaussian noise, and 1/f noise.
# • N, an integer argument between 2 and the maximum array size, inclusive
# The functions produce a vector of N elements, each element a random number selected according to the probability distribution specified by the function. White noise is useful as a flat-spectrum source for filter inputs. 1/f noise is typically found in hierarchically interacting or chaotic systems, and so can be used to simulate those systems.
# Notes
# • The maximum array size for the noise generators will depend on your hardware's capabilities.
# • The sequence of numbers is determined by a seed value, like Mathcad's built-in function rnd. Information on the seed value can be found in the Mathcad User's Guide.
# Example - White Noise
# whiten(N) simulates the noise produced by N independent sources, each of which has random output following a uniform distribution between -0.5 and 0.5.
whiten(6) = [-0.498732; -0.306677; 0.0850061; -0.149692; 0.322838; -0.325871]
# Consider a somewhat larger output vector
wn := whiten(1000)
n := 0 .. last(wn)
# The plot shows a traditional picture of white noise:
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# Note that the mean and standard deviation of the noise vector
mean(wn) = -0.00291766
stdev(wn) = 0.289099
# do not deviate significantly from the theoretical values
0  # and
sqrt(1/12) = 0.288675
# Example - Gaussian Noise
# Similarly, gaussn(N) simulates N independent sources, each following a Gaussian probability distribution of mean 0 and standard deviation 1.
gaussn(6) = [-0.458064; 1.48018; 0.27964; 0.475521; 0.379656; -0.0475243]
# Thus the elements in a gaussn vector can theoretically be any real value but will most likely lie between -3 and +3. To see some more values, select the math region above and press [F9] to recalculate as many times as you'd like.
# Plot a sample Gaussian sequence:
gn := gaussn(1000)
m := 0 .. last(gn)
# Gaussian noise:
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# To view the Gaussian data in its more familiar bell-shaped form, we use the following construction, computing a histogram by grouping the values in 20 bins of width .05:
# Number of bins:
nslots := 20
j := 0 .. nslots - 1
# This vector holds the edges of the bins:
slots[j] := -3.5 + j*7/nslots
# Set the rightmost boundary:
slots[nslots] := 3.5
# Fill the histogram:
pd := hist(slots, gn)
# Here is a plot of the distribution of our noise values, plotted as a bar graph:
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# Compare the mean and standard deviation of the sample to the expected values of 0 and 1:
mean(gn) = 0.0544381
stdev(gn) = 0.995186
# Example - 1/f Noise
# The function onefn computes an approximation of 1/f noise using a routine based on an algorithm developed by Richard Voss (see Martin Gardner's column in Scientific American, April 1978). Plot a sample below, adjusting to mean 0.
ofn := onefn(1000)
ofn := ofn - mean(ofn)
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# 1/f noise is found in the signals of many natural and man-made phenomena, including music, brain signals, weather, stock market movements, and other hierarchically interacting systems. For example, if one were to digitize samples of a music of a variety of styles (rock, jazz, classical), one would find that their power spectra are very close in distribution to 1/f noise.
# To compare the statistical structure of this noise with the white noise generated above, compute autocorrelations using lcorr (see the section on Sample Correlation and Partial Autocorrelation).
C := lcorr(wn, wn)
D := lcorr(ofn, ofn)
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# Unlike the white noise, the noise generated by onefn is correlated, with the correlation decaying as the lag increases.
# Another way of looking at the differences between the white noise and 1/f noise is to compare their power spectra. Here we compute the magnitude squared of the FFT (frequency spectra) for each signal, and smooth the result by averaging in frequency groups of 20:
k := 0 .. 49
m := 0 .. 19
s := mag(CFFT(wn))
t := mag(CFFT(ofn))
aves[k] := 1/20*sum(s[m + 20*k]^2, m)
avet[k] := 1/20*sum(t[m + 20*k]^2, m)
# The white noise spectrum is essentially flat, as we would expect:
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# The magnitude spectrum of our 1/f approximation falls off rapidly with increasing frequency; we plot the log of the magnitude, which is more informative here.
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# As an experiment, we can try constructing a 1/f power spectrum, with random phases, and take the inverse transform to obtain the noise vector:
j := 1 .. 500
# Construct the first half of the transform. A 1/f power spectrum corresponds to a 1/sqrt(f) magnitude spectrum:
a[j] := exp(2*π*1i*rnd(1))*1/sqrt(j)
# For a real signal, the second half is conjugate-symmetric around the midpoint:
a[1001 - j] := conj(a[j])
# The noise has mean 0:
a[0] := 0
# Transform to the time domain:
N := Re(icfft(a))
# Range for plotting:
k := 0 .. 1000
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# The behavior of the autocorrelation is similar to our output from onefn, with a correlation around .5 at lag 10.
M := lcorr(N, N)
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