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# SECTION 1 - SIGNALS AND SYSTEMS
# Quantizing a Signal
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# quantize(x, n)
# Expresses the signal x as n evenly-spaced, discontinuous levels.
# • x, a real-valued vector or array
# • n, an integer greater than or equal to 1
# Quantization levels are chosen so that the lowest and highest levels are the min and max of x. The height of an interval in this quantization is
(max(x) - min(x))/(n - 1)
# Quantization is used when storing or manipulating analog signals in a digital environment.
# Example - Hyperbolic Signal
# Number of quantization levels:
n := 9
m := 0 .. 40
x[m] := 1 + .01*m^2
y := quantize(x, n)
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# The height of each quantized level is
step := (max(x) - min(x))/(n - 1)
step = 2
# and the quantized signal moves to the next level when the value of the input function is
x_p > prev_level + step/2
p := 10
x[p] = 2
y[p] = 3
# Change the value of p up and down slightly to see where the quantization falls for adjacent values. Quantized levels are not necessarily of uniform duration in time, nor does the original signal always cross the quantized signal at its midpoint.
# Most hardware implementations of digital signal processing techniques begin with an analog-to-digital converter chip, where the analog signal is quantized. If the frequency of the input signal is much slower than the inverse of the sampling rate, then quantization produces a fair approximation to the original analog signal, given the above method of choosing quantization levels. Otherwise, signal processing techniques must be used to restore the signal's structure.
# Example - Filtering and Reconstructing a Quantized Signal
# The signal is a sinusoid, quantized into 8 levels:
n := 8
m := 0 .. 200
a[m] := sin(2*π*m/50)
A := quantize(a, n)
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# We'll use a lowpass FIR filter with 15 coefficients, designed with a Hanning window (third argument below sets window) and experiment to find the right cutoff frequency.
filter := lowpass(.12, 15, 4)
# Filter the quantized signal using the response function:
s := response(A, filter, 200)
# Plot the filtered reconstruction s and the original signal a:
p := 0 .. length(s) - 1
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# Example - Quantizing an Array
# Quantize a Gaussian spot stored in a 2D array into 5 levels, and display the two arrays as grayscaled patch plots to show the visual effects of quantization.
# Number of quantization levels:
n := 4
j := 0 .. 30
k := 0 .. 30
X[j, k] := exp((-(j - 15)^2 - (k - 15)^2)/100)
Y := quantize(X, n)
# [component: inputs X]
# [component: inputs Y]
# These pictures are made with 3D surface plots at a particular angle, so they appear flat. A contour plot or a picture operator can also be used.
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