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# SECTION 3 - SPECTRAL ANALYSIS
# The Recenter Function
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# recenter(x)
# Carries out a cyclic permutation of the elements of an array or vector, moving the first element to the center.
# •  x, a real or complex-valued vector or matrix
# Returns a vector or matrix of the same size as x.  Spectra generated by FFTs are often easier to interpret when recentered in this way.
# Example
# Define a two-dimensional Gaussian array A:
m := 0 .. 20
n := 0 .. 20
A[m, n] := exp(-.5*((m - 10)^2 + (n - 10)^2))
# The uncentered spectrum magnitudes (we use | | with the vectorize operator to take the magnitude of each element):
T := CFFT(A)
# [component: inputs vectorize(|T|)]
# The centered spectrum magnitudes better resemble the 2D Gaussian transform we expect.
R := recenter(T)
# [component: inputs vectorize(|R|)]
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