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# SECTION 4 - DIGITAL FILTERING
# FIR Filters by Remez Exchange
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# remez(g, r, w, N)
# Implements the Remez exchange algorithm for FIR filter design.
# • g, real vector, a grid of frequencies between 0 and 0.5
# • r, real vector of values between 0 and 1, the same length as g, frequency response over g
# • w, real vector of values between 0 and 1, the same length as g, error weight over g
# • N, integer length of the filter, at least 8
# Returns a vector of length N containing the coefficients of the filter. The algorithm consists of an iterative procedure for choosing extremal frequencies at which the deviation from the desired response is a maximum. These frequencies and the corresponding errors are used to calculate the impulse response of the filter.
# Notes
# • remez is sensitive to the chosen number of coefficients. Always check filter gain against the desired frequency response. If the match is poor, change N to a larger value until the desired response is achieved.
# • The computation routine is a translation into C of the original FORTRAN code in the IEEE book Programs for Digital Signal Processing.
# • See Theory and Application of Digital Signal Processing by Rabiner and Gold (Prentice-Hall, Inc.) and Digital Filter Design by Parks and Burrus (Wiley-Interscience) for a discussion of the algorithm and examples.
# Example - Lowpass Filter
# Define a response of 1 in the passband and 0 in the stopband, and interpolate a straight-line transition between the passband and stopband edges. In general, the number of points in the frequency grid should be on the order of 8 to 10 times the filter length, with frequencies starting at 0 and increasing uniformly to just under 0.5.
N := 500
k := 0 .. N/2 - 1
g[k] := k/N
# Definition of the response requires definition of the band edges and the weights assigned to the errors in each band. The algorithm will minimize the maximum weighted error over the frequency range [0, 0.5].
# Passband edge:
pb := .3
# Stopband edge:
sb := .35
# Passband weight:
pbw := 1
# Stopband weight:
sbw := 1
# Transition band weight:
tbw := .5
# Here is a function that gives the desired response as a function of frequency. Evaluating at each grid point builds the response vector.
f(x) := if(x < pb, 1, if(x > sb, 0, 1 - (x - pb)/(sb - pb)))
r[k] := f(g[k])
# The weight vector assigns to each grid point the weight for the corresponding band.
w[k] := if(g[k] ≤ pb, pbw, if(g[k] ≥ sb, sbw, tbw))
# Now we compute the filter coefficients and plot the frequency response from 0 to .5.
F := remez(g, r, w, 17)
length(F) = 17
# For this odd-length filter, the maximum passband and stopband errors will be given by the gain at 0 and at .5:
δ_1 := |gain(F, 0) - 1|
δ_2 := |gain(F, .5)|
x := 0, .001 .. .5
δ_1 = 0.0955028
δ_2 = 0.0959741
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# The ten extremal frequencies are visible, including the point where the 1 - δ_1 line crosses the passband edge pb and the point where the δ_2 line crosses the stopband edge sb. The error alternates uniformly on the extremal frequencies in each band. To see an example in which the two errors δ are unequal, change the stopband weight to .5 in the filter spec above.
# Example - Bandpass Filter
# Here, a response function is constructed by adding functions for the response in each transition band and in the passband. The response vector R is produced by an alternate Mathcad construct, applying the filter function to the whole grid at once using the vectorize operator. The weights are uniform.
filter(x) := if((x > .23)*(x < .25), 50*(x - .23), 0) + if((x ≥ .25)*(x ≤ .35), 1, 0) + if((x > .35)*(x < .37), 1 - 50*(x - .35), 0)
# ...first transition
# ...passband
# ...second transition
R := vectorize(filter(g))
W[k] := 1
# We'll generate a filter with 45 coefficients:
Fband := remez(g, R, W, 45)
# Here is the frequency response for the filter:
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