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# SECTION 4 - DIGITAL FILTERING
# Interpolation and Resampling
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# multirate(x, n, m, [f]) | resample(x, m, n) | interpolate(x, n)
# These functions change the sampling rate of a signal in different ways and under different assumptions.
# • x, a vector or matrix of real or complex numbers representing the samples of a signal. Each column of matrix input is processed individually. For resample, data must be real.
# • n, the integer-valued upsampling/interpolation factor (for interpolate and resample, ≥ 2)
# • m, the integer-valued downsampling/decimation factor (for resample, ≥ 2)
# • f, [optional] vector of FIR lowpass filter coefficients used between upsampling and downsampling. Default filter has length 32, gain n, windowed with a Hanning taper, with cutoff
0.45*min(1/n, 1/m)
# Return the resampled signal. For multirate and resample, a vector approximately of length n/m times the original data length. interpolate returns an even number of points, either n times the input length or n times the input length plus 1.
#
# We recommend that you use multirate, because it works in the most general case and avoids the aliasing effect that might arise when downsampling a signal.
## Notes
# •  multirate filters in the time domain, and requires only that the signal be bandlimited. interpolate and resample assume periodicity of the signal, and perform operations in the frequency domain after taking an FFT.
# •  Multirate uses the group delay of a linear-phase FIR filter to estimate where the initial output transient ends, and truncates. For filter length L, the group delay is L/2, so multirate skips the first L/2m samples of signal output. To observe the transient, zero-pad the signal. If the provided filter does not have linear-phase, some data at the beginning may be missing, so zero-padding the signal in this case is also advised.
# • Filtering with multirate is carried out using a polyphase representation of the filter coefficients.
## Example - multirate Function
# The function multirate is the most flexible and general of all the resampling routines. The only requirement is that the signal be bandlimited. To resample, x(n) is upsampled, inserting n-1 zero samples between original data points. The upsampled vector is lowpass-filtered in the time domain, effectively interpolating the zero samples. This also avoids aliasing that may be caused by downsampling. The resultant sequence is downsampled by picking every m^th sample.
# Using the default FIR filter and a sum-of-sines signal,
j := 0 .. 14
n := 6
m := 2
x[j] := sin(2*π*j/30*4) + sin(2*π*j/30*7)
y := multirate(x, n, m)
k := 0 .. length(y) - 1
length(x) = 15
length(y) = 61
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# The above plot shows that the resampled signal is shifted slightly, and contains n/m times the number of original data points. The shift is introduced by the FIR filter (it is equal to its group delay).
## Example - multirate with Optional Filter
# The next example uses a specified lowpass FIR filter instead of the default.
filt := lowpass(0.15, 65, 5)
n := 3
m := 2
y1 := multirate(x, n, m, filt)
k := 0 .. length(y1) - 1
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# In this case, resampling also caused signal attenuation, because the FIR filter did not have a gain equal to the upsampling rate, n. There is no scaling effect when we adjust the FIR filter coefficients to the correct gain.
filt2 := n*filt
y2 := multirate(x, n, m, filt2)
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## Example - Pure Upsampling
# You can use multirate to upsample or downsample only. For example, to upsample only,
y3 := multirate(x, 4, 1)
k := 0 .. length(y3) - 1
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## Example - Interpolate and Resample
# interpolate performs an FFT on the original data, adding zeros in the middle of the coefficient range to create a transform that has the required interpolated length, then inverse transforming the extended spectrum. There is no unique method for interpolating data (for example, one might also use a specially designed FIR filter), but for regularly behaved data this function returns a reasonable interpolation.
n := 3  # Change n and examine the plot below.
y := interpolate(x, n)
length(y) = 46
length(x) = 15
k := 0 .. length(y) - 1
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# The function resample(x, m, n) operates by interpolating, as above, to produce n times as many points, and then taking every m^th point to produce the output.
m := 5  # Change the decimation factor m and the interpolation factor n, and observe the plot below.
n := 3
y := resample(x, m, n)
length(y) = 9
k := 0 .. length(y) - 1
# Here the result has 3/5 as many points, so the spacing between the samples is 5/3 of the original spacing.
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## Example - aperiodic input
# Finally, here's an example of what happens when the assumption of a periodic input with an integral number of periods is not met:
# Interpolation factor:
n := 10
j := 0 .. 10
X[j] := e^(-j)
Y := interpolate(X, n)
k := 0 .. length(Y) - 1
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# The interpolation routine assumes that X is periodic, and therefore tries to interpolate points near the end of the graph that will go back up to the initial height of 1. However, the function will give sensible results if "wrapping" the input sequence gives a reasonably smooth function:
# Interpolation factor:
n := 4
j := 0 .. 10
X[j] := e^(-(j - 5)^2)
Y := interpolate(X, n)
k := 0 .. length(Y) - 1
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