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# SECTION 4 - DIGITAL FILTERING
# Time Response of Digital Filters
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# response(x, C, n) | fftfilt(x, C, [nfft])
# response may be used to compute the output of an FIR or IIR filter by direct evaluation of the convolution. For a long input signal, this method can be quite slow. For the case of an FIR filter (but not an IIR filter), a faster result may be obtained by use of fftfilt. This function evaluates the convolution by applying a DFT to successive segments of the input, then combining the results via the overlap-add method. This is a well-established technique discussed in most signal processing textbooks. See for example A.V. Oppenheim and R. W. Schafer, Discrete-Time Signal Processing, pp.556-558, 1989.
# • x, a real or complex-valued signal vector or multichannel array, filtered individually by column
# • C, a real or complex-valued vector or array of filter coefficients.
# FIR filter: C has one column
# IIR filter: C has column pairs
# column 1: coefficients of the numerator
# column 2: coefficients of the denominator
# • Note: IIR transfer functions must be normalized so that the constant term in the denominator is 1.
# • n, a positive integer, the size of the output vector.
# • nfft (optional), a positive integer, the length of the fft in the overlap-add method. It may not be smaller than the length of the FIR signal. If omitted, nfft is the length of the filter.
# Return a complex vector of outputs of length n.
# Notes
# • If the final transient response is desired, zero-pad the input signal to the appropriate length, and then increase n.
# • For an IIR filter, response must always be used. For an FIR filter with an impulse response much shorter than the input signal, fftfilt may be used as an option, and often it will provide a faster result.
# • If nfft > length(x) + length(C) - 1, then fftfilt does not use the overlap-add method. Instead it convolves the signal and filter in one step in the Fourier domain, after zero-padding the signal and filter vectors so that they are the length of nfft.
# Example - Lowpass IIR Filter Order
# We'll define an input signal with a low- and a high-frequency component.
f1 := 0.05
f2 := 0.2
n := 0 .. 999
x[n] := sin(2*π*f1*n) + sin(2*π*f2*n)
# The first 100 steps of the response from a second-order lowpass Butterworth filter are computed below.
# IIR filter cutoff frequency:
f := 0.1
# Note: Cutoff must be between 0 and 0.5, as specified in the function description.
A := iirlow(butter(2), f)
YA := response(x, A, 100)
k := 0 .. 99
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# Note the smoothing and attenuation of the faster cycles, and the slight time shift.
# Compare this with a sixth-order lowpass filter. The response function feeds the output of the first section into the second section, and this output into the third:
C := iirlow(butter(6), f)
YC := response(x, C, 100)
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# The higher order filter delivers a much smoother response, and filters the high frequency much more effectively, indicating the sharper cutoff frequency transition.
# Example 1 - Bandpass FIR Filter
# An FIR bandpass filter F can be designed to transmit the higher of the two signal frequencies defined above
f_low := 0.1
f_high := 0.3
# Compute coefficients for a length 51 bandpass filter with passband between f_low and f_high and use a Blackman taper (last argument of 6):
F := bandpass(f_low, f_high, 51, 6)
delay := 51/2
YF := response(x, F, 100)
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# Although the filter does not transmit immediately upon initiation, it does select the high frequency very accurately.
# Example 2 - Bandpass FIR Filter
# As a final example, we show that the following lowpass FIR filter has zero phase shift for several frequencies in its passband. Here are two input signals:
m := 0 .. 1000
f1 := 1/10
f2 := 1/27
x1[m] := sin(2*π*f1*m)
x2[m] := sin(2*π*f2*m)
# FIR filter cutoff frequency and number of coefficients:
f := 0.3
coeff := 37
# Compute the coefficients tapered with a Hanning window :
G := lowpass(f, coeff, 4)
y1 := response(x1, G, 100)
y2 := response(x2, G, 100)
# The filter delays the output by
delay := floor(coeff/2)
delay = 18
k := 0 .. 100
x1d[k + delay] := x1[k]
x2d[k + delay] := x2[k]
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# Using Response for Convolution
# Note that if the filter array has one column, response carries out a convolution. Thus this function provides an alternative to the FFT-based function convol; response is much faster for a small initial portion of the convolution of two long sequences. For example,
n := 0 .. 200
x[n] := rnd(1)
y[n] := rnd(1)
Y1 := convol(x, y)
Y2 := response(x, y, 8)
k := 0 .. 7
Y1[k] = [6.82473e-5; 0.0110672; 0.133027; 0.345218; 0.455991; 1.02531; 0.785689; 1.74506]
Y2[k] = [6.82473e-5; 0.0110672; 0.133027; 0.345218; 0.455991; 1.02531; 0.785689; 1.74506]
# Comparing response with fftfilt
# We can illustrate that the results obtained from response and fftfilt are equivalent. For example, comparing one of the previous examples with the fftfilt result,
f1 := 0.05
f2 := 0.2
n := 0 .. 999
x[n] := sin(2*π*f1*n) + sin(2*π*f2*n)
# Create FIR lowpass filter tapered with Hanning window
C := lowpass(0.1, 32, 4)
y_r := response(x, C, length(x) + length(C) - 1)
y_f := fftfilt(x, C, 64)
k := 0 .. length(y_f)/2
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# The two traces overlap completely.
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