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# SIGNAL PROCESSING EXTENSION PACK
## Additional Functions
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## Function Definitions
# This file contains the definition of those functions in the Signal Processing Extension Pack that are written in using Mathcad programs. To make these functions available in any worksheet, insert a reference to it by doing the following:
#
# 1. Choose Reference from the Insert menu.
# 2. Browse to this file which is called ScriptFuns.xmcd.
# 2. Click OK.
## Zero-Phase Filtering
filtfilt(x, C) :=
    Lx ← length(x)
    y1 ← response(x, C, Lx)
    yr ← response(reverse(y1), C, Lx)
    y ← reverse(yr)
## Group Delay
rmpc(c) :=
    for k ∈ 0 .. length(c) - 1
        rc[k] ← k*c[k]
    rc
grpdelay(filter, N) :=
    fcols ← cols(filter)
    Nstage ← fcols/2
    gdn[2*N - 1] ← 0
    Lc ← length(gdn)
    for k2 ∈ 1 .. Nstage
        b ← filter[:, 2*k2 - 2]
        a ← filter[:, 2*k2 - 1]
        c ← convol(b, reverse(conj(a)))
        c[2*N - 1] ← 0
        rc ← rmpc(c)
        frc ← CFFT(rc)
        fc ← CFFT(c)
        qc ← vectorize(frc/fc)
        rqc ← Re(qc)
        lzstage ← length(a) - 1
        for k ∈ 0 .. Lc - 1
            gds[k] ← rqc[k] - lzstage
        gdn ← gdn + gds
## MUSIC Method for Spectral Estimation
toeplitz(C) :=
    Lc ← length(C)
    for i ∈ 0 .. Lc - 1
        for j ∈ 0 .. Lc - 1
            Tp[i, j] ← C[|i - j|]
    Tp
music(Vtm, Nnoise) :=
    Ncols ← cols(Vtm)
    for f ∈ 0 .. Ncols/2
        Psm ←
            Fsum ← 0
            for p ∈ 0 .. Nnoise - 1
                Fsum ← Fsum + mag(CFFT(Vtm[:, p]))[f]^2
        music[f] ← 1/(Psm + 10^-8)
    music
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