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# SECTION 1 - SIGNALS AND SYSTEMS
# Signals and Classification of Signals
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# A signal is a function or a data set representing a physical quantity or variable. Usually, the signal encapsulates information about the behavior of a physical phenomenon, for example, electrical current flowing through a resistor, sonar sound waves propagating under water, or earthquakes. Mathematically, a signal is represented as a function of an independent variable t, typically representing time. Thus, a signal is denoted x(t).
# Continuous-Time and Discrete-Time Signals
# A signal x(t) is a continuous-time signal if t is a continuous variable. If t is a discrete variable, that is, x(t) is defined at discrete times, then x(t) is a discrete-time signal - often denoted as x(n), where n is integer. A discrete-time signal x(n) may represent a phenomenon for which the independent variable is inherently discrete, such as the daily closing value of a stock price, or it may be obtained by sampling a continuous-time signal x(t) at t = nT, where T is the sampling period. For more on sampling, see Interpolation and Resampling.
# In this E-book, we will be primarily dealing with discrete-time signals. A few examples of frequently-encountered discrete time signal are given below. The programming tools built into Mathcad (see the Programming toolbar) and the "stem" trace type for plots are used extensively. See Mathcad's online Help if you are not familiar with these tools.
# Index of first time sample:
t_start := -10
# Index of last time sample:
t_end := 20
n := t_start .. t_end
# The Unit Step Signal
# You may also use
u(n) :=
    1 if n ≥ 0
    0 if n < 0
Φ(n)
# the Mathcad built-in unit step function.
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# The Unit Impulse Signal
δ(n) :=
    1 if n == 0
    0 otherwise  # To shift the impulse by k samples, change the value of k:
k := 3
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# Sinusoidal Signal
# Frequency:
ω_0 := 0.6
x(n) := sin(ω_0*n)
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# Exponential Signal
α := 0.95
y(n) := α^n
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# Exponentially Decaying Sinusoid
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# Analog and Continuous Signals
# If a continuous-time signal x(t) can take on any value within a continuous time interval, then x(t) is called an analog signal. If a discrete-time signal x(n) can take on only a finite number of distinct values, then it is called a digital signal. To convert an analog signal into a digital signal, the analog signal needs to be sampled (as described above) and quantized (as described in Quantizing a Signal).
# Real and Complex Signals
# A signal x(t) is a real signal if its values are real numbers, and a signal x(t) is a complex signal if its values are complex numbers. The Mathcad Signal Processing Extension Pack contains a group of special Complex signal manipulators.
# Deterministic and Random Signals
# Deterministic signals are those whose values are completely specified for any given time. Thus, a deterministic signal can be modeled by a known function of time x(t). Random signals, on the other hand, are those signals that can take random values at any given time. Random signals can only be characterized statistically. The Mathcad Signal Processing Extension Pack contains three noise generator functions that are designed to produce pseudorandom signals characterized by user-defined statistical parameters.
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