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# SECTION 6 - ADDITIONAL TRANSFORMS
# Sine and Cosine Transforms
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# sintr(x) | costr(x)
# isintr(x) | icostr(x)
# Carry out sine and cosine transforms and their inverses.
# • x, a real-valued input vector or array of even length
# Returns the transformed vector of the same length as the input. The discrete cosine transform is related to the FFT, but has better energy compaction properties, since it represents most of a sequence in only a few coefficients.
# Notes
# • The sine transform, ST, and cosine transform, CT, of a sequence x of length N are defined as follows
ST[j] == sum(sin(π*i*j/N)*x[i], i)
CT[j] == sum(cos(π*i*j/N)*x[i], i)
# • The sine transform always has first coordinate 0, so the inverse sine transform cannot recover the first element of the input x. The cosine transform contains enough information to reconstruct the original vector x completely.
# Example
# Much of the information in an image can be stored in a smaller space by using a cosine transform and retaining only the coefficients which store most of the image information. Take a two-dimensional cosine transform by first transforming columns and transposing the result, then repeating the procedure.
i := 0 .. 23
j := 0 .. 23
A[i, j] := (|i - 12| < 6)*(|j - 12| < 6)
C1[:, i] := costr(A[:, i])
C2 := transpose(C1)
C3[:, i] := costr(C2[:, i])
C4 := transpose(C3)
# [component: inputs A]
# [component: inputs C4]
# We filter the uncentered transform with a mask that is nonzero on only 37% of the original transform area. We've thus compressed the image content by a factor of nearly 3. (Of course this isn't true compression, since we're saving the remaining values to high precision; in a real compression scheme we'd quantize these values somehow.) We reconstruct the image from the masked transform by using the inverse cosine transform.
# First we define a Boolean OR function:
OR(a, b) := if(a + b, 1, 0)
Mask[i, j] := OR(i < 5, j < 5)
# The mask saves only transform values near the upper and left edges of the uncentered transform.
# [component: inputs Mask]
# Now we apply the mask element by element to the transform using the vectorize operator, and then reconstruct the image from the masked transform and compare it with the original image A.
C4 := vectorize(Mask*C4)
C5 := transpose(C4)
C6[:, i] := icostr(C5[:, i])
C7 := transpose(C6)
C8[:, i] := icostr(C7[:, i])
# [component: inputs A]
# [component: inputs C8]
# The cosine transform is the core algorithm for the JPEG image compression standard. Here images and their subsets are compressed by discarding the higher order coefficients of the cosine transform, and decompressed using the inverse cosine transform, as in the example above. Special chips exist that implement these algorithms with high performance rates.
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