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# SECTION 5 - TIME SERIES ANALYSIS
# Data Smoothing
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# movavg(x, n) | expsmooth(x, α) | medfilt1d(M,n)
# Perform data smoothing by averaging each point in a set of data with itself and neighboring points, reducing irregularities in the data. The three choices of averaging functions are a moving average, an exponential windowing, or a median filtering.
# • x, complex-valued data array
# • M, real-valued vector or matrix: filtering is applied column by column
# • n, integer moving average window width or median filter length
# • α, exponential window parameter, 0 ≤ α ≤ 1
# Return a smoothed data array of the same length as the input. movavg and expsmooth are special cases of digital filtering: movavg is a simple FIR filter, while expsmooth is an IIR filter. medfilt1d, however, is not equivalent to a linear filter.
#
# Moving and exponential averages are a popular tool in the financial investment community for generating stock and commodities trading signals. Median filtering is a good way to filter certain types of noise, like random salt-and-pepper noise, because it does not change the intensity levels in the signal; it only uses available levels.
# Notes
# • medfilt1d differs from the Mathcad function medsmooth. It can work on either vectors or matrices, does not smooth the residuals and add the result to the smoothed data, and it handles the beginning and end of the signal by using an effective filter length that guarantees that the filter is completely contained inside signal.
# Example - Moving Average
# For times t = 0, 1, 2, . . . , n - 2 the smoothed value at t is the arithmetic average of all observations up to and including time t. Once n observations have been obtained, the smoothed value at time t is the average of the observation at time t and the previous n - 1 observations.
# Some smooth data is perturbed slightly with a uniform random component to make a noisy sample sequence. The effect of the moving average is illustrated with a number of window lengths.
N := 200
i := 0 .. N
x[i] := e^(-i/50)*sin(6*π*i/N)
y[i] := x[i] + rnd(0.2) - 0.1
# Smoothed data, with windows of 2, 5 and 20, respectively. Note the time lag that is introduced with larger window lengths.
y2 := movavg(y, 2)
y5 := movavg(y, 5)
y20 := movavg(y, 20)
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# Example - Exponential Averaging
# Exponential data averaging is computed as follows
ex[0] == x[0]
ex[t] == α*x[t] + (1 - α)*ex[t - 1]  # for t = 1, . . . , last(x)
# The smoothed entry at time t is the average with weight α of the current observation and the previous smoothed observation. The difference between movavg and expsmooth can be illustrated using a step function.
N := 20
i := 0 .. N
t[i] := 2*i/N
s[i] := t[i] ≤ 1
# Apply the two smoothing functions:
n := 4
ms := movavg(s, n)
α := 0.5
es := expsmooth(s, α)
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# expsmooth smoothed the lower corner into a curve while sharp slope discontinuities are seen in the movavg curve. The moving average window eventually "forgets" the data at a height of 1, while in exponential smoothing the previous history is continuously averaged.
# Exponential smoothing can be used for market trend prediction in the same way as the moving average, but in practice most professionals use other indicators, such as the differences between two exponential smoothings (with different weights) of the same raw data.
# Example - Median Filtering
# Median filtering replaces each element of the input with the median of the element and n-1 of its neighbors, or fewer near the ends of the signal: a good method for smoothing while maintaining edges, as well as for noise reduction. The function takes some time on large matrices because it performs a sort at each pixel. In addition to removing the noise, median filtering also tends to remove sharp, small transients from a signal.
# Let's look at a signal whose quality has been degraded by the addition of some random noise.
n := 0 .. 100
sig[n] := 1 - e^(-n/20)
noisy := sig + whiten(length(sig))
k := 0 .. length(noisy) - 1
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# Now apply a median filter. The filtered version of the signal is smoother. Change the length of the filter to see its effect on the noisy signal. In practice, the length of the median filter should be small compared to the length of the signal.
out := medfilt1d(noisy, 11)
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