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# SECTION 3 - SPECTRAL ANALYSIS
# Spectral Analysis
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# pspectrum(x, n, r, [w]) | coherence(x, y, n, r, [w])
# cspectrum(x, y, n, r, [w]) | snr(x, y, n, r, [w])
# Calculate the averaged power spectrum, coherence, cross spectrum, and signal to noise ratio for a signal or pairs of signals.
# • x, y, complex-valued signal vectors
# • n, integer 1 < n < length(x), subdivisions of the input signal(s)
# • r, 0 ≤ r < 1, fractional overlap between subdivisions
# • w, (optional) windowing function index. Rectangular window if unspecified.
# Argument
# 1
# 2
# 3
# 4
# 5
# 6
# 7
# Window
# rectangular (the default)
# tapered rectangular
# triangular
# Hanning
# Hamming
# Blackman
# Nutall
# These functions return a vector whose length depends on the length of the original vector, the number of desired subdivisions, and the overlap between the subdivision.
# These functions implement Welch's averaged periodogram method to select "important" parts of the data, and are more appropriate than the FFT for long-duration sample trains with short regions of content.
#
# This type of spectral analysis is common in music and speech analysis, and in radar signal analysis, where much of the measured signal is random noise between values of interest (for example, speech and the pauses between words and syllables).
# Notes
# • A description of this averaging procedure is found in Signal Processing Algorithms by Samuel Stearns and Ruth David (Prentice-Hall, Inc.).
# • For short time series, other techniques such as maximum entropy spectral analysis may be appropriate (see, for example, Linear Prediction Methods).
# Example - pspectrum Function
# For long time series where only some few data points have values corresponding to a signal, you'd like the power spectrum to show the frequencies of the signal, but not the noise or zero values. Consider,
N := 500
t := 0 .. N - 1
t1 := 230 .. 300
f_s := 1
f := .1
x[t] := 0
x[t1] := sin(2*π*f/f_s*t1)
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# If the signal was a pure sine wave, the magnitude of the FFT coefficients would provide a good estimate of the power spectrum. But in this case, the FFT of the signal is the frequency content of the structured signal convolved with the transform of a rectangular window (a sinc function).
X := CFFT(x)
freq[t] := t/N*f_s
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# pspectrum breaks the original time series into overlapping segments. Each of these segments is transformed by an FFT, and the coefficients of the transformed magnitudes are averaged. If the length of the segments is of the same scale as the phenomena to be analyzed in the signal, then the pspectrum function returns a good approximation to the magnitude of the components of the interesting parts of the original time series.
# In general, the length of the signal should be at least n + 1.
n := 9
r := 0.5
S := pspectrum(x, n, r, 2)
# The interval length will be the largest number L for which
((L - floor(L*r))*n + floor(L*r)) < length(x)
# A plot of the first half of the spectrum with a normalized frequency axis (1 represents the sampling frequency) shows the expected peak at the frequency of the sine wave, indicated by the marker on the graph.
k := 0 .. length(S)
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# The average power in the spectrum is
sum(S)/length(S) = 0.0657622
# which is approximately the mean square value of the signal x:
sum(vectorize(x^2))/(N - 1) = 0.0701403
# Example - pspectrum and cspectrum with White Noise
# Following an example in Stearns and David, the spectrum of a signal that contains white noise is calculated. We generate two such signals, since we need the second for cross spectrum calculations. We also use a Hamming window to taper the data block.
N := 1000
n := 0 .. N - 1
y1[n] := sin(2*π*n*5/48) + rnd(2) - 1
y2[n] := sin(2*π*n*5/48) + rnd(2) - 1
Rp := pspectrum(y1, 40, 0.5, 5)
# With 40 segments and .5 overlap, the length of the output is:
length(Rp) = 48
# We plot the spectrum in decibels, and calculate the sample heights we expect to see.
k := 0 .. length(Rp)/2
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# The noise power is
1/2*integral((x - 1)^2, x = 0 .. 2) = 0.333333
# in dB:
10*log(.333) = -4.77556
# The signal power is all in the bar at R_5 (the sixth sample) and the symmetrical one we haven't plotted. These two frequency samples divided by the spectrum length should give the average power in the sine component, which is 0.5:
2*Rp[5]/48 == .5
.5*48/2 = 12
# so the height in decibels should be
10*log(12) = 10.7918
# Typically, the cross spectrum is used to detect similarities in two signals, for example comparing a known speech waveform (say the vowel 'a') with an unknown speech waveform (say the word 'apple') to see if the known waveform is present in the unknown waveform. Just as the power spectrum of a time series is similar to its autocorrelation, the cross spectrum for two time series is similar to their cross-correlation. For stationary random sequences, the spectrum functions return the same values as the correlation functions. The cross spectrum of our two signals y1 and y2 shows the expected peak at the common frequency of 5/48. Note that the cross spectrum is complex, so we take the magnitude before taking the log. As before, we overlap the intervals by a fraction 0.5, and use a tapered rectangular window.
Rc := cspectrum(y1, y2, 40, .5, 2)
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# Example - coherence and snr Function
# The coherence function measures the linear dependence of one signal on another. The coherence function is equal to the squared magnitude of the cross spectrum of two signals divided by both power spectra, and ranges in value from zero to one. Values of 1 for the coherence function tend to indicate that both signals have strong noise-free components in that frequency band, while values of 0 indicate that there is mostly noise in that frequency band.
# The signal to noise ratio function snr is equal to the coherence function divided by one minus the coherence function, and is maximized where the two signals have strong components in any component bands, proportional to the ratio between the strengths of the signals and the strength of sensor or background noise.
Coher := coherence(y1, y2, 40, .5, 5)
SNR := snr(y1, y2, 40, .5, 5)
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# As expected, both functions exhibit a maximum value at the single frequency components of the two signals with noise added.
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