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# SECTION 6 - ADDITIONAL TRANSFORMS
# Two-Dimensional Convolution
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# twodconvol(A, B)
# Computes the linear convolution of two-dimensional data using the two-dimensional FFT with zero padding.
# • A, B two-dimensional real- or complex-valued arrays
# Returns an array of the same size as the first argument. This convolved array is centered in the padded convolution, and the elements around the border, to a depth of rows(B)/2 on the sides and cols(B)/2 on the top and bottom, show the effect of the zero padding. In typical applications, the first array represents an image and the second array is a filtering window much smaller than the image.
# Example - 2D Smoothing Filter
# The example below illustrates the smoothing of an array A of random numbers by convolution with an averaging window B.
i := 0 .. 26
m := 0 .. 8
j := 0 .. 26
n := 0 .. 8
A[i, j] := rnd(1)
B[m, n] := e^(-((n - 4)^2 + (m - 4)^2)/5)
# B is a 9-by-9 array that is largest in the center and declines to nearly 0 at the edges, so that the averaging process gives most weight to the point and its eight nearest neighbors. Mathcad's patch plots (with rotation set to zero and tilt to 90) provide a convenient medium for viewing the arrays A and B and their convolution.
# [component: inputs B]
C := twodconvol(A, B)
rows(A) = 27
rows(C) = 27
cols(A) = 27
cols(C) = 27
# [component: inputs A]
# [component: inputs C]
# C is the smoothed version of A. Note the dark border which results from averaging the padding zeros. A and C can also be viewed using a surface plot.
# [component: inputs A]
# [component: inputs C]
# The convolution replaces each point with a weighted sum of 81 values so that C has larger values than A. To obtain a true average we can divide C by the sum of the weights:
W := sum(sum(B[m, n], n), m)
W = 15.5886
# The range is now appropriate for a smoothed version of the original random array A. The plot of course looks the same, since Mathcad scales automatically.
# [component: inputs C/W]
# To accentuate the edges of regions in the smoothed image C, convolving with the kernel:
L := [0, 1, 0; 1, -4, 1; 0, 1, 0]
# This is a sort of Laplacian operator, expressed in terms of differences, which responds to changes in the image values, but averages to 0 over areas of uniform value. (See Digital Image Processing by Rafael Gonzalez and Paul Wintz [Addison-Wesley].)
B[i, j] := (|i - 13| < 7)*(|j - 13| < 7)
E := twodconvol(B, L)
# [component: inputs B]
# [component: inputs E]
# Convolution with the single element 1 should leave the first input array unaltered:
i := 0 .. 10
j := 0 .. 10
X[i, j] := sin(i)*sin(j/2)
Y[0, 0] := 1
# [component: inputs X]
# [component: inputs twodconvol(X, Y)]
# Compare two values:
X[3, 3] = 0.140767
twodconvol(X, Y)[3, 3] = 0.140767
# You can calculate a two-dimensional autocorrelation by reversing the array elements and performing a convolution. However, the effect of the zero padding will extend over the entire output array. You can compute a true cyclic correlation by using Mathcad's FFT: The following formula gives the cyclic autocorrelation of the array X:
AC(X) := sqrt(rows(X)*cols(X))*icfft(vectorize(cfft(X)*conj(cfft(X))))
# The element corresponding to correlation at offset 0 is at the upper left corner of the output array D. Its value should equal the sum of the squares of the elements of X:
sum(sum(X[i, j]^2, j), i) = 28.5518
AC(X)[0, 0] = 28.5518
# [component: inputs X]
# [component: inputs AC(X)]
# The symmetry of the autocorrelation is easier to see if we use the recenter function in the Signal Processing Extension Pack to move the 0-offset element to the center of the output array:
# [component: inputs recenter(AC(X))]
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