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# SECTION 6 - ADDITIONAL TRANSFORMS
# Walsh Transform
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# walsh(n, k)
# Calculates a vector w of sign information for use in the Walsh transform.
# • n, order of the walsh function, implying 2^n data points, given by an integer 0 and 12, inclusive
# • k, the index of the transformed value, an integer between 0 and 2^n - 1, inclusive
# Returns a vector of length 2^n, the kth Walsh function of order n, each of whose elements is +1 or -1. Given a data vector v, the Walsh transform is a vector of the same length whose k^th component has the form
W[k] == 1/2^n*sum(w[m]*v[m], m)  # where w is a vector of 1's and -1's determined by the index k.
# Notes
# Any two different Walsh functions of the same order are orthogonal, that is, their dot product is 0. For example:
walsh(6, 3)*walsh(6, 9) = 0
# Example - 2nd-Order Walsh Functions
# For example, the Walsh functions of order 2 are
walsh(2, 0) = [1; 1; 1; 1]
walsh(2, 1) = [1; 1; -1; -1]
walsh(2, 2) = [1; -1; 1; -1]
walsh(2, 3) = [1; -1; -1; 1]
# These are all the Walsh functions of order 2. Note what happens when an index is requested outside the range 0 . . . 2^n - 1
walsh(2, 4) =  # error: index out of bounds
# Example - 5th-Order Walsh Functions
# The pattern of 1s and -1s for a set of Walsh functions can be displayed as the columns of a matrix, plotting the result as a patch plot. Here are the Walsh functions of order 5, for which there are 32 functions. Note that the resulting array is its own transpose.
i := 0 .. 31
W[:, i] := walsh(5, i)
# [component: inputs W]
# Sometimes it is desirable to reorder the Walsh function vectors so that they are arranged in order of sequency, that is, in order of the number of changes of sign. Here's how you could do this for the case pictured above:
j := 0 .. 30
S(v) := sum(v[j]*v[j + 1] < 0, j)
R[:, S(W[:, i])] := W[:, i]
# Here's a plot of the array R, which contains the columns of W reordered by sequency:
# [component: inputs R]
# The Walsh Transform
# Given the walsh function, it is easy to compute the one-dimensional Walsh transform of a data vector with length which is a power of 2.
# Here is a sample data sequence:
n := 6
N := 2^n
i := 0 .. N - 1
v[i] := 1 + sin(2*π*i/N) + sin(3*2*π*i/N)
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# The Walsh transform of the vector v can be computed pointwise by
Wv[i] := 1/N*v*walsh(n, i)
# Here's a plot of the transform, formatted as a step graph:
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# Note that the 0th element of the transform is the average of the observed data:
Wv[0] = 1
mean(v) = 1
# A more compact way to compute the transform is to premultiply the data by a square matrix like the one we generated above with a Walsh function in each column:
# Square transformation matrix:
WT[:, i] := walsh(n, i)
# Transform of the data v:
Wv := 1/N*WT*v
# The advantage to this method is that any Walsh transform of order 5 can be conducted using the matrix WT.
# The inverse Walsh transform is given by the same formula without the 1/N scale factor.
# Inverse transform:
V := WT*Wv
# We compute some values to verify that the transform has recovered the original data v:
V[3] = 2.0633
V[25] = 2.51631
V[57] = -0.516315
# and so on
v[3] = 2.0633
v[25] = 2.51631
v[57] = -0.516315
# The two-dimensional Walsh transform is best computed using the matrix multiplication form. If X is a square (2^n x 2^n) matrix, the two-dimensional Walsh transform is given by
1/2^n*(W*X*W)
# where W is the matrix whose columns are the Walsh functions of order n.
# For example
n := 5
N := 2^n
i := 0 .. N - 1
j := 0 .. N - 1
# Construct an image to be transformed:
X[i, j] := sin(4*π*i/N)*cos(6*π*j/N) + rnd(1) - .5
# Build the transformation matrix:
W[:, i] := walsh(n, i)
# The Walsh transform of X is:
WX := 1/N^2*(W*X*W)
# [component: inputs X]
# [component: inputs WX]
# Analogously to the 1D case, the (0, 0) element of the transform is the average of the data
WX[0, 0] = 0.0200077
1/N^2*sum(sum(X[i, j], j), i) = 0.0200077
# The inverse 2D Walsh transform is identical to the forward transform without the 1/N^2 term.
X2 := W*WX*W  # disabled
# As a filtering example, let's see what happens to the image above if we save only the "lower frequency" information along the left and top edges of the transform:
F[i, j] :=
    WX[i, j] if (i < 4) + (j < 4)
    0 otherwise
X3 := W*F*W
# [component: inputs X]
# [component: inputs X3]
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