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# SECTION 1 - SIGNALS AND SYSTEMS
# Reading WAV Files
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# READWAV("F") | WRITEWAV("F", s, b) | GETWAVEINFO("F")
# Read, write, and get format information, respectively, from pulse code modulated (PCM) Microsoft WAV files.
# • F, a filename string as an absolute or relative path
# • s, integer sample rate
# • b, bit resolution
# These functions return vectors containing the sample amplitudes, or number of channels, sample rate, number of bits per sample (resolution), and average number of bytes per second, respectively. The writing function results in a .wav file written to the hard drive at the specified path.
# If the return value for READWAV is a matrix, successive columns represent the separate channels of data.
# Notes
# • No warning is given if a file is to be overwritten.
# • Data from a WAV file is not scaled.
# Example - GETWAVINFO and READWAV
# Get the information in the sample bell sound included with this function pack, and assign it to variable names in a vector. The file is in the same folder as this Mathcad worksheet, so just the file name is sufficient. If you wanted to read a file with an absolute path, the syntax for the filename would look like "C:\Windows\Media\wavfile.wav".
[NumChannels; SampleRate; Resolution; AvgBytesPerSecond] := GETWAVINFO("startsou.wav")
# The return value is a vector containing the number of channels, the sample rate, the number of bits per sample (or resolution), and the average number of bytes per second that an audio player device would have to process to play the audio in real time.
NumChannels = 1
SampleRate = 22050
Resolution = 8
AvgBytesPerSecond = 22050
# Use this information to construct the time vector corresponding to the amplitudes read in by READWAV.
WavData := READWAV("startsou.wav")
n := 0 .. length(WavData[:, 0]) - 1
WavData = [
    130; 131; 136; 138; 140; 143; 148; 150; 153; 155
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]
time[n] := n/SampleRate
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# Example - WRITEWAV
# Using the data from startsou.wav, construct a new WAV file.
# Note: There is an error message below if you are accessing this file from your CD, since you can not write to your CD. You can revise the line below by adding the directory path within the quotes to your hard drive. Then you need to adjust the path in the line below so it can find your file.
WRITEWAV("testwav.wav", SampleRate, Resolution) := WavData
# The new file format information is the same as the original.
GETWAVINFO("testwav.wav") = [1; 22050; 8; 22050]
# If the specified bit resolution is 1-8 the data is written to the file as unsigned byte data. The limits on unsigned byte data are 0-256 (2^8). If the bit resolution is 9-16 word data (two bytes) is written to the file. The limits on word data are -32768 - +32767 (2^15).
2^15 = 32768
# Example - Signal Synthesis
# Consider a dual-tone multifrequency (DTMF) signal. These signals are commonly used for touch tone telephone dialing and remote control functions. DTMF signals are composed of one high frequency and one low frequency sinusoidal signal. A table of common tones are listed below.
# High Tone Group
# 1209 Hz  1336 Hz  1477 Hz  1633 Hz
# Low Tone
# Group
# 697 Hz  1  2  3  A
# 770 Hz  4  5  6  B
# 852 Hz  7  8  9  C
# 941 Hz  *  0  #  D
# Create these tones using Mathcad:
SampleRate := 22050  # Set the sample rate
NumChannels := 1  # Set the number of channels
Resolution := 16  # Set the bit resolution
t_f := 1  # Set the time duration
NumPts := SampleRate*t_f  # Determine number of data points necessary
Δt := t_f/NumPts  # Calculate the time interval
i := 0 .. NumPts  # Generate an array for indexing
t[i] := Δt*i  # Generate the time array
Amplitude := 10000  # Set the amplitude of the signal
f_1 := 1477
f_2 := 941  # Choose two frequencies to mix
# Generate the signal and plot it.
Signal := vectorize(Amplitude*(sin(2*π*f_1*t) + sin(2*π*f_2*t)))
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# Write the signal to a WAV file using the specified parameters
WRITEWAV("DTMF.wav", SampleRate, Resolution) := Signal
# Try changing the frequencies for the DTMF signal and then play the resulting file on your media player. They should sound just like the tones generated by your touch-tone telephone.
# To play some signals saved using this example worksheet, double-click on the WAV Sound objects below.
# DTMF 1 | DTMF 2 | DTMF #
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# Another useful signal in audio testing is the exponential ramp in frequency. The formula for this signal is:
# The sample rate, bit resolution, and number of channels is the same as the previous example
t_f := 3  # Set parameters for this signal
NumPts := SampleRate*t_f
Δt := t_f/NumPts
i := 0 .. NumPts
t[i] := Δt*i
Amplitude := 10000
# Generate and plot the signal
Signal := vectorize(Amplitude*sin(2*π*e^(2.2*t)*t))
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WRITEWAV("EXP.wav", SampleRate, Resolution) := Signal
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# Play the exponential increase in frequency signal by double-clicking on the WAV Sound object.
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