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# SECTION 7 - JOINT TIME-FREQUENCY ANALYSIS
# The Discrete Wavelet Transform
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# dwavelet(x) | idwavelet(x)
# Compute a discrete wavelet transform and its inverse, using the four-coefficient wavelets defined by Daubechies.
# • x, real-valued data vector or array of length 2^n, n≥4
# Return a vector of the same length as x. The transform vector contains approximation coefficients in its first two entries, and levels of detail coefficients. An input 2^n long returns 2^(n-1) levels of detail. The first level is 2^1 elements long, and contains the largest scale information, the next 2^2 elements long, and so on, up to the length of input vector. The wavelet transform provides information that is localized in time and at a particular scale.
# Notes
# • The wavelets used are Daubechies wavelets with 4 coefficients. The transform is computed using a pyramid algorithm. See William H. Press, Harvard-Smithsonian Center for Astrophysics Preprint No. 3184 (1991).
# • The transform algorithm treats the input vector as periodic. Transform elements at the end of each level use information from both the end and the beginning of the input. If wrapping produces a jump in the input, it is reflected in the detail coefficients at the end of each level.
# Example - Reconstructing a Signal
# Define the signal p.
p(x) := e^(-10*(x + 3)^2) + e^(-(x - 1)^2)
n := 9
# Sample p at 512 points and put the samples in the vector P:
i := 0 .. 2^n - 1
x[i] := -5 + .02*i
P[i] := p(x[i])
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# Now, take the discrete wavelet transform.
TP := dwavelet(P)
# The first two elements, 0 and 1, of the transform are called approximation coefficients. The remaining elements are the detail coefficients. The transform TP contains 8 levels of detail: The last 256 entries represent information at the smallest scale, the preceding 128 entries represent a scale twice as large, and so on. Elements 2 and 3 give information at the largest scale.
# At each scale, the position of an element within a level matches the position in time of the signal feature it represents. To view the information, it is convenient to expand each level to the length of the original signal P. Put the expanded levels in a single matrix A, starting with index 0 for level 1.
r := 0 .. n - 2
A[r, i] := TP[2^(r + 1) + floor(i/2^(n - 1 - r))]
# Here's what a few of the levels look like:
# Level 3, which contains 8 coefficients:
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# Level 5, which contains 64 coefficients:
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# To see how the levels correlate with the original signal, display several detail levels in the same graph below a plot of the signal:
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# The information in TP allows complete reconstruction of the signal P. To recover P, we apply the inverse transform:
S := idwavelet(TP)
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# The graph shows that S matches P. We can also compute the maximum difference between the two arrays. The small error is due to roundoff.
max(vectorize(|P - S|)) = 1.03524e-9
# The coefficients at smaller scales (and more accurate time resolutions) have smaller magnitudes. This suggests that we could compress the signal P by truncating the transform, say by discarding the three lowest levels. We can then use the inverse transform to recover P.
# The three lowest levels are the last elements of TP.
256 + 128 + 64 = 448
# The zero-padded version of TP will have only 64 nonzero elements. To make this a bit more realistic, quantize TP into 16 levels before inverting.
k := 64 .. 511
TP[k] := 0
C := idwavelet(quantize(TP, 16))
max(vectorize(|P - C|)) = 0.152005
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# The truncated transform C has only one-eighth as many points as the original signal, but is still a good estimate of P, although discarding the finer-detail levels produces a poor image of the narrow peak, which is a fine-detail feature.
# The transform algorithm treats the input vector as periodic. Transform elements at the end of each level use information from both the end and the beginning of the input vector. In this case, the signal was approximately 0 at both ends, so the wrapping caused no problems.
# Example - Wavelet Identity Transform
# To view the wavelets themselves, we can invert a transform that contains only a single nonzero coefficient.
t[511] := 0
t[100] := 1
w := idwavelet(t)
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# The nonzero coefficient is in the level which begins at element 64, so we expect the time location of the wavelet to begin at
(100 - 64)/64*512 = 288
# Here's an enlarged view.
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# Example - Wavelets and Transform Definition
# The wavelet transform provides information that is localized in time and at a particular scale. To see how this works, consider a family of simple quadratic wavelets. First, define a basic wavelet by gluing together four quadratic pieces:
f1(x) := 3*(x + 1)^2
f2(x) := 3/4 + 3*(x + 1/2) - 9*(x + 1/2)^2
F(x) :=
    f1(x) if x < -.5
    f2(x) otherwise
G(x) :=
    0 if |x| > 1
    otherwise
        F(x) if x < 0
        -F(-x) otherwise
# G is a localized pulse that is zero outside the interval [-1, 1].
x := -2, -1.99 .. 2
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# Now we define a family of dyadic wavelets:
W(x, j) := 1/sqrt(2^j)*G(x/2^j)
# As j ranges over the integers, the wavelets W change in scale by a factor of 2. For example, here are W(x, 1), which is twice as wide as the basic wavelet G, and W(x, -1) which is half as wide. The scale factor in front maintains a constant integral for W^2.
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# The wavelet transform of the function p at the point x at the scale 2^j is
T(p, j, x) := integral(p(t)*W(t - x, j), t = x - 2^j .. x + 2^j)
# Note that T is defined over the whole real line, but the wavelets are time-limited. The value of T for a particular time value x and scale choice j provides information about p over a time interval of width 2^(j+1) centered at x. The transforms for large j furnish information at large scales over wide time intervals. The transforms for negative j analyze the small-scale features of p. From a complete set of transforms at all integer scales j it is possible to reconstruct the original function.
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