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# SECTION 3 - SPECTRAL ANALYSIS
# Signal Windowing
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# triangular(N) | gaussian(N, α) | blackman(N) | kaiser(N, β)
# hamming(N) | cheby(N, β) | taprect(N) | costaper(N, α)
# nuttall(N) | hanning(N)
# Functions for use in data windowing.
# • N, integer between 2 and maximum array size, the length of the window. For Chebyshev windows, N must be odd.
# • α, inverse of the Gaussian variance, a real number between 2 and 20, or,
# • α, percentage of tapered cosine in costaper, a real number between 0 and 1.
# • β, for Kaiser windows, a real number such that 2 ≤ β ≤ 20, or,
# • β, Chebyshev side-lobe ripple, a real number greater than 1, typically β>50
# Return a vector of length N containing the corresponding discrete-time data window values. For a set of functions that implement windowing automatically to produce highpass, bandpass, and bandstop filters, see the section on FIR Filter Design.
# Notes
# • Maximum array size depends on your computer hardware
# • The definitions for these windowing functions follow the definitions in Digital Spectral Analysis with Applications by S. Lawrence Marple, Jr. (Prentice-Hall, Inc.). Other sources: Theory and Application of Digital Signal Processing by Rabiner and Gold (Prentice-Hall, Inc.) and Digital Filter Design by Parks and Burrus (Wiley-Interscience).
# Ideal/Truncated Lowpass Impulse Response
# We begin by defining the impulse response h of an ideal lowpass filter with normalized cutoff frequency .15.
# Define the cutoff frequency:
f := .15
# The impulse response is:
h(t) := 2*f*sinc(2*π*f*t)
# Since a realizable, finite-length filter must have a finite impulse response, this ideal response is truncated to some manageable number of terms. To see what direct truncation without windowing does to the frequency response, define a length N filter that consists simply of the central N terms of the ideal response, shifted to make the filter causal:
N := 2^6 - 1
k := 0 .. N - 1
N = 63
r[k] := h(k - (N - 1)/2)
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# Frequency response for this truncated signal can be calculated using the gain function (see Filter Gain).
# Frequency range (multiples of sample frequency):
x := 0, .001 .. .5
G(x) := |gain(r, x)|
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# The magnitude of the filter gain shows the expected overshoot at the edge of the passband (the Gibbs phenomenon). Increasing the filter order moves the overshoot closer to the band edge but doesn't decrease its amplitude, as you can see by changing the value of N above.
# One way to produce a more desirable frequency response is to window the ideal impulse response, so that the transition to 0 at the edges of the filter impulse response is smoother. Windows are multiplied with the response vector r term by term.
# The Triangular Window
# The function triangular(N) returns the triangular or Bartlett window of width N. The kth element of the resulting vector is given by
k*2/(N - 1)
# for
k ≤ (N - 1)/2
2 - k*2/(N - 1)
# for
k > (N - 1)/2
T := triangular(N)
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# Windowed impulse response:
v := vectorize(T*r)
# Gain in dB:
G(x) := 20*log(|gain(v, x)|)
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# The Hanning Window
# The function hanning(N) returns the Hanning window of width N. The kth element of the resulting vector is given by
0.5 - 0.5*cos(2*π*k/(N - 1))
Hn := hanning(N)
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# Windowed impulse response:
v := vectorize(Hn*r)
# Gain in dB:
G(x) := 20*log(|gain(v, x)|)
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# The Hamming Window
# The function hamming(N) returns the Hamming window of width N. The kth element of the resulting vector is given by
0.54 - 0.46*cos(2*π*k/(N - 1))
Hm := hamming(N)
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# Windowed impulse response:
v := vectorize(Hm*r)
# Gain in dB:
G(x) := 20*log(|gain(v, x)|)
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# The Blackman Window
# The function blackman(N) returns the Blackman window of width N. The kth element of the resulting vector is given by
0.42 - 0.5*cos(2.0*π/(N - 1)*k) + 0.08*cos(4.0*π/(N - 1)*k)
B := blackman(N)
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# Windowed impulse response:
v := vectorize(B*r)
# Gain in dB:
G(x) := 20*log(|gain(v, x)|)
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# The Nuttall Window
# The function nuttall(N) returns the Nuttall window of width N. The kth element of the resulting vector is given by
0.3635819 - 0.4891775*cos(2.0*π/(N - 1)*k) + 0.1365995*cos(4.0*π/(N - 1)*k) - 0.0106411*cos(6.0*π/(N - 1)*k)
Nu := nuttall(N)
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# Windowed impulse response:
v := vectorize(Nu*r)
# Gain in dB:
G(x) := 20*log(|gain(v, x)|)
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# The Tapered Rectangular Window
# The function taprect(N) returns the tapered rectangular window of width N. This window is horizontal in the middle at a height of 1 with tapered ends formed from cosine curves. The right and left sides use the values
0.5*(1 - cos(π*n/(h + 1)))
# where
h == floor((N - 2)/10)  # and n runs from 0 to h .
Tr := taprect(N)
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# Windowed impulse response:
v := vectorize(Tr*r)
# Gain in dB:
G(x) := 20*log(|gain(v, x)|)
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# The Gaussian Window
# The function gaussian(N, α) returns the Gaussian window of width N and parameter α. The number α is a real number proportional to the inverse of the Gaussian variance and must satisfy 2.0 ≤ α ≤ 20.0. The kth element of the resulting vector is given by
e^(-1/2*(2*α*(1/2 - k/(N - 1)))^2)
α := 3.6
G := gaussian(N, α)
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# Windowed impulse response:
v := vectorize(G*r)
# Gain in dB:
G(x) := 20*log(|gain(v, x)|)
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# The Kaiser Window
# The function kaiser(N, β) returns the Kaiser window of width N and parameter β. The parameter β must satisfy 2 ≤ β ≤ 20. The kth element of the resulting vector is given by
I0(β*sqrt(1 - (1 - 2*k/(N - 1))^2))/I0(β)
β := 7
K := kaiser(N, β)
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# Windowed impulse response:
v := vectorize(K*r)
# Gain in dB:
G(x) := 20*log(|gain(v, x)|)
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# The Chebyshev Window
# The function cheby(N, β) returns the Chebyshev or equi-ripple window of width N and parameter β. The parameter β specifies the maximum side-lobe ripple in dB and must satisfy 1 < β; typically β is >50. The length of this window must be odd. The Chebyshev window is computed by taking the inverse discrete Fourier transform of a Chebyshev polynomial evaluated at points around the unit circle. See Programs for Digital Signal Processing (IEEE Press) for more on this window.
β := 100
C := cheby(N, β)
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# Windowed impulse response:
v := vectorize(C*r)
# Gain in dB:
G(x) := 20*log(|gain(v, x)|)
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# Note that the stopband ripple is below -100 dB, as required.
# The Cosine Taper Window
# The function costaper(N, α) is similar to the function taprect(N) in that it returns a rectangular window with tapered tails that follow a cosine curve. However, you can use the parameter α to specify the percentage of the window that should be created with a cosine curve. The parameter α should be included between 0 and 1; a value of 0 returns a rectangular window, while a value of 1 returns a raised cosine curve. For the tapered part of the window, the value of the kth element is given by:
α*(1 - cos(2*π/(M + 1)*(k + 1)))
# where M is the number of window elements that fall in one of the tails, and is given by α*N
α := 0.6
RC := costaper(N, α)
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# Windowed impulse response:
v := vectorize(RC*r)
# Gain in dB:
G(x) := 20*log(|gain(v, x)|)
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