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# SECTION 1 - SIGNALS AND SYSTEMS
# Two-Dimensional Correlation
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# correl2d(M, K)
# This function performs the correlation of an arbitrary-sized kernel, K, with the image matrix M.
# • M, the image matrix, and
# • K, an arbitrary kernel, which should be smaller than the image M.
# The function returns a matrix of the same size as M containing the input correlated with the kernel. Correlation is an important filtering technique for template or (prototype) matching.
# Notes
# • Correlation is performed in the spatial domain, and image boundaries are treated by zero padding the input image; however, the size of the output image is the same as the input image.
# • The origin of the kernel is assumed to be at the center of the kernel which ensures a zero-phase shift correlation output (that is, the corresponding features in the input and output images are not shifted with respect to each other.).
# Function Definition
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# Correlation is very similar to convolution. Like convolution, it is the process of sliding a filter matrix (called the kernel) across another matrix, multiplying each element in the overlapping areas, summing these results, and inserting this sum into an element of the resulting matrix. This is illustrated in the drawing to the right with a 3 × 3 kernel, where the colored squares in the correlated matrix correspond to the multiplication and summation in correspondingly colored overlap regions.
# The difference between correlation and convolution is that correlation checks the kernel against the image for similarity, while convolution involves flipping the kernel in order to correspond to multiplication in the transform domain.
# Example
# We are trying to locate (match entries as closely as possible) the template, K on the input matrix. The location of the template K on the matrix M is given by the point in correlated output matrix that has the largest value.
K := [1, 1, 3; 1, 2, 1; 1, 1, 2]
M := [3, 1, 2, -1, 0; 0, 1, 1, 3, 1; 1, 1, 2, 1, 2; -1, 1, 1, 2, -2; 3, -1, 1, 3, -2]
correl2d(M, K) = [9, 10, 12, 6, 3; 10, 19, 11, 16, 7; 7, 11, 23, 12, 9; 4, 14, 17, 12, 2; 7, 5, 12, 2, -1]
# The largest value in the correlation output can be seen to be 23 which occurs at location (2,2). As can be seen from the matrix M, the template does occur at that location in the matrix.
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