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# SECTION 4 — DIGITAL FILTERING
# Zero-Phase Filtering
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# filtfilt(x,C)
# Computes the zero-phase response of a filter, using a "forward-backward" filtering model.
# •  x, complex-valued vector
# •  C, matrix of filter coefficients, in cascade form
# Returns a vector of length x, containing the filtered response.  The calculation corresponds to two sequential calls to the response function with the same filter coefficients, using the reversed output of the first call as input for the second call.
# Example - Zero-Phase Filtering
# Here is a Butterworth lowpass IIR filter of order Nb := 2.
analogb := butter(Nb)
filtb := iirlow(analogb, .25)
filtb = [0.292893, 1; 0.585786, 0; 0.292893, 0.171573]
# The magnitude and phase response of the filter are
f1 := 0, 0.01 .. 0.49
magb(f) := |gain(filtb, f)|
phase(f) := arg(gain(filtb, f))/π
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# The phase response is not zero, or even linear. To correct this, we can use the forward-backward filtering function, corresponding to applying the Butterworth filter, then applying it again to the reversed signal.
# As a sample input signal, consider an impulse at the midpoint of a length-N signal
N := 64
x[0] := 0
x[N/2] := 1
x[N - 1] := 0
filtfilt(x, C) :=
    Lx ← length(x)
    y1 ← response(x, C, Lx)
    yr ← response(reverse(y1), C, Lx)
    y ← reverse(yr)
# The corresponding zero-phase output is
y := filtfilt(x, filtb)
n := 0 .. N - 1
# To demonstrate the effect the filter has on the signal, compute the Fourier transforms of both and plot the magnitude and phase of Y.
X := CFFT(x)
Y := CFFT(y)
# The transfer function, given by the ratio magnitudes |X|/|Y| has the expected Butterworth cutoff shape:
Lx := length(x)
n := 0 .. Lx/2
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# The phase change is:
# The effect of filtfilt is to double filter the signal magnitude, as shown in the plot, but the phase shift is zero, instead of the nonlinear phase of the original filter.
# In interpreting the phase plot, it is important to remember that phases of  -2π and 0 are equivalent and that, when the magnitude of Y is very small, as it is for frequencies far above the cutoff, the phase can be meaningless due to numerical noise.
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