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# SECTION 4 - DIGITAL FILTERING
# Group Delay
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# grpdelay(filter,N)
# Calculates the group delay, the phase change of the input signal envelope, imposed by a filter.
# • filter, complex-valued matrix of filter coefficients in cascade form
# • N, integer number of frequencies at which to evaluate group delay
# Returns a vector of length 2N containing the group delay at each frequency. The algorithm uses the Fourier transform of an FIR-only filter that that gives the same group delay as the original filter, with new coefficients c[n]. Group delay is given by Re[ j (1/C) dC/dω]. Group delay is one measure of the filter's impact on the phase of the input signal.
# Example - Group Delay of Various Filter Types
# First, define several filters for which we can compare group delay. Consider a filter having a pair of complex conjugate zeros at radius r and angle theta, say
r := 0.9
theta := π/4
# Then, the corresponding filter vectors are the columns of
filt2z := [1, 1; -2*r*cos(theta), 0; r^2, 0]
# Similarly, if the two points are poles instead of zeros, the coefficients a[n] and b[n] are interchanged and the matrix is
filt2p := [1, 1; 0, -2*r*cos(theta); 0, r^2]
# Here is an additional example that has one real zero, a pair of complex conjugate zeros, plus the same number of poles (See Oppenheim and Schafer, Example 5.9)
filt2zp := [1, 1, 1, 1; 1, -0.683, -1.0166, -1.4461; 0, 0, 1, 0.7957]
# Finally, here is an example of a Butterworth lowpass IIR filter of order Nb := 6. First, generate the filter:
analogb := butter(Nb)
filtb := iirlow(analogb, 0.12195)
# The resulting filter has three stages, each with a pair of poles:
filtb = [
    0.118474, 1, 0.0937623, 1, 0.0836846, 1;
    0.236948, -1.22178, 0.187525, -0.966938, 0.167369, -0.86301;
    0.118474, 0.695674, 0.0937623, 0.341987, 0.0836846, 0.197749
]
# The group delay of these filters is evaluated evaluated at N frequencies.
rmpc(c) :=
    for k ∈ 0 .. length(c) - 1
        rc[k] ← k*c[k]
    rc
grpdelay(filter, N) :=
    fcols ← cols(filter)
    Nstage ← fcols/2
    gdn[2*N - 1] ← 0
    Lc ← length(gdn)
    for k2 ∈ 1 .. Nstage
        b ← filter[:, 2*k2 - 2]
        a ← filter[:, 2*k2 - 1]
        c ← convol(b, reverse(conj(a)))
        c[2*N - 1] ← 0
        rc ← rmpc(c)
        frc ← CFFT(rc)
        fc ← CFFT(c)
        qc ← vectorize(frc/fc)
        rqc ← Re(qc)
        lzstage ← length(a) - 1
        for k ∈ 0 .. Lc - 1
            gds[k] ← rqc[k] - lzstage
        gdn ← gdn + gds
N := 128  # Copy or type the other filter names in place of filt2zp to display other group delays.
gd := grpdelay(filt2zp, N)
# filt2z | filt2p | filtb
k := 0 .. N - 1
ω[k] := (π/N)*k
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# Only half the frequency range has been plotted - the other half is symmetric, with the exception of the point ω = π. This particular filter has a zero on the unit circle at that frequency, so the actual group delay has a large negative spike (delta function) at that point. The numerical method approximates this spike with a very large negative value, as would be apparent in the plot if the point ω = π were included.
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