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# SECTION 3 - SPECTRUM ANALYSIS
# MUSIC Method for Spectrum Estimation
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## music(E, N)
## toeplitz(y)
# Implement the MUltiple SIgnal Classifier (MUSIC) method of spectral estimation. The toeplitz function is included to calculate the signal correlation matrix.
# • E, a matrix containing eigenvectors of the signal autocorrelation matrix
# • N, integer number of eigenvectors to assign to the noise, not larger than the length of the original signal.
# The function returns a vector half as long as the original data plus 1. To use the function, construct an autocorrelation matrix for the signal, and find it's eigenvectors, using the toeplitz function and the built-in eigenvecs function. Select a partition between the noise subspace and signal subspace to choose a value for N. This method is useful for estimating the frequency spectrum of a time-dependent process when the process is known to consist of a small number of discrete frequencies in a background of noise.
#
# Related methods are those of Pisarenko, Kumaresan, and Tufts. For a general discussion see, for example, S. L. Marple, Jr., Digital Spectral Analysis with Applications, Prentice-Hall, Inc., Englewood Cliffs, N.J., 1987, Chapter 13. See also S. M. Kay, Modern Spectral Estimation - Theory and Application, Prentice-Hall, Englewood Cliffs, N.J., 1988, Chapter13.
## Example
# A typical application begins with a noisy signal. Begin with a signal containing two discrete frequencies:
ω1 := 1.0
ω2 := 1.3
A1 := 1.15
A2 := 2.75
N := 64
m := 0 .. N - 1
s(m) := A1*cos(ω1*m) + A2*cos(ω2*m)
# Here is the signal:
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# Now, add Gaussian noise to the signal.
Nmean := 0.0
Nstd := 0.25
Noisy := rnorm(N, Nmean, Nstd)
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# Here is the noisy (received) signal:
y[m] := s(m) + Noisy[m]
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# To proceed, first calculate the autocorrelation of a vector of the mean-zeroed data
mean(y) = 0.0219252
ys := y - mean(y)
ycorr := lcorr(ys, ys)
# Here is the autocorrelation:
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# This vector is used as the first row of a toeplitz matrix.
toeplitz(C) :=
    Lc ← length(C)
    for i ∈ 0 .. Lc - 1
        for j ∈ 0 .. Lc - 1
            Tp[i, j] ← C[|i - j|]
    Tp
Phiy := toeplitz(ycorr)
# Find the eigenvalues of this matrix:
Evy := eigenvals(Phiy)
max(Evy) = 18.1865
min(Evy) = 0.012302
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# Two eigenvalues are relatively large, reflecting the presence of the two sinusoids in the underlying signal. The number of small eigenvalues of the correlation matrix will impact the number of eigenvectors assigned to the noise subspace.
# The number assigned to the noise subspace is somewhat arbitrary, and the results may differ for different choices. Many different choices may give good results, while a few may give bad results. A realistic approach is to try several different values of Nnoise and to look for peaks that appear consistently in many (but perhaps not all) of the cases. For the present example, Nnoise = 3 and Nnoise = 7 give very strong peaks at the frequencies w1 and w2. Other small values of Nnoise show these same peaks, plus some additional spurious peaks in varying locations, while Nnoise = 23 does not do well at all. As an example, look at the results for
# Next, find the eigenvectors of the correlation matrix,
Evecy := eigenvecs(Phiy)
# and evaluate the MUSIC estimator.
music(Vtm, Nnoise) :=
    Ncols ← cols(Vtm)
    for f ∈ 0 .. Ncols/2
        Psm ←
            Fsum ← 0
            for p ∈ 0 .. Nnoise - 1
                "sum from last column as eigenvectors are sorted in descending order"
                Fsum ← Fsum + mag(CFFT(Vtm[:, Ncols - p - 1]))[f]^2
        music[f] ← 1/(Psm + 10^-8)
    music
Musicy := music(Evecy, 7)
n := 0 .. length(Musicy) - 1
# Finally, plot the estimator:
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# The location of any significant peaks estimate the discrete frequencies present in the signal. The peaks occur around the original frequencies of ω1 and ω2.
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