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## SECTION 7 - JOINT TIME-FREQUENCY ANALYSIS
# Short-Time Fourier Transform
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# stft(x, [n], [s], [w])
# Calculates the short-time Fourier transform (STFT) of a signal whose spectral characteristics change over time.
# • x, complex-valued data vector
# • n, (optional) integer number of transform frequencies. Default is 64
# • s, (optional), integer number of samples to skip between successive computations. Default is n/2
# • w, (optional), windowing function index, or vector containing the coefficients of an FIR filter whose length is not longer than n
# Argument
# 1
# 2
# 3
# 4
# 5
# 6
# 7
# Window
# rectangular (the default)
# tapered rectangular
# triangular
# Hanning
# Hamming
# Blackman
# Nuttall
# Returns a matrix whose columns contain the Fourier transform of the input signal at times separated by s samples. For a signal x(t), the STFT is defined in continuous time as:
X(ω) := 1/sqrt(2*π)*integral(x(τ)*w(τ - t)*e^(-jωτ), τ)  # disabled
# where w(t) is a sliding real-valued window taper used to localize the influence of the transform around a specific time.
# Example - Two-Pitch Signal
# The following signal is composed of two sinusoids of different frequencies occurring at different times.
n := 0 .. 333
s[n] := sin(2*π*n/20)
z[n] := 0
g[n] := sin(2*π*n/5)
v := stack(z, s)
v := stack(v, z)
v := stack(v, g)
v := stack(v, z)
m := 0 .. length(v) - 1
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# The STFT will contain information on the frequency content of the signal and the time at which the frequency is present. Calculate the STFT with 100 frequency samples, a time step of 30 and a Hanning window (window 4):
V_stft := stft(v, 100, 30, 4)
# The spectrogram obtained can be plotted as the contour of the squared magnitude, with the normalized frequency on the x axis and time on the y axis:
V_spec := vectorize(vectorize(|V_stft|)*vectorize(|V_stft|))
# [component: inputs V_spec]
# This plot shows not only the two frequencies, but also the time at which they occur. However, the spectrogram suffers from what is called the localization trade-off. To achieve time localization (that is, the STFT pinpointing the times at which the sinusoids are active), requires a short window in the time domain. Conversely, good frequency localization requires a long time window. This trade-off is further dependent on the type of window used, the signal under consideration, time, and frequency.
# To illustrate, calculate the STFT and the spectrogram of the same signal as above, but using a frequency window length of 300 instead of 100.
V_nb := stft(v, 300, 30, 4)
V_nbspec := vectorize(vectorize(|V_nb|)*vectorize(|V_nb|))
# [component: inputs V_nbspec]
# The STFT calculated with a long window has better frequency resolution, but its time resolution is not as good. This time-frequency trade-off can be avoided by using other techniques in time-frequency analysis.
# Example - Custom Windowing
# The frequency window in this example is zero-padded up to the length of the Fourier transform. (Note: The length of the window cannot be longer than the length of the Fourier transform.)
win := costaper(100, 0.5)
# Rescale the window coefficients so that the window has unit energy:
ssqr := sum(|win[n]|^2, n = 0 .. 99)
win := win/sqrt(ssqr)
# Calculate the STFT and the spectrogram:
Vstft2 := stft(v, 200, 30, win)
Vspec2 := vectorize(vectorize(|Vstft2|)*vectorize(|Vstft2|))
# [component: inputs Vspec2]
# Try changing the parameters of the stft function, or the frequencies of the sinusoids in the input signal and observe how the plots change.
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