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## SECTION 7 - JOINT TIME-FREQUENCY ANALYSIS
## Time-Frequency Representations I
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# timefreq(x, "t", f, s, [d] ) | timecorr(x, "t", f, s, [d] )
# timefreq(x, ["custom"], s, r ) | timecorr(x, ["custom"], s, r )
# Compute the common bilinear time-frequency representations (BTFRs) and the time-dependent autocorrelation of a signal.
# • x, real-valued data vector
# • t, string containing the name of the desired representation (optional for the custom type).
# • f, integer number of lags (for timecorr) or number of frequencies (for timefreq) to be computed.
# • s, step size; an integer giving the number of samples to skip between successive computations.
# • d, (optional), positive damping factor for the Choi-Williams distribution (defaults to 1). Ignored for other representations
# • r, a matrix of real numbers giving the time-lag kernel in the case of a custom representation. Required for the "custom" representation.
# string t
# wigner
# cone
# bornjordan
# marghill
# choiwill
# "custom"
# Representation
# Wigner
# cone
# Born-Jordan
# Margenau-Hill
# Choi-Williams
# custom kernel in the time-lag plane.
# Return a matrix with f rows and approximately length(x)/s columns, containing the time-frequency representation or the time-dependent autocorrelation matrix for signal x.
# Notes
# In continuous time, a time-frequency representation for signal x is defined as
C(t, ω) := 1/(2*π)*integral(integral(r(t - u, τ)*conj(x)*(u - τ/2)*x(u + τ/2)*e^(-jωτ), u), τ)  # disabled
# where r(t, τ) is the kernel in the time-lag domain, which determines the type of time-frequency representation.
# C(t,ω) is the Fourier transform of R_t(τ), defined as
# R_t(τ) := integral(r(t - u, τ)*conj(x)*(u - τ/2)*x(u + τ/2), u)
# This is called the deterministic generalized local autocorrelation function, or the time-dependent autocorrelation, or simply the local autocorrelation and is given by the timecorr function.
# The above definition defines a class of methods for representing the time-varying spectral characteristics of signals. These methods, collectively known as Cohen's Bilinear Time-Frequency Representations (BTFR), can be thought of a generalizations of the spectrogram. Although spectrograms are widely used for analyzing the time-varying spectral content of signals, good time resolution cannot be obtained without sacrificing frequency resolution. This tradeoff can be avoided by using the BTFRs.
# Example - Wigner Distribution
# The first known method of time-frequency analysis was discovered by Eugene Wigner for use in quantum physics in 1932. The Wigner distribution was adapted to time-frequency analysis by Ville in 1948; thus, it is sometimes referred to as the Wigner-Ville distribution.
# The kernel r(t,τ) is a delta function.
# Integrating the Wigner distribution over time gives the spectrum of the signal; similarly, integrating over frequency gives the magnitude-squared of the signal. This example shows that the time marginals are satisfied for a simple sinusoidal signal. The result is general to any signal analyzed with the Wigner distribution. (Note that the step-size parameter must be 1 if you want to verify the time marginal property.)
n := 0 .. 100
s[n] := sin(2*π*n/17)
s_w := timefreq(s, "wigner", 32, 1)
# The distribution magnitude squared is
mag2[n] := |s[n]|*|s[n]|
# Sum over all the frequencies (rows) of the Wigner distribution:
N := cols(s_w) - 1
M := rows(s_w) - 1
timemarg :=
    for n ∈ 0 .. N
        a[n] ← sum(s_w[m, n], m = 0 .. M)
    a
k := 0 .. N
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# Another important property of the Wigner distribution is finite support. The Wigner distribution has weak finite support in time and frequency, but not strong finite support. A distribution is said to have weak finite support in time and frequency if the following is true:
#
# C( t, ω ) = 0 for t outside (t_1, t_2) if s(t) is zero outside (t_1, t_2)
# C( t, ω ) = 0 for ω outside (ω_1, ω_2) if S(ω) is zero outside (ω_1, ω_2)
#
# This means that the distribution will be zero outside the time and frequency intervals in which the signal is present. However, it does not imply that the distribution is zero wherever the signal is zero (this would be strong finite support). In fact the Wigner distribution may very well show nonzero elements for time and frequency intervals in which the signal was zero. This phenomenon is called interference, or cross-term.
# Below is an echolocation chirp signal generated by a Large Brown Bat.
batchirp := READPRN("batsig.txt")  # error: file open error
k := 0 .. length(batchirp) - 1
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# The Wigner distribution of the above bat chirp is given below, with the normalized frequency on the x axis and time on the y axis :
batchirp_w := timefreq(batchirp, "wigner", 16, 1)
# Time-frequency representations can be visualized using perspective or contour 3-D plots. Observe the many frequency components that vary with time. Some of these components may be cross-terms. To reduce the effect of cross terms in the Wigner distribution, smooth it with a rectangular window by using a step size greater than 1.
# [component: inputs batchirp_w]
batchirp_ws := timefreq(batchirp, "wigner", 16, 4)
# This version of the distribution emphasizes the important features of the signal, by smoothing some of the cross-terms. Smoothing is controlled with the step-size parameter. It is usually a good idea to specify a step size greater than 1. The representation will still be calculated internally for a step size of 1, accumulating the individual results, and saving their sum every integer multiple of the step size. If the step size is too large, you may lose important information about the signal. The Margenau-Hill distribution does no smoothing (see below for details on the Margenau-Hill distribution).
# [component: inputs batchirp_ws]
# The Wigner distribution can give better resolution than the spectrogram. Compare the plot below with the one just above.
batchirp_stft := stft(batchirp, 16)
batchirp_sg := vectorize(|vectorize(batchirp_stft)|*|vectorize(batchirp_stft)|)
# [component: inputs batchirp_sg]
# The spectrogram has worse resolution in both time and frequency than the Wigner distribution. In general, BTFRs have better resolution than the spectrogram. One disadvantage is that they may assume negative values, which makes it difficult to interpret them as energy distributions. For this reason, the design of kernels that produce positive BTFRs that satisfy the marginals is a very active area of research.
## Example - The Margenau-Hill Distribution
# The Margenau-Hill BTFR was also originally derived from quantum physics. Like the Wigner, it satisfies the marginals and finite support properties in both time and frequency. Following is a 3D perspective plot of the Margenau-Hill BTFR of the bat chirp.
batchirp_marghill := timefreq(batchirp, "marghill", 32, 8)
# [component: inputs batchirp_marghill]
# Note that there are some negative values in the distribution, as discussed earlier for the Wigner distribution.
# More examples (including Choi-Williams, Born-Jordan and cone
# representations) are discussed in Part II of this section.
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