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## SECTION 7 - JOINT TIME-FREQUENCY ANALYSIS
## Time-Frequency Representations II
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## Example - The Choi-Williams Distribution
# The advantage of formulating a BTFR in terms of Cohen's general approach is that the kernels may be specified at will. A number of time-frequency representations have been invented by designing kernels that would result in representations with certain desired properties. The Choi-Williams representation is one such BTFR. It generates smoothed cross terms and satisfies the marginals. However, it does not have finite time and frequency support.
#
# The time-lag kernel for the Choi-Williams distribution is:
# r(t, τ) := sqrt(d/(4*π))*e^(-d/4*τ^2/t^2)
# where d is the damping factor, which must be positive. If d is not provided, a default value of 1 is used. Typical values of d are between 1 and 10. The kernel is calculated automatically by the timefreq function and its size is based on the number of frequencies and the value of the damping factor.
# Look at the plots below. They represent the bat chirp signal for different values of damping. In general, as the dampening parameter goes to infinity, the Choi-Williams distribution approaches the Wigner distribution.
batchirp := READPRN("batsig.txt")
batchirp_choi1 := timefreq(batchirp, "choiwill", 32, 4)
batchirp_choi7 := timefreq(batchirp, "choiwill", 32, 4, 7)
# [component: inputs batchirp_choi1]
# [component: inputs batchirp_choi7]
# A third "streak" appears between the original two because the higher the damping factor, the more the Choi-Williams representation approximates the Wigner representation.
## Example - Born-Jordan and the Cone Representations
# The Born-Jordan and cone representations are related. The Born-Jordan distribution satisfies the time and frequency marginals, as well as the finite support property. The cone kernel representation satisfies only the time marginal property, but results in visually precise plots. The two representations are related by a scaling factor. The Born-Jordan is equal to the cone scaled by 1/(1 + τ).
batchirp_bornjor := timefreq(batchirp, "bornjordan", 16, 4)
batchirp_cone := timefreq(batchirp, "cone", 16, 4)
# [component: inputs batchirp_bornjor]
# [component: inputs batchirp_cone]
## Example - Custom Representations
# When constructing a kernel matrix, consider how its size is associated to the physical dimensions of the kernel:
# • rows of kernel matrix: time variable
# • columns of kernel matrix: lag variable.
#
# The number of columns determines the number of frequencies calculated, approximately twice the number of columns. The kernel matrix is set up in this way because the timefreq function first calculates the local autocorrelation by internally calling the timecorr function, and then computes the FFT of the result.
#
# Finally, note that you need only provide the step size and the kernel at a minimum when calculating your custom distribution, The number of frequencies is determined from the number of columns of the kernel, and the string "custom" is optional.
## Example - timecorr Function
# The timecorr function calculates the time-dependent autocorrelation function of a signal for a certain kernel. The time-dependent autocorrelation of a signal s(t) is defined as:
# R_t(τ) := integral(r(t - u, τ)*conj(x)*(u - τ/2)*x(u + τ/2), u)
# where r(t, τ) is the kernel. The above function is also called the deterministic generalized local autocorrelation function, because it calculates the autocorrelation of s(t) locally using a deterministic formulation. The result is a matrix, whose rows indicate different values of the lag variable τ and whose columns indicate the time t.
#
# The kernel determines the type of autocorrelation. The meaning of the input parameters is identical to that for the timefreq function, except that the parameter f is the number of lags, not the number of frequencies to compute. The results of the two functions are related: the timefreq function calls timecorr function to compute the results in the time-lag domain, and then takes the Fourier transform of the result matrix, along the lag dimension (along each columns individually).
#
# Sometimes it is useful to display the time-dependent autocorrelation, because we may be interested in how a process changes over time. For example, time-varying ARMA processes, equalizer design, and Kalman filtering are instances in which the time-dependent autocorrelation function of a certain type may be useful.
# The example below shows how to compute the autocorrelation using the kernel for the Wigner distribution.
lags := 64
step := 16
batchirp_wtau := timecorr(batchirp, "wigner", lags, step)
# The resultant matrix has 64 columns and approximately N/step rows. We can observe the result on a 3-D perspective plot.
# [component: inputs batchirp_wtau]
# Acknowledgments
# We wish to thank Curtis Condon, Ken White, and Al Feng of the Beckman Institute of the University of Illinois for the bat data and for permission to use it in this tutorial.
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