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## WAVELETS EXTENSION PACK
## 1D Wavelet Approximation
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# waveapprox(y, J, K, filter) | wavedecomp(y, J, K, filter)
# Note: These functions are defined in wavedef.xmcd and in this worksheet only. They are not part of the Wavelets Extension Pack DLL.
# These functions approximate or decompose a signal using the largest coefficients of a discrete wavelet transform. The arguments to the functions are:
# •  y, a real vector containing the signal to be analyzed.
# •  J, an integer giving the level of the wavelet transform.
# •  K, an integer giving the number of wavelet coefficients to use.
# •  filter, the wavelet family used to compute the dwt.
## The Wavelet Series Approximation
# In the Wavelets Extension Pack, the term wavelet is used to refer to any of the functions father and mother. The orthogonal wavelet series approximation to a continuous time signal is given by:
f(t) == sum(S[J, k]*father[J, k]*t, k) + sum(d[J, k]*mother[J, k]*t, k) + sum(d[J - 1, k]*mother[J - 1, k]*t, k) + ... + sum(d[1, k]*mother[1, k]*t, k)
# or, more concisely:
f(t) == sum(S[J, k]*father[J, k]*t, k) + sum(sum(d[j, k]*mother[j, k]*t, k), j = 1 .. J)
# where J is the number of multiresolution components (or scales) and k ranges from 1 to N*2^(-j) . The jth component has N*2^(-j) coefficients. The coefficients S[J, k], d[J, k], ...*d[1, k], , are the wavelet transform coefficients. The functions father[J, k]*t and mother[j, k]*t are the approximating wavelet functions.
# The functions father[J, k]*t and mother[j, k]*t are generated from father(t) and mother(t) through scaling and translation as follows:
father[J, k]*t == 2^(-J/2)*father(2^(-J)*t - k) == 2^(-J/2)*father((t - 2^J*k)/2^J)
mother[j, k]*t == 2^(-j/2)*mother(2^(-j)*t - k) == 2^(-j/2)*mother((t - 2^j*k)/2^j)
# The wavelet coefficients are given by the integrals:
S[J, k] == integral(father[J, k]*t*f(t), t = -∞ .. ∞)
# and
d[j, k] == integral(mother[j, k]*t*f(t), t = -∞ .. ∞)
j == 1, 2 .. J
k == 1, 2 .. N*2^(-j)
# The magnitude of the integrals gives a measure of the contribution of the corresponding wavelet function to the approximating sum. The above wavelet approximation is an orthogonal series approximation since the basis functions are by construction orthogonal:
integral(father[J, k]*t*father[J, k']*t, t) == δ[k, k']
integral(mother[j, k]*t*father[J, k']*t, t) == 0
integral(mother[j, k]*t*mother[j', k']*t, t) == δ[j, j']*δ[k, k']
# where
δ[i, j] == {
    1 if i == j
    0 otherwise
}
# There are many other kinds of orthogonal series representations and approximations of a signal. The Fourier series expansion, which uses the sine and cosine orthogonal basis functions, is the most important such representation in engineering and science applications. Wavelet series approximations are used increasingly often in a wide range of fields.
# In practice, we never actually use these formulae. Instead, we use the discrete wavelet transform (DWT), which performs these calculations much faster.
# These methods are similar to those for signal soft denoising discussed in Nonparametric Signal Denoising.
## waveapprox(y, J, K, filter)
# The function waveapprox(y, J, K, filter) approximates y using the K largest coefficients of a J level wavelet transform with periodic boundary conditions, using wavelet filter.
# In the wavelet approximation, we do the wavelet transform, sort the coefficients by magnitude, and then add them into the inverse wavelet transform in order of decreasing magnitude. To illustrate the accuracy of the approximation, the reconstruction error is plotted as additional coefficients are used. In this example, the ramp function is defined.
N := 128
i := 0 .. N - 1
ramp(x) := x - Φ(x - 0.37)
x[i] := i/N
y[i] := ramp(x[i])
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filter := daublet(4)
J := 4
# The ramp is then run through the wavelet transform, the largest coefficient is found, and the inverse wavelet transform is performed with just that single largest coefficient. This is all accomplished using the function waveapprox, defined below and in the file wavedef.xmcd:
waveapprox(x, J, n, filter) :=
    w ← dwt(x, J, filter)
    ws ← reverse(sort(vectorize(|w|)))
    T_w ← ws[n - 1]
    for i ∈ 0 .. rows(w) - 1
        wt[i] ← (|w[i]| ≥ T_w)*w[i]
    R ← idwt(wt, J, filter)
    R
R := waveapprox(y, J, 1, filter)
ε := R - y
|ε| = 2.84205
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# Repeat the procedure using only 5 coefficients:
R := waveapprox(y, J, 5, filter)
ε := R - y
|ε| = 1.51002
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# Repeat the process using 10 coefficients:
R := waveapprox(y, J, 10, filter)
ε := R - y
|ε| = 0.820238
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# As shown above, using more coefficients better approximates the original
# function and thus reduces the approximation error.
## wavedecomp(y, J, K, filter)
# The function wavedecomp(y, J, K, filter) decomposes the vector y using wavelet filter according to the K largest wavelet coefficients of a level J dwt with periodic boundary conditions. It returns a vector of K nested vectors. Each of the individual vectors is one level of the wavelet approximation to the original function y. For example, element 0 is the IDWT of the largest wavelet coefficient. Summing the elements in order gives successively better approximations to the original function y. wavedecomp is defined below and in the file wavedef.xmcd:
wavedecomp(x, J, n, filter) :=
    w ← dwt(x, J, filter)
    for i ∈ 0 .. rows(w) - 1
        w[i, 1] ← i
    ws ← reverse(csort(vectorize(|w|), 0))
    wt[rows(w) - 1] ← 0
    for qq ∈ 0 .. n - 1
        wt[ws[qq, 1]] ← w[ws[qq, 1], 0]
        R[qq] ← idwt(wt, J, filter)
        wt[ws[qq, 1]] ← 0
    R
M := 18
qc := 0 .. M - 1
T := wavedecomp(y, J, M, filter)
pf := 1  # This is a plotting factor used in the plots that follow.
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# Now, sum these transformed coefficients and watch the sums converge to the original function.
qc2 := 1 .. M - 1
S[0] := T[0]
S[qc2] := S[qc2 - 1] + T[qc2]
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# Plotting the log of the RMS error as a function of the number of coefficients included in the approximation shows a steady improvement. As shown above, there is essentially perfect reconstruction after about fifteen coefficients.
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