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## WAVELETS EXTENSION PACK
## 2D Wavelet Approximation
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# waveapprox2d(y, J, K, filter) | wavedecomp2d(y, J, K, filter)
# Note: These functions are defined in the file wavedef.xmcd and in this worksheet. They are not part of the Wavelets Extension Pack DLL.
# These functions are used to approximate or decompose a two-dimensional (2D) object using the largest coefficients of a discrete wavelet transform. The arguments to the functions are:
# •  y, a real matrix containing the object to be approximated.
# •  J, an integer giving the level of the wavelet transform.
# •  K, an integer giving the number of wavelet coefficients used to reconstruct the object.
# •  filter, the wavelet family used to compute the dwt.
## The 2D Wavelet Approximation
# We have seen how wavelets can be used to represent one-dimensional (1D) functions in 1D wavelet approximation. The 2D wavelet approximation is a straightforward generalization of the 1D approximation, although the notation gets a lot messier! You can write a 2D function as a sum of 2D wavelets at different scales and locations:
F(x, y) == sum(S[J, m, n]*father2d[J, m, n]*(x, y), m, n) + sum(sum(d[j, m, n, V]*mother2d[j, m, n, V]*(x, y), m, n), j = 1 .. J) + sum(sum(d[j, m, n, H]*mother2d[j, m, n, H]*(x, y), m, n), j = 1 .. J) + sum(sum(d[j, m, n, D]*mother2d[j, m, n, D]*(x, y), m, n), j = 1 .. J)
# Analogous to the 1D approximation, F(x, y) is decomposed into a sum of coarse resolution (level J) smooth coefficients and a sum of fine to coarse resolution (levels 1 to J) detail coefficients. In the 2D approximation, however, there are 3 types of detail coefficients and basis functions: vertical, horizontal, and diagonal. m and n range from 1 to 2^j-1. The 2D basis functions are generated from the father and mother wavelets by scaling and translation:
father2d[J, m, n]*(x, y) == 2^(-J)*Father(2^(-J)*x - m, 2^(-J)*y - n)
mother2d[j, m, n, V]*(x, y) == 2^(-j)*mother2d[V]*(2^(-j)*x - m, 2^(-j)*y - n)
mother2d[j, m, n, H]*(x, y) == 2^(-j)*mother2d[H]*(2^(-j)*x - m, 2^(-j)*y - n)
mother2d[j, m, n, D]*(x, y) == 2^(-j)*mother2d[D]*(2^(-j)*x - m, 2^(-j)*y - n)
# The 2D wavelet transform coefficients are given by the integrals:
S[J, m, n] == integral(integral(father2d[J, m, n]*(x, y)*F(x, y), x), y)
d[j, m, n, V] == integral(integral(mother2d[j, m, n, V]*(x, y)*F(x, y), x), y)
d[j, m, n, H] == integral(integral(mother2d[j, m, n, H]*(x, y)*F(x, y), x), y)
d[j, m, n, D] == integral(integral(mother2d[j, m, n, D]*(x, y)*F(x, y), x), y)
# In practice, we do not use these formulae. Instead, we use the 2D discrete wavelet transform to generate the coefficients quickly and efficiently. The DWT coefficients are sorted by magnitude and only the largest ones are used for the approximation.
## Wavelet Approximation Example
Vbox(nrow) :=
    for i ∈ 0 .. nrow - 1
        for j ∈ 0 .. nrow - 1
            box[i, j] ← 255
    lb ← nrow/8
    for i ∈ lb .. lb*7
        for j ∈ lb .. lb*3
            box[i, j] ← 0
        box[i, lb*7] ← 0
        for j ∈ lb .. lb*2
            box[j, i] ← 0
        box[i, lb*3] ← 0
        box[i, lb*4] ← 0
        box[i, lb*5] ← 0
        box[i, lb*6] ← 0
        box[i, i] ← 0
        box[i, i + lb - 1] ← 127
        box[i, 7*lb - i] ← 127
    box
# As an example, the wavelet approximation for the Vbox test image (defined to the right) is computed. The example makes use of the up-sample by 2 utility in the displayed images. The up-sample by 2 operation causes image sizes to increase.
N := 32
vbox := Vbox(N)
# [component: inputs vbox]
# Plot the Vbox image.
rows(vbox) = 32
cols(vbox) = 32
upsample2(M) :=
    T[2*rows(M) - 1, 2*cols(M) - 1] ← 0
    for i ∈ 0 .. rows(M) - 1
        for j ∈ 0 .. cols(M) - 1
            T[2*i + 1, 2*j + 1] ← M[i, j]
            T[2*i + 1, 2*j] ← M[i, j]
            T[2*i, 2*j] ← M[i, j]
            T[2*i, 2*j + 1] ← M[i, j]
    T
# Now up-sample by 2 and plot the new image:
vbox_mag2 := upsample2(vbox)
# [component: inputs vbox_mag2]
rows(vbox_mag2) = 64
cols(vbox_mag2) = 64
# Next, compute its wavelet approximation of vbox using one-fourth of the coefficients:
filter := daublet(2)
J := 4
K := floor(1/4*N^2)
# The function waveapprox2d uses two additional functions, shrink and wavesort, defined below.
shrink(WS, n, W) :=
    M[rows(W) - 1, cols(W) - 1] ← 0
    q ← 0
    while q < n
        M[WS[q, 0], WS[q, 1]] ← W[WS[q, 0], WS[q, 1]]
        q ← q + 1
    M
wavesort(W) :=
    q ← 0
    for r ∈ 0 .. rows(W) - 1
        for c ∈ 0 .. cols(W) - 1
            WS[q, 0] ← |W[r, c]|
            WS[q, 1] ← r
            WS[q, 2] ← c
            q ← q + 1
    WS ← reverse(csort(WS, 0))
    submatrix(WS, 0, rows(WS) - 1, 1, 2)
waveapprox2d(y, J, n, filter) :=
    W ← dwt(y, J, filter)
    L ← wavesort(W)
    yr ← shrink(L, n, W)
    idwt(yr, J, filter)
vbox_a := waveapprox2d(vbox, J, K, filter)
# [component: inputs upsample2(vbox_a)]
# Plot the approximated image
# up-sampled by 2.
# Now compute the wavelet approximation using one-third of the coefficients
# and plot the result up-sampled by 2:
K := floor(1/3*N^2)
vbox_a := waveapprox2d(vbox, J, K, filter)
# [component: inputs upsample2(vbox_a)]
# The reconstructed image is now indistinguishable from the original. In fact, there is essentially perfect reconstruction of the original image as seen by looking at the approximation error:
max(vectorize(|vbox - vbox_a|)) = 4.26326e-13
## wavedecomp2d(y, J, K, filter)
# The function wavedecomp2d(y, J, K, filter) decomposes the matrix y using wavelet filter according to the K largest wavelet coefficients of a level J dwt with periodic boundary conditions. It returns a vector of K nested matrices. Each of the individual matrices is one level of the wavelet approximation to the original function y. For example, element 0 is the IDWT of the largest wavelet coefficient. Summing the elements in order gives successively better approximations to the original function y. wavedecomp2d is defined below and in the file wavedef.xmcd:
wavedecomp2d(x, J, n, filter) :=
    W ← dwt(x, J, filter)
    L ← wavesort(W)
    wt[rows(W) - 1, cols(W) - 1] ← 0
    for qq ∈ 0 .. n - 1
        wt[L[qq, 0], L[qq, 1]] ← W[L[qq, 0], L[qq, 1]]
        R[qq] ← idwt(wt, J, filter)
        wt[L[qq, 0], L[qq, 1]] ← 0
    R
K := floor(1/3*N^2)
QQ := wavedecomp2d(vbox, J, K, filter)
# Analogous to the 1D case, the original image can be reconstructed by summing the elements of the matrix generated by the wavedecomp2d function. As seen below, using more elements in the summation will give successively better approximations to the original function.
K = 341
# K is the number of elements in the approximation
# vector.
N := K - 200  # Use 200 less elements less than K.
Z := sum(QQ[n], n = 0 .. N - 1)  # Sum the elements.
# [component: inputs Z]
# Plot the reconstructed image.
N := K - 100  # Use 100 less elements less than K.
Z := sum(QQ[n], n = 0 .. N - 1)  # Sum the elements.
# [component: inputs Z]
# Plot the reconstructed image.
N := K  # Use all elements.
Z := sum(QQ[n], n = 0 .. N - 1)  # Sum the elements.
# [component: inputs Z]
# Plot the reconstructed image.
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