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## WAVELETS EXTENSION PACK
## Signal and Image Compression
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## The Signal Compression Potential of Wavelets
# Wavelets are often used in data compression algorithms because of their ability to compact the energy of signals and images into a few coefficients. This section contains examples of the compression performance of wavelet transforms for both signals and images.
# The first example uses a recording of a speaker uttering the word "wavelet."
# [component: outputs S]
# Click on the input table to the left until you see the handles, and enlarge it to see the data used in this example.
rows(S) = 8192
cols(S) = 2
v := S[:, 1]
t := S[:, 0]
i := 0 .. rows(v) - 1
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# Now take the DWT of the speech signal and compute its energy concentration:
# [reference: Wavedef.xmcd]
J := MaxDWTLevel(v) - 2  # .
filter := coiflet(18)
N := rows(v)
w := dwt(v, J, filter)
Th := .75
i := 0 .. N - 1
cw := Concentration(w)
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# As the plot shows, the wavelet transform compacts the energy of the speech signal. Now, nearly all of the energy of the signal is concentrated into the top 10% of the coefficients, and 75% is contained in fewer than 1% of the coefficients.
# The practical consequence of this fact is that you can compress a signal by throwing away all but its largest coefficients. The accuracy of the compression scheme can be measured with the mean-squared error. The quality of the reproduction, however, can only be determined by listening to the reconstructed speech.
Compress(v, percent) :=
    w ← v[:, 0]
    if cols(v) > 1
        for i ∈ 1 .. cols(v) - 1
            w ← stack(w, v[:, i])
    ind ← floor(percent*rows(w))
    thresh ← sort(vectorize(|w|))[ind]
    vectorize((|v| ≥ thresh)*v)
recon := idwt(Compress(w, 0.95), J, filter)
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# Click to play the uncompressed speech signal.
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# Click to play the speech signal with 90% of the coefficients gone.
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# Click to play the speech with 95% of the coefficients gone.
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# Click to play the speech with 99% of the coefficients gone.
## Comparison of Various Transforms Performing Speech Compression
# Compare the energy compression capability of the wavelet transform with that of the Fourier transform.
#
# First, the Fourier Transform (FFT):
CR := .99  # Compression ratio, must be 0<=CR<=1.0
ft := cfft(v)
cF := Concentration(ft)
recon_fft := icfft(Compress(ft, CR))
# Next, compression with the discrete wavelet transform (DWT):
wt := dwt(v, J, filter)
cW := Concentration(wt)
recon_dwt := idwt(Compress(wt, CR), J, filter)
# And compression with the wavelet packet transform (WPT):
Tw := wpt(v, J, filter)
entropy(x) := -x^2*log(x^2)
basis := best_basis(Tw, entropy)
wp := extract_basis(Tw, basis)
cP := Concentration(wp)
recon_wpt := iwpt(Compress(wp, CR), basis, filter)
# Lastly, compression with the local cosine transform (LCT):
Tc := lct(v, J, box)
Flatten(A) :=
    v ← A[:, 0]
    for L ∈ 1 .. cols(A) - 1
        v ← stack(v, A[:, L])
    v
findThresh(T, Percent) :=
    V ← T[1]
    for L ∈ 2 .. rows(T) - 1
        V ← stack(V, T[L])
    V ← Flatten(V) if cols(V) > 1
    V ← sort(vectorize(|V|))
    V[floor(rows(V)*Percent)]
thresholdbasis := findThresh(Tc, .5)
thresh(x) := |x| > thresholdbasis
basis := best_basis(Tc, thresh)
wc := extract_basis(Tc, basis)
cL5 := Concentration(wc)
i := 0 .. rows(cL5) - 1
thresholdbasis := findThresh(Tc, .9)
thresh(x) := |x| > thresholdbasis
basis := best_basis(Tc, thresh)
wc := extract_basis(Tc, basis)
cL9 := Concentration(wc)
recon_lct := ilct(Compress(wc, CR), J, basis, box)
# Compare the results of the different transforms graphically:
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# The LCT and the DWT give comparable performance, though the DWT is a much faster algorithm than the best basis. Using a higher threshold in the best basis algorithm gives slightly better compression than the lower threshold. The Fourier Transform (FFT) does not compress the signal as well as any of the wavelet techniques.
# There are several .WAV files with the different compression ratios and transform methods bundled with the Wavelets Extension Pack. They can be distinguished by the names ComXXXnn.wav, where XXX is the transform method (FFT, DWT, WPT or LCT as above) and nn is the compression ratio (e.g. 70 = 70%). You can listen to them using Windows multimedia tools.
## Time Frequency Plots of Speech
# Next, construct three different time-frequency plots using the DWT, WPT, and LCT. See timefreq.xmcd for a detailed discussion of time-frequency analysis with wavelets.
# Work with a subsection of the signal so the analysis can be done quickly.
s := 2000
L := 511
y := submatrix(v, s, s + L, 0, 0)
rows(y) = 512
i := 0 .. rows(y) - 1
# Analyze the speech signal with the DWT first:
filter := daublet(4)
J := 4
w := dwt(y, J, filter)
rows(w) = 512
QQ_dwt := tfPlotFromWPT(w, wavebs(J, 1), 1, 1)
# Next, repeat the time-frequency analysis on the speech signal using the WPT.
J = 4
T := wpt(y, J, filter)
basis := best_basis(T, entropy)
Q := pgridplot(basis, J)
# [component: inputs Q]
w := extract_basis(T, basis)
QQ_wpt := tfPlotFromWPT(w, basis, 1, 1)
# Finally, perform time-frequency analysis using the local cosine transform.
T := lct(y, J, box)
# Pick 50% of the coefficients when setting the threshold.
threshold := findThresh(T, .5)
thresh(x) := |x| < threshold
basis := best_basis(T, thresh)
threshold = 0.0743134
w := extract_basis(T, basis)
QQ_lct := tfPlotFromLCT(w, basis, 1, 1)
rows(QQ_lct) = 512
## Time-Frequency Plots Compared
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# [component: inputs QQ_dwt]
DWT
# [component: inputs QQ_wpt]
# WPT
# [component: inputs QQ_lct]
LCT
## Image Compression Using Wavelets
# Now apply wavelet compression to an image. Use wavesort and shrink together to keep only the largest coefficients of the DWT.
L := READBMP("lena.bmp")
# Original Image
# [component: inputs L]
N := rows(L)
N_1 := floor(0.1*N^2)
N_2 := floor(0.01*N^2)
filter := symmlet(12)
J := 4
W_L := dwt(L, J, filter)  # Compute the DWT of the image.
W_s := wavesort(W_L)  # Sort the wavelet coefficients by size.
W'_1 := shrink(W_s, N_1, W_L)  # Set all but the largest 10% of the wavelet coefficients to zero and reconstruct the image.
L_1 := idwt(W'_1, J, filter)
W'_2 := shrink(W_s, N_2, W_L)  # Reconstruct again, using only the largest 1% of the coefficients.
L_2 := idwt(W'_2, J, filter)
# Approximation with 10% of the coefficients
# [component: inputs scale(L_1)]
# The reproduction of the image is excellent with only 10% of the coefficients retained. The fine detail in the hat is preserved, as are edges in the image.
# Approximation with 1% of the coefficients
# [component: inputs scale(L_2)]
# With 1% of the coefficients, the quality of the image is drastically reduced, but the photograph is still recognizable.
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