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## WAVELETS EXTENSION PACK
## Discrete Cosine Transforms
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# The discrete cosine transform (DCT) is an important and widely used analysis tool in signal and image processing. The DCT is particularly valuable for coding and data compression applications, and it forms the core of the JPEG and MPEG algorithms for image compression.
#
# Like the discrete Fourier transform (DFT), the DCT defines an orthogonal transformation which maps a signal from the time domain to the frequency domain. However, the DCT is a real-valued transform, and does not involve complex numbers. The DFT is a complex-valued transform.
#
# This section gives a brief introduction to the discrete cosine transforms. Algorithms for the DCT are discussed in the next section. For a comprehensive discussion of the DCT and applications involving the DCT, refer to the book by K. R. Rao and P. Yip.
## DCT Types
# The Fourier cosine transform (FCT) g(ω) of a signal f(t) is given by:
g(ω) == sqrt(2/π)*integral(f(t)*cos(ω*t), t = 0 .. ∞)
# The discrete cosine transform is a discretized version of this equation. There are four commonly used orthogonal discrete cosine transforms: DCT-I, DCT-II, DCT-III, and DCT-IV.
# For a discrete signal f_1, f_2, ... f_n, the DCT-II is defined by
k == 0, 1 .. n - 1
g[k] == sqrt(2/n)*s[k]*sum(f[i + 1]*cos((2*i + 1)*k*π/(2*n)), i = 0 .. n - 1)
# with the scaling factor s_k = 1/sqrt(2) if k = 0 or n, and 1 otherwise.
# The DCT-IV is defined as
g[k] == sqrt(2/n)*sum(f[i + 1]*cos((2*i + 1)*(2*k + 1)*π/(4*n)), i = 0 .. n - 1)
## Functions for Computing DCTs
# Functions for computing the various DCTs are easily defined. For example, the DCT-II is given by:
dct2(f) :=
    n ← length(f)
    g[0] ← sqrt(1/n)*sum(f[i], i = 0 .. n - 1)
    for k ∈ 1 .. n - 2
        g[k] ← sqrt(2/n)*sum(f[i]*cos((2*i + 1)*k*π/(2*n)), i = 0 .. n - 1)
    g[n - 1] ← sqrt(1/n)*sum(f[i]*cos((2*i + 1)*(n - 1)*π/(2*n)), i = 0 .. n - 1)
    g
# Similarly, the inverse DCT-II is:
idct2(g) :=
    n ← length(g)
    for i ∈ 0 .. n - 1
        f[i] ← sqrt(2/n)*sum(g[k]*if(k == 0, 1/sqrt(2), 1)*cos((2*i + 1)*k*π/(2*n)), k = 0 .. n - 1)
    f
# The DCT-IV is:
dct4(f) :=
    n ← length(f)
    for k ∈ 0 .. n - 1
        g[k] ← sqrt(2/n)*sum(f[i]*cos((2*i + 1)*((2*k + 1)*π)/(4*n)), i = 0 .. n - 1)
    g
## Computing DCTs
# Now look at an example of using these transforms. First, use a single sinusoid for the test signal.
ω := 3
J := 6
N := 2^J
i := 0 .. N - 1
f[i] := cos(2*π*ω*i/N)
g2 := dct2(f)
g4 := dct4(f)
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# Here are the DCT-II and DCT-IV transforms of the signal.
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# Next, look at a constant valued signal.
f[i] := 4.2
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# And the DCT-II and DCT-IV transforms of this signal.
g2 := dct2(f)
g4 := dct4(f)
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# Both cosine transforms show the frequency content of the signals. However, there is substantial leakage away from the frequencies of the signals, which appears as "ringing." This effect is known as the "Gibbs phenomenon." This ringing may be reduced using special tapers on the data. More more information on the Gibbs phenomenon is given in the section on tapers.
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