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## WAVELETS EXTENSION PACK
## Nonparametric Signal Denoising
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## Introduction
# One of the great success stories of wavelets is in the field of nonparametric statistical estimation. The use of wavelets in statistical applications was pioneered by professors David Donoho and Iain Johnstone at Stanford University. Their methodology rests upon the principle of wavelet shrinkage, which refers to removing noise (denoising) by shrinking wavelet coefficients towards zero. This section uses wavelets and wavelet shrinkage for nonparametric regression and smoothing with the waveshrink function. This function is defined in the file wavedef.xmcd so a reference to this file is included below:
# [reference: wavedef.xmcd]
# This section also discusses the principles behind wavelet shrinkage for nonparametric statistical estimation.
# In nonparametric regression programs, you want to estimate an unknown signal f(t) from some noisy data y_i. Suppose your data are given by:
y_i == f_i + e_i
# where f_i is a discrete signal and e_i are independent and identically distributed Gaussian noise with variance σ^2. The usual parametric regression requires that you form a particular model for f_i (for example, f_i are samples of a piecewise polynomial). In nonparametric regression, you make minimal assumptions about the exact nature of f_i.
# Donoho and Johnstone developed an impressive theory and methodology for nonparametric regression and smoothing based on the principle of wavelet shrinkage. Wavelet shrinkage refers to estimates obtained by:
# 1. Applying the discrete wavelet transform.
# 2. Shrinking the wavelet coefficients towards zero.
# 3. Applying the inverse discrete wavelet transform.
# Following Donoho and Johnstone, the wavelet shrinkage methodology is referred to here as WaveShrink.
# The Donoho and Johnstone WaveShrink estimators are implemented by the function waveshrink. This function works by estimating the noise level and "shrinking" smaller wavelet coefficients to zero using a "soft shrinkage" function. Other shrinkage functions and noise estimators can also be used in the WaveShrink methodology. The shrinkage functions are described below.
## Nonparametric Regression and Smoothing Applied to the NMR Signal
# This section demonstrates the denoising of a Nuclear Magnetic Resonance (NMR) signal using the waveshrink function. First, let's take a look at the signal:
# [component: outputs nmr]
i := 0 .. rows(nmr) - 1
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# The NMR signal has several pronounced features, including a large spike about halfway through the series. However, the observed signal is contaminated by background noise. We want to remove the background noise from the NMR signal without blurring or removing features such as the large spike. Applying waveshrink to nmr and plotting the result yields:
nmr' := waveshrink(nmr, daublet(4))
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# You can see that waveshrink does a good job of removing the noise while at the same time preserving the key features.
# The methodology for nonparametric estimation through wavelet shrinkage shows great promise. Many new techniques for wavelet shrinkage are currently being developed. Wavelet shrinkage estimators are being applied to a wide range of problems, such as classification and discriminant analysis, density estimation, and time series prediction.
## Understanding Wavelet Shrinkage
# In order to best use the waveshrink function, you need to understand how and why WaveShrink estimators work. Estimation by WaveShrink rests on three simple principles:
# 1. Signal features can be represented by just a few wavelet coefficients, making wavelets good building blocks.
# 2. Noise affects all wavelet coefficients.
# 3. By shrinking wavelet coefficients towards zero, noise can be removed while preserving features.
# These principles are discussed in the following sections.
## 1. Wavelets are good building blocks
# To illustrate the first principle, use the "bumps" signal, which consists of a series of peaks which decay rapidly towards zero. Create the bumps signal with:
h_bumps := transpose([4, 5, 3, 4, 5, 4.2, 2.1, 4.3, 3.1, 5.1, 4.2])
p_bumps := transpose([.1, .13, .15, .23, .25, .4, .44, .65, .76, .78, .81])
w_bumps := transpose([.005, .005, .006, .01, .01, .03, .01, .01, .005, .008, .005])
bumps(x) := sum(h_bumps[jj]/(1 + |x - p_bumps[jj]|/w_bumps[jj])^4, jj = 0 .. 10)
N := 1024
i := 0 .. N - 1
x[i] := .001*i
y[i] := bumps(x[i])
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# Next, compute the DWT of the bumps signal:
J := MaxDWTLevel(y)
filter := coiflet(6)
w_bumps := dwt(y, J, filter)
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# Most of the wavelet coefficients are nearly zero. Even though the bumps signal has 1024 samples, you can represent it with just a fraction of the wavelet coefficients. To see this, compute the concentration of the wavelet coefficients:
C_bumps := Concentration(w_bumps)
i2 := 0 .. 100
Th := .9
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# This plot shows that 90% of the energy is in the top 45 out of 1024 coefficients. In fact, the largest 100 coefficients contain 99% of the signal energy.
## 2. Noise affects all wavelets coefficients
# Now generate a noisy signal following the signal-plus-noise model y_i == f_i + e_i:
SNR := 4
ε := rnorm(N, 0, 1)*sqrt(var(y)/SNR)
yn := y + ε
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# Next, compute the DWT of the noisy signal:
w_nbumps := dwt(yn, J, filter)
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# In contrast to the DWT of the pure bumps signal, the wavelet coefficients of the noisy bumps are all very noisy, illustrating the second principle. To understand why the second principle holds, decompose the wavelet transform:
w_n == W*yn  # of the noisy signal as follows:
w_n == W*f + W*ε
# Since W is an orthonormal transform, W*ε is independent noise with a normal distribution and variance σ^2. Hence, every discrete wavelet coefficient w_i contributes noise of variance σ^2.
## 3. Denoising by wavelet shrinkage
# The heuristic for the WaveShrink procedure follows from the first two principles: by shrinking wavelet coefficients towards zero, you can eliminate noise while recovering the main features of the underlying signal or image.
# Define a shrinking function δ(x,c) which shrinks the signal x if its magnitude is less than c. Many such shrinkage functions are possible. Two simple ones are:
δ_hard(x, c) := if(|x| < c, 0, x)
sign(x) := x/|x|
δ_soft(x, c) := if(|x| < c, 0, sign(x)*(|x| - c))
# The hard shrinkage function is so named because there is a discontinuity in the shrinkage function; values x above the threshold c are untouched. In contrast, the soft shrinkage function is continuous since it shrinks values above the threshold c. The motivation for soft shrinkage comes from the principle that the noise affects all wavelet coefficients. Also, the continuity of the soft shrinkage function makes it preferable for statistical reasons. waveshrink uses soft shrinkage by default.
# The shrinkage functions are plotted below.
x := -1, -.99 .. 1
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# Now apply waveshrink to the noisy bumps signal:
yn_soft := waveshrink(yn, filter)
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# Most of the noise has been removed from the signal while preserving the details.
# Now rewrite waveshrink using a hard shrinkage function:
hard_shrink(v, c) :=
    for k ∈ 0 .. last(v)
        v[k] ← δ_hard(v[k], c)
    v
waveshrink_hard(y, filter) :=
    J ← MaxDWTLevel(y)
    w ← dwt(y, J, filter)
    λ ← 2*log(length(y))
    σ ← median(vectorize(|w - median(w)|))
    c ← λ*σ
    Jmax ← if(J > 8, J - 4, J)
    for js ∈ 1 .. Jmax
        d[js] ← get_detail(w, js)
        d[js] ← hard_shrink(d[js], c)
        w ← put_detail(w, js, d[js])
    y_r ← idwt(w, J, filter)
    y_r
# Now apply this new waveshrink function to the noisy bumps signal and compare the original signal, the noisy signal, and the denoised signal:
ynh := waveshrink_hard(yn, filter)
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# The denoised signal is very similar to the clean signal. The main difference is that the coefficients smaller than the noise level have been shrunk to zero.
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