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## WAVELETS EXTENSION PACK
## 1D Discrete Wavelet Transforms
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# dwt(a,n,f,[o,[i]]) | idwt(a,n,f,[o,[i]]) | MaxDWTLevel(a)
# dwti(a,n,f) | idwti(a,n,f) | MaxDWTSLevel(a)
# dwts(a,n,f) | idwts(a,n,f)
# These functions compute the forward and inverse discrete wavelet transforms. The differences between the various functions are the boundary conditions used. These differences are described later in this section. The discrete wavelet transform is also called the fast wavelet transform. MaxDWTLevel and MaxDWTSLevel are functions defined in this worksheet and the file wavedef.xmcd. They return, respectively, the largest valid level of the discrete wavelet transform (DWT) and discrete wavelet transform with symmetric boundary conditions (DWTS) for the vector a. The arguments to these functions are:
# •  a, a vector of data to be transformed.
# •  n, the number of levels in the wavelet transform.
# •  f, the family to which the wavelet belongs.
# •  o, (optional), an integer for an orthonormal family, or a
# 1x2 matrix of integers for a biorthogonal family, giving the
# offset(s) corresponding to the family f. If not specified, o
# is the default offset for the family f.
# •  i, (optional), zero or one for an orthonormal family, or
# a 1x2 matrix whose elements are zero or one for a
# biorthogonal family, specifying negation of the default
# high pass filter coefficients for the family f. Zero specifies
# no negation; one specifies negation. If not specified, i
# represents no negation.
# Each of the DWT functions returns a vector containing the transform of the input vector. MaxDWTLevel and MaxDWTSLevel return integers.
# Note: When a is a matrix, the 2D versions of these functions are used.
## The Discrete Wavelet Transform
# dwt(a,n,f,[o,[i]])
# This function computes the n-level discrete wavelet transform of the vector a using the wavelet filter f. For periodic boundary conditions, rows(a)/2^n must be an integer. Below is a simple example using dwt.
i := 0 .. 383
v[i] := rnd(1)  # Create a vector of random data.
w := dwt(v, 4, daublet(8))  # Take the discrete wavelet transform using the built-in wavelet function daublet.
# Since there is a restriction on the values allowed for the level argument, Mathcad generates an error message when you use a level value that is too large.
w := dwt(v, 7, daublet(8))
# This is an allowable level since rows(v)/2^7 = 3 is an integer.
w := dwt(v, 9, daublet(8))  # error: invalid level
# This is not an allowable level since rows(v)/2^9 = 0.75is not an integer.
# Notice that the restrictions on the level argument in the periodic wavelet transform mean that it cannot be used directly on odd length data.
i := 0 .. 12
q[i] := rnd(1)
r := dwt(q, 1, daublet(8))  # error: invalid level  # An odd length random vector cannot be used with the periodic boundary conditions.
## The Pyramid Algorithm for Computing the DWT
# The DWT is mathematically equivalent to multiplication by an orthogonal matrix w = W f. To compute the DWT, you don't actually perform the matrix multiplication. Instead, you use a fast "pyramid" algorithm, computing the DWT with complexity Order(n) (abbreviated O(n)), which is even faster than the fast Fourier transform (FFT)!
# The DWT pyramid algorithm is represented in the following figure. The basic components in each stage of the pyramid are two analysis filters, a low pass filter L and a high pass filter H, and a decimation-by-two operation. The decimation operation, represented by a downward pointing arrow with the number 2, consists of deleting every other value of the filter outputs.
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# The input S_0 = (S_(0,1), S_(0,2), ... S_(0,N)) to the pyramid algorithm consists of the values of the discrete signal: s[0, i] == f[i], where N is the number of discrete values. The output of the algorithm is the set of DWT detail coefficients d_j = (d_(j,1), d_(j,2), ... d_(j,nj)) where nj == n/2^jat levels j = 1, 2, ... J, which correspond to scales 2, 4, 8, ...2^J , along with the DWT smooth coefficients. Since the low pass and high pass filters L and H have a fixed number of coefficients (typically quite short), the algorithm has a complexity of O(n).
## The Inverse Discrete Wavelet Transform
# idwt(a,n,f,[o,[i]])
# idwt computes the n-level inverse wavelet transform of the vector a using the wavelet filter f. As with dwt, rows(a) must be divisible by 2^n. The level n must be the same as the level of the dwt which computed the transform. idwt can be used to recover the original vector from the dwt.
w := dwt(v, 4, daublet(8))
# Using the vector v defined above
# take the DWT of v.
# Take the inverse transform using the same number of levels and the same wavelet.
x := idwt(w, 4, daublet(8))
# Verify that the reconstructed vector is the same as the original up to roundoff error.
max(vectorize(|v - x|)) = 4.39515e-11
# Notice that, theoretically, the wavelet transform guarantees perfect reconstruction. In reality, however, there are small errors due to the finite precision of computer arithmetic.
## The Pyramid Algorithm and the IDWT
# The inverse discrete wavelet transform (IDWT) algorithm, represented in the figure below, inverts the DWT pyramid algorithm in a straightforward manner. The basic components in each stage of the reconstruction are the synthesis low and high pass filters L* and H* and an up-sample-by-two operation. The up-sample operation, indicated by an upward pointing arrow and the number 2, consists of inserting zeros between every other value of the filter inputs. The reconstruction algorithm also has complexity of O(n).
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## Maximum Wavelet Transform Level
# MaxDWTLevel(a)
# This function returns the largest valid level of the DWT for the vector a. This function is defined in the file wavedef.xmcd and below for convenience.
MaxDWTLevel(A) :=
    lev ← 0
    r ← rows(A)
    c ← cols(A)
    while (r/2^lev == floor(r/2^lev + 0.5))*((c ≠ 1)*(c/2^lev == floor(c/2^lev + 0.5)) + (c == 1))
        lev ← lev + 1
    lev ← lev - 1
i := 0 .. 383
v[i] := rnd(1)  # Create a vector of random data.
J := MaxDWTLevel(v)  # Compute the maximum valid DWT level for v.
J = 7
## Symmetric Boundary Conditions
# dwts(a,n,f) | idwts(a,n,f)
# These functions compute the forward and inverse wavelet transforms with symmetric boundary conditions. These boundary conditions have the benefit that they do not have parity restrictions on the data a. However, the symmetric wavelet transform requires the use of a wavelet that is itself symmetric. This restricts the choice of wavelets that you can use with the functions dwts/idwts to the biorthogonal spline wavelets Bspline(m,n), the Battle-Lemarie wavelets bl(n), and the Haar wavelet daublet(2).
#
# Although the parity restrictions of the periodic boundary conditions are lifted with symmetric boundary conditions there are still conditions on the level argument. It is required that length(a) > 2^n. The maximum level can easily be found using the following function:
MaxDWTSLevel(x) := (cols(x) == 1)*floor(log(rows(x))/log(2)) + (cols(x) > 1)*min([floor(log(rows(x))/log(2)); floor(log(cols(x))/log(2))])
# You can now directly take a wavelet transform of odd length data:
i := 0 .. 12
q[i] := rnd(1)  # An odd length random vector can be used with the symmetric boundary conditions.
r := dwts(q, 2, Bspline(3, 3))
x := idwts(r, 2, Bspline(3, 3))  # The symmetric wavelet transform also gives theoretically perfect reconstruction.
max(vectorize(|x - q|)) = 4.44089e-16
# When you use a level argument in functions dwts/idwts that does not follow the restrictions mentioned earlier, Mathcad issues an error message:
r := dwts(q, MaxDWTSLevel(q), Bspline(3, 3))  # This level is valid,
r := dwts(q, MaxDWTSLevel(q) + 1, Bspline(3, 3))  # error: invalid level  # but this level is not.
## Interval Wavelet Transforms
# dwti(a,n,f) | idwti(a,n,f)
# These functions implement the wavelet transforms using wavelets on an interval following the construction given in Cohen, Daubechies, and Vial in "Wavelets on the Interval and Fast Wavelet Transforms." Instead of using an extension of the data to implement a boundary condition, this technique uses special wavelets that live at the edges of the data to avoid spilling out over those edges. Such special wavelets have only been implemented for the wavelets symmlet(4) through symmlet(16) and daublet(4) through daublet(6). Thus, you are restricted to using these wavelets with the interval wavelet transform.
#
# The use of interval wavelets places certain restrictions on the length of the data. For 1D data, length(a)/2^n must be an integer and
# length(a)/2^n> m, where the symmlet(m) or daublet(m) wavelet is being used in the analysis.
i := 0 .. 383
v[i] := rnd(1)  # Create a random vector.
w := dwti(v, 4, symmlet(12))  # Take the interval wavelet transform using the built-in wavelet symmlet.
x := idwti(w, 4, symmlet(12))  # Take the inverse interval transform using the same number of levels and the same wavelet.
max(vectorize(|v - x|)) = 4.9318e-10  # Verify that the reconstructed vector is the same as the original up to round off error.
# Notice that, theoretically, the wavelet transform guarantees perfect reconstruction. In reality, however, there are small errors due to the finite precision of computer arithmetic.
# You can also see the effect of the additional restriction on the level argument in the interval wavelet transform
w := dwti(v, 6, symmlet(12))  # error: invalid level
# This is an NOT an allowable level since although
rows(v)/2^6 = 6
# is an integer,
rows(v)/2^6 < 12
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