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## WAVELETS EXTENSION PACK
## 2D Discrete Wavelet Transforms
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# dwt(a,n,f,[o,[i]]) | idwt(a,n,f,[o,[i]]) | MaxDWTLevel(a)
# dwti(a,n,f) | idwti(a,n,f)
# dwts(a,n,f) | idwts(a,n,f)
# Two-dimensional (2D) wavelet transforms are computed with the same functions used to compute one-dimensional (1D) wavelet transforms.  MaxDWTLevel is a function defined in this file and wavedef.xmcd only. It is not available in the Wavelets Extension Pack DLL. MaxDWTLevel returns the largest valid level of the discrete wavelet transform (DWT) for the matrix a. The arguments to these functions are:
# •  a, a matrix of data to be transformed.
# •  n, the number of levels in the wavelet transform.
# •  f, the family to which the wavelet belongs.
# •  o, (optional), an integer for an orthonormal family, or a
# 1x2 matrix of integers for a biorthogonal family, giving the
# offset(s) corresponding to the family f. If not specified, o
# is the default offset for the family f.
# •  i, (optional), zero or one for an orthonormal family, or
# a 1x2 matrix whose elements are zero or one for a
# biorthogonal family, specifying negation of the default
# high pass filter coefficients for the family f. Zero specifies
# no negation; one specifies negation. If not specified, i
# represents no negation.
# Each of the dwt functions return a matrix containing the transform of the input matrix.
# MaxDWTLevel returns an integer.
## 2D Wavelet Transform
# dwt(a,n,f,[o,[i]])
Vbox(nrow) :=
    for i ∈ 0 .. nrow - 1
        for j ∈ 0 .. nrow - 1
            box[i, j] ← 255
    lb ← nrow/8
    for i ∈ lb .. lb*7
        for j ∈ lb .. lb*3
            box[i, j] ← 0
        box[i, lb*7] ← 0
        for j ∈ lb .. lb*2
            box[j, i] ← 0
        box[i, lb*3] ← 0
        box[i, lb*4] ← 0
        box[i, lb*5] ← 0
        box[i, lb*6] ← 0
        box[i, i] ← 0
        box[i, i + lb - 1] ← 127
        box[i, 7*lb - i] ← 127
    box
# This function computes the n-level discrete wavelet transform of the matrix a using the wavelet filter f. Note that rows(a)/2^n and cols(a)/2^n must be integers.
# The example below shows the transform of the Vbox function (defined to the right) computed using the Daubechies 4 ("d4") wavelet.
N := 128
vbox := Vbox(N)
# [component: inputs vbox]
# Plot the vbox test image using
# the picture operator. (Choose Picture from the Insert menu.)
wave := daublet(4)
J := 3
w := dwt(vbox, J, wave)
scale(M) :=
    myMax ← max(M)
    myMin ← min(M)
    vectorize((M - myMin)/(myMax - myMin)*255)
# [component: inputs 255 - scale(w)]
# Plot the 2D DWT of the vbox image.
# A coarse scale reproduction of the original image appears in the upper left corner. This region contains the smooth scale coefficients. In the Fingerprint Identification discussion, this property is used to rapidly decimate an image. The level 1 horizontal components of the image are in the lower left corner. Vbox does not have a lot of horizontal edges, so this region does not reveal very much content. The level 1 vertical components of the image are in the upper right corner. vbox is rich with vertical components. The level 1 diagonal components of the image appear in the lower right corner of the DWT.
## The 2D Inverse Discrete Wavelet Transform
# idwt(a,n,f,[o,[i]])
# This function computes the n-level inverse wavelet transform of the matrix a using the wavelet filter f. Again, rows(a)/2^n and cols(a)/2^n must be integers. The level n must be the same as the level of the dwt which first computed the transform. idwt can be used to recover the original image from the dwt.
vbox_r := idwt(w, J, wave)  # Reconstruct the original image.
# [component: inputs vbox_r]
# Plot the reconstructed image.
RMS(M) := sqrt(sum(sum(M[i, j]^2, j = 0 .. cols(M) - 1), i = 0 .. rows(M) - 1))/(rows(M)*cols(M))
RMS(vbox - vbox_r) = 1.4639e-15  # Compute the reconstruction error.
## Maximum Wavelet Transform Level
## MaxDWTLevel(a)
# This function returns the largest valid level of the DWT for the matrix a. This function is defined in the file wavedef.xmcd and below for convenience.
MaxDWTLevel(A) :=
    lev ← 0
    r ← rows(A)
    c ← cols(A)
    while (r/2^lev == floor(r/2^lev + 0.5))*((c ≠ 1)*(c/2^lev == floor(c/2^lev + 0.5)) + (c == 1))
        lev ← lev + 1
    lev ← lev - 1
J := MaxDWTLevel(vbox)  # Compute the maximum DWT level for the vbox image.
J = 7
# Since the vbox image is 128 x128, the largest valid DWT is log_2(128) = 7.
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