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## WAVELETS EXTENSION PACK
## Function Evaluation on Bases
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# evalbs(w, b, f) | applybs(w, b, f)
# These functions apply a given scalar- or array-valued function individually to the subbands of a wavelet packet basis. The arguments to these functions are:
# •  w, the wavelet packet coefficients to which to apply the function.
# •  b, the basis describing the subbands to which to apply the function.
# •  f, the scalar- or array-valued function of an array argument to apply to the subbands.
## evalbs(w, b, f)
# This function applies the scalar- or array-valued function f to each subband of wavelet packet coefficients in w as described by the wavelet packet basis b. The returned value is a matrix whose rows describe the subband to which the function f was applied followed by the value of the function on that subband:
N := 128
i := 0 .. N - 1
v[i] := i  # Create a simple vector,
b := wavebs(5, 1)
b = [5, 0; 5, 1; 4, 1; 3, 1; 2, 1; 1, 1]  # then create the wavelet basis with 5 levels.
f(v) := v[0]  # The function returns the first element of a vector.
# The first two elements of each row give the level and index of a subband, and the last element gives the value of the function on that subband. In this case, this value is the index of the first element of the subband.
evalbs(v, b, f) = [5, 0, 0; 5, 1, 4; 4, 1, 8; 3, 1, 16; 2, 1, 32; 1, 1, 64]
# evalbs allows you to take statistics of the subbands of a 2D transform:
M := READBMP("lena")
N := dwt(M, 2, daublet(12))
vmean(v) := mean(v)
evalbs(N, wavebs(2, 2), vmean) = [
    2, 0, 0, 394.717;
    2, 0, 1, -1.00732;
    2, 1, 0, 0.376612;
    2, 1, 1, 0.305225;
    1, 0, 1, -0.191315;
    1, 1, 0, 0.0587463;
    1, 1, 1, 0.0364075
]
## applybs(w,b,f)
# This function applies the array-valued function f to each subband of the wavelet packet coefficients in w as described by the wavelet packet basis b. The value returned is an array of the same size as w whose subbands have been replaced by the value of f on the original subbands:
v := 0
N := 32
i := 0 .. N - 1
v[i] := 1  # Create a simple vector,
b := wavebs(3, 1)
b = [3, 0; 3, 1; 2, 1; 1, 1]  # then create the wavelet basis with 3 levels.
f(v) := length(v)*v  # The function multiplies a subband by its length.
applybs(v, b, f) = [
    4; 4; 4; 4; 4; 4; 4; 4; 8; 8
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]
# applybs allows you to take statistics of the subbands of a 2D transform:
N := dwt(M, 2, daublet(12))
demean(v) := v - mean(v)
M := applybs(N, wavebs(2, 2), demean)
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