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## WAVELETS EXTENSION PACK
## Function Evaluation on Tables
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# evaltbl(T, f) | applytbl(T, f)
# These functions evaluate a scalar- or array-valued function f on each subband in the wavelet packet table T. The arguments to these functions are:
# •  T, a wavelet packet table to which to apply the function.
# •  f, the scalar- or array-valued function of an array argument to apply to each subband.
## evaltbl(T,f)
# This function applies the scalar- or array-valued function f to each subband of a wavelet packet table T. The returned value is a matrix whose rows describe the subband to which the function f was applied followed by the value of the function on that subband:
i := 0 .. 127
v[i] := rnd(1)  # Create random data.
T := wpt(v, 2, daublet(14))  # Compute a wavelet packet table.
stv(v) := stdev(v)
# The first two elements of each row give the level and index of a subband and the last element gives the value of the function (here, the standard deviation) on that subband.
evaltbl(T, stv) = [
    0, 0, 0.28889;
    1, 0, 0.320916;
    1, 1, 0.243537;
    2, 0, 0.343446;
    2, 1, 0.281493;
    2, 2, 0.273385;
    2, 3, 0.205443
]
# The function evaltbl(T, f) also applies the scalar- or array-valued function f to each subband of a two-dimensional (2D) wavelet packet table T. The returned value is a matrix whose rows describe the subband to which the f was applied followed by the value of the function on that subband.
M := READBMP("clown")  # Read in some data.
T := wpt(M, 2, daublet(14))  # Compute a wavelet packet table.
vmean(v) := mean(v)
evaltbl(T, vmean) = [
    0, 0, 0, 120.342;
    1, 0, 0, 240.684;
    1, 0, 1, -0.073822;
    1, 1, 0, -0.082428;
    1, 1, 1, -0.00296021;
    2, 0, 0, 481.368;
    2, 0, 1, -0.525262;
    2, 0, 2, 0.0530836;
    2, 0, 3, -0.147644;
    2, 1, 0, 0.175116;
    2, 1, 1, -0.0302028;
    2, 1, 2, 0.232709;
    2, 1, 3, 0.0310035;
    2, 2, 0, 0.107599;
    2, 2, 1, 0.343183;
    2, 2, 2, -0.0591526;
    2, 2, 3, 0.0258057;
    2, 3, 0, -0.164856;
    2, 3, 1, 0.0945019;
    2, 3, 2, -0.0159735;
    2, 3, 3, -0.00592041
]
# The first three elements of each row give the level, row index, and column index of a subband. The last element gives the value of the function (here, the mean) on that subband.
## applytbl(T,f)
# This function applies the array-valued function f to each subband of a wavelet packet table T. The value returned is a new wavelet packet table of the same size as T whose subbands are the result of applying f to the subbands of T:
i := 0 .. 11  # Create some sample data.
z[i] := rnd(1)
T := wpt(z, 2, daublet(14))  # Compute a wavelet packet table.
f(x) := x - mean(x)
applytbl(T, f) = [
    [-0.117892; -0.195512; 0.341185; -0.31463; -0.0432237; -0.0790705; -0.0935353; 0.0681313; -0.174895; 0.438726; -0.0937116; 0.264427]; [0.0202516; 0.278264; -0.0676294; 0.0354729; -0.14888; -0.11748; -0.0732921; -0.114079; -0.398743; -0.134109; 0.308206; 0.412017]; [0.15102; -0.214043; 0.0630229; 0.094681; -0.110276; 0.015595; -0.0144755; -0.0625828; 0.0770583; -0.534239; 0.312071; 0.222168]
]
# The function applytbl(T, f) also applies the array-valued function f to each subband of a 2D wavelet packet table T. The value returned is a new wavelet packet table of the same size as T whose subbands are the result of applying f to the subbands of T.
i := 0 .. 7
j := 0 .. 7
# Create some sample data.
N[i, j] := rnd(1)
T := wpt(N, 2, daublet(14))  # Compute a wavelet packet table.
applytbl(T, f) = [
    [
        -0.316706, -0.380545, 0.0039245, -0.13513, 0.14661, -0.187171, -0.0288097, -0.246946;
        0.0510935, -0.460524, 0.302645, 0.501292, 0.436081, -0.245231, 0.0105676, -0.0534749;
        0.373699, -0.0404146, 0.267, -0.386147, 0.379077, -0.108263, -0.373493, -0.279531;
        0.445471, -0.157589, -0.126369, -0.195612, -0.295431, -0.402451, 0.495782, -0.0214269;
        -0.288621, 0.0042013, -0.219272, -0.190452, 0.354547, 0.162011, -0.460686, -0.178347;
        0.391555, 0.2396, 0.453139, -0.374335, -0.391197, -0.0840267, 0.0471924, -0.32715;
        -0.393281, 0.446881, 0.287419, -0.366168, 0.210037, 0.356317, -0.196397, 0.40253;
        0.502884, -0.247222, -0.26327, -0.274989, 0.488878, 0.270882, 0.211937, 0.453427
    ];
    [
        -0.147684, -0.465657, -0.116813, -0.0716206, -0.130794, 0.174034, -0.0999814, 0.0295261;
        0.00184658, 0.160321, 0.665449, -0.0819522, -0.584577, -0.328953, -0.256642, 0.47249;
        0.35107, 0.133981, -0.372112, -0.190631, 0.111311, -0.325967, 0.211045, -0.0196633;
        0.125012, -0.122924, 0.157139, -0.0254247, 0.287885, -0.0119191, 0.424031, 0.0481735;
        0.384489, 0.283776, -0.183597, -0.310884, 0.0749315, -0.565514, -0.253458, 0.0878767;
        -0.132815, -0.21897, -0.378583, 0.530251, -0.20526, 0.0673746, -0.217857, 0.430955;
        -0.0441164, -0.167395, 0.199558, -0.390288, -0.00233962, 0.222622, 0.0422099, 0.345035;
        0.793758, -0.358084, -0.0765767, 0.0694761, -0.233889, -0.326224, 0.103, 0.430537
    ];
    [
        -0.338555, 0.188671, 0.0650803, 0.03407, -0.199296, -0.390433, -0.26027, 0.0573055;
        0.347956, -0.198071, -0.0900363, -0.00911394, 0.448802, 0.140927, -0.0756543, 0.278619;
        0.0668281, -0.366609, 0.287154, -0.305539, -0.0748523, 0.460512, 0.469031, 0.000136254;
        0.354229, -0.0544481, -0.023947, 0.042332, -0.105949, -0.279711, -0.263067, -0.2061;
        0.401825, -0.11723, -0.12939, 0.655738, 0.26955, 0.0687379, -0.0781274, -0.131215;
        -0.38083, 0.0962354, -0.628948, 0.1026, -0.296651, -0.0416364, 0.323753, -0.11441;
        0.394576, -0.295138, -0.0475615, -0.365098, 0.515483, -0.342573, -0.259416, -0.136924;
        0.0232986, -0.122736, 0.365204, 0.0474549, 0.0948796, -0.26779, -0.0182227, 0.414562
    ]
]
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