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## WAVELETS EXTENSION PACK
## Creating 1D Wavelets
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# wavelet(x,j,k,n,f,[o,[i]]) | dlwavelet(x,j,k,n,f,[o,[i]])
# father(x,[j,k],s) | dlfather(x,[j,k],s)
# mother(x,[j,k],s) | dlmother(x,[j,k],s)
# These functions compute the value of one-dimensional (1D) wavelets at any scale and position. The arguments to these functions are:
# •  x, a real scalar denoting the position at which to evaluate the wavelet.
# •  j, a non-negative integer giving the scale of the wavelet.
# •  k, an integer giving the position of the wavelet.
# •  n, an integer giving the gender of the wavelet.
# •  f, the family to which the wavelet belongs.
# •  s, a string argument designating the filter on which the wavelet is based.
# •  o, (optional), an integer for an orthonormal family, or a
# 1x2 matrix of integers for a biorthogonal family, giving the
# offset(s) corresponding to the family f. If not specified, o
# is the default offset for the family f.
# •  i, (optional), zero or one for an orthonormal family, or
# a 1x2 matrix whose elements are zero or one for a
# biorthogonal family, specifying negation of the default
# high pass filter coefficients for the family f. Zero specifies
# no negation; one specifies negation. If not specified, i
# represents no negation.
# Wavelets are understood by some to have gender. Each wavelet is either a father wavelet or a mother wavelet. The father wavelet is also known as the scaling function, and the mother wavelet, as defined here, is the wavelet.
# There are numerous wavelet function families. Each wavelet family is headed by a mother wavelet and a father wavelet with an arbitrarily large number of children wavelets. You can generate a wavelet using the wavelet and dlwavelet functions. You can also generate the parent wavelets using the functions father, dlfather, mother, and dlmother.
## Creating Wavelets
# wavelet(x,j,k,n,f,[o,[i]]) | dlwavelet(x,j,k,n,f,[o,[i]])
# The function wavelet(x,j,k,n,f,[o,[i]]) computes the value at x of the nth wavelet packet at position k and scale j corresponding to the filter f. The argument f is usually one of the built-in wavelets functions provided with the Wavelets Extension Pack.
#
# The function dlwavelet(x,j,k,n,f,[o,[i]]) computes the value at x of the nth dual wavelet packet at position k and scale j corresponding to the filter f. For orthogonal wavelet families, wavelet and dlwavelet
# produce identical results. For biorthogonal wavelet families, wavelet
# and dlwavelet produce different results.
# The argument n is the wavelet gender: n=0 for a father wavelet and n=1 for a mother wavelet. x indicates the position at which to evaluate the wavelet. j is the scaling parameter, and k is the translation parameter. n more generally defines a wavelet packet.
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# Wavelet Packets
# The arguments o and i allow maximal flexibility with user-defined wavelet filters. The argument o affects the placement of the father wavelet along the
# x-axis, and the argument i affects high pass filter coefficients and therefore
# the reflection of the mother wavelet in the x-axis.
# For example, you can create the father and mother Daubechies 4 wavelets:
lo := -1.5
hi := 2
N := 1000
Δ := (hi - lo)/N
i := 0 .. N - 1
x[i] := (lo + Δ*i)
filter := daublet(4)
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# The dual father and mother for the biorthogonal wavelet Bspline(3,7) can be generated using dlwavelet:
filter := Bspline(3, 7)
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# The effect of the optional arguments for offset and high pass filter coefficients
# can be seen with the orthogonal wavelet coiflet(6) using wavelet:
filter := coiflet(6)
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## Father and Mother Wavelets
# To simplify the process of creating the 1D parent wavelets, use the following functions:
# father(x,[j,k],s) | mother(x,[j,k],s)
# dlfather(x,[j,k],s) | dlmother(x,[j,k],s)
# The functions father and mother create father and mother wavelets. dlfather and dlmother create father and mother dual wavelets. These
# wavelets and dual wavelets differ for biorthogonal wavelet families.
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# Parent Wavelets
# Here are the father and mother Daubechies 4 wavelets created using these functions:
lo := -1.5
hi := 2
N := 1000
Δ := (hi - lo)/N
i := 0 .. N - 1
x[i] := (lo + Δ*i)
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# The string argument s is the wavelet family consisting of a wavelet abbreviation and numbers. The following are valid abbreviations for wavelets: d, daub, daublet, s, symm, symmlet, c, coif, coiflet, bl, bs, Bspline, haar. The numbers which follow must be valid for the wavelet filter specified. For example, some wavelet values for s are "d4" for daublet(4), "symm12" for symmlet(12), "bs33" for Bspline(3,3),
# and "haar" for daublet(2).
#
# Note: Wavelets with large numbers such as 20 or 30 are relatively wide and smooth. Wavelets with small numbers such as 4 or 6 are narrower and less smooth.
# The following example shows Bspline wavelets:
lo := -4
hi := 5
Δ := (hi - lo)/N
x[i] := (lo + Δ*i)
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# The arguments j and k in the argument list are optional. j is the scaling parameter, and k is the translation parameter. If they are omitted, they are assumed to be zero. Including j and k yields scaled and translated versions of father(x,0,0,s) and mother(x,0,0,s) with scale factor 2^j (also called the dilation factor) and translation parameter 2^jk (also called the location), respectively. Larger values of j make the wavelet more spread out. Changing k changes the position of the wavelet.
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# Scale and Location Families
lo := -2
hi := 5.5
N := 1000
Δ := (hi - lo)/N
i := 0 .. N - 1
x[i] := (lo + Δ*i)
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lo := -9.9
hi := 15
N := 1000
Δ := (hi - lo)/N
i := 0 .. N - 1
x[i] := (lo + Δ*i)
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# Shown below are examples of the various wavelet families. More examples are located in Appendix B.
N := 1024
lo := -2
hi := 4
Δ := (hi - lo)/N
i := 0 .. N - 1
x[i] := (lo + Δ*i)
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lo := -5
hi := 4
Δ := (hi - lo)/N
x[i] := (lo + Δ*i)
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lo := -3
hi := 5
Δ := (hi - lo)/N
x[i] := (lo + Δ*i)
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# The Bspline wavelets are a type of biorthogonal wavelet. The wavelets father and mother can have degree 0 (the Haar father wavelet), degree 1 (a triangle function), or degree 2 (a quadratic bump function). Several pairs of dual wavelets are available for each pair of father and mother wavelets. The dual wavelets have different support lengths.
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# Biorthogonal Wavelets
lo := -4
hi := 5
Δ := (hi - lo)/N
x[i] := (lo + Δ*i)
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# Note: The father and mother wavelets and their duals may be reversed. You may use father and mother in the wavelet approximation and the dual wavelets dlfather and dlmother to compute the wavelet coefficients. In other words, use the original wavelet approximation but compute the wavelet coefficients with father and mother replaced by dlfather and dlmother.
# 1D wavelet packets are a generalization of 1D wavelets. The functions wavelet, dlwavelet, and the functions for father and mother wavelets may also be used to generate wavelet packets. We explore this topic in the section Wavelet Packet Transforms.
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