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## WAVELETS EXTENSION PACK
## Creating 2D Wavelets
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# wavelet2d(x,y,j,kx,ky,m,n,f,[o,[i]]) | dlwavelet2d(x,y,j,kx,ky,m,n,f,[o,[i]])
# father2d(x,y,[j,kx,ky],s) | dlfather2d(x,y,[j,kx,ky],s)
# mother2d(x,y,[j,kx,ky],s,ds) | dlmother2d(x,y,[j,kx,ky],s,ds)
# These functions compute the value of two-dimensional (2D) wavelets at any scale and position. The arguments to these functions are:
# • x, a real scalar denoting the position along the horizontal axis at which to evaluate the wavelet.
# • y, a real scalar denoting the position along the vertical axis at which to evaluate the wavelet.
# • j, an non-negative integer giving the scale of the wavelet.
# • kx, an integer giving the horizontal position of the wavelet.
# • ky, an integer giving the vertical position of the wavelet.
# • m, an integer giving the gender of the wavelet along the horizontal axis.
# • n, an integer giving the gender of the wavelet along the vertical axis.
# • f, the family to which the wavelet belongs.
# • s, a string argument designating the filter on which the wavelet is based.
# • ds, a string denoting either the horizontal, vertical, or diagonal 2D mother wavelet.
# • o, (optional), an integer for an orthonormal family, or a 1x2 matrix of integers for a biorthogonal family, giving the offset(s) corresponding to the family f. If not specified, o is the default offset for the family f.
# • i, (optional), zero or one for an orthonormal family, or a 1x2 matrix whose elements are zero or one for a biorthogonal family, specifying negation of the default high pass filter coefficients for the family f. Zero specifies no negation; one specifies negation. If not specified, i
# represents no negation.
# 2D wavelets are constructed by taking the tensor product of a horizontal and a vertical 1D wavelet.
## Creating Wavelets
# wavelet2d(x,y,j,kx,ky,m,n,f,[o,[i]])
# This function creates a rescaled and translated 2D wavelet or wavelet packet.
wavelet2d(x, y, j, kx, ky, m, n, f) == 2^(-j)*W_m(2^(-j)*x - kx)*W_n(2^(-j)*y - ky)
# where W_n(x) is the n^th one-dimensional (1D) wavelet or wavelet packet of the wavelet family described by the filter f. The argument f is usually one of the built-in wavelets functions provided with the Wavelets Extension Pack.
# When the arguments m and n equal zero, this function produces father wavelets. When either m or n equal one, this function produces mother wavelets. The four possible combinations of m and n lead to four different types of 2D wavelets: a father wavelet and three mother wavelets. n and m more generally define a wavelet packet.
# You can use the wavelet2d function to create a graph of a particular wavelet. For example:
filt := daublet(12)  # Wavelet family
j := 0  # Level parameter
kx := 0
ky := 0  # Translation parameter
m := 0
n := 0  # Wavelet subband
# Graph the wavelet:
p := 0 .. 39
q := 0 .. 39
x[p] := -6 + p/5
y[q] := -6 + q/5
M[p, q] := wavelet2d(x[p], y[q], j, kx, ky, m, n, filt)
# [component: inputs M]
# This wavelet is a 2D father wavelet since both m and n are zero. Setting only m = 1 gives a "horizontal mother wavelet," where the x-axis wavelet is a mother wavelet and the y-axis wavelet is a father wavelet. Likewise, n = 1 and m = 0 gives a "vertical mother wavelet." n = m = 1 gives a "diagonal mother wavelet."
# The father wavelet is given by the product of two 1D father wavelets, and thus is smooth in both the x and y directions. The horizontal mother wavelet is the product of a 1D horizontal mother and vertical father, so it oscillates in the x-direction and is smooth in the y-direction. This property lets it represent detailed information in only the x-direction.
#
# Likewise, the vertical mother wavelet represents detail only in the y-direction. The diagonal mother is the product of two 1D mother wavelets, so it oscillates in both directions. It can thus capture detail in both directions simultaneously, i.e. along a diagonal.
# dlwavelet2d(x,y,j,kx,ky,m,n,f,[o,[i]])
# This function creates a rescaled and translated dual 2D wavelet.
dlwavelet2d(x, y, j, kx, ky, m, n, f) == 2^(-j)*W_m(2^(-j)*x - kx)*W_n(2^(-j)*y - ky)
# where W_n(x) is the n^th 1D dual wavelet or dual wavelet packet of the wavelet family described by the filter f. The argument characteristics are the same as those for wavelet2d.
# We can compute and plot a dual wavelet using dlwavelet2d:
filt := Bspline(3, 3)  # Biorthogonal wavelet family
j := 0  # Level parameter
kx := 0
ky := 0  # Translation parameters
m := 0
n := 0  # Wavelet packet, for example n=0 specifies the father wavelet and n=1 specifies the mother wavelet
p := 0 .. 39
q := 0 .. 39
ix[p] := -1.5 + p/10
iy[q] := -1.5 + q/10
D[p, q] := dlwavelet2d(ix[p], iy[q], j, kx, ky, m, n, filt)
# [component: inputs D]
## Mother and Father Wavelets
# To simplify the process of creating 2D parent wavelets, use the following functions:
# father2d(x,y,[j,kx,ky],s) | mother2d(x,y,[j,kx,ky],s,ds)
# dlfather2d(x,y,[j,kx,ky],s) | dlmother2d(x,y,[j,kx,ky],s,ds)
# The function father2d computes the value at position (x,y) of the father wavelet of scale j and centered at position (kx,ky) using the family of wavelets given by s.
#
# The function mother2d computes the values at position (x,y) of the mother wavelet of scale j and centered at position (kx,ky) using the family of wavelets given by s.
#
# The string argument s is the wavelet family consisting of a wavelet abbreviation and numbers. The following are valid abbreviations for wavelets: d, daub, daublet, s, symm, symmlet, c, coif, coiflet, bl, bs,
# Bspline, haar. The numbers which follow must be valid for the wavelet filter specified. For example, some wavelet values for s are "d4" for daublet(4), "symm12" for symmlet(12), "bs33" for Bspline(3,3),
# and "haar" for daublet(2).
#
# The arguments j, kx, and ky are optional. If they are omitted, they are assumed to be zero.
#
# The functions dlfather2d and dlmother2d create the dual parent wavelets.
#
# The string argument ds is set to "V" for vertical, "H" for horizontal, and "D" for diagonal mother wavelets.
# In the following example, different father and mother wavelets are computed using a Haar wavelet, also known as a Daubechies 2 ("d2") wavelet.
j := 0
kx := 0
ky := 0
N := 32
k := 0 .. N - 1
l := 0 .. N - 1
x[k] := k/16 - 0.5
y[l] := l/16 - 0.5
F[k, l] := father2d(x[k], y[l], j, kx, ky, "d2")
M_V[k, l] := mother2d(x[k], y[l], j, kx, ky, "d2", "V")
M_H[k, l] := mother2d(x[k], y[l], j, kx, ky, "d2", "H")
M_D[k, l] := mother2d(x[k], y[l], j, kx, ky, "d2", "D")
# Now plot the father and mother wavelets:
# The father wavelet | The horizontal mother wavelet
# [component: inputs F]
# [component: inputs M_H]
# [component: inputs M_V]
# The vertical mother wavelet
# [component: inputs M_D]
# The diagonal mother wavelet
# These plots show the oscillation in the horizontal, vertical, and diagonal directions for the different mother wavelets, as well as the smoothness of the father wavelet.
# Two 2D wavelets are used in applications involving images, matrices, and other 2D data. The properties which make wavelets attractive for analysis of 1D functions hold for 2D functions as well. In particular, wavelets have been found to be very effective for image coding and data compression, since relatively few coefficients are needed to represent the image.
# Now plot the dual father wavelet:
j := 0
kx := 0
ky := 0
N := 39
k := 0 .. N - 1
l := 0 .. N - 1
x[k] := k/10 - 1.5
y[l] := l/10 - 1.5
F[k, l] := dlfather2d(x[k], y[l], j, kx, ky, "bs33")
# [component: inputs F]
# As in the 1D case, 2D wavelet packets are a generalization of 2D wavelets. The functions wavelet2d, dlwavelet2d, and the functions for father and mother wavelets may also be used to generate 2D wavelet packets. We explore this topic in the section Wavelet Packet Transforms.
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