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## WAVELETS EXTENSION PACK
## Fractional Brownian Motion
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# In this worksheet, the orthonormal wavelet transform is used to synthesize fractional Brownian motion (fBm). The theoretical underpinnings are developed in a paper of P. Flandrin (1992) (see also G. W. Wornell).
H := 0.1  # H is the fBm scaling parameter and is called the Hurst coefficient.
sd := 0.5  # sd is the standard deviation.
len := 1024
# len is the length of the fBm time series to be generated.
# This length must be a power of two.
noise := rnorm(len, 0, 1)
# The wavelet algorithm for generating fBm time series requires a power of
# two for the length. If a non-power of two length is desired, use the next
# highest power of two to generate an fBm series and truncate the series to
# the desired length.
# The following function creates the approximate fBm from white noise in the wavelet transform domain by scaling the noise deviates at the level i  by (2^i)^(H + 1/2) times the standard deviation.
fBmScale(noise, H, sd) :=
    len ← rows(noise)
    numLev ← log(len, 2)
    v[0] ← 0
    for i ∈ numLev .. 1
        v ← stack(v, submatrix(noise, len/2^i, len/2^(i - 1) - 1, 0, 0)*sd*(2^i)^(H + 1/2))
    v
v := fBmScale(noise, H, sd)
# Now you have an approximate fractional Brownian motion in the wavelet transform domain. To get the representation in the time domain, simply perform the inverse wavelet transform:
filter := symmlet(8)
w := idwt(v, log(rows(v), 2), filter)
k := 0 .. len - 1
kp := 1 .. len - 1
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# Due to the periodic nature of the wavelet transform, the above result is not a very good approximation to fBm. For example, the end points of the series are quite close to each other, which is not usually the case for correctly simulated fBm series. To obtain a better approximation, you can generate a series of length 4*len and then subsample any len consecutive values.
noise := rnorm(len*4, 0, 1)
v := fBmScale(noise, H, sd)
start := 2
mn := start*len
mx := (start + 1)*len - 1
k := mn .. mx
w := idwt(v, log(rows(noise), 2), filter)
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# The first difference of an fBm series is known as fractional Gaussian noise.
wd[k + 1] := w[k + 1] - w[k]
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# Note that, when H=1/2, a fractional Brownian motion becomes ordinary Brownian motion. You can obtain a simulation of samples of a Brownian motion by constructing a random walk process.
B[0] := 0
sd := .01
k := 0 .. 4*len - 1
B[k + 1] := B[k] + sd*noise[k]
D[k + 1] := B[k + 1] - B[k]
mean(noise) = -0.0382377
i := 1 .. len - 1
stdev(noise) = 1.00582
mn := start*len
mx := (start + 1)*len - 1
k2 := mn .. mx
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len = 1024
# For comparison, here is what you get if you use the wavelet based approximate method with H=1/2
H := .5
sd := .5
new_noise := rnorm(4*len, 0, 1)
more_noise := rnorm(16*len, 0, 1)
noise := rnorm(4*len, 0, 1)
start := 2
mn := start*len
mx := (start + 1)*len - 1
ks := mn .. mx
v := fBmScale(new_noise, H, sd)
w := idwt(v, 12, filter)
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P := fft(w)
P := vectorize(|P|^2)  # The power spectrum should have a slope close to -2 when plotted on a log-log scale.
k2 := 0 .. len/2 - 1
len = 1024
S[kp] := 1000000*kp^-2
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km1 := 0 .. rows(w) - 2
wd[km1 + 1] := w[km1 + 1] - w[km1]
P := fft(wd)
P := vectorize(|P|^2)
k2 := 0 .. len/2 - 1
max(P) = 49.6346
S[kp] := 3  # The power spectrum of the first differences should have a slope close to 0 when plotted on a log-log scale.
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# Now extend the synthesis to create a 2-dimensional (2D) fractional Brownian Surface.
fBmScale(noise, H, sd) :=
    len ← rows(noise)
    numLev ← log(len, 2)
    v[0, 0] ← 1
    for i ∈ numLev .. 1
        v ← stack(v, submatrix(noise, len/2^i, len/2^(i - 1) - 1, 0, len/2^i - 1)*sd*(4^i)^(H + 1/2))
        temp ← stack(submatrix(noise, 0, len/2^i - 1, len/2^i, len/2^(i - 1) - 1), submatrix(noise, len/2^i, len/2^(i - 1) - 1, len/2^i, len/2^(i - 1) - 1))
        v ← augment(v, temp*sd*(4^i)^(H + 1/2))
    v
len := 8192
σ := 1
i := 0 .. len - 1
υ := 0
D := rnorm(len, υ, σ)
S[0] := 0
S[i + 1] := S[i] + D[i]
rows(D) = 8192
cols(D) = 1
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myRnorm(row, col, mean, stdev) :=
    temp ← rnorm(row*col, mean, stdev)
    for i ∈ 0 .. col - 1
        M[:, i] ← submatrix(temp, i*row, (i + 1)*row - 1, 0, 0)
    M
size := 128
Noise := myRnorm(size, size, 0, 1)
M := fBmScale(Noise, H, sd)
N := idwt(M, log(size, 2), filter)
N := 255/(max(N) - min(N))*(N - min(N))
# [component: inputs N, N*0, N*0]
# [component: inputs N]
# [component: inputs N]
min(N) = 0
max(N) = 255
# [component: inputs N]
# Again, the periodic nature of the wavelet transform forces the boundaries to match up closely, and a more accurate simulation can be obtained by generating a 4*len surface and then subsampling a len-by-len surface.
osize := size
size := 4*size
Noise := myRnorm(size, size, 0, 1)
M := fBmScale(Noise, H, sd)
Nb := idwt(M, log(size, 2), filter)
N := submatrix(Nb, osize, osize*2 - 1, osize*2.5, osize*3.5 - 1)
mN := min(N)
MN := max(N)
N := 255/(MN - mN)*(N - mN)
# [component: inputs N]
# [component: inputs N, N*0, N*0]
N := transpose(submatrix(N, rows(N) - 1, 0, 0, cols(N) - 1))
# [component: inputs N]
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