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## WAVELETS EXTENSION PACK
## Appendix D: Wavelet Filters
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# daublet(n) | symmlet(n) | coiflet(n) | Bspline(m,n) | bl(n)
# These functions create the low pass filter coefficients for particular wavelet families in particular wavelet classes. The phrase wavelet class refers to the collection of all wavelets that can be created by any one of the above functions. For example, the wavelet class created by the function coiflet(n) is the class of coiflets (named after the mathematician Ronald Coifman). The phrase wavelet family refers to all of the wavelet packets that are associated with a particular wavelet class and a particular value of n. For example, daublet(12) are the wavelets based upon the minimum phase Daubechies wavelets with 12 coefficients. All arguments to the functions are integers:
# • n, an integer describing a particular wavelet family.
# • m, an integer describing a particular wavelet family.
## daublet(n)
# This function creates the n-coefficient minimum phase compactly supported wavelets popularized by Ingrid Daubechies. The values of n this function accepts are even numbers in the range from 2 to 20:
n := 2, 4 .. 20
# The function returns the n coefficients of the low pass filter used in all wavelets transform algorithms:
daublet(4) = [0.482963; 0.836516; 0.224144; -0.12941]
transpose(daublet(16)) = [0.0544158, 0.312872, 0.675631, 0.585355, -0.0158291, -0.284016, 0.000472485, 0.128747, -0.0173693, -0.0440883, 0.013981, 0.00874609, -0.00487035, -0.00039174, 0.000675449, -0.000117477]
# The result of daublet can be used in conjunction with other functions. For example with the dwt function:
i := 0 .. 15
v[i] := rnd(1)
w := dwt(v, 2, daublet(12))
## symmlet(n)
# This function creates the n-coefficient least asymmetric compactly supported wavelet constructed by Ingrid Daubechies. The values of n this function accepts are even numbers in the range from 4 to 20:
n := 4, 6 .. 20
# The function returns the n coefficients of the low pass filter used in various wavelet transform algorithms. Note that the daublet(n) and symmlet(n) filters are the same for n = 4 and n = 6.
symmlet(4) = [0.482963; 0.836516; 0.224144; -0.12941]
transpose(symmlet(16)) = [0.00188995, -0.000302921, -0.0149523, 0.00380875, 0.0491372, -0.027219, -0.0519458, 0.364442, 0.777186, 0.48136, -0.0612734, -0.143294, 0.00760749, 0.0316951, -0.000542132, -0.00338242]
# The result of symmlet can be used in conjunction with other functions. For example with the dwti function:
i := 0 .. 63
v[i] := rnd(1)
w := dwti(v, 2, symmlet(12))
## coiflet(n)
# This function creates the n-coefficient compactly supported coiflets which were created by Ingrid Daubechies following a suggestion of Ronald Coifman. The values of n this function accepts are the even integers 6, 12, 18, 24, and 30:
n == 6, 12, 18, 24, 30
# The function returns the n coefficients of the low pass filter used in various wavelet transform algorithms. They have simple sampling properties and are therefore particularly useful when processing continuous time data.
coiflet(6) = [-0.0727326; 0.337898; 0.852572; 0.384865; -0.0727326; -0.0156557]
transpose(coiflet(18)) = [-0.00379351, 0.0077826, 0.0234527, -0.0657719, -0.0611234, 0.405177, 0.793777, 0.428483, -0.0717998, -0.0823019, 0.034555, 0.0158805, -0.00900798, -0.00257452, 0.00111752, 0.000466217, -7.09833e-5, -3.45998e-5]
# The result of coiflet can be used in conjunction with other functions. For example with the dwt function:
i := 0 .. 63
v[i] := rnd(1)
w := dwt(v, 2, coiflet(12))
## Bspline(m,n)
# This function creates both the analysis and synthesis low pass filters of the time limited spline-based biorthogonal wavelets constructed by Ingrid Daubechies. Available pairs of m and n are:
[m, n] := [1, 1]
[m, n] := [2, 2]
[m, n] := [3, 1]
[m, n] := [1, 3]
[m, n] := [2, 4]
[m, n] := [3, 3]
[m, n] := [1, 5]
[m, n] := [2, 6]
[m, n] := [3, 5]
[m, n] := [2, 8]
[m, n] := [3, 7]
[m, n] := [3, 9]
# The first number indicates the degree of the polynomial for the wavelet (the wavelet for Bspline(2,6) has degree 1). The second number indicates the length of the support of the wavelet (the wavelet for Bspline(2,8) has wider support than the wavelet for Bspline(2,6)).
# The function returns a 2-column matrix, whose first column specifies the coefficients of the analysis low pass filter, and whose second column specifies the coefficients of the synthesis low pass filter used in various wavelet transform algorithms. The major benefit of using the Bspline wavelets is that they are symmetric. For example:
Bspline(1, 3) = [-0.0883883, 0.707107; 0.0883883, 0.707107; 0.707107, 0; 0.707107, 0; 0.0883883, 0; -0.0883883, 0]
Bspline(2, 6) = [
    -0.00690534, 0.353553;
    0.0138107, 0.707107;
    0.0469563, 0.353553;
    -0.107723, 0;
    -0.169871, 0;
    0.447466, 0;
    0.966748, 0;
    0.447466, 0;
    -0.169871, 0;
    -0.107723, 0;
    0.0469563, 0;
    0.0138107, 0;
    -0.00690534, 0
]
# The result of Bspline can be used in in conjunction with other functions. In particular, the symmetry of Bspline wavelets allows them to be used in the symmetric wavelet transform function dwts:
i := 0 .. 64
v[i] := rnd(1)
w := dwts(v, 2, Bspline(2, 2))
## bl(n)
# This function creates an approximation of the low pass filter of the Battle-Lemarie wavelet based upon the degree n cardinal B-spline. The Battle-Lemarie wavelets are not time limited and therefore the associated low pass filter is an IIR filter. This means that a finite approximation to the low pass filter must be made in order to implement Battle-Lemarie wavelets on a computer. Because of these truncation errors, bl only creates Battle-Lemarie wavelets for degrees 0 through 6:
n := 0, 1 .. 6
# Note: Unlike the previously discussed wavelet filters, the Battle-Lemarie wavelets will not lead to perfect reconstruction (because of the finite approximation). Moreover, use of the bl wavelet should be limited to the discrete wavelet transform functions, and not with general wavelet packet transform functions.
# The function returns an approximation of the low pass filter used in various wavelet transform algorithms. The number of coefficients in the approximation is 40 when n is even, and 39 when n is odd. One of the benefits of using a Battle-Lemarie wavelet is that it is a symmetric, orthonormal wavelet. You can therefore use the symmetric wavelet transform dwts without encountering inconveniences associated with biorthogonal wavelets.
bl(2) = [
    -1.67045e-6; -5.73047e-5; 4.56512e-6; 0.000140923; -1.27293e-5; -0.000349114; 3.64103e-5; 0.000873158; -0.000107847; -0.00221175
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]
bl(4) = [
    -6.4656e-5; -0.00105312; 0.000125628; 0.0018327; -0.000249496; -0.00321177; 0.0005099; 0.00567879; -0.00108274; -0.0101577
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]
# The result of bl can be used in conjunction with other functions. For example, with the dwts function:
i := 0 .. 63
v[i] := rnd(1)
w := dwts(v, 2, bl(2))
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