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## WAVELETS EXTENSION PACK
## Subband Extraction
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# get_subband(w, l, n) | get_subband2d(M, l, m, n)
# get_smooth(w, l) | get_smooth2d(M, l)
# get_detail(w, l) | get_detail2d(M, l, ds)
# These functions extract a block of wavelet packet coefficients corresponding to a particular wavelet packet from an array of wavelet packet coefficients. Such a block of coefficients is referred to as a subband. The arguments to these functions are:
# •  w, the one-dimensional (1D) wavelet packet transform coefficients.
# •  M, the two-dimensional (2D) wavelet packet transform coefficients.
# •  l, the level of the desired block/subband of coefficients.
# •  m, n, the index of the desired block/subband of coefficients.
# •  ds, a string denoting either the horizontal, vertical, or diagonal mother subband.
## 1D Subband Extraction
## get_subband(w, l, n)
## get_smooth(w, l)
## get_detail(w, l)
# The function get_subband returns the n^th block of wavelet packet coefficients at level l extracted from the wavelet packet transform w. Setting n = 0 gets the father wavelet coefficients and setting n = 1 gets the mother wavelet coefficients. For example:
i := 0 .. 127
v[i] := rnd(1)  # Create a test signal of random data.
w := dwt(v, 4, daublet(12))  # Take the discrete wavelet transform of the signal.
sbf := get_subband(w, 3, 0)  # Get the father (packet index 0) and mother (packet index 1) wavelet coefficients at level 3, and graph them:
sbm := get_subband(w, 3, 1)
j := 0 .. last(sbf)
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# To simplify the process of obtaining the father and mother wavelet coefficients, use the functions get_smooth(w, l) and get_detail(w, l). These functions return, respectively, the father and mother wavelet packet coefficients at level l extracted from the wavelet packet transform w. You can use these functions to duplicate the results of calls to get_subband shown above.
sbf := get_smooth(w, 3)
sbm := get_detail(w, 3)
j := 0 .. last(sbf)
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## 2D Subband Extraction
## get_subband2d(M, l, m, n)
## get_smooth2d(M, l)
## get_detail2d(M, l, ds)
# The function get_subband2d extracts the (m,n)^th subband of wavelet packet coefficients at level l from the 2D wavelet packet transform M. For example:
M := READBMP("clown")  # Read in the "clown" bitmap image and use it as a test signal.
# [component: inputs M]
N := dwt(M, 3, symmlet(8))  # Take the discrete wavelet transform of the test signal.
SB := get_subband2d(N, 2, 1, 0)  # Get the mother/father wavelet (packet index (1,0)) coefficients at level 2.
# To view the coefficients in a 3D surface plot, they are first scaled in the following manner:
scale(M) :=
    myMax ← max(M)
    myMin ← min(M)
    vectorize((M - myMin)/(myMax - myMin)*255)
# [component: inputs scale(SB)]
# Similar to the 1D subband extraction functions, the functions get_smooth2d and get_detail2d return, respectively, the father and mother wavelet packet coefficients at level l extracted from the 2D wavelet packet transform M. The string argument ds is set to "H," "V," or "D" to indicate the horizontal, vertical, or diagonal mother subbands, respectively. Examples using get_smooth2d(M, l) and get_detail2d(M, l, ds) are shown below.
# Get the horizontal mother subband coefficients. Note that this is equivalent to the packet index (1,0) subband extraction above.
SBH := get_detail2d(N, 2, "H")
# [component: inputs scale(SBH)]
# Get the diagonal mother subband coefficients. Note that this is equivalent to the packet index (1,1) subband extraction.
SBD := get_detail2d(N, 2, "D")
# [component: inputs scale(SBD)]
# And finally, get the father subband coefficients. Note that this is equivalent to the packet index (0,0) subband extraction.
SBF := get_smooth2d(N, 2)
# [component: inputs scale(SBF)]
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