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## WAVELETS EXTENSION PACK
## Inverse Wavelet Packet Transforms
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# extract_basis(T,b) | iwpt(w,b,filter,[o,[i]])
# iwpts(w,b,filter) | iwpti(w,b,filter)
# These functions extract a packet basis from a table of packet coefficients and invert the basis to obtain a reconstructed signal.
# • T, the wavelet packet table created by wpt, or the cosine packet table
# created by lct or cpt.
# • b, a 2- or 3-column matrix representing the packet basis on which to compute the inverse transform.
# • w, the wavelet packet basis returned by extract_basis.
# • filter, the family to which the wavelet belongs.
# Note: See the discussion in Local Cosine Transforms regarding lct, cpt, and cosine packet tables.
## Extracting a Basis from a Wavelet Packet Table
# extract_basis(T,b)
# This function extracts the coefficients of a wavelet packet basis specified by the matrix b from the full wavelet packet table T. For example, consider the sequence of transforming and inverse transforming two-dimensional (2D) data:
i := 0 .. 15
j := 0 .. 15
M[i, j] := rnd(1)
T := wpt(M, 3, symmlet(8))  # Create a wavelet packet table.
nrm := sqrt(sum(sum(M[i, j]^2, j), i))
entropy(x) := -(x/nrm)^2*ln((x/nrm)^2)
# Choose the wavelet packet basis to use.
b := best_basis(T, entropy)
Q := extract_basis(T, b)  # Select that basis using extract_basis.
X := iwpt(Q, b, symmlet(8))  # Compute the inverse transform and verify perfect reconstruction.
max(vectorize(|X - M|)) = 1.45224e-12
## Inverting a Transform from a Wavelet Packet Table
# iwpt(w,b,filter,[o,[i]]) | iwpts(w,b,filter) | iwpti(w,b,filter)
# Having selected a basis, you can then extract the wavelet packet basis from the wavelet packet table. First, create a wavelet packet table for a linear chirp.
N := 1024
i := 0 .. N - 1
t[i] := i/N
filter := symmlet(8)
J := 6
y[i] := sin(0.125*π*1024*t[i]^2)
T := wpt(y, J, filter)
# You can reconstruct the function from the wavelet transform basis.
b_dwt := wavebs(6, 1)
w_dwt := extract_basis(T, b_dwt)
y_r := iwpt(w_dwt, b_dwt, filter)
max(vectorize(|y_r - y|)) = 1.98552e-12
# You can also reconstruct the function from the level 3 wavelet packet basis.
b_L3 := create_level(3, 1)
w_L3 := extract_basis(T, b_L3)
y_r := iwpt(w_L3, b_L3, filter)
max(vectorize(|y_r - y|)) = 1.64291e-12
# Any of these wavelet packet bases work equally well for reconstruction. The question is which one does so with the fewest coefficients. This question was answered in the section on the best_basis algorithm.
# The function iwpts performs the inverse wavelet packet transform on data with symmetric boundary conditions. The filter argument should be a symmetric filter such as bl or Bspline or daublet(2). The function iwpti performs the inverse wavelet packet transform using wavelets on the interval. The filter argument should be an interval filter such as symmlet(4) through symmlet(16) or daublet(4) through daublet(6). The forward versions of these functions were discussed completely in the section on Wavelet Packet Transforms.
N := 1024
i := 0 .. N - 1
t[i] := i/N
filter := bl(3)
J := 6
y[i] := sin(0.125*π*1024*t[i]^2)
T := wpts(y, J, filter)
# You can reconstruct the function from the wavelet transform basis.
b_dwt := wavebs(6, 1)
w_dwt := extract_basis(T, b_dwt)
y_r := iwpts(w_dwt, b_dwt, filter)
max(vectorize(|y_r - y|)) = 0.00179985
# Note: The Battle-Lemarie (bl) wavelets do not lead to perfect reconstruction (because of the finite approximation). See the discussion in Appendix D.
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