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## WAVELETS EXTENSION PACK
## Local Cosine Transforms
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# lct(a, n, f) | ilct(w, n, b, f)
# cpt(a, n) | icpt(w, n, b)
# These functions perform a level n forward and inverse local cosine transform (LCT) on one-dimensional (1D) or two-dimensional (2D) data. The arguments to these functions are:
# • a, the array of data to transform.
# • w, a cosine packet basis constructed from a cosine packet table.
# • n, the number of levels in the transform.
# • b, a 2- or 3-column matrix representing the cosine packet basis on which to compute the inverse transform.
# • f, the data taper to use in the transform.
# All tapers are defined in the file wavedef.xmcd. As several functions used in this worksheet are defined in wavedef.xmcd, a reference to this file is included.
# [reference: Wavedef.xmcd]
## Computing the Local Cosine Transform
# lct(a, n, f) | cpt(a, n)
# The function lct computes a level n local cosine transform of the data in a using data taper f. The local cosine transform is essentially a fancy version of a blocked discrete cosine transform. In a blocked transform, the data array a is broken into consecutive evenly sized blocks of data which are then tapered and individually transformed with a Type IV DCT. The function cpt is a shortcut version of lct with a trig taper (defined below).
# Block at level 0:
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# Blocks at level 1:
# Blocks at level 2:
# What distinguishes the lct from other blocked DCTs is the fact that the decomposition of the data is not done by simply chopping off a chunk of data. Instead, very special smooth windows are used to delineate the chosen blocks. Several tapers are defined in the file wavedef.xmcd. Valid tapers are: box, poly1, poly2, poly3, poly4, and trig.
# The following example uses lct to define a test signal and compute its transform:
n := 512
i := 0 .. n/4 - 1
j := n/4 .. n/2 - 1
k := n/2 .. 3*n/4 - 1
l := 3*n/4 .. n - 1
y[i] := cos(2*π*1/32*i)
y[j] := cos(2*π*5/32*j)
y[k] := cos(2*π*5/16*k)
y[l] := cos(2*π*15/32*l)
i := 0 .. n - 1
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# This signal is a concatenation of four sinusoids having different frequencies.
#
# Compute and plot the local cosine transform of the signal. First, define a taper:
B(x) := trig(x)  # Define a tapering function.
T := lct(y, 2, B)  # Compute the local cosine transform.
Tcpt := cpt(y, 2)
# When a trig taper is used with lct the
# transform can equivalently be computed
# using the cpt function.
max(vectorize(|T - Tcpt|)) = 5.49496e-15
# The LCT of this function is very enlightening. Note that like the wavelet packet transform, lct returns an array containing multiple levels of the transform. Also like the wavelet packet transforms, to extract a particular level, you simply take the appropriate row from the table.
# The zero level of the LCT contains the DCT of the single tapered block of data at level 0.
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# The first half of the first level of the LCT is the DCT of the first block on level 1, the second half is the DCT of the second block on level 1.
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# The difference between these two levels in the LCT is that the 0th level is the DCT of the whole signal. Thus, you see four peaks which correspond to the four distinct frequencies in the signal. The 1st level is two DCT's, one for the first half of the data and one for the second half of the data. You see that the first DCT on the first level has only two peaks corresponding to the fact that there are only two frequencies present in the first half of the signal. A similar statement holds for the second DCT.
# You can also compute a best basis from a cosine packet table. For example, compute the best basis for a ramp signal:
N := 128
ii := 0 .. N - 1
i2 := N/4 .. N/2 - 1
ramp(x) := x - Φ(x - .37)  # Define the ramp test signal.
x[ii] := ii/N
r[ii] := 0
r[i2] := ramp(x[i2]*4 - 1)
J := MaxDWTLevel(r) - 1  # Select a decomposition level using MaxDWTLevel, a function defined in the file wavedef.xmcd.
T := lct(r, J, B)  # Create a cosine packet table using the local cosine transform function.
nrm := sqrt(r*r)
# Define the entropy cost function.
entropy(x) := -(x/nrm)^2*ln((x/nrm)^2)
b := best_basis(T, entropy)  # Find the minimum entropy basis using best basis, which should give the optimal compression.
# [component: inputs pgridplot(b, J)]
# Now look at the degree of concentration achieved by the best basis. As with wavelet packets, use the extract_basis function to select a basis from the cosine packet table.
w := extract_basis(T, b)
C := Concentration(w)
i2 := 0 .. 50
Th := .9
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## Computing the Inverse Local Cosine Transform
# ilct(w, n, b, f) | icpt(w, n, b)
# The ilct function takes the inverse cosine packet transform of a basis of local cosine functions contained in a cosine packet table w and described by the basis matrix b. Recall that the forward local cosine transform lct gives a cosine packet table as its return value. This table is a redundant description of the signal, so you often want to find a non-redundant subset of coefficients from the table, i.e. a basis of cosine packet coefficients. This is an identical situation to that with wavelet packets; therefore the same functions can be used to select the basis.
# The function ilct requires that you pass an argument n which is the number of levels used in the original lct function. This may be larger than the number of levels present in the basis b. ilct also requires that you specify the taper f which was used in the original lct function. The function icpt is the shortcut version of ilct with a trig taper.
# As an example, compute the inverse local cosine transform of the best basis for the ramp signal computed above:
r_ilct := ilct(w, J, b, B)
r_icpt := icpt(w, J, b)
# Again with a trig taper the function
# icpt returns the same results.
# You can test the validity of the basis by measuring the reconstruction error between the original and reconstructed signals:
max(vectorize(|r - r_ilct|)) = 3.33067e-16
max(vectorize(|r - r_icpt|)) = 3.33067e-16
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