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## WAVELETS EXTENSION PACK
## 1D Multiresolution Analysis
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# mra(y,J,filter) | mrapprox(y,J,filter)
# Note: These functions are defined in the file wavedef.xmcd and in this worksheet only. They do not appear in the wavelets DLL.
# These functions perform multiresolution analysis and approximation of a signal using a level J dwt. The arguments to the functions are:
# • y, a real vector containing the signal to be analyzed.
# • J, an integer giving the level of the wavelet transform.
# • filter, the wavelet family used to compute the dwt.
## Computing the Multiresolution Analysis
# mra(y,J,filter)
# mra returns a matrix of (J+1) rows. The zeroth row of the matrix is the smooth component, and the ith row contains the (J+1-i)th detail element. In other words, the rows of the matrix are, in order,
# S_J, D_J, ..., D_1. The multiresolution analysis of a signal is given by:
S_J(t) == sum(S[J, k]*father[J, k]*t, k = 1 .. N*2^(-J))
D_j(t) == sum(d[j, k]*mother[j, k]*t, k = 1 .. N*2^(-j))
# S_J(t) and D_j(t) are known as the smooth signal and the detail signal, respectively. The orthogonal wavelet series approximation to a continuous signal f(t) is expressed in terms of these signals:
f(t) == S[J]*t + D[J]*t + D[J - 1]*t + ... + D[1]*t
# The terms in this approximating sum comprise a decomposition of the signal into orthogonal signal components S[J]*t and D[j]*t at different scales j. Because the terms at different scales represent components of the signal f(t) at different resolutions, the above approximation is called a multiresolution analysis (MRA).
# The following example shows the mra function being used to obtain a multiresolution decomposition of the Doppler signal shown below.
T_run := 1.024
ΔT := .001
thisWave := coiflet(12)
MaxDWTLevel(A) :=
    lev ← 0
    r ← rows(A)
    c ← cols(A)
    while (r/2^lev == floor(r/2^lev + 0.5))*((c ≠ 1)*(c/2^lev == floor(c/2^lev + 0.5)) + (c == 1))
        lev ← lev + 1
    lev ← lev - 1
N := T_run/ΔT
i := 0 .. N - 1
x[i] := ΔT*i
N = 1024
doppler(x) := sqrt(x*(1 - x))*sin(2.1*π/(x + 0.05))
y[i] := doppler(x[i]/T_run)
MaxDWTLevel(y) = 10
J := 6
j := 0 .. J - 1
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# Next, compute the multiresolution decomposition:
mra(v, J, filter) :=
    w ← dwt(v, J, filter)
    Z[rows(v) - 1] ← 0
    M[:, 0] ← idwt(put_smooth(Z, J, get_smooth(w, J)), J, filter)
    for qj ∈ J .. 1
        Z[rows(v) - 1] ← 0
        M[:, J + 1 - qj] ← idwt(put_detail(Z, qj, get_detail(w, qj)), J, filter)
    transpose(M)
M := mra(y, J, thisWave)
S_6[i] := M[0, i]
D_6[i] := M[1, i]
D_5[i] := M[2, i]
D_4[i] := M[3, i]
D_3[i] := M[4, i]
D_2[i] := M[5, i]
D_1[i] := M[6, i]
# The mra data structure is a matrix of (J+1) rows. Row 0 is the smooth component; the other J rows are the detailed components D_J, ..., D_1.
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# The fine scale features (the high frequency oscillations at the beginning of the signal) are captured mainly by the fine scale detail components D_1 and D_2. The coarse scale components D_5 and D_6 correspond to the lower frequency oscillations.
## The Multiresolution Approximation
# mrapprox(y,J,filter)
# mrapprox returns a matrix of (J+1) rows. The zeroth row of the matrix is the smooth component S[J], and the ith row contains the sum of the smooth component and the detail components D[J]*through*D[J + 1 - i], giving the level (J-i) multiresolution approximation. The multiresolution approximation may be expressed in terms of the detail signals by:
S[j - 1]*t == S[J]*t + D[J]*t*... + D[j]*t
pf := 1
# To see how the multiresolution approximation varies with each level, compute and plot the rescaled individual approximations for the Doppler signal:
mrapprox(y, J, filter) :=
    Q ← mra(y, J, filter)
    for i ∈ 0 .. rows(y) - 1
        M[0, i] ← Q[0, i]
        for j ∈ 1 .. J
            M[j, i] ← M[j - 1, i] + Q[j, i]
    M
MR := mrapprox(y, J, thisWave)
S_6[i] := MR[0, i]
S_5[i] := MR[1, i]
S_4[i] := MR[2, i]
S_3[i] := MR[3, i]
S_2[i] := MR[4, i]
S_1[i] := MR[5, i]
S_0[i] := MR[6, i]
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## Zooming Feature of Multiresolution Analysis
# Multiresolution analysis gives you the framework in which to zoom in and out to obtain different views of a signal. To illustrate the zooming concept, add some random noise to the Doppler signal and perform a multiresolution analysis of the noisy signal. Note that the mean should be 0 and the standard deviation, σ, should be > 0. The signal to noise ratio can be calculated by finding the ratio of the signal energy and the square of the standard deviation. The rnorm(m,μ,σ) function is used to generate independent normal random noise.
σ := .1
noisy_doppler := y + rnorm(rows(y), 0, σ)
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J := 6
MN := mra(noisy_doppler, J, thisWave)
nd := noisy_doppler
S_6[i] := MN[0, i]
D_6[i] := MN[1, i]
D_5[i] := MN[2, i]
D_4[i] := MN[3, i]
D_3[i] := MN[4, i]
D_2[i] := MN[5, i]
D_1[i] := MN[6, i]
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# The fine scale detail D_1(t) is almost entirely dominated by the noise. The noise is still dominant in the D_2(t) signal, less so in the D_3(t) signal, and almost negligible in the the D_4(t) signal.
# Next, combine the detail signals to form the multiresolution approximation of the noisy Doppler signal at multiple levels: use mrapprox.
MRN := mrapprox(noisy_doppler, J, thisWave)
S_6[i] := MRN[0, i]
S_5[i] := MRN[1, i]
S_4[i] := MRN[2, i]
S_3[i] := MRN[3, i]
S_2[i] := MRN[4, i]
S_1[i] := MRN[5, i]
S_0[i] := MRN[6, i]
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# By zooming in and out using the multiresolution approximations S_0(t), S_1(t), S_2(t), etc., you can focus on different features of the signal. The coarse scale approximation S_6(t) gives a "faraway view" of the signal: you can see the overall shape, but dome detail is lost. The fine scale approximations give a "close-in view" for the signal, revealing more detail but also more noise.
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