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## WAVELETS EXTENSION PACK
## 2D Multiresolution Analysis
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# mra2d(y,J,filter) | mrapprox2d(y,J,filter)
# Note: These functions are defined in the file wavedef.xmcd and in this worksheet. They are not part of the Wavelets Extension Pack DLL.
# These functions perform multiresolution analysis and approximation of a two-dimensional (2D) object using a level J dwt. The arguments to the functions are:
# • y, a real matrix containing the object to be analyzed.
# • J, an integer giving the level of the wavelet transform.
# • filter, the wavelet family used to compute the dwt.
## Computing the 2D Multiresolution Decomposition
# mra2d(y,J,filter)
# This function returns a vector of (J+1) nested matrices. The zeroth element of the vector is the smooth component, and the ith element contains the (J+1-i)th detail element. In other words, the elements of the vector are, in order, S_J, D_J, ..., D_1. Each detail element at level j is the sum of the vertical, horizontal, and diagonal detail elements at level j.
mra2d(v, J, filter) :=
    w ← dwt(v, J, filter)
    for ii ∈ 0 .. rows(v) - 1
        for jj ∈ 0 .. cols(v) - 1
            Z[ii, jj] ← 0
    D[0] ← idwt(put_smooth2d(Z, J, get_smooth2d(w, J)), J, filter)
    for qj ∈ J .. 1
        for ii ∈ 0 .. rows(v) - 1
            for jj ∈ 0 .. cols(v) - 1
                Z[ii, jj] ← 0
        M_H ← put_detail2d(Z, qj, get_detail2d(w, qj, "H"), "H")
        M_V ← put_detail2d(Z, qj, get_detail2d(w, qj, "V"), "V")
        M_D ← put_detail2d(Z, qj, get_detail2d(w, qj, "D"), "D")
        D[J + 1 - qj] ← idwt(M_H, J, filter) + idwt(M_V, J, filter) + idwt(M_D, J, filter)
    D
# The complete level J 2D multiresolution analysis breaks down an image into 3J+1 2D functions:
S_J(x, y) == sum(S[J, m, n]*father2d[m, n]*(x, y), m, n)
D[j, V]*(x, y) == sum(d[j, m, n, V]*mother2d[m, n, V]*(x, y), m, n)
D[j, H]*(x, y) == sum(d[j, m, n, H]*mother2d[m, n, H]*(x, y), m, n)
D[j, D]*(x, y) == sum(d[j, m, n, D]*mother2d[m, n, D]*(x, y), m, n)
# These functions are known as the smooth image, the vertical detail image, the horizontal detail image, and the diagonal detail image, respectively. The 2D multiresolution decomposition (MRD) expressed in terms of these images is
F(x, y) == S_J(x, y) + sum(D[j, V]*(x, y), j = 1 .. J) + sum(D[j, H]*(x, y), j = 1 .. J) + sum(D[j, D]*(x, y), j = 1 .. J)
# This is a multiresolution decomposition of F(x,y) into 3J+1 orthogonal image components. As in the 1D case, these components correspond to different resolution levels. The mra2d data structure is a vector of (J+1)
# nested matrices. Element 0 is the smooth component; the other J elements
# are the detailed components D_J, ..., D_1, where:
Vbox(nrow) :=
    for i ∈ 0 .. nrow - 1
        for j ∈ 0 .. nrow - 1
            box[i, j] ← 255
    lb ← nrow/8
    for i ∈ lb .. lb*7
        for j ∈ lb .. lb*3
            box[i, j] ← 0
        box[i, lb*7] ← 0
        for j ∈ lb .. lb*2
            box[j, i] ← 0
        box[i, lb*3] ← 0
        box[i, lb*4] ← 0
        box[i, lb*5] ← 0
        box[i, lb*6] ← 0
        box[i, i] ← 0
        box[i, i + lb - 1] ← 127
        box[i, 7*lb - i] ← 127
    box
D[j]*(x, y) == D[j, V]*(x, y) + D[j, H]*(x, y) + D[j, D]*(x, y)
# The coefficients S_J, D[j, V], D[j, H], D[j, D] can also be computed with the functions get_smooth2d and get_detail2d.
# For example, compute the multiresolution decomposition for the Vbox test image (defined to the right):
N := 128
vbox := Vbox(N)
# [component: inputs vbox]
scale(M) :=
    myMax ← max(M)
    myMin ← min(M)
    vectorize((M - myMin)/(myMax - myMin)*255)
J := 3
filter := daublet(4)
M := mra2d(vbox, J, filter)
S_3 := M[0]
D_3 := M[1]
D_2 := M[2]
D_1 := M[3]
# Now plot the rescaled multiresolution decomposition:
# [component: inputs scale(S_3)]
# [component: inputs scale(D_3)]
# S_3 | D_3
# [component: inputs scale(D_2)]
# [component: inputs scale(D_1)]
# D_2 | D_1
# Note the increasing level of detail which appears at higher resolution levels.
## The Multiresolution Approximation
# mrapprox2d(y,J,filter)
# This function returns a vector of (J+1) nested matrices. The zeroth element of the vector is the smooth component, and the ith element contains the sum of the smooth component and the detail components D[J]*through*D[J + 1 - i], giving the level (J-i) multiresolution approximation.
mrapprox2d(y, J, filter) :=
    D ← mra2d(y, J, filter)
    S[0] ← D[0]
    for j ∈ 1 .. J
        S[j] ← S[j - 1] + D[j]
    S
# The 2D multiresolution approximation may be expressed in terms of the detail images by:
S[j - 1]*(x, y) == S[J]*(x, y) + D[J]*(x, y)*... + D[j]*(x, y)
# To see how the multiresolution approximation varies with increasing level, compute and plot the rescaled individual approximations for the test image.
Q := mrapprox2d(vbox, J, filter)
S_3 := Q[0]
S_2 := Q[1]
S_1 := Q[2]
S_0 := Q[3]
# Now plot the rescaled multiresolution decomposition:
# [component: inputs scale(S_3)]
# [component: inputs scale(S_2)]
# S_3 | S_2
# [component: inputs scale(S_1)]
# [component: inputs scale(S_0)]
# S_1 | S_0
# Note the increasing detail in subsequent reconstructed images. The increasing accuracy is most apparent in the diagonal lines. At the final level, we have perfect reconstruction of the test image.
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