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## WAVELETS EXTENSION PACK
## Subband Insertion
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# put_subband(w, l, n, y) | put_subband2d(M, l, m, n, N)
# put_smooth(w, l, y) | put_smooth2d(M, l, N)
# put_detail(w, l, y) | put_detail2d(M, l, N, ds)
# These functions replace specified blocks of wavelet packet coefficients in the vector w or matrix M with the contents of the vector y or matrix N depending on the dimension of the function. Such a block of coefficients is referred to as a subband. The arguments to these functions are:
# • w, the one-dimensional (1D) wavelet packet transform coefficients.
# • M, the two-dimensional (2D) wavelet packet transform coefficients.
# • l, the level of the desired block/subband of coefficients.
# • m, n, the index of the desired block/subband of coefficients.
# • y, the vector of new values for the coefficients in the block/subband.
# • N, the matrix of new values for the coefficients in the block/subband.
# • ds, a string denoting either the horizontal, vertical, or diagonal mother subband.
## 1D Subband Insertion
## put_subband(w, l, n, y)
## put_smooth(w, l, y)
## put_detail(w, l, y)
# The function put_subband replaces the block of coefficients in w corresponding to the n^th wavelet packet at level l by the data in y. Note that the size of y must be the same as that of the subband it is to replace. The shortcut versions of put_subband allow a more intuitive approach. put_smooth replaces the contents of the father coefficients with the contents of y. Similarly, put_detail replaces the contents of the mother coefficients with the contents of y. For example:
v := READPRN("wavelet.prn")  # Read in some data.
w := dwts(v, 4, Bspline(3, 3))  # Perform a symmetric DWT on the data.
sb := get_subband(w, 4, 0)  # Extract the subband of the father wavelet coefficients.
sbf := get_smooth(w, 4)  # Remember that get_smooth, a shortcut version of get_subband, provides the same results.
w := put_subband(w, 4, 0, sb*0)  # Replace the coefficients in the father subband by 0.
wf := put_smooth(w, 4, sb*0)  # Or equivalently, use put_smooth, the shortcut version of put_subband.
x := idwts(w, 4, Bspline(3, 3))  # Reconstruct the signal by performing an inverse transform.
i := 0 .. last(v)
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## 2D Subband Insertion
# put_subband2d(M, l, m, n, N)
# put_smooth2d(M, l, N)
# put_detail2d(M, l, N, ds)
# The function put_subband2d replaces the block of coefficients in M corresponding to the (m,n)^th wavelet packet at level l by the data in N. Note that the size of N must be the same as that of the subband it is to replace. As in the 1D subband insertion functions, there are shortcut versions of put_subband2d. The functions put_smooth2d and put_detail2d insert the contents of N into, respectively, the father and mother subbands at level l of the 2D wavelet packet transform M. The string argument ds is set to "H," "V," or "D" to indicate the horizontal, vertical, or diagonal mother subbands, respectively. For example:
M[64, 64] := 0  # Create a zero matrix.
N := get_subband2d(M, 3, 0, 0)  # Get the mother/mother subband at level 3.
i := 0 .. rows(N) - 1
j := 0 .. cols(N) - 1
N[i, j] := rnd(1)
# Replace the subband with noise, then interpolate by inverse transforming.
M := put_subband2d(M, 3, 0, 0, N)
M := idwts(M, 3, Bspline(3, 9))
# [component: inputs M]
# An equivalent approach is to use the shortcut version of the function put_subband2d. Since the mother/mother subband was replaced, this corresponds to (m,n) = (0,0). This case corresponds to the smooth subband so we use the shortcut function put_smooth2d.
M2[64, 64] := 0
M2 := put_smooth2d(M2, 3, N)
M2 := idwts(M2, 3, Bspline(3, 9))
# Plot the inverse transform. The results are the same as above.
# [component: inputs M2]
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