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## WAVELETS EXTENSION PACK
## Tapers for Local Cosine Analysis
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# poly1(x) | poly2(x) | poly3(x) | poly4(x)
# box(x) | trig(x)
# Note: These taper functions are defined in the file wavedef.xmcd and in this worksheet. They are not part of the Wavelets Extension Pack DLL.
# These functions produce the tapers used with the local cosine transform functions lct and ilct. The argument to these functions is:
# • x, a real scalar at which to evaluate the taper.
# The tapers for local cosine analysis are given by the following functional definitions:
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box(x) := (x > 1/2)
# More Details
poly1(x) := sqrt(x)
poly2(x) := x*sqrt(3 - 2*x)
poly3(x) := sqrt(10*x^3 - 15*x^4 + 6*x^5)
poly4(x) := x^2*sqrt(35 - 84*x + 70*x^2 - 20*x^3)
trig(x) := sin(π/4*(1 - cos(π*x)))
# The tapers are defined for x between 0 and 1. The plot below illustrates the various tapers:
x := 0, 0.01 .. 1
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# This worksheet uses several functions defined in the file wavedef.mcd.
# Therefore a reference to this file is included below.
# [reference: Wavedef.xmcd]
## Using Tapers in Local Cosine Analysis
# You can see the advantages of using smooth tapers with the lct function by performing a best basis approximation of a signal. The following pages show how you can reconstruct a signal using only 10% of the coefficients from a local cosine transform and compare the accuracy for two different tapers. The example uses a signal with discontinuities, to illustrate the accuracy of the reconstruction.
# Note: When used in lct, the tapers are shifted and scaled to fit the current block.
N := 256
i := 0 .. N - 1
x[i] := i/N
ramp2(x) := 2*x - Φ(x - .37) - Φ(x - .63)  # Define a test signal.
y[i] := ramp2(x[i])
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# Next, compute the local cosine transform using a trig taper, and find the best basis.
J := 5
B(x) := trig(x)
T := lct(y, J, B)
nrm := sqrt(y*y)
entropy(x) := -(x/nrm)^2*ln((x/nrm)^2)
b_bbe := best_basis(T, entropy)
QQ_bbe := pgridplot(b_bbe, J)
# [component: inputs QQ_bbe]
# Note: The figure shown above uses the picture operator obtained by choosing Picture from the Insert menu.
# Now, try shrinking the LCT and examine the reconstruction error.
w_bbe := extract_basis(T, b_bbe)
W_lin := wavesort(w_bbe)  # Sort the coefficients by magnitude.
c_coeffs := floor(0.1*N)
W_sh := shrink(W_lin, c_coeffs, w_bbe)  # Keep the largest 10% of the coefficients.
y_r := ilct(W_sh, J, b_bbe, B)  # Take the inverse Local Cosine Transform.
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# Plot the reconstruction error:
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# Find the root mean square (RMS) of the reconstruction error:
RMS(M) := sqrt(sum(sum(M[i, j]^2, j = 0 .. cols(M) - 1), i = 0 .. rows(M) - 1))/(rows(M)*cols(M))
RMS(y_r - y) = 0.00404329
# With most of the coefficients removed, the reconstructed function shows the "Gibb's phenomenon," which is the ringing in the vicinity of the discontinuities. When we try this same procedure with the box taper, the Gibb's phenomenon is even worse.
## Analysis Using a box Taper
# Repeat the analysis using a box taper to compute the cosine packet table.
B(x) := box(x)
J = 5
T := lct(y, J, B)
b_bbe := best_basis(T, entropy)
QQ_bbe := pgridplot(b_bbe, J)
# [component: inputs QQ_bbe]
# Note that the best basis with a box taper is actually a single level of the cosine packet table. Now shrink the LCT and see how the reconstruction looks for the box taper.
w_bbe := extract_basis(T, b_bbe)
W_lin := wavesort(w_bbe)  # Sort the coefficients by magnitude.
c_coeffs := floor(0.1*N)
W_sh := shrink(W_lin, c_coeffs, w_bbe)  # Keep the largest 10% of the coefficients.
y_r := ilct(W_sh, J, b_bbe, B)  # Take the inverse Local Cosine Transform and look at the RMS reconstruction error.
RMS(y_r - y) = 0.00501379
# The RMS error for the box taper is slightly larger than for the trig taper. Now look at the reconstructed signal:
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# and the reconstruction error:
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# Thus, using a box taper instead of a trig taper results in larger reconstruction error for a best basis approximation of a signal.
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