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## WAVELET EXTENSION PACK
## Time-Frequency Analysis
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# tfPlotFromWPT(w, basis, hsize, vsize)
# tfPlotFromLCT(w, basis, hsize, vsize)
# Note: These functions are defined in the file wavedef.xmcd and in this worksheet. They are not found in the Wavelets Extension Pack DLL.
# These functions create time-frequency plots for a signal using wavelet, wavelet packet, or cosine packet transforms. The arguments to the functions are:
# • w, the coefficients of a wavelet, wavelet packet, or cosine packet transform.
# • basis, a wavelet, wavelet packet, or cosine packet basis.
# • hsize, the number of pixels to use for each point along the horizontal axis.
# • vsize, the number of pixels to use for each point along the vertical axis.
# A reference to wavedef.xmcd is included below:
# [reference: Wavedef.xmcd]
## Time-Frequency Analysis of a Two-Tone Signal
# Time-frequency analysis is concerned with how the frequency content of a signal changes in time. Since wavelets, wavelet packets, and local cosine packets are localized in time and frequency, they can be used to describe the time-frequency structure of a signal. Using any of these transforms, you can construct a time-frequency plot for a signal.
#
# In the plots below, the x-axis (horizontal) represents time and the y-axis (vertical) represents frequency. The time-frequency plane is divided into rectangles which correspond to the location and frequency of each basis vector. The length of each rectangle along the x-axis is given by the length of the associated basis vector. The width along the y-axis corresponds to the bandwidth of the vector. Each rectangle has constant area since the bandwidth of a signal is inversely proportional to its length. The modulus of the corresponding coefficient determines the gray level of each rectangle; darker rectangles indicate higher energy at that time-frequency location.
# The first test signal shown below is composed of two sinusoids of equal duration, with one that is twice the frequency of the other. The two tones are separated in time and frequency so the resulting time-frequency plots should have two distinct peaks.
N := 256
i := 0 .. N - 1
y[i] := if(1*N/8 ≤ i < 3*N/8, sin(2*π*32*i/N), if(5*N/8 ≤ i < 7*N/8, sin(2*π*16*i/N), 0))
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## Discrete Wavelet Transform Analysis
# You can analyze the two-tone signal with the discrete wavelet transform (DWT), the wavelet packet transform (WPT), and the local cosine transform (LCT). Remember that the DWT uses a fixed basis, which is generated here using the wavebs function. The WPT and LCT can have optimized bases. Begin with the DWT:
y = [
    0; 0; 0; 0; 0; 0; 0; 0; 0; 0
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]
filter := daublet(4)
J := 4
w := dwt(y, J, filter)
QQ := tfPlotFromWPT(w, wavebs(J, 1), 1, 1)
# [component: inputs QQ]
# This time-frequency plot shows two distinct peaks separated in time (the horizontal, or x-axis) and in frequency (the vertical, or y-axis). The localization in frequency is rather poor as a result of leakage in the wavelet filters. Later you will graphically see the advantage of the optimization that the WPT allows.
## Wavelet Packet Analysis
# Next, use wavelet packets to analyze the two-tone signal. A time-frequency plot can be constructed for any basis extracted from a wavelet packet table. For example, use the best basis algorithm to find an optimal basis.
T := wpt(y, J, filter)
J = 4
nrm := sqrt(y*y)
entropy(x) := -(x/nrm)^2*ln((x/nrm)^2)
basis := best_basis(T, entropy)
Q := pgridplot(basis, J)
# [component: inputs Q]
w := extract_basis(T, basis)
QQ := tfPlotFromWPT(w, basis, 1, 1)
# [component: inputs QQ]
# The resolution of the two peaks is better in the WPT than the DWT because of the optimal selection of basis functions by the best basis algorithm. Note that there is still some leakage in the wavelet packet filters, appearing at higher frequencies than the true tones. Nevertheless, the best basis produces an excellent representation of our signal.
## Cosine Packet Table Analysis
# Finally, repeat the analysis using the local cosine transform in conjunction with the best basis algorithm.
T := lct(y, J, trig)
basis := best_basis(T, entropy)
w := extract_basis(T, basis)
Q := pgridplot(basis, J)
# [component: inputs Q]
QQ := tfPlotFromLCT(w, basis, 1, 1)
# [component: inputs QQ]
# This transform gives an excellent representation of the two tones, because the basis functions for the local cosine transform are well-matched to the signal. This time-frequency plot shows that some basis vectors are better than others for representing certain signals. No single basis will be perfect for all data.
## Time-Frequency Analysis of a Linear Chirp Signal
# This example works with a linear chirp signal. A linear chirp is a sine wave whose frequency increases or decreases linearly over time. The frequency at any time is given by:
w := 5*Hz
c := 80*Hz/sec
ω(t) := w + c*t*sec
N := 512
# Note that the ω(t) function returns a frequency: s^-1 is the same as Hz.
ω(2) = 165
Interval := 1*sec
t[i] := Interval/N*i
y[i] := sin(2*π*ω(t[i]/sec)*t[i])
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# The final frequency is
ω(Interval/sec) = 85
# The Nyquist limits are
N/Interval = 512
# and
1/Interval = 1
# The initial and final frequencies should be between 0 and the Nyquist frequency.
# As you did with the two-tone signal, analyze the chirp signal with the DWT, the WPT, and the LCT.
filter := daublet(4)
J := 4
w := dwt(y, J, filter)
QQ := tfPlotFromWPT(w, wavebs(J, 1), 1, 1)
# [component: inputs QQ]
# Next, repeat the time-frequency analysis on the linear chirp using wavelet packets.
T := wpt(y, J, filter)
nrm := sqrt(y*y)
entropy(x) := -(x/nrm)^2*ln((x/nrm)^2)
basis := best_basis(T, entropy)
w := extract_basis(T, basis)
Q := pgridplot(basis, J)
# [component: inputs Q]
QQ := tfPlotFromWPT(w, basis, 1, 1)
# [component: inputs QQ]
# Repeat the analysis one more time with the local cosine transform.
T := lct(y, J, trig)
basis := best_basis(T, entropy)
w := extract_basis(T, basis)
Q := pgridplot(basis, J)
# [component: inputs Q]
QQ := tfPlotFromLCT(w, basis, 1, 1)
# [component: inputs QQ]
# Looking back, notice that the local cosine transform provides a better representation of the time-varying chirp than either the wavelet or wavelet packet transform.
## Time Frequency Analysis of Ice Noise
# This example looks at the ice signal, which consists of underwater acoustic measurements of ice "cracking."
# [component: outputs ice]
rows(ice) = 2048
i := 0 .. rows(ice) - 1
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# You can work with a short segment of the ice signal for efficiency:
y := submatrix(ice, 1000, 1511, 0, 0)
rows(y) = 512
i := 0 .. rows(y) - 1
# First analyze the ice signal with the DWT:
filter := daublet(4)
J := 4
w := dwt(y, J, filter)
QQ_dwt := tfPlotFromWPT(w, wavebs(J, 1), 1, 1)
# Next, use the wavelet packet transform.
T := wpt(y, J, filter)
nrm := sqrt(y*y)
entropy(x) := -(x/nrm)^2*ln((x/nrm)^2)
basis := best_basis(T, entropy)
w := extract_basis(T, basis)
QQ_wpt := tfPlotFromWPT(w, basis, 1, 1)
Q := pgridplot(basis, J)
# [component: inputs Q]
# Finally, perform time-frequency analysis on the ice signal using the local cosine transform.
T := lct(y, J, box)
basis := best_basis(T, entropy)
w := extract_basis(T, basis)
QQ_lct := tfPlotFromLCT(w, basis, 1, 1)
Q := pgridplot(basis, J)
# [component: inputs Q]
# Now compare the time-frequency plots using the different analysis methods:
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# [component: inputs QQ_dwt]
DWT
# [component: inputs QQ_wpt]
WPT
LCT
# [component: inputs QQ_lct]
# It is clear from these time-frequency plots that there are three regions with significantly different power spectra. The cracking part of the signal is very obvious. The post crack portion has more power in the higher frequencies and more power overall.
#
# For another example of a time-frequency plot on a different signal, see the example on Signal and Image Compression.
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