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## WAVELETS EXTENSION PACK
## User-Defined Wavelet Filters
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# Some of the functions in the Wavelets Extension Pack accept user-defined
# filters. These functions are wavelet, dlwavelet, wavelet2d, dlwavelet2d, dwt, idwt, wpt, iwpt, waveterp, and waveterp2d. The last three arguments to each of these functions are:
# • f, a vector for an orthonormal family, or a 2-column matrix for a
# biorthogonal family, of user-defined filter coefficients.
# • o, (optional), an integer for an orthonormal family, or a 1x2 matrix of integers for a biorthogonal family, giving the offset(s) corresponding to the family f. If not specified, o is the default offset for the family f.
# • i, (optional), zero or one for an orthonormal family, or a 1x2 matrix whose elements are zero or one for a biorthogonal family, specifying negation of the default high pass filter coefficients for the family f. Zero specifies no negation; one specifies negation. If not specified, i represents no negation.
# Note: Not all of the functions in the Wavelets Extension Pack accept user-defined wavelet filters. In particular, the interval wavelet transform function, dwti, and the symmetric wavelet transform function, dwts, do not accept user-defined wavelet filters.
## Defining a Filter
# For a user-defined orthogonal family, the argument f is a vector representing
# the analysis low-pass filter L of the wavelet, which is identical to the
# synthesis low-pass filter L^(*.) For a user-defined biorthogonal family, the
# argument f is a 2-column matrix whose first column represents the analysis
# low-pass filter L, and whose second column represents the synthesis
# low-pass filter L^(*). Since the lengths of L and L^(*) are not necessarily equal
# for a biorthogonal family, the excess rows in the column representing the
# shorter low-pass filter are padded with 0's.
# For a user-defined orthogonal family, the optional argument o specifies the offset of the analysis low-pass filter L. For a user-defined biorthogonal
# family, the argument o is a 1x2 matrix whose first value specifies the offset
# of the analysis low-pass filter L, and whose second value specifies the
# offset of the synthesis low-pass filter L^(*). If not specified, o is the default
# offset(s) for the family f.
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# More Details
# For a user-defined orthogonal family, the analysis high-pass filter H is
# derived from L by the quadrature mirror filter relationship in which the low-pass
# filter coefficients are reversed and every second coefficient is multiplied by -1.
# Similarly, H* is derived from L*. The biorthogonal analogue to this relationship
# is that H* is derived from L and H is derived from L*. For a user-defined
# orthogonal family, the optional argument i specifies whether to negate the
# default H coefficients. For a user-defined biorthogonal family, the argument i
# is a 1x2 matrix whose first value specifies whether to negate the default H
# coefficients, and whose second value specifies whether to negate the default H*
# coefficients.
# Note: A filter whose coefficients match those of a predefined wavelet family
# such as daublet, symmlet, coiflet, bl, or Bspline, but whose argument(s)
# o do not match the defaults, or whose argument(s) i are not both zero, is treated as a user-defined filter.
## An Example
# For example, the steps to construct an approximation of the Shannon wavelet (that is, the wavelet based on the sinc function) are outlined below.
# The discrete low-pass filter corresponding to the Shannon wavelet is:
h[0] == 1/2
h[2*n] == 0
n ≠ 0
h[2*n + 1] == (-1)^n/((2*n + 1)*π)
# This is an infinite filter so we must settle for some finite truncation of it.
N := 20
i := 0 .. 2*N - 1
h[i] := if(mod(i - N, 2) ≠ 0, (-1)^(i/2 - N/2 - 1/2)/((i - N)*π), 0)
h[N] := 1/2  # The N^th term of this vector corresponds to 0 so the offset is -N.
h := sqrt(2)*h/sum(h)
# Rescale the vector so that
sum(h) = 1.41421
sFilt := h
sOffset := -N
# Now the Shannon wavelet can be used in many of the Wavelet Extension Pack functions. For example, you can create the associated father wavelet (the sinc function) using the wavelet function:
r := 5
x := -r, -r + 0.001*r .. r
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