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## WAVELETS EXTENSION PACK
## Appendix C: Additional Wavelet Functions
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# Maximum Level Functions
# The MaxDWTLevel function returns the largest level allowable for the DWT of a particular array or matrix.
MaxDWTLevel(A) :=
    lev ← 0
    r ← rows(A)
    c ← cols(A)
    while (r/2^lev == floor(r/2^lev + 0.5))*((c ≠ 1)*(c/2^lev == floor(c/2^lev + 0.5)) + (c == 1))
        lev ← lev + 1
    lev ← lev - 1
# The MaxDWTSLevel function returns the largest level allowable for the DWTS of a particular array or matrix.
MaxDWTSLevel(x) := (cols(x) == 1)*floor(log(rows(x))/log(2)) + (cols(x) > 1)*min([floor(log(rows(x))/log(2)); floor(log(cols(x))/log(2))])
## Functions for rescaling two-dimensional (2D) wavelet packet transforms for viewing with the picture operator.
scale(M) :=
    myMax ← max(M)
    myMin ← min(M)
    vectorize((M - myMin)/(myMax - myMin)*255)
wavescale(M, B) :=
    for i ∈ 0 .. rows(B) - 1
        M ← put_subband2d(M, B[i, 0], B[i, 1], B[i, 2], scale(get_subband2d(M, B[i, 0], B[i, 1], B[i, 2])))
## Multiresolution Analysis Functions
mra(v, J, filter) :=
    w ← dwt(v, J, filter)
    Z[rows(v) - 1] ← 0
    M[:, 0] ← idwt(put_smooth(Z, J, get_smooth(w, J)), J, filter)
    for qj ∈ J .. 1
        Z[rows(v) - 1] ← 0
        M[:, J + 1 - qj] ← idwt(put_detail(Z, qj, get_detail(w, qj)), J, filter)
    transpose(M)
mrapprox(y, J, filter) :=
    Q ← mra(y, J, filter)
    for i ∈ 0 .. rows(y) - 1
        M[0, i] ← Q[0, i]
        for j ∈ 1 .. J
            M[j, i] ← M[j - 1, i] + Q[j, i]
    M
## Wavelet Approximation Functions
waveapprox(x, J, n, filter) :=
    w ← dwt(x, J, filter)
    ws ← reverse(sort(vectorize(|w|)))
    T_w ← ws[n - 1]
    for i ∈ 0 .. rows(w) - 1
        wt[i] ← (|w[i]| ≥ T_w)*w[i]
    R ← idwt(wt, J, filter)
    R
wavedecomp(x, J, n, filter) :=
    w ← dwt(x, J, filter)
    for i ∈ 0 .. rows(w) - 1
        w[i, 1] ← i
    ws ← reverse(csort(vectorize(|w|), 0))
    wt[rows(w) - 1] ← 0
    for qq ∈ 0 .. n - 1
        wt[ws[qq, 1]] ← w[ws[qq, 1], 0]
        R[qq] ← idwt(wt, J, filter)
        wt[ws[qq, 1]] ← 0
    R
## Basis Selection Display
# For any selection of basis to be valid, it is necessary and sufficient that every column in the pgrid plot (see below) be covered, but also that there is no overlap in any column.
pgridplot(b, levels) :=
    levels ← levels + 1
    cols ← 2^levels
    hsize ← 4
    vsize ← 16
    for i ∈ 0 .. levels*vsize
        for j ∈ 0 .. cols*hsize
            Q[i, j] ← 220
    for i ∈ 0 .. rows(b) - 1
        for j ∈ vsize*b[i, 0] .. vsize*(b[i, 0] + 1)
            offset ← 2^(levels - b[i, 0])*hsize
            for k ∈ offset*b[i, 1] .. offset*(b[i, 1] + 1)
                Q[j, k] ← 127
    for i ∈ 0 .. levels - 1
        divisions ← 2^i
        offset ← 2^(levels - i)
        for j ∈ 0 .. divisions - 1
            for k ∈ i*vsize, i*vsize + 2 .. (i + 1)*vsize
                Q[k, offset*j*hsize] ← 0
        for j ∈ 0, 2 .. cols*hsize
            Q[i*vsize, j] ← 0
    for i ∈ 0, 2 .. levels*vsize
        Q[i, cols*hsize] ← 0
    for j ∈ 0, 2 .. cols*hsize
        Q[levels*vsize, j] ← 0
    Q
BasisDisplayPacket2d(b, level, row, col) :=
    Q ← basis_display2d(b)
    Grows ← rows(Q)
    Gcols ← cols(Q)
    for i ∈ Gcols*col/2^level, col/2^level*Gcols + 2 .. Gcols*(col + 1)/2^level - 1
        for j ∈ Grows*row/2^level, row/2^level*Grows + 2 .. Grows*(row + 1)/2^level - 1
            Q[j, i] ← 1
    Q
wavesort(W) :=
    q ← 0
    for r ∈ 0 .. rows(W) - 1
        for c ∈ 0 .. cols(W) - 1
            WS[q, 0] ← |W[r, c]|
            WS[q, 1] ← r
            WS[q, 2] ← c
            q ← q + 1
    WS ← reverse(csort(WS, 0))
    submatrix(WS, 0, rows(WS) - 1, 1, 2)
shrink(WS, n, W) :=
    M[rows(W) - 1, cols(W) - 1] ← 0
    q ← 0
    while q < n
        M[WS[q, 0], WS[q, 1]] ← W[WS[q, 0], WS[q, 1]]
        q ← q + 1
    M
wavedecomp2d(x, J, n, filter) :=
    W ← dwt(x, J, filter)
    L ← wavesort(W)
    wt[rows(W) - 1, cols(W) - 1] ← 0
    for qq ∈ 0 .. n - 1
        wt[L[qq, 0], L[qq, 1]] ← W[L[qq, 0], L[qq, 1]]
        R[qq] ← idwt(wt, J, filter)
        wt[L[qq, 0], L[qq, 1]] ← 0
    R
waveapprox2d(y, J, n, filter) :=
    W ← dwt(y, J, filter)
    L ← wavesort(W)
    yr ← shrink(L, n, W)
    idwt(yr, J, filter)
delta_shrink(v, c) :=
    for k ∈ 0 .. last(v)
        v[k] ← if(|v[k]| < c, 0, sign(v[k])*(|v[k]| - c))
    v
waveshrink(y, filter) :=
    J ← MaxDWTLevel(y)
    w ← dwt(y, J, filter)
    λ ← 2*log(length(y))
    σ ← median(vectorize(|w - median(w)|))
    c ← λ*σ
    Jmax ← if(J > 8, J - 4, J)
    for js ∈ 1 .. Jmax
        d[js] ← get_detail(w, js)
        d[js] ← delta_shrink(d[js], c)
        w ← put_detail(w, js, d[js])
    y_r ← idwt(w, J, filter)
    y_r
Concentration(v) :=
    w ← v[:, 0]
    if cols(v) > 1
        for i ∈ 1 .. cols(v) - 1
            w ← stack(w, v[:, i])
    w ← reverse(sort(vectorize(|w|)))
    totalEnergy ← w*w
    w[0] ← w[0]^2
    for i ∈ 1 .. rows(w) - 1
        w[i] ← w[i - 1] + w[i]^2
    vectorize(w/totalEnergy)
## 2D Multiresolution Analysis Functions
mra2d(v, J, filter) :=
    w ← dwt(v, J, filter)
    for ii ∈ 0 .. rows(v) - 1
        for jj ∈ 0 .. cols(v) - 1
            Z[ii, jj] ← 0
    D[0] ← idwt(put_smooth2d(Z, J, get_smooth2d(w, J)), J, filter)
    for qj ∈ J .. 1
        for ii ∈ 0 .. rows(v) - 1
            for jj ∈ 0 .. cols(v) - 1
                Z[ii, jj] ← 0
        M_H ← put_detail2d(Z, qj, get_detail2d(w, qj, "H"), "H")
        M_V ← put_detail2d(Z, qj, get_detail2d(w, qj, "V"), "V")
        M_D ← put_detail2d(Z, qj, get_detail2d(w, qj, "D"), "D")
        D[J + 1 - qj] ← idwt(M_H, J, filter) + idwt(M_V, J, filter) + idwt(M_D, J, filter)
    D
mrapprox2d(y, J, filter) :=
    D ← mra2d(y, J, filter)
    S[0] ← D[0]
    for j ∈ 1 .. J
        S[j] ← S[j - 1] + D[j]
    S
## Time-Frequency Analysis Functions
tfPlotFromLCT(w, basis, hsize, vsize) :=
    N ← rows(w)
    vextent ← N*vsize
    Q[vextent - 1, N*hsize - 1] ← 0
    for r ∈ 0 .. rows(basis) - 1
        j ← basis[r, 0]
        b ← basis[r, 1]
        ttj ← 2^j
        packet ← get_subband(w, j, b)
        for k ∈ 0 .. N/ttj - 1
            coeff ← packet[k]
            for x ∈ hsize*N*b/ttj .. hsize*N*(b + 1)/ttj - 1
                for y ∈ vsize*ttj*k .. vsize*ttj*(k + 1) - 1
                    Q[vextent - 1 - y, x] ← |coeff|
    255 - scale(Q)
tfPlotFromWPT(w, basis, hsize, vsize) :=
    N ← rows(w)
    vextent ← N*vsize
    Q[vextent - 1, N*hsize - 1] ← 0
    for r ∈ 0 .. rows(basis) - 1
        j ← basis[r, 0]
        b ← basis[r, 1]
        ttj ← 2^j
        packet ← get_subband(w, j, b)
        for k ∈ 0 .. N/ttj - 1
            coeff ← packet[k]
            for x ∈ hsize*ttj*k .. hsize*ttj*(k + 1) - 1
                for y ∈ vsize*N*b/ttj .. vsize*N*(b + 1)/ttj - 1
                    Q[vextent - 1 - y, x] ← |coeff|
    255 - scale(Q)
## Tapers that can be used with the Local Cosine Transforms lct(a,n,f) and ilct(w,n,b,f).
box(x) := (x > 1/2)
poly1(x) := sqrt(x)
poly2(x) := x*sqrt(3 - 2*x)
poly3(x) := sqrt(10*x^3 - 15*x^4 + 6*x^5)
poly4(x) := x^2*sqrt(35 - 84*x + 70*x^2 - 20*x^3)
trig(x) := sin(π/4*(1 - cos(π*x)))
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