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## WAVELETS EXTENSION PACK
## 2D Wavelet Interpolation
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# waveterp2d(x, y, v, j, n, m, filter)
# swaveterp2d(x, y, v, j, n, m, filter)
# Each of these functions performs interpolation on a particular subband of a matrix of two-dimensional (2D) wavelet packet transform data in order to generate a corresponding component of the multiresolution decomposition.
# • x, a real scalar at which to evaluate the component.
# • y, a real scalar at which to evaluate the component.
# • v, a two-dimensional wavelet packet transform.
# • j, an integer giving the scale of the desired subband.
# • n, an integer giving the row index of the desired subband in sequential order.
# • m, an integer giving the column index of the desired subband in sequential order.
# • filter, the wavelet family used in the decomposition.
## Periodic Wavelet Interpolation
# waveterp2d(x,y,v,j,n,m,filter)
# This function takes a two-dimensional periodic wavelet packet transform v, and evaluates the sum of (n,m)^th wavelet packets at scale j weighted by the appropriate coefficients from the transform v.
#
# For example, create a sum of sinusoids:
n := 32
i := 0 .. n - 1
j := 0 .. n - 1
M[i, j] := (sin(2*π*3/n*i) + sin(2*π*3/n*i))*sin(2*π*5/n*j)
# [component: inputs M]
# Then take a periodic wavelet transform of the signal:
thisWave := coiflet(12)
w := dwt(M, 2, thisWave)
# The wavelet transform here comprises seven blocks, (1,1,1), (1,0,1), (1,1,0), (2,1,1), (2,0,1), (2,1,0) and (2,0,0), each of which gives rise to a sum of wavelet packet functions which approximate a part of the above function. For example, to see the part of the signal which is a sum of father/father translations at scale 2:
Q[i, j] := waveterp2d(i, j, w, 1, 1, 0, thisWave)
# [component: inputs Q]
Q[i, j] := waveterp2d(i, j, w, 1, 1, 1, thisWave)
# [component: inputs Q]
Q[i, j] := waveterp2d(i, j, w, 1, 0, 1, thisWave)
# [component: inputs Q]
Q[i, j] := waveterp2d(i, j, w, 2, 0, 1, thisWave)
# [component: inputs Q]
Q[i, j] := waveterp2d(i, j, w, 2, 1, 0, thisWave)
# [component: inputs Q]
Q[i, j] := waveterp2d(i, j, w, 2, 1, 1, thisWave)
# [component: inputs Q]
## Symmetric Wavelet Interpolation
# swaveterp2d(x,y,v,j,n,m,filter)
# This function takes a two-dimensional symmetric wavelet packet transform v, and evaluates the sum of (n,m)^th wavelet packets at scale j weighted by the appropriate coefficients from the transform v.
# For example, create a sum of sinusoids:
j := 0 .. n - 1
i := 0 .. n - 1
n := 32
M[i, j] := (sin(2*π*3/32*i) + sin(2*π*3/16*i))*sin(2*π*3/32*j)
# [component: inputs M]
# Then take a symmetric wavelet transform of the signal:
w := dwts(M, 2, Bspline(3, 3))
# The wavelet transform here comprises seven blocks, (1,1,1), (1,0,1), (1,1,0), (2,1,1), (2,0,1), (2,1,0) and (2,0,0), each of which gives rise to a sum of wavelet packet functions which approximate a part of the above function. For example, to see the part of the signal which is a sum of father/mother translations at scale 2:
Q[i, j] := swaveterp2d(i, j, w, 2, 0, 1, Bspline(3, 3))
# [component: inputs Q]
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