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## WAVELETS EXTENSION PACK
## 1D Wavelet Interpolation
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# waveterp(x, v, j, n, filter,[o,[i]])
# swaveterp(x, v, j, n, filter)
# Each of these functions performs interpolation on a particular subband of a vector of one-dimensional (1D) wavelet packet transform data in order to generate the corresponding component of the multiresolution decomposition. The arguments to these functions are:
# • x, a real scalar at which to evaluate the component.
# • v, a real 1D wavelet packet transform vector.
# • j, an integer giving the scale of the desired subband.
# • n, an integer giving the index of the desired subband in sequential order.
# • filter, the wavelet family used in the decomposition.
# • o, (optional), an integer for an orthonormal family, or a
# 1x2 matrix of integers for a biorthogonal family, giving the
# offset(s) corresponding to the family f. If not specified, o
# is the default offset for the family f.
# • i, (optional), zero or one for an orthonormal family, or
# a 1x2 matrix whose elements are zero or one for a
# biorthogonal family, specifying negation of the default
# high pass filter coefficients for the family f. Zero specifies
# no negation; one specifies negation. If not specified, i
# represents no negation.
## Periodic Wavelet Interpolation
# waveterp(x, v, j, n, filter,[o,[i]])
# This function takes a 1D periodic wavelet packet transform v, and evaluates the sum of n^th wavelet packets at scale j weighted by the appropriate coefficients from the transform v.
#
# For example, create a sum of sinusoids:
n := 256
i := 0 .. n - 1
y[i] := sin(2*π*3/8*i) + sin(2*π*3/16*i) + sin(2*π*3/32*i)
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# Then take a periodic wavelet transform of the signal:
w := dwt(y, 3, coiflet(12))
# The wavelet transform here comprises four blocks, (1,1), (2,1), (3,1) and (3,0), each of which gives rise to a sum of wavelet packet functions which approximate a part of the above function:
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## Symmetric Wavelet Interpolation
# swaveterp(x,v,j,n,filter)
# This function takes a 1D symmetric wavelet packet transform v, and evaluates the sum of n^th wavelet packets at scale j weighted by the appropriate coefficients from the transform v.
#
# For example, create a sum of sinusoids:
n := 256
i := 0 .. n - 1
y[i] := sin(2*π*3/8*i) + sin(2*π*3/16*i) + sin(2*π*3/32*i)
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# Then take a symmetric wavelet transform of the signal:
w := dwts(y, 3, Bspline(3, 3))
# The wavelet transform here comprises four blocks, (1,1), (2,1), (3,1) and (3,0), each of which gives rise to a sum of wavelet packet functions which approximate a part of the above function:
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