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## WAVELETS EXTENSION PACK
## Wavelet Packet Bases
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# create_level(n,d) | wavebs(n,d) | pgridplot(b,n)
# Note: The function pgridplot is defined in the file wavedef.xmcd and in this worksheet. It is not part of the Wavelets Extension Pack DLL.
# create_level creates the wavelet packet basis matrix corresponding to all wavelet packets at a given level. wavebs creates the wavelet packet basis matrix corresponding to the wavelet transform at a given level. pgridplot produces a plot of the wavelet packet basis matrix b for levels 0, 1, .. n. The arguments to these functions are:
# • n, the number of levels in the basis.
# • d, the dimension of the data being processed, either 1 or 2.
# • b, the wavelet packet basis matrix.
## Creating a Basis for One Level of a Wavelet Packet Table
# create_level(n,d)
# The function create_level creates a d-dimensional wavelet packet basis comprising the collection of all wavelet packets at the level n. Recall that in one dimension, the wavelet packets at level n have oscillation parameters ranging over 0,1...2^n-1. The result returned by create_level specifies these packets, where column 0 indicates levels and column 1 indicates oscillation parameters.
create_level(3, 1) = [3, 0; 3, 1; 3, 2; 3, 3; 3, 4; 3, 5; 3, 6; 3, 7]
# In two dimensions, the wavelet packets at level n are the products of the one-dimensional (1D) wavelet packets in each dimension. The result returned by create_level specifies this set of two-dimensional (2D)
# wavelet packets, where column 0 indicates levels, column 1 indicates horizontal oscillation parameters, and column 2 indicates vertical oscillation parameters.
create_level(2, 2) = [
    2, 0, 0;
    2, 0, 1;
    2, 0, 2;
    2, 0, 3;
    2, 1, 0;
    2, 1, 1;
    2, 1, 2;
    2, 1, 3;
    2, 2, 0;
    2, 2, 1;
    2, 2, 2;
    2, 2, 3;
    2, 3, 0;
    2, 3, 1;
    2, 3, 2;
    2, 3, 3
]
## Wavelet Transform Basis from a Wavelet Packet Table
# wavebs(n,d)
# The function wavebs creates the d-dimensional wavelet packet basis with n levels corresponding to the wavelet transform. Since the mother wavelet is the wavelet packet of index 1, the wavelet basis comprises the index 1 packet at every level in addition to the father wavelet (packet index 0) at the last level. For example:
# The first entry is the father wavelet. The remaining entries are mother wavelets at each level.
wavebs(4, 1) = [4, 0; 4, 1; 3, 1; 2, 1; 1, 1]
# In two dimensions, the wavelet basis at each level is composed of three basis functions: the product of the mother in x and the mother in y; the product of the father in x and the mother in y; and the product of the mother in x and the father in y. At the final level we must also add the product of the father in x and the father in y to get a complete basis. For example:
wavebs(2, 2) = [2, 0, 0; 2, 0, 1; 2, 1, 0; 2, 1, 1; 1, 0, 1; 1, 1, 0; 1, 1, 1]
## Plotting a Basis from a Wavelet Packet Table
# pgridplot(b,n)
# This function creates a plot of the wavelet packet basis matrix b for levels 0, 1, .. n. b is a 1D wavelet packet basis matrix with 2 columns. For each row in b, column 0 indicates levels, and column 1 indicates oscillation parameters that may vary from 0 to 2^n-1. To view the pgrid plot, use the picture operator by pressing [Ctrl] T on the keyboard or choosing Picture from the Insert menu.
# Note: The function basis_display2d in the Wavelets Extension Pack DLL is used to display a 2D wavelet packet basis matrix.
pgridplot(b, levels) :=
    levels ← levels + 1
    cols ← 2^levels
    hsize ← 4
    vsize ← 16
    for i ∈ 0 .. levels*vsize
        for j ∈ 0 .. cols*hsize
            Q[i, j] ← 220
    for i ∈ 0 .. rows(b) - 1
        for j ∈ vsize*b[i, 0] .. vsize*(b[i, 0] + 1)
            offset ← 2^(levels - b[i, 0])*hsize
            for k ∈ offset*b[i, 1] .. offset*(b[i, 1] + 1)
                Q[j, k] ← 127
    for i ∈ 0 .. levels - 1
        divisions ← 2^i
        offset ← 2^(levels - i)
        for j ∈ 0 .. divisions - 1
            for k ∈ i*vsize, i*vsize + 2 .. (i + 1)*vsize
                Q[k, offset*j*hsize] ← 0
        for j ∈ 0, 2 .. cols*hsize
            Q[i*vsize, j] ← 0
    for i ∈ 0, 2 .. levels*vsize
        Q[i, cols*hsize] ← 0
    for j ∈ 0, 2 .. cols*hsize
        Q[levels*vsize, j] ← 0
    Q
# Earlier, you created a wavelet packet table T for a signal. Now extract elements of that table for further processing. The set of elements to extract is called a basis. For a basis to be valid, it must cover every column of the table once and only once. Use a pgrid plot to view the basis and verify that the basis is valid. Once you have a valid basis, extract the basis functions from the wavelet packet table and perform the inverse wavelet packet transform.
#
# Two simple bases are the DWT basis and the single-level basis. The single-level basis extracts all of the wavelet packets at a single level. An example of the level 3 basis is shown below.
b_L3 := create_level(3, 1)
J := 6
Q := pgridplot(b_L3, J)
# [component: inputs Q]
# Another common basis is the DWT, but for a DWT, it's too much work to create a wavelet packet table.
b_dwt := wavebs(6, 1)
Q := pgridplot(b_dwt, J)
# [component: inputs Q]
# For any selection of basis to be valid, it is necessary and sufficient that every column in the pgrid plot (see below) be covered, but also that there is no overlap in any column.
# The following basis selection is not valid because some columns are covered more than once:
b[1, 0] := 3
b[1, 1] := 2
b = [0, 0; 3, 2]
Q := pgridplot(b, J)
# [component: inputs Q]
b := transpose([6, 6, 5, 4, 3, 3, 1; 0, 1, 1, 1, 2, 3, 1])
# The following basis selection is not valid because some columns are not covered:
Q := pgridplot(b, J)
# [component: inputs Q]
# You can use these functions to design and plot your own bases. The next section describes how to automatically select "optimal" bases from a table using the best basis function.
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