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## WAVELETS EXTENSION PACK
## Wavelet Packet Transforms
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# wpt(a, b, f, [o, [i]]) | wpts(a, b, f) | wpti(a, b, f)
# These functions compute one- and two-dimensional (1D, 2D) wavelet packet transforms with various boundary conditions. The arguments to these functions are:
# • a, an array of data to transform.
# • b, a scalar giving the number of levels in the wavelet transform, or
# a 2- or 3-column matrix representing the wavelet packet basis on
# which to compute the transform.
# • f, the family to which the wavelet belongs.
# • o, (optional), an integer for an orthonormal family, or a
# 1x2 matrix of integers for a biorthogonal family, giving the
# offset(s) corresponding to the family f. If not specified, o
# is the default offset for the family f.
# • i, (optional), zero or one for an orthonormal family, or
# a 1x2 matrix whose elements are zero or one for a
# biorthogonal family, specifying negation of the default
# high pass filter coefficients for the family f. Zero specifies
# no negation; one specifies negation. If not specified, i
# represents no negation.
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# Wavelet Packet Analysis
## Computing a Wavelet Packet Transform
# wpt(a, b, f, [o, [i]])
# This function computes the 1D and 2D wavelet packet transform for data with periodic boundary conditions. Using periodic boundary conditions places certain restrictions on the value of the level parameter lev. When b is a scalar, lev = b. When b is a 2-or 3-column matrix representing a wavelet packet basis, lev is the maximum level in b. When a is a vector, rows(a) must be evenly divisible by 2^lev. When a is a matrix, both rows(a) and cols(a) must be evenly divisible by 2^lev. A simple example using this function follows.
J := 6
N := 1024
i := 0 .. N - 1
t[i] := i/N
y[i] := sin(0.125*π*1024*t[i]^2)  # Create a linear chirp signal.
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w := wpt(y, J, daublet(8))  # Compute the wavelet packet transform using the built-in daublet function.
# The result returned from wpt is referred to as a wavelet packet table.
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# Wavelet Packet Table
max(vectorize(|w[0] - y|)) = 0
# The plot of the wavelet packet table w is illustrated in the figure below. Each resolution level has N coefficients and is divided into blocks, according to the oscillation index. Level 0 reproduces the original signal. Resolution levels 1 through 6 are plotted below. On each level, the leftmost block has oscillation index 0. Hence, low frequency coefficients are on the left side of the table and high frequency coefficients are on the right.
#
# The wavelet packet coefficient w[j, b, k] is plotted at the kth coefficient in the bth block of the jth row. The coefficients have been rescaled by the vector A. The x-axis shows the coefficient index for each level.
j := 0 .. J
A[j] := 1/max(vectorize(|w[j]|))
A = [1; 0.707053; 0.501115; 0.3547; 0.248814; 0.16894; 0.132049]
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# The 1D wavelet packet table is implemented as a (J+1) row vector of nested N-element vectors.
# The wavelet packet table has a lot of redundancy in it. To analyze the signal it is often useful to select N coefficients from the table to create an orthogonal (linearly independent) wavelet packet transform (WPT) from the table. Note that WPT is a wavelet packet transform, not a wavelet packet table. Only very special sets of coefficients give orthogonal transforms. One special case of an orthogonal WPT is the DWT. There are many other WPTs as well.
w = [
    [
        0; 0.000383495; 0.00153398; 0.00345145; 0.00613588; 0.00958723; 0.0138054; 0.0187902; 0.0245412; 0.0310581
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    ];
    [
        -1.32421; -0.162928; 0.00218109; 0.00870088; 0.0195589; 0.0347534; 0.0542798; 0.0781283; 0.106282; 0.138711
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    ];
    [
        1.01985; -1.07998; -0.0344171; 0.0277603; 0.0769309; 0.150542; 0.248324; 0.369659; 0.513365; 0.677435
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    ];
    [
        0.0260841; -0.185226; -0.271829; 0.109284; 0.352158; 0.727616; 1.21683; 1.77534; 2.3201; 2.72232
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    ];
    [
        0.030293; -0.0874693; -0.242667; 0.501077; 1.73458; 3.31464; 4.01907; 2.07774; -2.25682; -3.84841
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    ];
    [
        0.00154527; -0.00162305; -0.329801; 2.73612; 5.91926; -4.40911; 2.38012; -1.0721; 0.164853; 0.115248
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    ];
    [
        0.0187603; -0.48837; 2.18546; 2.22458; -0.0212762; -0.0701989; 0.00486048; -0.0253792; 0.0274339; -0.00595782
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    ]
]
# You can obtain the (J+1)N WPT coefficients w through the linear transformation
w == W*f
# where W is a (J+1)N x N matrix. A WPT is equivalent to selecting N linearly independent rows from the matrix W to obtain an orthogonal N x N matrix w':
w' == W'*f
# To compute a wavelet packet table or a WPT, you don't actually perform the matrix multiplication. Instead, you use a fast algorithm similar to the pyramid algorithm. This section explains how to select orthogonal transforms from a wavelet packet table. Later sections discuss automatic selection of optimal transforms from a table. This process is called basis selection.
# For 2D data, the information in the table is stored as in the 1D case. The rows of the resultant vector correspond to particular levels and can be extracted using the subscript operator. Row zero contains the original 2D data.
## Computing a Symmetric Wavelet Packet Transform
# wpts(a, b, f)
# This function computes the 1D and 2D wavelet packet transform for data with symmetric boundary conditions. These boundary conditions have the benefit that they do not have parity restrictions on the data a. However, the symmetric wavelet transform requires the use of a wavelet that is itself symmetric. This restricts the choice of wavelets that you can use with the function wpts to the biorthogonal spline wavelets Bspline(m,n), the Battle-Lemarie wavelets bl(n), and the Haar wavelet daublet(2).
#
# Although the parity restrictions of the periodic boundary conditions are lifted with symmetric boundary conditions there are still conditions on the level parameter lev. When b is a scalar, lev = b. When b is a 2-or 3-column matrix representing a wavelet packet basis, lev is the maximum level in b. For 1D data a, it is required that rows(a)>2^lev and for 2D data a it is required that rows(a) > 2^lev and cols(a)>2^lev. A simple example using this function follows.
i := 0 .. 383
v[i] := rnd(1)  # Create a random vector.
T := wpts(v, 3, Bspline(2, 2))  # Take the forward wavelet packet transform using the built-in wavelet function Bspline.
# The result of wpts is referred to as a wavelet packet table.
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# Wavelet Packet Table
max(vectorize(|T[0] - v|)) = 0
# For 2D data, the information in the table is stored as in the 1D case. The rows of the resultant vector correspond to particular levels and can be extracted using the subscript operator. Row zero contains the original 2D data.
## Computing an Interval Wavelet Packet Transform
# wpti(a, b, f)
# This function implements the 1D and 2D wavelet packet transforms using wavelets on an interval following the construction given in Cohen, Daubechies and Vial, "Wavelets on the Interval and Fast Wavelet Transforms." Instead of using an extension of the data to implement a boundary condition, this technique uses special wavelets that live at the edges of the data to avoid spilling out over those edges. Such special wavelets have only been implemented for the wavelets symmlet(4) through symmlet(16) and daublet(4) through daublet(6). Thus, you are restricted to using these wavelets with the interval wavelet packet transform.
#
# There are also restrictions on the length of the data that depend on the level parameter lev. When b is a scalar, lev = b. When b is a 2-or 3-column matrix representing a wavelet packet basis, lev is the maximum level in b. For 1D data, rows(a) must be divisible by 2^lev and length(a)/2^lev > m where the symmlet(m) or daublet(m) wavelet is being used in the analysis. For 2D data, these conditions must be satisfied by rows(a) and cols(a).
i := 0 .. 383
v[i] := rnd(1)  # Create a random vector.
T := wpti(v, 3, symmlet(8))  # Take the forward wavelet packet transform using the built-in wavelet function symmlet.
# The result of wpti is referred to as a wavelet packet table.
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# Wavelet Packet Table
max(vectorize(|T[0] - v|)) = 0
# For 2D data, the information in the table is stored as in the 1D case. The rows of the resultant vector correspond to particular levels and can be extracted using the subscript operator. Row zero contains the original 2D data.
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