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## WAVELETS EXTENSION PACK
## The Best Basis Algorithm
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# best_basis(T, f) | basis_display2d(b)
# best_basis creates the best packet basis from a packet table T and an additive cost function f. basis_display2d is used to display a 2D packet basis matrix. The arguments to these functions are:
# •  T, the wavelet packet table created by wpt, or the cosine packet table
# created by lct or cpt.
# •  f, the additive cost function.
# •  b, the 2D packet basis matrix.
# Note: See the discussion in Local Cosine Transforms regarding lct, cpt, and cosine packet tables.
## The Best Basis Algorithm
# best_basis(T, f)
# This function creates a best basis for selecting a wavelet packet transform from the wavelet packet table T. A basis is "best" if it minimizes the cost function f. Sample cost functions are:
# abs(x)
# Use the absolute value of x as the cost function.
abs(x) := |x|
# thresh(x)
# Keep only those coefficients of x which are larger than some threshold. The default threshold is .5, but it should be modified to reflect the range of the data.
thresh(x) := |x| > 0.5
# entropy(x)
# This cost function maximizes the concentration of the data to a few coefficients.
entropy(x) == -(x/nrm)^2*ln((x/nrm)^2)
# where nrm is equal to the square root of the sum of the squares of the data values.
# Coifman and Wickerhauser developed the "best basis" algorithm for selecting optimal bases (that is, transforms) from wavelet packet tables. The best basis algorithm automatically adapts the transform to best match the characteristics of the signal. The best basis algorithm finds the wavelet packet transform W that minimizes an additive cost function E:
E(W) == sum(E(w[j, b]), (j, b)*in*I)
# where I is the set of index pairs (j,b) of the basis vectors in the transform W.
# For this example, a wavelet packet table for a linear chirp is created. entropy(x) is used as the cost function.
pgridplot(b, levels) :=
    levels ← levels + 1
    cols ← 2^levels
    hsize ← 4
    vsize ← 16
    for i ∈ 0 .. levels*vsize
        for j ∈ 0 .. cols*hsize
            Q[i, j] ← 220
    for i ∈ 0 .. rows(b) - 1
        for j ∈ vsize*b[i, 0] .. vsize*(b[i, 0] + 1)
            offset ← 2^(levels - b[i, 0])*hsize
            for k ∈ offset*b[i, 1] .. offset*(b[i, 1] + 1)
                Q[j, k] ← 127
    for i ∈ 0 .. levels - 1
        divisions ← 2^i
        offset ← 2^(levels - i)
        for j ∈ 0 .. divisions - 1
            for k ∈ i*vsize, i*vsize + 2 .. (i + 1)*vsize
                Q[k, offset*j*hsize] ← 0
        for j ∈ 0, 2 .. cols*hsize
            Q[i*vsize, j] ← 0
    for i ∈ 0, 2 .. levels*vsize
        Q[i, cols*hsize] ← 0
    for j ∈ 0, 2 .. cols*hsize
        Q[levels*vsize, j] ← 0
    Q
N := 1024
J := 6
i := 0 .. N - 1
t[i] := i/N
filter := symmlet(8)
lc[i] := sin(0.125*π*1024*t[i]^2)
w := wpt(lc, J, filter)
nrm := sqrt(lc*lc)
entropy(x) := -(x/nrm)^2*ln((x/nrm)^2)
b_entropy := best_basis(w, entropy)
Q := pgridplot(b_entropy, J)
# [component: inputs Q]
# You can extract the basis with the function extract basis.
w_bb := extract_basis(w, b_entropy)
# You must pass the basis description along with the coefficients of the wavelet packet basis to the iwpt function:
lc_rbb := iwpt(w_bb, b_entropy, filter)
# How well did it work?
max(vectorize(|lc_rbb - lc|)) = 3.45968e-12
# As should be the case with any valid basis, there is perfect reconstruction with the basis.
# Try this with the level basis, for comparison
level := 3
b_level := create_level(level, 1)
w_lb := extract_basis(w, b_level)
lc_rlb := iwpt(w_lb, b_level, filter)
max(vectorize(|lc_rlb - lc|)) = 1.64291e-12
# And with the DWT basis, also for comparison
b_dwt := wavebs(6, 1)
w_db := extract_basis(w, b_dwt)
lc_rdb := iwpt(w_db, b_dwt, filter)
max(vectorize(|lc_rdb - lc|)) = 1.98552e-12
## Some Other Best Basis Cost Functions
# The entropy function is not the only cost function which can be used. The abs(x) function returns the absolute value of the magnitude of the vector. The thresh(x) function returns 1 if x > 0.5 and zero otherwise. This value may be modified to suit the application. For example:
thresh(x) := |x| > 0.95
b_thresh := best_basis(w, thresh)
Q := pgridplot(b_thresh, J)
# [component: inputs Q]
b_abs := best_basis(w, abs)
Q := pgridplot(b_abs, J)
scale(M) :=
    myMax ← max(M)
    myMin ← min(M)
    vectorize((M - myMin)/(myMax - myMin)*255)
# [component: inputs Q]
## 2D Basis Selection
# basis_display2d(b)
Vbox(nrow) :=
    for i ∈ 0 .. nrow - 1
        for j ∈ 0 .. nrow - 1
            box[i, j] ← 255
    lb ← nrow/8
    for i ∈ lb .. lb*7
        for j ∈ lb .. lb*3
            box[i, j] ← 0
        box[i, lb*7] ← 0
        for j ∈ lb .. lb*2
            box[j, i] ← 0
        box[i, lb*3] ← 0
        box[i, lb*4] ← 0
        box[i, lb*5] ← 0
        box[i, lb*6] ← 0
        box[i, i] ← 0
        box[i, i + lb - 1] ← 127
        box[i, 7*lb - i] ← 127
    box
# This function creates a matrix for graphically displaying two-dimensional (2D) best basis b.
#
# The following illustration of 2D wavelet packet transforms uses the Vbox function (defined to the right) with the 3-level wavelet transform.
vbox := Vbox(32)
filter := daublet(4)
J := 3
vbox_m := vbox - mean(vbox)
T := wpt(vbox_m, J, filter)
# [component: inputs 255 - scale(T[0])]
# [component: inputs 255 - scale(T[1])]
255 - scale(T[0])
255 - scale(T[1])
# [component: inputs 255 - scale(T[2])]
# [component: inputs 255 - scale(T[3])]
255 - scale(T[2])
255 - scale(T[3])
# As in the 1D case, there are many possible 2D wavelet packet transforms. For wavelet packets, you can split a coefficient block into separate blocks or merge separate blocks into a single block. Fortunately, the Coifman and Wickerhauser best basis algorithm extends to two dimensions.
vi := 0 .. rows(vbox_m) - 1
vj := 0 .. cols(vbox_m) - 1
nrm := sqrt(sum(sum(vbox_m[vi, vj]^2, vj), vi))
entropy(x) := -(x/nrm)^2*ln((x/nrm)^2)
b_bbe := best_basis(T, entropy)
# To visualize the basis, use the basis_display2d function:
Q := basis_display2d(b_bbe)
# Then press [Ctrl] T on the keyboard or choose Picture from the Insert menu to display the matrix.
# [component: inputs Q]
# Since it is sometimes difficult to interpret a basis display, there is another basis display function which may make it a little easier. Below are three examples which select different parts of the basis to show what basis components are covering which part of the transform table.
# The function BasisDisplayPacket2d is defined to the right of this region and
# in the file wavedef.xmcd.
BasisDisplayPacket2d(b, level, row, col) :=
    Q ← basis_display2d(b)
    Grows ← rows(Q)
    Gcols ← cols(Q)
    for i ∈ Gcols*col/2^level, col/2^level*Gcols + 2 .. Gcols*(col + 1)/2^level - 1
        for j ∈ Grows*row/2^level, row/2^level*Grows + 2 .. Grows*(row + 1)/2^level - 1
            Q[j, i] ← 1
    Q
level := 1
row := 1
col := 1
Q := BasisDisplayPacket2d(b_bbe, level, row, col)
# [component: inputs Q]
level := 3
row := 0
col := 1
Q := BasisDisplayPacket2d(b_bbe, level, row, col)
# [component: inputs Q]
# You can combine several columns:
level := 2
row := 0
col := 0
Q := BasisDisplayPacket2d(b_bbe, level, row, col)
# [component: inputs Q]
# There are other bases besides the best basis. The wavebs function returns a basis which corresponds to the DWT. The create_level function returns a basis which is a specific level.
J = 3
b_dwt := wavebs(J, 2)
Q := basis_display2d(b_dwt)
# [component: inputs Q]
b_L := create_level(2, 2)
level := 2
row := 1
col := 2
Q := basis_display2d(b_L)
# [component: inputs Q]
Q := BasisDisplayPacket2d(b_L, level, row, col)
# [component: inputs Q]
# Now that you have selected the basis, you can extract it with the function extract_basis, reconstruct it, and compute the reconstruction error.
w_bbe := extract_basis(T, b_bbe)
vbox_r := iwpt(w_bbe, b_bbe, filter)
RMS(M) := sqrt(sum(sum(M[i, j]^2, j = 0 .. cols(M) - 1), i = 0 .. rows(M) - 1))/(rows(M)*cols(M))
RMS(vbox_r - vbox_m) = 6.52671e-15
# As should be the case with any valid basis, there is perfect reconstruction using the best basis.
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