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## WAVELETS EXTENSION PACK
## Fingerprint Identification
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# Wavelets have been found particularly useful for compressing digitized fingerprints. Digital fingerprints are created at a resolution of 500 pixels per inch and 256 gray scale levels (8 bits). As a result, a typical uncompressed fingerprint image requires roughly half a megabyte of storage. Wavelet methods were selected as part of an FBI standard for compression of fingerprint images. This section analyzes a fingerprint image using the approach in the FBI standard.
# For example, begin by importing data in a sample fingerprint image from fingerpr.txt.
# [component: outputs F]
# Click on the input table to the left until you see the handles, and enlarge it to see the data used in this example.
# This fingerprint image is a 512x512 matrix, rotated 90 degrees. First, undo the rotation:
F := transpose(submatrix(F, rows(F) - 1, 0, cols(F) - 1, 0))
# Handling a 512x512 matrix is a lot of work. To speed computation, you can reduce this image to 256x256 by performing a 2x2 block average. This average can be done quickly using the wavelet transform with a Haar wavelet:
Haar := daublet(2)
F_dwt := dwt(F, 1, Haar)
# Extract the level 1 packet from dwt.
F_reduced := get_subband2d(F_dwt, 1, 0, 0)
F := scale(F_reduced)  # Rescale the image to the range 0 to 255.
# where
scale(M) ≡
    myMax ← max(M)
    myMin ← min(M)
    vectorize((M - myMin)/(myMax - myMin)*255)
# [component: inputs F]
## The Proposed FBI Standard
# The proposed FBI standard is based on a specific wavelet packet transform with 64 subbands, using a symmlet(8) wavelet. The FBI basis is included below:
# [component: outputs T]
rows(T) = 64
cols(T) = 9
# Extract the FBI basis from the table T and plot it:
FBIbasis := submatrix(T, 0, rows(T) - 1, 6, 8)
Q := basis_display2d(FBIbasis)
# [component: inputs Q]
Concentration(v) :=
    w ← v[:, 0]
    if cols(v) > 1
        for i ∈ 1 .. cols(v) - 1
            w ← stack(w, v[:, i])
    w ← reverse(sort(vectorize(|w|)))
    totalEnergy ← w*w
    w[0] ← w[0]^2
    for i ∈ 1 .. rows(w) - 1
        w[i] ← w[i - 1] + w[i]^2
    vectorize(w/totalEnergy)
rows(FBIbasis) = 64
cols(FBIbasis) = 3
# Now subtract the mean from the image, and create a level-5 wavelet packet table:
filter := symmlet(8)
F_mean := mean(F)
F1 := F - F_mean
J := 5
F1_wpt := wpt(F1, 5, filter)
# For a 256x256 pixel image, setting the level J=5 gives an 8x8 block size.
# Next, compare the ability of the DWT and the Best Basis WPT to the FBI WPT to compress the image energy into a few coefficients.
w_FBI := extract_basis(F1_wpt, FBIbasis)
# [component: inputs basis_display2d(FBIbasis)]
# The FBI Basis
C_fbi := Concentration(w_FBI)
b_dwt := wavebs(J, 2)
w_dwt := dwt(F1, J, filter)
C_dwt := Concentration(w_dwt)
ii := 0 .. rows(F1) - 1
jj := 0 .. cols(F1) - 1
nrm := sqrt(sum(sum(F1[ii, jj]^2, jj), ii))
entropy(x) := -(x/nrm)^2*ln((x/nrm)^2)
# [component: inputs basis_display2d(b_dwt)]
# The DWT basis
BestBasis := best_basis(F1_wpt, entropy)
w_BBE := extract_basis(F1_wpt, BestBasis)
C_BBE := Concentration(w_BBE)
# Next, notice how much of the energy is captured in the top 5% of the coefficients.
# [component: inputs basis_display2d(BestBasis)]
# The best basis
N := rows(F_reduced)*cols(F_reduced)
P_keep := 5 %
N_keep := floor(P_keep*N)
N_keep = 3276
i2 := 1 .. ceil(N_keep/500)*500
# Now compare the concentration obtained with each of the 3 transforms:
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# The horizontal lines illustrate the concentration for 5% of the coefficients, as marked by the vertical line. The solid lines are the concentration of the DWT, FBI, and Best Basis as a function of the number of coefficients.
# You can also plot the mean-squared error for the three bases, which is defined as (1 - Concentration), and plot it against the compression ratio. The compression ratio is the total number of coefficients divided by the number of kept coefficients.
i3 := ceil(N/100), ceil(2*N/100) .. N - 3
CR[i3] := N/i3
MSE_fbi[i3] := 1 - C_fbi[i3]
MSE_bbe[i3] := 1 - C_BBE[i3]
MSE_dwt[i3] := 1 - C_dwt[i3]
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wavesort(W) :=
    q ← 0
    for r ∈ 0 .. rows(W) - 1
        for c ∈ 0 .. cols(W) - 1
            WS[q, 0] ← |W[r, c]|
            WS[q, 1] ← r
            WS[q, 2] ← c
            q ← q + 1
    WS ← reverse(csort(WS, 0))
    submatrix(WS, 0, rows(WS) - 1, 1, 2)
# Now you can reconstruct the fingerprints from the three transforms using only the top 5% of the coefficients.
lin_fbi := wavesort(w_FBI)
lin_dwt := wavesort(w_dwt)
lin_bbe := wavesort(w_BBE)
shrink(WS, n, W) :=
    M[rows(W) - 1, cols(W) - 1] ← 0
    q ← 0
    while q < n
        M[WS[q, 0], WS[q, 1]] ← W[WS[q, 0], WS[q, 1]]
        q ← q + 1
    M
w'_FBI := shrink(lin_fbi, N_keep, w_FBI)
w'_dwt := shrink(lin_dwt, N_keep, w_dwt)
w'_bbe := shrink(lin_bbe, N_keep, w_BBE)
F_r.fbi := iwpt(w'_FBI, FBIbasis, filter)
F_r.dwt := idwt(w'_dwt, J, filter)
F_r.bbe := iwpt(w'_bbe, BestBasis, filter)
## Reconstruction of the Fingerprint Image
# Original fingerprint | DWT
# [component: inputs scale(F1)]
# [component: inputs scale(F_r.dwt)]
# WPT with the FBI basis | WPT with the best basis
# [component: inputs scale(F_r.fbi)]
# [component: inputs scale(F_r.bbe)]
# DWT is more smudged than the WPT transforms. The area near the center of the whorl is much clearer than the DWT. The higher oscillation indices in the WPT capture the ripples more effectively, and after all, a fingerprint is an collection of ripples.
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