## Biorthogonal Wavelet Families
# Biorthogonal wavelets are symmetric and do not introduce phase shifts in the coefficients, which can be important for certain applications.  However, a biorthogonal wavelet transform is not orthogonal.  For the most part, you can use a biorthogonal wavelet just as you would an orthogonal wavelet.  This section gives some background on biorthogonal wavelets, including why they are called "biorthogonal."
# Biorthogonal wavelet analysis starts with four basic function types:  father, mother, dlfather, and dlmother.  We use the prefix "dl" to indicate the dual wavelet. The functions father and mother are the usual father and mother wavelets, and play the same role as before in computing the wavelet coefficients. The functions dlfather and dlmother are called the dual wavelets. The biorthogonal wavelet approximation is expressed in terms of the dual wavelet functions:
f(t) == sum(s[J, k]*dlfather[J, k]*t, k) + sum(d[J, k]*dlmother[J, k]*t, k) + sum(d[J - 1, k]*dlmother[J - 1, k]*t, k) + ... + sum(d[1, k]*dlmother[1, k]*t, k)
# where
s[J, k] == integral(f(x)*father[J, k]*x, x = -∞ .. ∞)
# and
d[j, k] == integral(f(x)*mother[j, k]*x, x = -∞ .. ∞)
# Hence, father and mother are used to "analyze" the signal while dlfather and dlmother are used to "synthesize" the signal.
#
# Note:  The orthogonal wavelet approximation is obtained by setting dlfather = father and dlmother = mother.
# In general, biorthogonal wavelets are not orthogonal and do not satisfy the previous orthogonality relationships.  However, they do satisfy a biorthogonal relationship:
integral(father[J, k]*t*dlfather[J, k']*t, t = -∞ .. ∞) == δ[k, k']
integral(mother[j, k]*t*dlfather[J, k']*t, t = -∞ .. ∞) == 0
integral(mother[j, k]*t*dlmother[j', k']*t, t = -∞ .. ∞) == δ[j, j']*δ[k, k']
# where
δ[x, x'] == {
    1 if x == x'
    0 otherwise
}
# Note: The father and mother wavelets and their duals may be reversed. You may use father and mother in the wavelet approximation and the dual wavelets dlfather and dlmother to compute the wavelet coefficients.  In other words, use the original wavelet approximation but compute the wavelet coefficients with father and mother replaced by dlfather and dlmother.
