## Parent Wavelets
# Wavelets have a gender: there are father wavelets and mother wavelets. Roughly speaking, the father wavelets are good at representing the smooth and low-frequency parts of a signal, and the mother wavelets are good at representing the detail and high-frequency parts of a signal.
#
# Father and mother wavelet pairs come in families. There are many different families of orthogonal wavelets. The father wavelet integrates to 1 and the mother wavelet integrates to 0:
# integral(father(x), x = -∞ .. ∞) == 1 and
integral(mother(x), x = -∞ .. ∞) == 0
# These properties can easily be visualized by using the function defined
# below to integrate the wavelet vectors.
Integrate(yarray, xarray) :=
    N ← last(yarray)
    integral[0] ← 0
    for k ∈ 1 .. N
        Δ ← xarray[k] - xarray[k - 1]
        integral[k] ← integral[k - 1] + (yarray[k - 1] + yarray[k])/2*Δ
    integral
lo := -5
hi := 5.5
N := 200
i := 0 .. N - 1
Δ := (hi - lo)/N
x[i] := lo + i*Δ
F := vectorize(father(x, 0, 0, "c12"))
IF := Integrate(F, x)
M := vectorize(mother(x, 0, 0, "c12"))
IM := Integrate(M, x)
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# Except in some special cases, there is no analytic formula for computing a wavelet function. Instead, wavelet functions are computed using a special two-scale dilation equation (see section 12.5 of Bruce and Gao).
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