## Scale and Location Families: The Parameters j and k
# The functions father(x,j,k,s) and mother(x,j,k,s) are scaled and translated versions of father(x,0,0,s) and mother(x,0,0,s) with scale factor 2^j and translation parameter 2^jk, respectively. The scale factor 2^j is also called the dilation factor and the translation parameter 2^jk is also called the location.
#
# As j gets larger, the scale factor 2^j increases, and the functions father(x,j,k,s) and mother(x,j,k,s) decrease in amplitude and spread out. Conversely, when j gets smaller the scale factor 2^j decreases, and the functions father(x,j,k,s) and mother(x,j,k,s) increase in amplitude and squeeze in. Thus, 2^j is a measure of the scale, or width, of the functions father(x,j,k,s) and mother(x,j,k,s). The translation parameter 2^jk is matched to the scale parameter in the sense that as the functions father(x,j,k,s) and mother(x,j,k,s) get wider, their translation steps are correspondingly larger.
# Changing k changes the position of the wavelet. Therefore, it is called the translation parameter. As an example, look at various wavelets with different location parameters.
