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# WAVELETS EXTENSION PACK
## Appendix E: Test Signals and Other Useful Functions
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## Test Signals
ramp(x) := x - Φ(x - .37)
bump(ω) := Φ(ω) - Φ(ω - 1)
ramp2(x) := 2*x - Φ(x - .37) - Φ(x - .63)
doppler(x) := sqrt(x*(1 - x))*sin(2.1*π/(x + 0.05))
h_bumps := transpose([4, 5, 3, 4, 5, 4.2, 2.1, 4.3, 3.1, 5.1, 4.2])
p_bumps := transpose([.1, .13, .15, .23, .25, .4, .44, .65, .76, .78, .81])
w_bumps := transpose([.005, .005, .006, .01, .01, .03, .01, .01, .005, .008, .005])
bumps(x) := sum(h_bumps[jj]/(1 + |x - p_bumps[jj]|/w_bumps[jj])^4, jj = 0 .. 10)
## The Vbox Test Image
Vbox(nrow) :=
    for i ∈ 0 .. nrow - 1
        for j ∈ 0 .. nrow - 1
            box[i, j] ← 255
    lb ← nrow/8
    for i ∈ lb .. lb*7
        for j ∈ lb .. lb*3
            box[i, j] ← 0
        box[i, lb*7] ← 0
        for j ∈ lb .. lb*2
            box[j, i] ← 0
        box[i, lb*3] ← 0
        box[i, lb*4] ← 0
        box[i, lb*5] ← 0
        box[i, lb*6] ← 0
        box[i, i] ← 0
        box[i, i + lb - 1] ← 127
        box[i, 7*lb - i] ← 127
    box
## The Ideal Wavelets
mother_ideal(x) := sin(π*x)/(π*x)*(cos(π*x) - 1)
father_ideal(x) := sin(π*x)/(π*x)
## Array Integration
Integrate(yarray, xarray) :=
    N ← last(yarray)
    integral[0] ← 0
    for k ∈ 1 .. N
        Δ ← xarray[k] - xarray[k - 1]
        integral[k] ← integral[k - 1] + (yarray[k - 1] + yarray[k])/2*Δ
    integral
## Other Useful Functions
# Root mean square estimate of error which can accept a matrix, a row vector, or a column vector.
RMS(M) := sqrt(sum(sum(M[i, j]^2, j = 0 .. cols(M) - 1), i = 0 .. rows(M) - 1))/(rows(M)*cols(M))
# These cost functions can be used with the function best_basis:
# nrm is equal to the square root of the sum
# of the squares of the data values.
entropy(x) == -(x/nrm)^2*ln((x/nrm)^2)
thresh(x) := |x| > 0.5  # The threshold constant can be changed to anything.
abs(x) := |x|
# The following two functions return matrices filled with zeroes. zeroMsq returns a square matrix, zeroM a rectangular one.
zeroMsq(n) :=
    M ← 0
    M[n - 1, n - 1] ← 0
    M
zeroM(n, m) :=
    M ← 0
    M[n - 1, m - 1] ← 0
    M
# The following functions work together to find a basis based on a threshold. Flatten converts a matrix to a vector for sorting. The function findThresh returns a threshold which is greater than Percent of the coefficients. For a matrix, it calls Flatten to convert the matrix to a vector for sorting.
Flatten(A) :=
    v ← A[:, 0]
    for L ∈ 1 .. cols(A) - 1
        v ← stack(v, A[:, L])
    v
findThresh(T, Percent) :=
    V ← T[1]
    for L ∈ 2 .. rows(T) - 1
        V ← stack(V, T[L])
    V ← Flatten(V) if cols(V) > 1
    V ← sort(vectorize(|V|))
    V[floor(rows(V)*Percent)]
# This function implements the up-sample by 2 operation. The up-sample by 2 operation causes image sizes to increase.
upsample2(M) :=
    T[2*rows(M) - 1, 2*cols(M) - 1] ← 0
    for i ∈ 0 .. rows(M) - 1
        for j ∈ 0 .. cols(M) - 1
            T[2*i + 1, 2*j + 1] ← M[i, j]
            T[2*i + 1, 2*j] ← M[i, j]
            T[2*i, 2*j] ← M[i, j]
            T[2*i, 2*j + 1] ← M[i, j]
    T
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