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## WAVELETS EXTENSION PACK
## Appendix B:  Wavelet Families
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# This appendix is provided to give a graphical representation of the
# various wavelet families.
## Orthogonal Wavelets
## The Haar Wavelet
# The Haar wavelet is a square wave. It was discovered by the mathematician Haar in 1910 (see Haar), and provided the first known orthogonal wavelet series representation. The wavelet has compact support, that is, it is zero outside a finite interval. It is the only compact orthogonal wavelet which is symmetric. However, unlike the other wavelets, the Haar wavelet is not continuous.
lo := -1
hi := 2
N := 300
Δ := (hi - lo)/N
i := 0 .. N - 1
x[i] := lo + Δ*i
Haar := "d2"
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## Daubechies Wavelets
# The daublets were the first type of continuous orthogonal wavelet families with compact support. This type of wavelet is named in honor of its discoverer Ingrid Daubechies, who is one of the pioneers in wavelets research.
lo := -3
hi := 5
N := 300
Δ := (hi - lo)/N
i := 0 .. N - 1
x[i] := lo + Δ*i
# Allowable filter values: "dn" implemented for n = 2 through 20 and even.
filter := "d4"
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## Symmlets: Least Asymmetric Wavelets
# The symmlets have compact support and were constructed by Daubechies. The daublets are quite asymmetrical, and the symmlets were constructed to be as nearly symmetrical as possible.
lo := -3
hi := 5
Δ := (hi - lo)/N
x[i] := (lo + Δ*i)
# Allowable filter values: "sn" implemented for n = 4 through 20 and even.
filter := "s8"
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filter := "s10"
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lo := -3
hi := 5
Δ := (hi - lo)/N
x[i] := (lo + Δ*i)
filter := "s12"
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## Coiflets
# The coiflets were constructed by Daubechies to be nearly symmetrical and also have additional properties thought to be desirable (vanishing moments for both father and mother). Daubechies used the name coiflets in honor of Ronald Coifman, another contributor to the theory and practice of wavelets.
lo := -3
hi := 5
Δ := (hi - lo)/N
x[i] := (lo + Δ*i)
# Allowable filter values: "cn" implemented for n = 6, 12, 18, 24 and 30.
filter := "c6"
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lo := -3
hi := 5
Δ := (hi - lo)/N
x[i] := (lo + Δ*i)
filter := "c12"
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## Battle-Lemarie
# Allowable filter values: "bln" implemented for n = 0,1..6.
filter := "bl2"
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## Biorthogonal Wavelets
## Bspline
lo := -3
hi := 4
Δ := (hi - lo)/N
x[i] := (lo + Δ*i)
# Allowable filter values: "bsmn" implemented for (mn) = 11-15 odd, 22-28 even, and 31-39 odd. Try some examples: "bs33," "bs37," "bs22," and so on.
filter := "bs33"
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# Dual wavelets:
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