# Title: Concentrated Load on the Horizontal Member
# Description: Formulas for stress and strain on an elastic frame with a concentrated load on its horizontal member.
# Worksheet setting: ORIGIN = 1
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# ENGINEERING APPLICATIONS
# quicksheets
# Concentrated Load on the Horizontal Member
# This file corresponds to Cases 5a, 6a, 7a, 8a, 9a, 10a, 11a and 12a in Roark's Formulas for Stress and Strain, 2e.
# This file contains the general formulas for the reaction moment, horizontal end reaction, vertical end reaction, horizontal deflection, vertical deflection and angular rotation at the left edge of an elastic frame with a concentrated load on its horizontal member. Because the constants and loading terms necessary to calculate these formulas remain the same under certain conditions, the following eight restraint conditions with the same load have been included in this file:
# Case 5:  Left end fixed, right end fixed
# Case 6:  Left end pinned, right end fixed
# Case 7:  Left end guided horizontally, right end fixed
# Case 8:  Left end guided vertically, right end fixed
# Case 9:  Left end roller supported along the horizontal, right end fixed
# Case 10: Left end roller supported along the vertical, right end fixed
# Case 11: Left end guided by moment only (zero slope at the left end), right end fixed
# Case 12: Left end free, right end fixed
# The following sketches should be referred to for definitions of dimensions and loadings:
## Elastic Frame
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## Concentrated load on the horizontal member
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## Enter dimensions, properties and loading
# Before progressing further, calculate the area moments of inertia (I) for your cross section by linking to Table 1. Enter the computed values below:
# Area moments of inertia:
I_1 ≡ 8*in^4
I_2 ≡ 10*in^4
I_3 ≡ 4*in^4
# Lengths:
L_1 ≡ 40*in
L_2 ≡ 20*in
L_3 ≡ 15*in
# Distance from left edge to load:
a ≡ 12*in
# Moduli of elasticity:
E_1 ≡ 30*10^6*lbf/in^2
E_2 ≡ 30*10^6*lbf/in^2
E_3 ≡ 30*10^6*lbf/in^2
# Load:
W ≡ 10*10^4*lbf
## Constants
# These constants are used in the formulas to calculate the reaction moment, horizontal and vertical end reactions, horizontal and vertical deflections and angular rotation at A:
# Note: The green parentheses around the definitions below indicate that provenance has been added to them. You can view these annotations by right-clicking on each equation after selecting the entire equation within the parentheses.
C_HH := L_1^3/(3*E_1*I_1) + (L_1^3 - (L_1 - L_2)^3)/(3*E_2*I_2) + L_1^2*L_3/(E_3*I_3)
# annotation to a formula above: Roark's Formulas for Stress and Strain, by Warren C. Young, McGraw-Hill ©1989.
C_VH := L_2*L_3/(2*E_2*I_2)*(2*L_1 - L_2) + L_1*L_3^2/(2*E_3*I_3)
C_HV := C_VH
C_MH := L_1^2/(2*E_1*I_1) + L_2/(2*E_2*I_2)*(2*L_1 - L_2) + L_1*L_3/(E_3*I_3)
C_HM := C_MH
C_VV := L_2*L_3^2/(E_2*I_2) + L_3^3/(3*E_3*I_3)
C_MV := L_2*L_3/(E_2*I_2) + L_3^2/(2*E_3*I_3)
C_VM := C_MV
C_MM := L_1/(E_1*I_1) + L_2/(E_2*I_2) + L_3/(E_3*I_3)
## Loading Terms
LF_H := W*(L_2/(2*E_2*I_2)*(2*L_1 - L_2)*(L_3 - a) + L_1/(2*E_3*I_3)*(L_3 - a)^2)
LF_V := W*(C_VV - a*C_VM + a^3/(6*E_3*I_3))
LF_M := W*(L_2/(E_2*I_2)*(L_3 - a) + 1/(2*E_3*I_3)*(L_3 - a)^2)
## Formulas for horizontal and vertical deflections, reaction moment, horizontal and vertical end reactions and angular rotation at the left edge
## Case 5a
## Left end fixed, right end fixed
# Horizontal deflection:
δ_HA := 0*in
# Vertical deflection:
δ_VA := 0*in
# Angular rotation:
ψ_A := 0*deg
# Because the above equal zero, the following three equations are solved simultaneously using Mathcad's solve block for H_A, V_A and M_A:
# Enter guess values:
H_A := 1*10^3*lbf
V_A := 1*10^3*lbf
M_A := 100*lbf*ft
# Define the three linear expressions:
Given
C_HH*H_A + C_HV*V_A + C_HM*M_A == LF_H
C_VH*H_A + C_VV*V_A + C_VM*M_A == LF_V
C_MH*H_A + C_MV*V_A + C_MM*M_A == LF_M
# Solve for H_A, V_A and M_A:
[H_A; V_A; M_A] := Find(H_A, V_A, M_A)
# Horizontal end reaction:
H_A = -2819.28 lbf
# Vertical end reaction:
V_A = 18481 lbf
# Reaction moment:
M_A = 3971.08 lbf*ft
## Calculation of HB, VB and MB from equilibrium equations:
# The equilibrium equations for this case are:
sum(F_x) == H_A + H_B == 0
sum(F_y) == V_A + V_B - W == 0
sum(M_B) == M_B + V_A*L_3 + H_A*(L_1 - L_2) - W*(L_3 - a) + M_A == 0
# Therefore:
H_B := -H_A
H_B = 2819.28 lbf
V_B := W - V_A
V_B = 81519 lbf
M_B := -(V_A*L_3 + H_A*(L_1 - L_2) - W*(L_3 - a) + M_A)
M_B = 2626.51 lbf*ft
## Case 6a
## Left end pinned, right end fixed
# Horizontal deflection:
δ_HA := 0*in
# Vertical deflection:
δ_VA := 0*in
# Reaction moment:
M_A := 0*lbf*in
# Because the above equal zero:
# Vertical reaction:
V_A := (LF_V*C_HH - LF_H*C_HV)/(C_HH*C_VV - C_HV^2)
V_A = 18275.9 lbf
# Horizontal reaction:
H_A := (LF_H*C_VV - LF_V*C_HV)/(C_HH*C_VV - C_HV^2)
H_A = -1377.41 lbf
# Angular rotation:
ψ_A := C_MH*H_A + C_MV*V_A - LF_M
ψ_A = -0.14746 deg
## Calculation of HB, VB and MB from equilibrium equations:
# The equilibrium equations for this case are:
sum(F_x) == H_A + H_B == 0
sum(F_y) == V_A + V_B - W == 0
sum(M_B) == M_B + V_A*L_3 + H_A*(L_1 - L_2) - W*(L_3 - a) == 0
# Therefore:
H_B := -H_A
H_B = 1377.41 lbf
V_B := W - V_A
V_B = 81724.1 lbf
M_B := -(V_A*L_3 + H_A*(L_1 - L_2) - W*(L_3 - a))
M_B = 4450.81 lbf*ft
## Case 7a
## Left end guided horizontally, right end fixed
# Vertical deflection:
δ_VA := 0*in
# Angular rotation:
ψ_A := 0*deg
# Horizontal reaction:
H_A := 0*lbf
# Because the above equal zero:
# Reaction moment:
M_A := (LF_M*C_VV - LF_V*C_VM)/(C_VV*C_MM - C_VM^2)
M_A = -20894.1 lbf*in
# Vertical reaction:
V_A := (LF_V*C_MM - LF_M*C_VM)/(C_VV*C_MM - C_VM^2)
V_A = 16122.4 lbf
# Horizontal deflection:
δ_HA := C_HV*V_A + C_HM*M_A - LF_H
δ_HA = 0.122353 in
## Calculation of HB, VB and MB from equilibrium equations:
# The equilibrium equations for this case are:
sum(F_x) == H_A + H_B == 0
sum(F_y) == V_A + V_B - W == 0
sum(M_B) == M_B + V_A*L_3 + H_A*(L_1 - L_2) - W*(L_3 - a) + M_A == 0
# Therefore:
H_B := -H_A
H_B = 0 lbf
V_B := W - V_A
V_B = 83877.6 lbf
M_B := -(V_A*L_3 + H_A*(L_1 - L_2) - W*(L_3 - a) + M_A)
M_B = 6588.24 lbf*ft
## Case 8a
## Left end guided vertically, right end fixed
# Horizontal deflection:
δ_HA := 0*in
# Angular rotation:
ψ_A := 0*deg
# Vertical reaction:
V_A := 0*lbf
# Because the above equal zero:
# Horizontal reaction:
H_A := (LF_H*C_MM - LF_M*C_HM)/(C_HH*C_MM - C_HM^2)
H_A = 1225.68 lbf
# Reaction moment:
M_A := (LF_M*C_HH - LF_H*C_HM)/(C_HH*C_MM - C_HM^2)
M_A = 30933.9 lbf*in
# Vertical deflection:
δ_VA := C_VH*H_A + C_VM*M_A - LF_V
δ_VA = -0.209832 in
## Calculation of HB, VB and MB from equilibrium equations:
# The equilibrium equations for this case are:
sum(F_x) == H_A + H_B == 0
sum(F_y) == V_A + V_B - W == 0
sum(M_B) == M_B + V_A*L_3 + H_A*(L_1 - L_2) - W*(L_3 - a) + M_A == 0
# Therefore:
H_B := -H_A
H_B = -1225.68 lbf
V_B := W - V_A
V_B = 100000 lbf
M_B := -(V_A*L_3 + H_A*(L_1 - L_2) - W*(L_3 - a) + M_A)
M_B = 20379.4 lbf*ft
## Case 9a
## Left end roller supported along the horizontal, right end fixed
# Vertical deflection:
δ_VA := 0*in
# Horizontal reaction:
H_A := 0*lbf
# Reaction moment:
M_A := 0*lbf*in
# Because the above equal zero:
# Vertical reaction:
V_A := LF_V/C_VV
V_A = 14461.5 lbf
# Horizontal deflection:
δ_HA := C_HV*V_A - LF_H
δ_HA = 0.226154 in
# Angular rotation:
ψ_A := C_MV*V_A - LF_M
ψ_A = 0.244609 deg
## Calculation of HB, VB and MB from equilibrium equations:
# The equilibrium equations for this case are:
sum(F_x) == H_A + H_B == 0
sum(F_y) == V_A + V_B - W == 0
sum(M_B) == M_B + V_A*L_3 + H_A*(L_1 - L_2) - W*(L_3 - a) == 0
# Therefore:
H_B := -H_A
H_B = 0 lbf
V_B := W - V_A
V_B = 85538.5 lbf
M_B := -(V_A*L_3 + H_A*(L_1 - L_2) - W*(L_3 - a))
M_B = 6923.08 lbf*ft
## Case 10a
## Left end roller supported along the vertical, right end fixed
# Horizontal deflection:
δ_HA := 0*in
# Vertical reaction:
V_A := 0*lbf
# Reaction moment:
M_A := 0*lbf*in
# Because the above equal zero:
# Horizontal reaction:
H_A := LF_H/C_HH
H_A = 2136.08 lbf
# Vertical deflection:
δ_VA := C_VH*H_A - LF_V
δ_VA = -0.208315 in
# Angular rotation:
ψ_A := C_MH*H_A - LF_M
ψ_A = -0.0960974 deg
## Calculation of HB, VB and MB from equilibrium equations:
# The equilibrium equations for this case are:
sum(F_x) == H_A + H_B == 0
sum(F_y) == V_A + V_B - W == 0
sum(M_B) == M_B + V_A*L_3 + H_A*(L_1 - L_2) - W*(L_3 - a) == 0
# It follows that:
H_B := -H_A
H_B = -2136.08 lbf
V_B := W - V_A
V_B = 100000 lbf
M_B := -(V_A*L_3 + H_A*(L_1 - L_2) - W*(L_3 - a))
M_B = 21439.9 lbf*ft
## Case 11a
## Left end guided by moment only (zero slope at the left end), right end fixed
# Angular rotation:
ψ_A := 0*in
# Horizontal reaction:
H_A := 0*lbf
# Vertical reaction:
V_A := 0*lbf
# Because the above equal zero:
# Reaction moment:
M_A := LF_M/C_MM
M_A = 66279.1 lbf*in
# Horizontal deflection:
δ_HA := C_HM*M_A - LF_H
δ_HA = -0.0651163 in
# Vertical deflection:
δ_VA := C_VM*M_A - LF_V
δ_VA = -0.224084 in
## Calculation of HB, VB and MB from equilibrium equations:
# The equilibrium equations for this case are:
sum(F_x) == H_A + H_B == 0
sum(F_y) == V_A + V_B - W == 0
sum(M_B) == M_B + V_A*L_3 + H_A*(L_1 - L_2) - W*(L_3 - a) + M_A == 0
# Therefore:
H_B := -H_A
H_B = 0 lbf
V_B := W - V_A
V_B = 100000 lbf
M_B := -(V_A*L_3 + H_A*(L_1 - L_2) - W*(L_3 - a) + M_A)
M_B = 19476.7 lbf*ft
## Case 12a
## Left end free, right end fixed
# Horizontal reaction:
H_A := 0*lbf
# Vertical reaction:
V_A := 0*lbf
# Reaction moment:
M_A := 0*lbf*in
# Because the above equal zero:
# Horizontal deflection:
δ_HA := -LF_H
δ_HA = -0.75 in
# Vertical deflection:
δ_VA := -LF_V
δ_VA = -0.3525 in
# Angular rotation:
ψ_A := -LF_M
ψ_A = -1.36077 deg
## Calculation of HB, VB and MB from equilibrium equations:
# The equilibrium equations for this case are:
sum(F_x) == H_A + H_B == 0
sum(F_y) == V_A + V_B - W == 0
sum(M_B) == M_B + V_A*L_3 + H_A*(L_1 - L_2) - W*(L_3 - a) == 0
# Therefore:
H_B := -H_A
H_B = 0 lbf
V_B := W - V_A
V_B = 100000 lbf
M_B := -(V_A*L_3 + H_A*(L_1 - L_2) - W*(L_3 - a))
M_B = 25000 lbf*ft
# Reprinted from the E-book Roark's Formulas for Stress and Strain, copyright © 1997 by Mathsoft Engineering and Education, Inc.
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