# Title: Bessel Function Solutions of Electrons in a 3D Square Well
# Description: QuickSheet demonstrating the solutions to Schroedinger’s equation in the 3-D square well.
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# ENGINEERING APPLICATIONS
# quicksheets
## Bessel Functions: Solutions of Electrons in a 3D Square Well
# This QuickSheet demonstrates the solutions to Schrödinger’s equation in the 3-D square well (an atom). The problem of finding the allowed energies amounts to finding the energies at which the inner and outer wave functions have equal values and first derivatives. One must find these for each value of the angular momentum (l).
# Mass, Plank’s constant, and radius of the nucleus:
m_n := 1.009
hbarc := 197.3
amu := 935.48
Anuc := 100
m := m_n*amu
Rnuc := 1.32*Anuc^0.333 - 0.8
Rnuc = 5.3175
# Set angular momentum:
l := 0
# The potential well looks like this:
# Potential energy of the well:
V_0 := -40
V(x) := V_0*if(x < Rnuc, 1, 0) + 0*if(x > Rnuc, 1, 0)
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# The solutions are spherical Bessel functions and spherical Hankel functions:
h1(l, x) := js(l, x) + (-1)^0.5*ys(l, x)
h2(l, x) := js(l, x) - (-1)^0.5*ys(l, x)
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# For the bound states E < 0, the wave functions for the first energy state solution inside (i) and outside (o) the well are
Φi(l, r) == js(0, r)
Φo(l, r) == B*h1(l, r)
# where B is the relative normalization, and the propagation constants are
ki(E) := (2*m*(E - V_0))^0.5/hbarc
ko(E) := (-2*m*E)^0.5/hbarc
argi(E, r) := ki(E)*r
argo(E, r) := (-1)^0.5*ko(E)*r
# The argument for the solution outside the well is imaginary, because the wave decays outside of the potential well. Match the wave functions at the edge of the well (the radius of the nucleus) to determine the relative normalization:
B(E) := js(l, argi(E, Rnuc))/h1(l, argo(E, Rnuc))
B(-30) = 795.833
# Match derivatives: determine eigenvalues by finding where the derivatives are equal.
Fxn1(E, r) := d/dr(ys(l, argi(E, r)))
Fxn2(E, r) := d/dr(h1(l, argo(E, r)))
g(E) := Fxn1(E, Rnuc) - B(E)*Fxn2(E, Rnuc)
# Guess:
E0 := -30
E0 := root(g(E0), E0)
E0 =  # error: Cannot understand this syntax.
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