# Title: Damped Harmonic Oscillation
# Description: QuickSheet illustrating free vibrations in mechanical and electrical systems.
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# ENGINEERING APPLICATIONS
# quicksheets
# Damped Harmonic Oscillation
# This QuickSheet illustrates free vibrations in mechanical and electrical systems: second-order homogeneous linear differential equations with constant coefficients.
# Consider a cart of mass M, attached to a wall by a spring exerting a restoring force -k*x , all within a viscous medium with damping force -c*dx/dτ.
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# The cart is pictured at equilibrium (when x = 0).
# Differential equation for this mechanical system is:
M*d^2/dτ^2(x(τ)) + c*d/dτ(x(τ)) + k*x(τ) == 0
x(0) == x_0
d/dx(x(τ)) == 0  # at τ = 0.
# Input parameter values:
M := 1
k := 1
x_0 := 1
c := 2
# Transformation into standard form:
a := sqrt(k/M)
b := c/(2*M)
# Set up the ODE solve block:
Te := 6  # Rightmost endpoint
Nt := 10  # Number of time steps
Given
d^2/dτ^2(x(τ)) + 2*b*d/dτ(x(τ)) + a^2*x(τ) == 0
# The stiff system solver was chosen by right-clicking on Odesolve, as it gives slightly better results for this system.
x(0) == x_0
x'(0) == 0
disp := Odesolve(τ, Te)
# Exact solution:
m_1 := -b + sqrt(b^2 - a^2)
m_2 := -b - sqrt(b^2 - a^2)
x(τ) := if(b == a, x_0*e^(-a*τ)*(1 + a*τ), x_0/(m_1 - m_2)*(m_1*e^(m_2*τ) - m_2*e^(m_1*τ)))
n := 0, 0.5 .. Te
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# Looking at the error in the solution
sum((x(n) - disp(n))^2, n) = 5.44437e-11
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## Application to Circuits
# Consider a simple electrical circuit containing a resistor, an inductor, and a capacitor. The charge Q on the capacitor is modeled by the differential equation:
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L*d^2/dτ^2(Q(τ)) + R*d/dt(Q(τ)) + 1/C*Q(τ) == 0
d/dτ(Q(τ)) == 0
# at τ = 0.
Q(0) == Q_0
# Input parameter values:
L1 := 1
C1 := 0.01
Q_0 := 1
R1 := 1
# Transformation into standard form:
a := sqrt(1/(L1*C1))
b := R1/(2*L1)
d^2/dτ^2(Q(τ)) + 2*b*d/dτ(Q(τ)) + a^2*Q(τ) == 0
# Symbolic solution:
m_1 := -b + sqrt(b^2 - a^2)
m_2 := -b - sqrt(b^2 - a^2)
Q(τ) := if(b == a, Q_0*e^(-a*τ)*(1 + a*τ), Q_0/(m_1 - m_2)*(m_1*e^(m_2*τ) - m_2*e^(m_1*τ)))
# Comparison with the command-line ODE solver to find the same solution:
D(τ, X) := [X[1]; -2*b*X[1] - a^2*X[0]]
Nt := 40  # Number of time steps
G := Bulstoer([Q_0; 0], 0, Te, Nt, D)
# The Bulstoer function can be slightly more accurate than rkfixed for smooth systems.
n := 0, 1 .. Nt
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# It is interesting to compare the error using both rkfixed and Bulstoer or Radau. Try changing the solving function above to recalculate.
sum((Q(G[:, 0][n]) - G[:, 1][n])^2, n) = 1.44973e-7
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