# Title: Fast Fourier Transforms
# Description: Using Fourier transforms.
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# ENGINEERING APPLICATIONS
# quicksheets
# Fast Fourier Transforms
# Suppose you have a cosine signal:
f(x) := cos(2*π*x/T0)
# of period
T0 = 2
# Create a sampled data vector of length 2^m:
N0 = 512
k := 0 .. N0 - 1
n[k] := k/f_s
# where f_s = 4samples per second is the sampling frequency, as visible on the plot.
# Data vector:
v[k] := f(n[k])
ti := 0, 0.05 .. 20
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# The Fourier transform of the above cosine wave of amplitude 1 is given by two spikes of amplitude π at ± the frequency of the wave, in this case, 1/T0 = 0.5, as verified by the symbolic transform.
cos(2*π*τ/τ0) fourier, τ → π*(Δ((ω*τ0 - 2*π)/τ0) + Δ((2*π + ω*τ0)/τ0))
## Numerical Transform Functions
# Mathcad provides both fast Fourier transforms (FFTs), which make use of vectors of length 2^m to speed up the calculation, and more generic discrete Fourier transforms (DFTs), which calculate transforms for signals of arbitrary length. The lowercase functions normalize by 1/sqrt(N0) while the uppercase transform functions normalize by 1/N0. In addition, the FFT functions fft() and FFT() accept only real-valued arguments. If a signal is entirely real, its Fourier transform is complex-conjugate symmetric, so it is only necessary to calculate half of it, further speeding calculation.
Spec := fft(v)  # is defined as
p := 0 .. N0/2
c[p] == 1/sqrt(N0)*sum(v[k]*e^(1i*(2*π*p/N0)*k), k)
N0 = 512
length(Spec) = 257
Spec2 := FFT(v)  # is the same, but normalized by 1/N0.
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N0 ≡ 2^9
T0 ≡ 2  # period
1/T0 = 0.5  # signal frequency
f_s ≡ 4  # sampling frequency
max(vectorize(|Spec|)) = 11.3137
max(vectorize(|Spec2|)) = 0.5
# Test for frequency resolution:
N0/f_s*1/T0 = 64
# The index of the vector of frequencies, p, must always be an integer. If the above ratio of samples to sampling frequency is not an integer, there is spreading around the peak in the transform, because there are no frequency components calculated at exactly the frequency of the cosine wave. Try changing the sampling frequency to a number that is not a power of 2, like 19 or 25, and note the lowering of the peak and corresponding spread in samples around the frequency of the cosine.
# In addition, the height of the FFT peak only correlates to the input waveform amplitude if the frequency component occurs exactly at an FFT sample point. The component that has the cosine frequency in it is:
index := floor(N0/f_s*1/T0)
Spec[index] = 11.3137 - 3.52957e-12i
2*Re(Spec[index])/sqrt(N0) = 1  # is the amplitude we expect.
# Since frequencies are given by p*f_s/N0, the highest calculated frequency is:
N0/2*f_s/N0 = 2
## Undersampling and Aliasing
# Not only is it important for the ratio of samples to sampling frequency to be an integer, you must also be sure to have at least two samples per period of your signal (Nyquist's theorem), or you will see the effects of aliasing, as shown in the QuickSheet on downsampling. It's easy enough to see this effect in time, but in the transform domain, it may be subtle to detect.
f_us := T0/2.6  # This value must be at least T0/2 to adequately sample the signal. Larger values produce a signal of a single apparently smaller frequency.
f1(x) := f(x) + f(x/10)
nu[k] := k/f_us
vu[k] := f1(nu[k])
Spec_u := fft(vu)
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# One peak is showing the correct (slower) frequency, but the other peak is undersampled and is showing an aliased peak. Note that some combinations yield only a DC component in the transform domain, because the signal looks like a constant with no variation in time.
## Complex DFTs and Recentering
# The complex DFTs in Mathcad use the same normalization scheme, but don't make use of the fact that the first half of the spectrum is the complex conjugate of the second, since they don't assume real-valued arguments. Neither do they expect vectors of any particular length, although they calculate faster if the input signal is of length 2^m.  The spectrum extends from 0 to twice the Nyquist frequency (0 to 2π in the discrete plane). The frequencies from 0 to the Nyquist frequency represent the positive frequency components of the data and the frequencies from Nyquist to 2 x Nyquist are the negative frequencies. The spectrum is a vector of the same length as the original argument.
D := cfft(v)  # defined as
p := 0 .. N0 - 1
D[p] == 1/sqrt(N0)*sum(v[k]*e^(1i*(2*π*p/N0)*k), k)
N0 = 512
length(D) = 512
length(v) = 512
DD := CFFT(v)  # is the same, but normalized by 1/N0.
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# If you wish to wrap the negative frequencies to the appropriate position on the horizontal axis, remember that the first element in the vector is always DC (zero frequency), and is not replicated elsewhere in the spectrum. If there is no DC offset in the original signal, this first element is 0. That is
D[0] = -3.72207e-15  # very close to 0.
# The rest of the spectrum is centered around the Nyquist frequency (π on the discrete frequency scale) and the samples that occur after this frequency should be wrapped to the beginning of the vector. The trick is finding the middle sample of the remaining samples, as the middle depends on whether you started with an odd or an even number of points. In the case of an even number of points, as shown here, the first is DC, and the middle value of the remaining odd number of points will be at the Nyquist frequency.
N0 = 512
middle := N0/2
D[middle] = 1.76312e-14
# All the rest are conjugate symmetric, since the signal is real.
nn := 30  # Pick a sample set.
D[middle - nn] = -2.31922e-15 - 1.13282e-15i
D[middle + nn] = -2.31922e-15 + 1.13282e-15i
# Therefore, to wrap the correct samples, start at the point after the middle value:
kk := 0 .. (N0/2 - 2)
# 1. Wrap the last N0/2 - 1 = 255values to the beginning of the  vector:
Dc[kk] := D[kk + (N0/2 + 1)]
length(Dc) = 255
# 2. Put in the DC component, now in the middle position, and the remaining samples:
qq := 0 .. (N0/2)
Dc[qq + N0/2 - 1] := D[qq]
length(Dc) = 512
# The new vector of frequencies has to be manipulated carefully:
freq[p] := p*f_s/N0
fc[kk] := freq[N0/2] - freq[(N0 - 1) - kk]
fc[qq + N0/2 - 1] := freq[qq]
fc[N0/2 - 1] = 0
# This is now DC
Dc[N0/2 - 1] = -3.72207e-15
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# If you have an odd number of samples and truncate the first for DC, then you are left with an even number of points that are split evenly during recentering. In this case, there is no sample exactly at the Nyquist frequency, so you don't need to leave it on the end of the positive spectrum.
## Inverse Transformation
# Each of the above functions has an inverse transform. If you use the lowercase transform functions, they are normalized by 1/sqrt(N0). If you use the uppercase transforms, they do not require a normalization factor, because 1/N0 was used in the original transform. You must use the matching inverse transform to recover the correct time-domain signal.
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# Take care not to pass a recentered frequency response to the inverse transform functions. Recentering is only for viewing purposes, to more intuitively include small frequency components near 0 on the frequency axis. Filtering and other manipulations in the frequency domain should be done on the DFT results as they are computed, so they can be correctly transformed back.
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# You do not have this problem with the FFT functions, as they only compute half the spectrum and are only expecting the response from positive frequencies (a vector of half the length as the time domain transform.)
## Other Transform Pairs
# Sine
sin(2*π*τ/τ0) fourier, τ → 1i*π*(Δ((ω*τ0 - 2*π)/τ0) - Δ(1/τ0*(2*π + ω*τ0)))
f(τ1) := sin(2*π*τ1/T0)
v[k] := f(n[k])
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D := cfft(v)
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# Square Pulse (boxcar)
f(τ1) := Φ(τ1) - Φ(τ1 - 3)
v[k] := f(n[k])
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D := cfft(v)
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# Gaussian
Gt(ω, T0, a) := e^(-(τ1 - a)^2/T0) assume, a > 0, T0 > 0; fourier, τ1; simplify → sqrt(π)*sqrt(T0)*e^(-1/4*T0*ω^2)*e^(1i*a*ω)
f(τ1) := e^(-(τ1 - 30)^2/T0)
v[k] := f(n[k])
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D := cfft(v)
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