# Title: Steel Column Inelastic Effective Length Factors
# Description: Computing the inelastic effective length factors for steel columns.
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# ENGINEERING APPLICATIONS
# quicksheets
# Steel Column Inelastic Effective Length Factors
# The effective length of compression members must be determined in building frames, where lateral stability depends upon the bending stiffness of rigidly connected beams and columns.
#
# The effective length method uses K factors to equate the strength of a framed compression element of length L to an equivalent pin-ended member of length KL, subject to axial load only. After you determine preliminary trial members, you can use the alignment chart of the American Institute of Steel Construction, Inc. (AISC) Specifications Commentary C-C2 to determine K values. The K values determined from the alignment chart are based on the assumption of purely elastic column behavior and are referred to as elastic K factors. However, most steel columns behave inelastically and the elastic K factors may be reduced using the stiffness reduction factors.
# This worksheet computes those stiffness reduction factors for inelastic behavior (Table A, page 3-8 of the AISC Manual), the stiffness ratios at the ends of the column (G values), and the effective length factor K for side sway permitted. Mathcad's root function and solve block are used to solve the transcendental equation for effective length factors, eliminating the need to use the alignment chart in the AISC Commentary.
## Notation
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# Read in file of available steel and yield strengths:
# [component: outputs Steel]
# This file has header information. To see how the range of data was selected, right-click on the icon and choose Properties, then examine the Data Range tab.
## Input Variables
# Select a steel to determine yield strength:
# [component: inputs Steel; outputs [Material; F_y]]
F_y := F_y*ksi
F_y = 36 kips_per_sq_inch
# To see how this List Box control was created from the table of Steel values, right-click on it and choose Edit Script. (Note: You cannot edit a script from the Resources window. To view the script, copy the control to your Worksheet window.)
# Enter axial load, area of the column section, and the radius of gyration in the plane of bending for the column under consideration, the column above, and the column below. Start with subscript 0 for the column under consideration.
# Column axial load: | Column section area:
Pc := [560; 510; 610]*kip
Ac := [31.2; 31.2; 39.9]*in^2
# Radius of gyration in the plane of bending:
r_b := [5.47; 5.47; 5.58]*in
story := ["at story"; "story above"; "story below"]
# Enter moments of inertia and lengths of the members framing into the joints at the top and bottom of the column under consideration. Top and bottom joints are designated A and B, respectively. The first I and L entered must be for the column under consideration.
# ← column at story
# ← column above
# ← column below
I := [933; 933; 1.24*10^3; 375; 0; 375; 0]*in^4
Lc := [15; 15; 15; 20; 0; 20; 0]*ft  # ← girder top
# ← girder top
# ← girder below
# ← girder below
# Specify if the lower end is pinned, fixed, or framed:
# [component: outputs Base]
Base = "pinned"
# A Mathsoft control allows the choice to be made in natural language, rather than as a code. To see how this control generates its output, right-click on the list box and choose Edit Script.
## Defined Units
# Modulus of elasticity of steel:
E := 2.9*10^4*ksi
## Calculations
# Axial compression stress:
# The vectorize operator performs the calculation element-wise.
f_a := vectorize(Pc/Ac)
f_a = [17.9487; 16.3462; 15.2882] kips_per_sq_inch
# Column slenderness ratio separating elastic and inelastic buckling (AISC Specification, Eq. (E2-1)) - you must choose a type of Steel for this calculation to be valid:
# Note: The green parentheses indicate that the equations below have traceability. To view these annotations, select the entire expression within the green parentheses, then right-click and choose View/Edit Annotation. The annotation is retained if the expression is copied to a new document.
C_c := sqrt(2*π^2*E/F_y)
C_c = 126.099
Material = "ASTM A36"
# Allowable axial stress determined by AISC Specification, Eq. (E2-1)
# expressed as a function of the larger slenderness ratio (SR):
F_a(SR) := (1 - SR^2/(2*C_c^2))*F_y/(5/3 + 3*SR/(8*C_c) - SR^3/(8*C_c^3))
# Use a root finder to determine the SR for each column that makes the axial stress equal the allowable stress. Begin with a guess value of SR:
SR := C_c
i := 0 .. 2
# SRs for each of the three columns at which axial stress equals the allowable stress determined by AISC Specification, Eq. (E2-1):
SR[i] := root(f_a[i] - F_a(SR), SR)
transpose(SR) = [54.4715, 70.8108, 80.6015]
# Euler's stress divided by a factor of safety (AISC Specification, Sect. H1):
F'_e := vectorize(12*π^2*E/(23*SR^2))
transpose(F'_e) = [50.3284, 29.7819, 22.9861] kips_per_sq_inch
# Stiffness reduction factor for inelastic behavior, equal to axial stress divided by Euler's stress calculated at the slenderness ratio in the plane of bending at which axial stress equals the allowable axial stress. When the slenderness ratio is greater than C_c, there is no stiffness reduction.
# Stiffness reduction factors:
SRF[i] := if(SR[i] < C_c, f_a[i]/F'_e[i], 1)
transpose(SRF) = [0.356632, 0.548862, 0.665108]
# Ratios G_A and G_B, the sum of the column stiffnesses multiplied by the inelastic stiffness reduction factor, to the sum of the girder stiffnesses at top and bottom (joints A and B, respectively) of the column under consideration:
G_A := (SRF[0]*I[0]/Lc[0] + SRF[1]*I[1]/Lc[1])/((I[3] > 0*in^4)*I[3]/Lc[3] + (I[4] > 0*in^4)*I[4]/Lc[4])
G_A = 3.00382
# Note the use of Boolean expressions in this equation to turn parts of the calculation on or off. In this case,
I[3] > 0*in^4 = 1
I[4] > 0*in^4 = 0
# A more complicated conditional expression is more clearly written as a program:
G_B :=
    10 if Base == "pinned"
    1 if Base == "fixed"
    (SRF[0]*I[0]/Lc[0] + SRF[2]*I[2]/Lc[2])/((I[5] > 0*in^4)*I[5]/Lc[5] + (I[6] > 0*in^4)*I[6]/Lc[6]) otherwise
Base = "pinned"
# where programming operators have been used for if and otherwise statements. Don't just type these in, use the keyboard shortcuts or the Programming toolbar to insert them.
G_B = 10
# The effective length factor for the columns with side sway uninhibited: (The equation shown within the Mathcad solve block is the equation solved by the alignment chart shown in the AISC Specification Commentary, Section C-C2.)
# Guess value of K:
K := 1
# G_A and G_B range from 0 to ∞
# K ranges from 1 to ∞
Given
K ≥ 1
(G_A*G_B*(π/K)^2 - 36)/(6*(G_A + G_B)) == π/K/tan(π/K)
K := Find(K)
# K factor, reduced for inelastic column behavior, as applicable:
K = 2.28028
## Summary
# Yield strength of steel:
F_y = 36 kips_per_sq_inch
Material = "ASTM A36"
# Lower end base:
Base = "pinned"
# Cross section area of column:
# Column axial load:
Pc = [560; 510; 610] kip
Ac = [31.2; 31.2; 39.9] in^2
story = ["at story"; "story above"; "story below"]
# Radius of gyration in the plane of bending of the column section:
r_b = [5.47; 5.47; 5.58] in
story = ["at story"; "story above"; "story below"]
# Column slenderness ratio separating elastic and inelastic buckling (AISC Specification, Eq. (E2-1)):
C_c = 126.099
# Stiffness reduction factors: (for inelastic column behavior)
SRF = [0.356632; 0.548862; 0.665108]
story = ["at story"; "story above"; "story below"]
# Stiffness factors G_A and G_B reduced by stiffness reduction factor SRF when SR < C_c:
G_A = 3.00382
G_B = 10
# Column and girder lengths and moments of inertia:
# (Enter member size designations.)
# W12x106
# W12x106 | ← column at story
# W12x106 | ← column above
# W12x136 | ← column below
# W16x26
I = [0.0449942; 0.0449942; 0.0597994; 0.0180845; 0; 0.0180845; 0] ft^4
Lc = [15; 15; 15; 20; 0; 20; 0] ft  # ← girder top
# ← girder top
# W16x26 | ← girder below
# ← girder below
# K factor, reduced for inelastic
# column behavior when applicable:
K = 2.28028
## References
# 1. “AISC, Manual of Steel Construction - Allowable Stress Design” June 1, 1989.
# 2. Adapted from Thomas P. Magner, P.E., Building Structural Design E-book, Mathsoft Engineering and Education, 1994.
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