# Title: PID Controller
# Description: The construction and analysis of proportional, integral and derivative controllers.
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# ENGINEERING APPLICATIONS
# quicksheets
# PID Controller
# This worksheet demonstrates the construction and analysis of  proportional (P), integral (I), and derivative (D) controllers and how to use them to obtain a desired system response. In this application, you can consider the following unity feedback system.
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# The transfer function of the PID controller looks like the following:
G1(s, Kp, Kd, Ki) := (Kd*s^2 + Kp*s + Ki)/s
# where Kp = Proportional Gain, Ki = Integral Gain, and Kd = Derivative Gain.
# The plant's transfer function is:
X(s) == 1/s/(s^2 + B*s + K)
# Let
B := 10
K_0 := 20
## Root Locus
# Calculate the system roots using the polyroots function:
sysroots(K) := polyroots([K; B; 1])
sysroots(K_0) = [-7.23607; -2.76393]
# Create a vector of test gains:
i_max := 200
i := 0 .. i_max
K_max := 400
Ktest[i] := i/i_max*K_max
# Calculate the roots for all test values of K to create a nested vector of root sets, that is, a vector i_max long in which each element contains a 3×1 set of roots.
locus := vectorize(sysroots(Ktest))
# Pull the roots off into loci that can be graphed:
locus1[i] := locus[i][0]
locus2[i] := locus[i][1]
# Show a single root. You can move markers around by changing index.
index := 150
Ktest[index] = 300
marker := sysroots(Ktest[index])
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## Uncompensated Time Response
# The time response of this system is given by the inverse Laplace transform, which you can find using live symbolics.
x(τ) := 1/s/(s^2 + B*s + K_0) invlaplace, s, τ; collect, exp(-5*τ) → 1/20 - e^((-5)*τ)*(cosh(sqrt(5)*τ)/20 + (sqrt(5)*sinh(sqrt(5)*τ))/20)
# Note that the variable values have carried through into the symbolic result.
τ := 0, 0.01 .. 3
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# The DC gain of the plant transfer function is 1/20, so 0.05 is the final value of the output to a unit step input. This corresponds to the steady-state error of 0.95, quite large indeed. Furthermore, the rise time is about one second and the settling time is about 1.5 seconds. You can design a controller that reduces the rise time, reduces the settling time, and eliminates the steady-state error.
## Comparing Controllers
# •  A proportional controller (Kp) reduces the rise time and reduces, but never eliminates, the steady-state error. It also increases overshoot.
# •  An integral control (Ki) eliminates steady-state error, but it may make the transient response worse. That is, it decreases the rise time, but increases both the overshoot and the settling time.
# •  A derivative control (Kd) increases system stability, reduces the overshoot, and improves the transient response.
# You can compare the system impulse response of these three in various combinations by finding the Laplace Transform of each closed-loop transfer function.
## Proportional
Kp := 300
p(τ) := Kp/(s*(s^2 + B*s + K_0 + Kp)) invlaplace, s, τ; collect, exp(-5*τ) → 15/16 - e^((-5)*τ)*((15*cos(sqrt(295)*τ))/16 + (15*sqrt(5)*sqrt(59)*sin(sqrt(295)*τ))/944)
## Proportional-Derivative
Kd := 10
pd(τ) := (Kd*s + Kp)/(s*(s^2 + (B + Kd)*s + K_0 + Kp)) invlaplace, s, τ; collect, exp(-10*τ) → 15/16 - e^((-10)*τ)*((15*cos(2*sqrt(55)*τ))/16 - 1/176*sqrt(5)*sqrt(11)*sin(2*sqrt(55)*τ))
## Proportional-Integral
Kp := 30
Ki := 70
PI(s) := (Kp*s + Ki)/(s*(s^3 + B*s^2 + (K_0 + Kp)*s + Ki))
# Find the poles and zeros symbolically and cast the transfer function in terms of these. The numerator and denominator are given by the numer and denom symbolic functions:
Num(s) := numer(PI(s)) → 30*s + 70
Den(s) := denom(PI(s)) → s*(s^3 + 10*s^2 + 50*s + 70)
# Zeros and poles:
Z := Num(s) solve, s → -7/3
P := Den(s) solve, s; float, 4 → [0; -2.092; -3.954 + (-4.222)*1i; -3.954 + 4.222i]
# Now reconstruct the transfer function:
pi(τ) := (30*s + 70)/product(s - P[i], i = 0 .. 3) invlaplace, s, τ; float, 4 → e^(τ*(-2.092))*(-0.1625) + e^(τ*(-3.954))*cos(τ*4.222)*(-0.8375) + e^(τ*(-3.954))*sin(τ*4.222)*(-0.8649) + 1.0
τ := 0, 0.001 .. 1.5
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# The above plot shows that the proportional controller (red) reduced both the rise time and the steady-state error, increased the overshoot, and decreased the settling time by small amount. The PD controller reduced both the overshoot and the settling time, and had little effect on the rise time and the steady-state error. For the PI controller, proportional gain (Kp) is reduced because the integral controller also reduces the rise time and increases the overshoot (double effect). The above response shows that the integral controller eliminated the steady-state error.
## PID Control
# Now, take a look at a PID controller. The closed-loop transfer function of the given system with a PID controller is:
CL(s) == (Kd*s^2 + Kp*s + Ki)/(s*(s^3 + (B + Kd)*s^2 + (K_0 + Kp)*s + Ki))
# You can look at the effect of varying different gains in a root locus plot.
sysroots(Ki, Kp, Kd) := polyroots([Ki; K_0 + Kp; B + Kd; 1])
# Choose values for the gains, and vary one at a time to help choose values for the gain of each part of the controller. In this case, vary Kp.
Kp := 350
Ki := 320
Kd := 50
locus := vectorize(sysroots(Ki, Ktest, Kd))
# Pull the roots off into loci that can be graphed:
locus1[i] := locus[i][0]
locus2[i] := locus[i][1]
locus3[i] := locus[i][2]
# Show a single root, and move it by changing index:
index := 175
Ktest[index] = 350
marker := locus[index]
marker = [-53.1521; -5.81202; -1.03586]
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# The gains Kp = 350, Ki = 300, and Kd = 50 provided the desired response.
# PID controller's transfer function:
G(s) := (Kp*s + Kd*s^2 + Ki)/s
# Plant's transfer function:
H(s) := 1/(s^2 + B*s + K_0)
# Closed loop transfer function:
PID(s) := G(s)*H(s)/(s*(1 + G(s)*H(s)))
PID(s) := PID(s) simplify → (50*s^2 + 350*s + 320)/(s*(s^3 + 60*s^2 + 370*s + 320))
Num(s) := numer(PID(s)) → 50*s^2 + 350*s + 320
Den(s) := denom(PID(s)) → s*(s^3 + 60*s^2 + 370*s + 320)
# Zeros:
Z := Num(s) solve, s → [-3/10*sqrt(65) - 7/2; (3*sqrt(65))/10 - 7/2]
# Poles:
P := Den(s) solve, s; float, 16 → [
    0;
    -1.035862701490918 + (-1.301042606982605e-17)*1i;
    -53.15211559454961 + (-2.168404344971009e-18)*1i;
    -5.812021703959471 + 1.517883041479706e-17i
]
# This matches, with the exception of small imaginary components, the answer you got from polyroots in the root locus calculation. The closed loop transfer function in terms of the zeros and poles is
PID(s) := 50*(s + 6)*(s + 1)/product(s - P[i], i = 0 .. 3)
pid(τ) := PID(s) invlaplace, s, τ; float, 4; rectangular → cos(τ*0.05267)*e^(τ*(-5.812))*(-0.03451) + sin(τ*0.05267)*e^(τ*(-5.812))*(0.006162 + (-0.00001)*1i) + cos(τ*0.2357)*e^(τ*(-53.15))*(-0.9376 + (-0.000000004002)*1i) + sin(τ*0.2357)*e^(τ*(-53.15))*(0.01199 + 0.00000000008125i) + cos(τ*0.005604)*e^(τ*(-1.036))*0.03454 + sin(τ*0.005604)*e^(τ*(-1.036))*(-0.02102) + 0.9375 + 0.00000005567i
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# Now, you have obtained the system with no overshoot, fast rise time, and no steady-state error.
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