# Title: WAV Files, Spectograms, and Signal Generation
# Description: Accessing WAV files with Mathcad.
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# ENGINEERING APPLICATIONS
# quicksheets
# WAV Files, Spectrograms, and Signal Generation
# This QuickSheet shows how to read, write, and get format information from pulse code modulated (PCM) Microsoft WAV files.
# Get the information in the sound file specified under filename and assign it to variable names in a vector. This sound file happens to be a Stenella whale vocalization.
filename := "Sten.wav"
[NumChannels; SampleRate; Resolution; AvgBytesPerSecond] := GETWAVINFO(filename)
# The return value is a vector containing the number of channels, the sample rate, the number of bits per sample (or resolution), and the average number of bytes per second that an audio player device would have to process to play the audio in real time.
NumChannels = 1
SampleRate = 20000
Resolution = 16
AvgBytesPerSecond = 40000
# Now read the sound file into a vector:
# You can also play the sound by double-clicking on this icon.
WavData := READWAV(filename)
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n := 0 .. length(WavData[:, 0]) - 1
time[n] := n/SampleRate
# If the return value for READWAV is a matrix, successive columns represent the separate channels of data.
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## Create a Spectrogram
# One way to analyze sound data is to divide it up into small slices in time that are much shorter than the length of the whole signal and look at the frequency content of each slice. Using a slice of 128 samples:
ss := 2^8
i := 0 .. ss - 1
overlap := 40 %
ti := floor(length(WavData)/(ss*(1 - overlap)))
j := 0 .. ti - ceil(1/(1 - overlap))
slice[i, j] := WavData[i + j*floor(ss*(1 - overlap))]
# Window each slice with a Hamming window, find its Fourier transform, and represent the frequencies in decibels:
Hm(n, N) := (.54 - .46*cos(2*π*n/(N - 1)))
w[i] := Hm(i, ss)
wslice[:, j] := vectorize(slice[:, j]*w)
dB(x) := 20*log(x)
spectra[:, j] := vectorize(dB(|fft(wslice[:, j])|^2 + .0001))
# Plot these values as a contour plot:
# [component: inputs transpose(spectra)]
## Signal Synthesis
# Consider a dual-tone multifrequency (DTMF) signal. These signals are commonly used for touch tone telephone dialing and remote control functions. DTMF signals are composed of one high frequency and one low frequency sinusoidal signal. A table of common tones are listed below.
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# Create these tones using Mathcad:
SampleRate := 22050  # Set the sample rate
NumChannels := 1  # Set the number of channels
Resolution := 16  # Set the bit resolution
τ_f := 1  # Set the time duration
NumPts := SampleRate*τ_f  # Determine number of necessary data points
Δτ := τ_f/NumPts  # Calculate the time interval
i := 0 .. NumPts  # Generate an array for indexing
τ[i] := Δτ*i  # Generate the time array
Amplitude := 10000  # Set the amplitude of the signal
f_1 := 1477
f_2 := 941  # Choose two frequencies to mix
# Generate the signal and plot it.
Signal := vectorize(Amplitude*(sin(2*π*f_1*τ) + sin(2*π*f_2*τ)))
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# Write the signal to a WAV file using the specified parameters
WRITEWAV("DTMF.wav", SampleRate, Resolution) := Signal  # disabled
# If the specified bit resolution is 1 - 8, the data is written to the file as unsigned byte data. The limits on unsigned byte data are 0 - 256 (2^8). If the bit resolution is 9 - 16 word data (two bytes) is written to the file. The limits on word data are -32768 and +32767 (2^15).
# Try changing the frequencies for the DTMF signal and then play the resulting file on your media player. They should sound just like the tones generated by your touch-tone telephone.
# To play a signal saved using this sample worksheet, double-click on the WAV Sound objects below.
# DTMF
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# Another useful signal in audio testing is the exponential ramp in frequency. The formula for this signal is:
er(τ) := e^(2.2*τ)*τ
# The sample rate, bit resolution, and number of channels is the same as the previous example.
τ_f := 3  # Set parameters for this signal
NumPts := SampleRate*τ_f
Δτ := τ_f/NumPts
i := 0 .. NumPts
τ[i] := Δτ*i
Amplitude := 10000
# Generate and plot the signal
Signal := vectorize(Amplitude*sin(2*π*er(τ)))
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WRITEWAV("EXP.wav", SampleRate, Resolution) := Signal  # disabled
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# Play the exponential increase in frequency signal by double-clicking on the WAV Sound object.
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