# Title: Wavelet Transforms
# Description: Applying wavelet and inverse wavelet transforms for data compression.
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# ENGINEERING APPLICATIONS
# quicksheets
# Wavelet Transforms
# This QuickSheet illustrates the application of wavelet and inverse wavelet transforms, wave and iwave, for data compression.
# Given a signal, for instance a single square wave:
N := 256
S[N - 1] := 0
n := 3*N/8, 3*N/8 + 1 .. 5*N/8
S[n] := 1
i := 0, 1 .. 255
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# Wavelet transform:
W := wave(S)
# The number of levels contained in this transform is
Nlevels := ln(N)/ln(2) - 1
Nlevels = 7
k := 1, 2 .. Nlevels
# To obtain a sense of the relative importance of each level, expand as follows:
coeffs(level) := submatrix(W, 2^level, 2^(level + 1) - 1, 0, 0)
C[i, k] := coeffs(k)[floor(i/(N/2^k))]
# Plot several levels of
# coefficients simultaneously.
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# To represent signal with less data:
# •  zero out the higher level coefficients, and
# •  compute the inverse wavelet transform of the new coefficient vectors.
# First level at which coefficients are set to zero (L ≤ 7 may be varied).
L := 5
j := 2^L .. N - 1
W[j] := 0
S' := iwave(W)
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# If acceptable, this offers a way of compressing the data needed to represent a signal.
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