# Title: PDEs - The Heat Equation
# Description: Solving a parabolic Partial Differential Equation.
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# CALCULUS AND DIFFERENTIAL EQUATIONS
# quicksheets
# PDEs - the Heat Equation
# This QuickSheet compares a solution for the heat equation with a convection term, a parabolic partial differential equation (PDE):
d/dz(u(x, z)) == c^2*d^2/dx^2(u(x, z)) - ν*d/dx(u(x, z))
# Use literal subscript notation (type a period after the function name to create subscripts) to write the partial derivatives in the PDE, the initial conditions, and boundary conditions. All equations are specified with the Boolean equals sign, [Ctrl] [=].
Given
u_z(x, z) == 1/4*u_xx(x, z) - 1/2*u_x(x, z)
# Initial condition:
u(x, 0) == sin(π*x/L) + 1/2*sin(3*π*x/L)
# Dirichlet boundary conditions
u(0, z) == 0
u(L, z) == 0
# Solve for u(x,z) over the ranges 0 to L in x and 0 to T in τ.
u := Pdesolve(u, x, [0; L], z, [0; T], spacepts, timepts)
# You can evaluate the function u at any values of x and z in the specified ranges. Note that the function and its derivatives must specify both variables, that is, u_x(x,0) rather than just u_x.
u(0.1, 0.2) = 0.0802809
x := 0, 0.2 .. L
z := 0 .. T
IC(x) := sin(π*x/L) + 1/2*sin(3*π*x/L)
# The graph below shows the initial condition and the solution u for fixed time values.
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# end distance
L ≡ 6
# end time
T ≡ 3
# To view an animation of the solutions over time, choose Animation > Record from the Tools menu, drag a selection box around the graph, and set To to 20. Then click the Animate button.
# Try changing the value of z below to display the graph of u for different time values.
z := 1.8
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# You can also view all solutions simultaneously in a 3-D graph:
A1 := CreateMesh(u, 0, L, 0, T, 10*L, 5*T)
# [component: inputs A1]
## Comparing u with a Series Approximation
# You can compare the solution u returned by pdesolve with the following  series approximation, U(x, z), to the solution of the PDE.
B(n) := 2/L*integral(IC(x)*e^(-x)*sin(n*π*x/L), x = 0 .. L)
U(x, z) := e^(x - z/4)*sum(B(n)*e^(-(n*π/(2*L))^2*z)*sin(n*π*x/L), n = 1 .. 100)
# The two solutions, shown below, agree when z is between 0 and the end time, T = 3, for pdesolve, but diverge when z is greater than 3:
z := 1.8
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# Check the accuracy of the solution for different  values of spacepts and timepts:
spacepts ≡ 50
timepts ≡ 30
# For further information on the algorithm used, see
# W. E. Schiesser, The Numerical Method of Lines: Integration of Partial Differential Equations, Academic Press, 1991.
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