# Title: Contour Integrals and the Residue Theorem
# Description: Using contour integrals with the residue theorem.
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# CALCULUS AND DIFFERENTIAL EQUATIONS
# quicksheets
# Contour Integrals and the Residue Theorem
# The residue theorem says that integrating around any contour that surrounds some poles of a function in the complex plate is equal to the sum of the residues at the enclosed poles times 2πi.  Consider the complex function
gt(z) := (13*z^2 + 5*z^3 + 17*1i*z + 19*1i - 5*1i*z^2 - 3 + 5*z + 1i*z^3)/(z^4 + 4*z^3 + 8*z^2 + 4*1i*z^2 + 4*z + 7 + 4*1i)
# which has poles at
poles := z^4 + 4*z^3 + 8*z^2 + 4*1i*z^2 + 4*z + 7 + 4*1i solve, z → [-1i; 1i; (-2)*1i - 1; 2i - 3]
# Visualizing the poles and a particular parametric contour in the complex plane,
x(τ) := r*cos(τ) + roffset
y(τ) := r*sin(τ) + ioffset
z(τ) := x(τ) + 1i*y(τ)
τ_initial := 0
τ_final := 2*π
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# Radius of the contour:
r ≡ 0.6
# Horizontal and vertical offset:
roffset ≡ -0.1
ioffset ≡ -1.3
integral(gt(z(τ))*d/dτ(z(τ)), τ = τ_initial .. τ_final) = (-4.70015e-13 - 4i)*π
# You can use this technique to show what the residue is at any enclosed pole, where the function cannot be evaluated directly. Move the contour in the imaginary plane using its radius and offsets to enclose different combinations of poles. Notice what happens as you enclose a combination of poles whose residues sum to zero - you see the error inherent in the combination of numerical differentiation and integration here. The integral may fail to converge when the contour crosses a pole rather than enclosing or excluding it.
# This technique can also be used to evaluate the integral of a function with poles at unknown locations, by ensuring that the chosen contour is large enough to encompass all poles. Performing a line integral would result in singularity errors at the poles.
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