# Title: Tangents, Normals and Curvature
# Description: The elementary differential geometry of curves in the x-y plane.
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# CALCULUS AND DIFFERENTIAL EQUATIONS
# quicksheets
# Tangents, Normals, and Curvature
# This QuickSheet demonstrates elementary differential geometry of curves in the x-y plane.
# Input two smooth functions of t1:
x(t1) := 2*cos(t1)
y(t1) := 3*sin(t1)
t1 := 0, 0.01 .. 2*π
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# The resulting curve (an ellipse) is given by the equation:
x^2/4 + y^2/9 == 1
# u := 0  implies
# [x(u), y(u)] = [2, 0]
# v := π/2  implies
# [x(v), y(v)] = [0, 3]
# Tangent vector to curve  (same as velocity):
T(t1) := [d/dt1(x(t1)); d/dt1(y(t1))]
T(u) = [0; 3]
T(v) = [-2; 0]
# Normal vector to curve (rotate T(t1) counter clockwise by 90 deg):
N(t1) := [-d/dt1(y(t1)); d/dt1(x(t1))]
N(u) = [-3; 0]
N(v) = [0; -2]
# Radius of curvature at a point:
ρ(t1) := ((d/dt1(x(t1)))^2 + (d/dt1(y(t1)))^2)^(3/2)/((d/dt1(x(t1)))*(d^2/dt1^2(y(t1))) - (d/dt1(y(t1)))*(d^2/dt1^2(x(t1))))
# The radius of the osculating circle (best-approximating circle) to the ellipse at each point is inverse to how sharply the curve bends.
ρ(u) = 4.5
ρ(v) = 1.33333
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