# Title: Fourier Coefficients: Signal Generation
# Description: Computing Fourier coefficients for a periodic function and generating an approximating Fourier polynomial.
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# CALCULUS AND DIFFERENTIAL EQUATIONS
# quicksheets
# Fourier Coefficients: Signal Generation
# This QuickSheet can be used to compute Fourier coefficients for a periodic function and generate an approximating Fourier polynomial.
# Enter a function that is periodic on interval:
-L ≤ x ≤ L  # :
f(x) :=
    1 if 0 ≤ x ≤ 1
    -x if -1 ≤ x < 0
    f(x - 2) if x > 1
# Enter positive endpoint of periodic interval:
L := 1
# Order of Fourier series approximation:
Nt := 5
# Program to compute Fourier coefficients:
FC(f, N, L) :=
    R[:, 0] ← [1/(2*L)*integral(f(x), x = -L .. L); 0]
    for n ∈ 1 .. N
        R[:, n] ← [1/L*integral(f(x)*cos(n*π*x/L), x = -L .. L); 1/L*integral(f(x)*sin(n*π*x/L), x = -L .. L)]
    transpose(R)
# Computed Fourier coefficients:
res := FC(f, Nt, L)
A := res[:, 0]
B := res[:, 1]
# Nth Fourier polynomial:
p(x) := A[0] + sum(A[n]*cos(n*π*x/L) + B[n]*sin(n*π*x/L), n = 1 .. Nt)
# Plot of Fourier polynomial and original function:
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# Here are some Fourier series for common signals:
# Square Wave:
fsq(x, N, L) := 4/π*sum(1/n*sin(n*π*x/L)*mod(floor(n), 2), n = 1 .. N)
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# Sawtooth Wave:
fsw(x, N, L) := 1/2 - 1/π*sum(1/n*sin(n*π*x/L), n = 1 .. N)
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# Triangle Wave:
ft(x, N, L) := 8/π^2*sum((-1)^((n - 1)/2)/n^2*sin(n*π*x/L)*mod(floor(n), 2), n = 1 .. N)
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## Gibbs' Phenomenon
# You may notice some oscillation around sharp features in the approximated signals. The irregular convergence at points of discontinuity is called Gibbs' phenomenon, and you can examine this effect using animation. Use the FRAME variable to define the number of terms in the sequence for a square wave and watch the behavior of the function at the discontinuity at 0.
n := 0 .. 256
x[n] := 2*π/256*n - π
Nt := FRAME + 1
sig[n] := fsq(x[n], Nt, 1)
os := max(sig)
# Draw an ideal square wave on the graph for comparison, and calculate the overshoot of the Fourier approximation.
sw[n] :=
    1 if mod(floor(x[n]), 2) == 0
    0 otherwise
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os - 1 = 27.3189 %  # overshoot
Nt = 1
# Animate the graph by selecting Animation > Record from the Tools menu. You can, instead of using animation, simply change the value of FRAME to see the effect of additional approximation terms. When you animate, be sure to drag the animation selection box around the value of the overshoot as well, so you can track its change.
# Although the approximation certainly improves with more terms, you never reach a stage where there is no wiggle on the corner, nor is the rise on the leading edge ever perfectly vertical. Notice also that only odd values of Nt result in a change in the series, since the even values are 0 when evaluating the sin.
# The limits of the graph are also parametrized on FRAME, so that the graph zooms as more terms are added. You can control the magnitude of the zoom with each frame by changing the zoom factor:
zoom ≡ 0.06
# You can control the size of the zoom box indicated on the plot by changing the lower and upper bounds.
ll ≡ 0.8
ul ≡ 1.4
zmbx ≡ [ll, ul, ul, ll, ll; ul, ul, ll, ll, ul]
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