# Title: PDEs - Heat Flow on a Plate
# Description: Solving for the steady-state temperature distribution of a square plate.
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# CALCULUS AND DIFFERENTIAL EQUATIONS
# quicksheets
# PDEs - Heat Flow on a Square Plate
# This QuickSheet can be used to solve for the steady-state temperature distribution of a square plate using the partial differential equation solver multigrid. The relax function is also shown for comparison.
## Solving Laplace's Equation
# Find the temperature T(x,y) of a square plate with a constant internal heat source. The boundary of the source is pinned at zero degrees.
# At any point free of the heat source, the heat equation reduces to Laplace's equation in two variables:
T[xx] + T[yy] == 0
# Size of the grid is (R + 1) by (R + 1):
R := 32
# Set the dimensions of the source ρ:
ρ[R, R] := 0
# Position and strength of source:
c := 8
d := 14
heat := 1.545*10^3
ρ[c, d] := heat
G := multigrid(ρ, 2)
# [component: inputs -G]
# Surface plot of temperature
# [component: inputs G]
# Contour plot of temperature (showing lines of constant temperature).
# A different configuration of heat sources gives the following:
τ[R, R] := 0
τ[R/2, R/2] := 100
τ[R - 2, R/2] := -65
τ[3/4*R, 3/4*R] := -50
τ[3/4*R, 1/4*R] := -50
H := multigrid(τ, 4)
# [component: inputs H]
# [component: inputs H]
## Solving Poisson's Equation
# Now, solve the heat equation where values of the source function are known and the boundary conditions are non-zero. For this situation, use relax, which is based on an entirely differently solving method, and hence requires a different set of arguments.
# First, define five square matrices
a, b, c, d, e
# containing the coefficients for the Laplacian approximation
a*u[i + 1, j] + b*u[i - 1, j] + c*u[i, j + 1] + d*u[i, j - 1] + e*u[i, j]
# These arrays are of any size you specify. The larger they are, the finer the mesh in the solution, and the smaller the step size.
# Define the size of the grid, R:
R := 32
i := 0 .. R
j := 0 .. R
# and use the standard sets of coefficients:
a[i, j] := 1
b := a
c := a
d := a
e := -4*a
# Then, define the position and strength of the source. In this case, the source is constant:
S[i, j] := 0.05
# But, it could also be defined as above.
# Next, define a square matrix, f, the same size as our grid, containing the known boundary values of the function F(x,y) and guesses for the unknown interior values.
# For the boundary conditions use:
# along the top
f[0, j] := 0
# along the bottom a cosine wave
f[R, j] := 2*cos(4*π*j/R)
# along the edges a linear function
f[i, 0] := 2*i/R
f[i, R] := 2*i/R
# Finally, define a real number r, usually between 0 and 1, called the Jacobi spectral radius. This is a parameter that controls convergence of the algorithm. If you see the error message "too many iterations," try reducing r.
# A good choice for r is usually:
r := 1 - 2*π/R
# Now, call the relax function:
F := relax(a, b, c, d, e, S, f, r)
# [component: inputs -F]
# Surface plot of temperature
# [component: inputs F]
# Contour plot of temperature (showing lines of constant temperature).
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