# Title: Jacobian Matrix for Stiff ODEs
# Description: Solving stiff ODEs with and without a Jacobian matrix.
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# CALCULUS AND DIFFERENTIAL EQUATIONS
# quicksheets
# Jacobian Matrix for Stiff ODEs
# This QuickSheet shows how to compute the Jacobian matrix for an ordinary differential equation (ODE), using the function Jacob. You can provide the Jacobian matrix as an optional argument to the ODE solvers BDF and Radau, to improve the convergence of solutions for stiff ODEs.
#
# Note: The solvers stiffb and stiffr accept a slightly different augmented Jacobian matrix for the same purpose.
#
# As an example, suppose you have the following system:
y == [y[0]; y[1]; y[2]; y[3]]
d/dx(y) == [-x*y[0] + y[1]; -y[1]*(y[0]*y[2]) + x^2; y[3] - y[2]; x - x^3]
# in which the variables y_i are functions of x. To compute the Jacobian, first define a vector function D(x,y) corresponding to the right-hand side of the system. Note that you must type the variables y_i with the subscript operator. To insert a subscript after y, press the [ key and type the subscript in the placeholder.
D(x, y) := [-x*y[0] + y[1]; -y[1]*(y[0]*y[2]) + x^2; y[3] - y[2]; x - x^3]
# The Jacobian of the system is the 4-by-4 matrix J, whose i,j entry is the partial derivative
d/d(y[j])(f[i])
# where f_i is the ith scalar function in the vector function D(x,y). You can compute the Jacobian of the system by applying the function Jacob as follows:
Jacob(D(x, y), y) → [-x, 1, 0, 0; -y[1]*y[2], -y[0]*y[2], -y[0]*y[1], 0; 0, 0, -1, 1; 0, 0, 0, 0]
# As another example, consider the following system, which models the Belousov-Zhabotinsky chemical reaction. The system is highly stiff because of the widely varying scales of the constants and the extreme oscillations of the solution.
d/dx(y) == [
    -y[0]*(kc[0]*y[2] + σ[1]*k[1]*y[1]);
    -y[1]*(σ[0]*k[0]*y[2] - σ[1]*k[1]*y[0] + σ[2]*k[2]*y[1]) + kc[0]*y[0]*y[2];
    -y[2]*(kc[0]*y[0] + σ[0]*k[0]*y[1]) + kc[1]*y[3];
    -kc[1]*y[3] + σ[1]*k[1]*y[0]*y[1]
]
# Typical ODE solvers, such as Runge-Kutta fixed and adaptive methods, can't handle this system, either in their command-line form, or in an ODE solve block. For better results, use one of the stiff solvers, BDF or Radau, and provide the Jacobian matrix of the system as an argument.
# First, define the constants in the system.
kc := [1.34; 1]
σ := [10^9; 10^3; 10^7]
k := [1.6; 8; 8]
# Next, define the initial values.
yinit := [-1.06; 5.01*10^-11; 3.3*10^-7; 2.4*10^-8]
# To compute the Jacobian matrix, first define a vector function B(x,y), corresponding to the right-hand side of the system, as in the previous example.
B(x, y) := [
    -y[0]*(kc[0]*y[2] + σ[1]*k[1]*y[1]);
    -y[1]*(σ[0]*k[0]*y[2] - σ[1]*k[1]*y[0] + σ[2]*k[2]*y[1]) + kc[0]*y[0]*y[2];
    -y[2]*(kc[0]*y[0] + σ[0]*k[0]*y[1]) + kc[1]*y[3];
    -kc[1]*y[3] + σ[1]*k[1]*y[0]*y[1]
]
# Next, use Jacob to compute the Jacobian of the system.
J(x, y) := Jacob(B(x, y), y) → [
    y[2]*(-1.34) - 8000*y[1], (-8000)*y[0], y[0]*(-1.34), 0;
    y[2]*1.34 + 8000*y[1], y[2]*(-1600000000.0) + 8000*y[0] - 160000000*y[1], y[0]*1.34 + y[1]*(-1600000000.0), 0;
    y[2]*(-1.34), y[2]*(-1600000000.0), y[0]*(-1.34) + y[1]*(-1600000000.0), 1;
    8000*y[1], 8000*y[0], 0, -1
]
# Next, apply the solver BDF to the system. In this example, BDF uses the syntax BDF(yinit, x1, x2, npoints, B, J), where
#
# •  yinit is the vector of initial values for the solution.
# •  x1 and x2 are the endpoints of the interval over which the solution is evaluated.
# •  npoints is the number of points beyond the initial point, x1, at which the solution is approximated.
# •  B is the vector function corresponding to the right-hand side of the system.
# •  J is the Jacobian of the system.
# Apply BDF as follows:
Y := BDF(yinit, 0, 20, 150, B, J)
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## Augmented Jacobian for Stiffb and Stiffr
# The ODE solvers Stiffb and Stiffr accept an optional augmented Jacobian matrix, which has one more column that the Jacobian described above. The first column of the augmented Jacobian contains the partial derivatives, with respect to x, of the functions on the right-hand side of the system - in other words, the Jacobian, with respect to x. The remaining columns of the matrix are the columns of the usual Jacobian, containing the partial derivatives with respect to the variables in y.
#
# To illustrate the augmented Jacobian, consider the first example above, in which the right-hand side of the system was given by the matrix
D(x, y) := [-x*y[0] + y[1]; -y[1]*(y[0]*y[2]) + x^2; y[3] - y[2]; x - x^3]
# The first column of the augmented matrix is the Jacobian with respect to x of D(x,y).
Jacob(D(x, y), x) → [-y[0]; 2*x; 0; 1 - 3*x^2]
# To create the augmented Jacobian, AJ(x,y), combine this column with the usual Jacobian using the augment function:
AJ(x, y) := augment(Jacob(D(x, y), x), Jacob(D(x, y), y)) → [
    -y[0], -x, 1, 0, 0;
    2*x, -y[1]*y[2], -y[0]*y[2], -y[0]*y[1], 0;
    0, 0, 0, -1, 1;
    1 - 3*x^2, 0, 0, 0, 0
]
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