# Title: Monte Carlo Integration
# Description: Evaluating an integral by selecting random simulation points across the integration interval.
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# CALCULUS AND DIFFERENTIAL EQUATIONS
# quicksheets
# Monte Carlo Integration
# This QuickSheet demonstrates evaluating an integral by selecting simulation points at random across the integration interval, as opposed to the systematic selection of points used by any of the built-in Mathcad integration methods. The geometry behind the method is to approximate the area using one rectangle whose base is your interval and whose height is given by the average value of your function at the points selected.
# Input four functions to serve as the region boundaries:
a(x) := 2 - x
b(x) := 4 - x
c(x) := x
d(x) := sqrt(x^2 - 4)
x := 0, 0.01 .. 4
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# The region of interest falls entirely within the rectangle defined by 1 ≤ x ≤ 2.5 and 0 ≤ y ≤ 2.
# Monte Carlo approach to evaluating the following double integral over the region:
integral(f(x, y), A)
# Input integrand:
f(x, y) := (x + y)^2
# Input number of iterations:
N := 1*10^4
X := runif(N, 1, 2.5)
Y := runif(N, 0, 2)
Z := runif(N, 0, 16)
# κ is the counting function:
κ(x, y, z) := (a(x) < y)*(b(x) > y)*(c(x) > y)*if(x ≥ 2, d(x) < y, 1)*(z < f(x, y))
I := (2.5 - 1)*(2 - 0)*(16 - 0)*(1/N)*sum(κ(X[n], Y[n], Z[n]), n = 0 .. N - 1)
# Approximate value of integral:
I = 11.9808
# Exact value of integral using Mathcad's integration operator:
I_1 + I_2 = 12
I_1 ≡ integral(integral((x + y)^2, y = 2 - x .. x), x = 1 .. 2)
I_2 ≡ integral(integral((x + y)^2, y = sqrt(x^2 - 4) .. 4 - x), x = 2 .. 2.5)
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