# Title: Solving a First-Order ODE Initial Value Problem
# Description: Solving a first-order ODE initial value problem using various built-in functions.
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# CALCULUS AND DIFFERENTIAL EQUATIONS
# quicksheets
# Solving a First-Order ODE Initial Value Problem
# This QuickSheet can be used to solve an ordinary differential equation of the form:
d/dz(y(z)) == f(z, y)
y(z0) == y0
# Enter the initial value problem specifics:
f(z, y) := sin(z) + 1/y
z0 := 0
y0 := 1
# Enter the desired solution parameters:
z1 := 8*π  # Endpoint of solution interval
N := 1*10^3  # Number of solution values on [t0, t1]
# Odesolve
# One way to solve the differential equation is using a solve block and the Odesolve function. Note: Type [Ctrl] [F7] for the prime symbol '.
Given
y'(z) == f(z, y(z))
y(z0) == y0
y := Odesolve(z, z1)
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# Like Find, the Odesolve solution can also be used parametrically within the solve block.
Given
y'(z) == k*f(z, y(z))
y(z0) == y0
fy(k) := Odesolve(z, z1)
# The output, fy(k), is a function of a function, so you must specify the value of the parameter for which you would like the solution function. This result is assigned to an ordinary function name without the independent variable t.
yk05 := fy(.5)
yk10 := fy(1)
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# Alternately, use the prefix operator from the Evaluation toolbar to insert a function of a single argument, but this method is much slower to compute since it recomputes the whole solve block for each data point.
fy(0.5)(1.234) = 1.79779  # is the same as
yk05(1.234) = 1.79779
# Adams, rkfixed, Rkadapt, Bulstoer, and Radau
# Another way to solve the differential equation is by using the ODE solver Adams.
# Define solver parameters:
ic[0] := y0  # Vector of initial solution values
D(z, Y) := f(z, Y[0])
# Derivative function
# (Note: The second argument must be a vector of unknown function values.)
# Solution matrix:
S := Adams(ic, z0, z1, N, D)  # Note: The functions rkfixed, Rkadapt, Bulstoer, or Radau could also be used here.
T := S[:, 0]  # Independent variable values
Y := S[:, 1]  # Solution function values
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# The results of Odesolve are just an interpolated version of the results from the single-line function solvers. The Solve Block version allows more natural notation for the problem, while the function returned by Odesolve is the interpolation of the same table that is returned by the single-line solver. You can right-click on the Odesolve command to choose different solvers, corresponding to Adams/BDF, rkfixed, Rkadapt, and Radau.
#
# Beware of aliasing when solving problems with periodic behavior over many cycles. Be sure you have sampled with enough interpolation points to get the frequencies in your results that you expect.
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