# Title: Solving a First-Order System of ODEs
# Description: Solving a system of first-order ODEs using various built-in functions.
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# CALCULUS AND DIFFERENTIAL EQUATIONS
# quicksheets
# Solving a First-Order System of ODEs
# This QuickSheet can be used to solve a system of first-order ordinary differential equations.
# One way to solve the systems of ODEs is using a solve block and the Odesolve function.  Start with a system written with derivatives on the left-hand side only, along with a set of initial conditions:
# Enter the desired solution parameters:
T1 := 10  # Endpoint of solution interval
Given
d/du(y0(u)) == -8*y0(u) + 8*y1(u)
y0(0) == -1
d/du(y1(u)) == 30*y0(u) + y1(u) - y0(u)*y2(u)
y1(0) == 0
d/du(y2(u)) == y0(u)*y1(u) - 8/3*y2(u)
y2(0) == 1
[f; g; h1] := Odesolve([y0; y1; y2], u, T1, 1*10^3)
z1 := 0, T1/(1*10^3) .. T1
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# Rkadapt, rkfixed, Bulstoer, or Radau
# Another way to solve the system of differential equations is using the
# Rkadapt function.
# Define a function that determines a vector of derivative values at any solution point (t,Y):
D(u, Y) := [-8*Y[0] + 8*Y[1]; 30*Y[0] + Y[1] - Y[0]*Y[2]; Y[0]*Y[1] - 8/3*Y[2]]
# Define additional arguments for the ODE solver:
z0 := 0  # Initial value of independent variable
Y0 := [-1; 0; 1]  # Vector of initial function values
num := 1*10^3  # Number of solution values on [t0, t1]
# Solution matrix:
S1 := Rkadapt(Y0, z0, T1, num, D)  # Note: The function rkfixed or Bulstoer or Radau could also be used here.
u := S1[:, 0]  # Independent variable values
y0 := S1[:, 1]  # First solution function values
y1 := S1[:, 2]  # Second solution function values
y2 := S1[:, 3]  # Third solution function values
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