# Title: Numerical Double Integrals
# Description: Evaluating integrals of real-valued functions over regions in the x-y plane.
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# CALCULUS AND DIFFERENTIAL EQUATIONS
# quicksheets
# Numerical Double Integrals
# This QuickSheet can be used to evaluate integrals of real-valued functions f(x,y) over regions in the x-y plane.
# Input boundaries of region in x-y plane, assuming a < x < b and c(x) < y < d(x) for all x.
a := 0
b := 1
c(x) := 0
d(x) := x
# Input real-valued function to be integrated:
f(x, y) := sqrt(x^2 + y^2)
# [area: Formulas for plot]
x := a, a + 0.01 .. b
y := c(a), c(a) + 0.01 .. d(a)
z := c(b), c(b) + 0.01 .. d(b)
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# Evaluate three double integrals, giving the mass and center of mass of the triangle (pictured).  The density, f(x,y), of the triangle at point (x,y) is proportional to the distance from (x,y) to the origin.
mass := integral(integral(f(x, y), y = c(x) .. d(x)), x = a .. b)
mass = 0.382598
x_cm1 := 1/mass*integral(integral(x*f(x, y), y = c(x) .. d(x)), x = a .. b)
y_cm1 := 1/mass*integral(integral(y*f(x, y), y = c(x) .. d(x)), x = a .. b)
cm1 := [x_cm1; y_cm1]
cm1 = [0.75; 0.398248]
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