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## CALCULUS AND DIFFERENTIAL EQUATIONS
# quicksheets
# State Space Solver
# This QuickSheet illustrates how to use the solver statespace to solve a state space representation of a system of first-order ordinary differential equations (ODEs). State space representations are often used to describe problems in control theory and dynamical systems.
# State Space Representations
# State Space Representations of Higher Order ODEs
# Using the statespace Solver
# Forced Harmonic Oscillation
## State Space Representations
# A state space representation is a system of linear, first-order ODEs of the form
d/dτ(x(τ)) == A(τ)*x(τ) + B(τ)*u(τ)
# where
#
# •  τ (tau) is the independent variable representing time.
# •  x(τ) is a vector of n states.
# •  A(τ) is an n-by-n state matrix.
# •  B(τ) is an n-by-k input matrix.
# •  u(τ) is an k-by-1 input, or control, vector.
# In control theory, the input matrix and vector usually represent external forces that can be applied to the system to control its behavior. This QuickSheet gives an example in which the input matrix and vector represent the driving force in a forced harmonic oscillator.
## State Space Representations for Higher Order ODEs
# There is a standard method for writing a higher-order ODE as a system of first-order ODEs. You can use this method to write a state space representation for any higher order ODE. As an example, the following explains how to write a state space representation for damped harmonic oscillation, such as occurs when a mass, attached to a spring, has an external force, of the form F[0]*cos(ω[F]*τ), applied to it.
m*d^2/dτ^2(x(τ)) + b*d/dτ(x(τ)) + k*x(τ) == F[0]*cos(ω_F*τ)
# Here m is the mass of the object, b is the damping constant, k is the spring constant, and F_0*cos(ω_F*τ) represents an external force driving the system with forcing frequency ω_F.
# You can simplify the above equation by dividing through by m and making the following substitutions:
ω_0^2 == k/m
A[0] == F_0/m
d^2/dτ^2(x(τ)) + b/m*d/dτ(x(τ)) + ω_0^2*x(τ) == A_0*cos(ω_F*τ)
# Here, ω_0 == sqrt(k/m)  is the natural, or resonant, frequency of the system.
# To write the state space representation for this second-order ODE, introduce new variables, x_0, x_1, and x_2 , corresponding to x and its first and second derivatives.
x_0 == x
x_1 == d/dτ(x_0)
x_2 == d/dτ(x1)
# The following vector equation describes the relationships between the variables:
d/dτ([x_0; x_1]) == [x_1; x_2]
# Note that x[2] is the second derivative of x[0]. You can rewrite the original equation in terms of these variables as
x_2 + b/m*x_1 + ω_0^2*x_0 == A_0*cos(ω_F*τ)
# Solve for x_2 and substitute the result in the right-hand side of the preceding vector equation:
sol := x_2 + b/m*x_1 + ω[0]^2*x_0 == A_0*cos(ω_F*τ) solve, x_2 → A_0*cos(τ*ω_F) - x_0*ω[0]^2 - b*x_1/m  # error: This variable is undefined.
[x_1; x_2] substitute, x_2 == sol → [x_1; -(m*x_0*ω[0]^2 + b*x_1 - A_0*m*cos(τ*ω_F))/m]
# You can then write the ODE in matrix form by setting
x == [x_0; x_1]
A(τ) == [0, 1; -ω_0^2, -b/m]
B(τ) := [0; 1]
u(τ) == A_0*cos(ω_F*τ)
# The state space representation of the original ODE is the following:
d/dτ(x(τ)) == A(τ)*x(τ) + B(τ)*u(τ)
# Note that the product of the input matrix and input vector, B(τ)*u(τ), represent the driving force in the system.
## Using the statespace Solver
# You can solve the state space representation of the forced harmonic oscillator using the solver statespace, which has the following syntax:
# statespace(init, t1, t2, npoints, A, B, u)
# where
# •  init is a vector of initial conditions, whose length is the number of states.
# •  t1 is a starting point of the integration interval.
# •  t2 is an ending point of the integration interval.
# •  npoints is the number of points at which to return results.
# •  A is an n-by-n state matrix, where n is the number of states.
# •  B is an optional n-by-k input matrix.
# •  u is an optional k-by-1 the input vector.
# To illustrate statespace, start with the case of unforced harmonic oscillator, in which B and u are not present, and the right-hand side of the harmonic oscillation equation is 0:
x_2 + b/m*x_1 + ω_0^2*x_0 == 0
# There are three cases for the solutions:
# Overdamped:
(b/m)^2 - 4*ω_0^2 > 0
# Critically damped:
(b/m)^2 - 4*ω_0^2 == 0
# Underdamped:
(b/m)^2 - 4*ω_0^2 < 0
# The following examples illustrate these three cases:
m := 2
b := 1
init := [0; 1]
t1 := 0
npoints := 5000
## Overdamped Solution
ω_0 := 1/6
(b/m)^2 - 4*ω_0^2 = 0.138889
t2 := 30
A(t) := [0, 1; -ω_0^2, -b/m]
sol1 := statespace(init, t1, t2, 500, A)
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## Critically Damped Solution
ω_0 := 1/4
(b/m)^2 - 4*ω_0^2 = 0
A(t) := [0, 1; -ω_0^2, -b/m]
sol2 := statespace(init, t1, t2, npoints, A)
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## Underdamped Solution
ω_0 := 1
(b/m)^2 - 4*ω_0^2 = -3.75
t2 := 20
A(t) := [0, 1; -ω_0^2, -b/m]
sol3 := statespace(init, t1, t2, npoints, A)
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## Forced Harmonic Oscillation
# This section describes forced harmonic oscillation, in which the input matrix B and input vector u, corresponding to the external force, are present. The examples show the undamped case, in which the damping coefficient b = 0. The nature of the solutions depends on whether the forcing frequency ω[F]  is less than, equal to, or greater than the resonant frequency ω[0] . The following examples illustrate the differences:
# Case 1: Forcing frequency less than resonant frequency - ω_F < ω_0
ω_F := 1.5
ω_0 := 2
b := 0
A(t) := [0, 1; -ω_0^2, -b/m]
A_0 := 1
t2 := 40
B(τ) := [0; 1]
u(τ) := A_0*cos(ω_F*τ)
sol4 := statespace(init, t1, t2, npoints, A, B, u)
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# Case 2: Forcing frequency equal to resonant frequency - ω_F == ω_0
ω_F := 2
ω_0 := 2
A(t) := [0, 1; -ω_0^2, -b/m]
A_0 := 1
t2 := 40
u(τ) := A_0*cos(ω_F*τ)
sol5 := statespace(init, t1, t2, npoints, A, B, u)
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# Case 3: Forcing frequency greater than resonant frequency ω[F] > ω[0]
# :
ω_F := 2.6
ω_0 := 2
u(τ) := A_0*cos(ω_F*τ)
u(τ) := A_0*cos(ω_F*τ)
t2 := 40
u(τ) := A_0*cos(ω_F*τ)
sol6 := statespace(init, t1, t2, npoints, A, B, u)
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