# Title: Arc Length and Surface Area
# Description: Using integration to find the arc length or surface area of a function.
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# CALCULUS AND DIFFERENTIAL EQUATIONS
# quicksheets
# Arc Length and Surface Area
# This QuickSheet illustrates how to find the arc length or surface area of a function over a span on which its derivative is continuous.
# Enter a function of one variable to find an arc length.
f(x) := sin(x + x*sin(x))
# Enter endpoints of interval:
a := 0
b := 2*π
# Plot of f(x) over interval:
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# Arc length:
integral(sqrt(1 + (d/dx(f(x)))^2), x = a .. b) = 12.0564
# Or, enter a function of two variables to find a surface area.
f(x, y) := 2 - x^2 - y^2
# [component: inputs f]
# Surface plot
# Suppose you want the surface area above the disc
# x^2 + y^2 ≤ r^2 where r is constant.
# Enter radius of disc-shaped region of integration:
r := sqrt(2)
# Surface area:
area := integral(integral(sqrt(1 + (d/dx(f(x, y)))^2 + (d/dy(f(x, y)))^2), y = -sqrt(r^2 - x^2) .. sqrt(r^2 - x^2)), x = -r .. r)
area = 13.6136
# Converting to polar coordinates is faster and more accurate:
integral(integral(sqrt(1 + 4*ρ^2)*ρ, ρ = 0 .. r), θ = 0 .. 2*π) → (13*π)/3
13/3*π = 13.6136
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