# Title: Undersampling ODE Solutions
# Description: How Mathcad's solvers may yield incorrect results due to undersampling in the dataset.
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# CALCULUS AND DIFFERENTIAL EQUATIONS
# quicksheets
# Undersampling ODE Solutions
# To solve ordinary differential equations numerically, you approximate and report the solution at particular sample points in time. The solution is approximated at the number of points determined by the solver, then interpolated and reported at uniform intervals, as specified by the last argument in the command-line solvers or Odesolve. The adaptive and stiff methods use non-uniform step sizes during the approximation, adding more steps in regions of greater variation of the solution.
# It's important to recognize that these solutions can be undersampled, just as with any time series, giving incomplete or even false results. Consider the derivative of a cosine with specified period Tp and frequency shift θ
d/dt1(cos(t1/Tp + θ)) → -1/Tp*sin(θ + 1/Tp*t1)
# Use Odesolve to reconstruct the cosine, varying the period and phase shift.
Tp := 10^-4
θ := π/2
end := 40*Tp
Given
y'(t1) == -sin(t1/Tp + θ)/Tp
y(0) == cos(θ)
Sol := Odesolve(t1, end)
# The default value of step, the optional last argument for Odesolve, has been set large enough that the interpolation should give a reasonable representation of the solution.
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# The two solutions overlay one another, and continue to do so over a wide range of ending integration times and periodicities. However, if you manually restrict the number of interpolation steps for reporting the solution, you may get confusing results
Given
y'(t1) == -sin(t1/Tp + θ)/Tp
y(0) == cos(θ)
Sol := Odesolve(t1, end, steps)
steps ≡ 15
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# The incorrect approximate solution is the result of aliasing - the frequency of the result appears to be smaller than that of the actual solution because we have recorded too few approximate values. Doing so reduces the size of the interpolation table for the results and possibly the calculation time, but it produces an incorrect answer. Increase and decrease the value of the variable steps to see how this changes the approximation.
# This situation is particularly important in the case of the command-line ODE solvers, since the step size is not optional, and must be supplied each time the function is used. Another sampling problem can arise when solving over many periodic cycles of a solution. The system
Y0 := [1; 0]
D(t1, Y) := 2*π*[-Y[1]; Y[0]]
step := 1000
t1_max := 10
Z := Radau(Y0, 0, 10, step, D)
t1 := Z[:, 0]
x := Z[:, 1]
y := Z[:, 2]
# results in a solution of shifted sinusoids. Below the solution is viewed as a phase plot:
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# Now reduce the number of steps below 100. You get not only the aliasing of the previous problem, but also some numerical noise introduced by the integration routine. Sampling the same point in different cycles may not produce identical results, based on the numerical tolerance to which the problem was solved. In this case, the periodicity of the solution is not correct and the value is not identical at the same point in each cycle. The cycle-to-cycle noise is related to the routine used, the degree of undersampling, and the current value of TOL.
# Consider the case of 10 steps in the above problem, which has periodicity 1. Ideally, this produces a single point (constant solution), but the error causes the solution to wander about that point.
# Change both TOL and the solver (Radau, Bulstoer) to see different values of error in this case. Watch the change in y-axis scale.
TOL := 10^-3
Z := Rkadapt(Y0, 0, 10, 10, D)
x_10 := Z[:, 1]
y_10 := Z[:, 2]
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# Note that the graph limits have been tied to the value of TOL.
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