# Title: Gradient, Divergence, and Curl
# Description: Vector derivative operators in both numerics and symbolics.
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# CALCULUS AND DIFFERENTIAL EQUATIONS
# quicksheets
# Gradient, Divergence, and Curl
# This QuickSheet illustrates how to define and evaluate the vector operators gradient, divergence, and curl.
# Gradient
# The gradient of a scalar-valued function
f(x) == f*[x[0]; x[1]; x[2]]
# is defined by
∇[x](f(x)) == [d/d(x[0])(f(x)); d/d(x[1])(f(x)); d/d(x[2])(f(x))]
# You can compute the gradient using the Mathcad gradient operator. For example, suppose you define the following scalar-valued function:
f(x) := x[0]^2*x[1]*x[2]^3
# To insert the gradient operator, press [Ctrl] [Shift] G:
∇[□](□)
# Type the variable vector x in the lower placeholder, and type the function f(x) in the upper placeholder.
∇[x](f(x))
# Finally, type [Ctrl] [.] to insert the symbolic equal sign and press [Enter].
∇[x](f(x)) → [2*x[0]*x[1]*x[2]^3; x[0]^2*x[2]^3; 3*x[0]^2*x[1]*x[2]^2]
# If you define the vector x numerically, the gradient is a numerical vector:
x := [1; 3; -1]
∇[x](f(x)) =  # error: This value must be a scalar.
# Divergence
# The divergence of a vector-valued function
# A(x,y,z) = (A(x,y,z)_0, A(x,y,z)_1, A(x,y,z)_2)
# is defined by
div(A, x, y, z) := d/dx(A(x, y, z)[0]) + d/dy(A(x, y, z)[1]) + d/dz(A(x, y, z)[2])
# This can also be written as
div == ∇*A
# where ∇ == [d/dx, d/dy, d/dz] is the "del" operator.
# For example, if you define
x := x
A(x, y, z) := [x*z; -y^2; 2*x^2*y]
# you can evaluate the divergence symbolically by:
div(A, x, y, z) → z - 2*y
# After substituting values for x, y, and z, you can evaluate the divergence numerically:
div(A, 1, 1, 1) = -1
# Curl
# The curl of a vector-valued function A is defined by
curl(A, x, y, z) := [
    d/dy(A(x, y, z)[2]) - d/dz(A(x, y, z)[1]);
    d/dz(A(x, y, z)[0]) - d/dx(A(x, y, z)[2]);
    d/dx(A(x, y, z)[1]) - d/dy(A(x, y, z)[0])
]
# In terms of the del operator, this can be written as
curl == ∇×A
# To symbolically evaluate the curl of the function A defined previously, use the symbolic equal sign:
curl(A, x, y, z) → [2*x^2; x - 4*x*y; 0]
# Or, you can define values for x, y, and z, and evaluate the curl numerically:
curl(A, 1, 1, 1) = [2; -3; 0]
# Here are some more examples:
f(x, y, z) := x^2*y*z^3
# annotation to a formula above: Vector derivative operators in both numerics and symbolics.
B(x, y, z) := f(x, y, z)*A(x, y, z)
B(x, y, z) → [x^3*y*z^4; -x^2*y^3*z^3; 2*x^4*y^2*z^3]
div(B, x, y, z) → 6*x^4*y^2*z^2 - 3*x^2*y^2*z^3 + 3*x^2*y*z^4
curl(B, x, y, z) → [4*x^4*y*z^3 + 3*x^2*y^3*z^2; 4*x^3*y*z^3 - 8*x^3*y^2*z^3; -x^3*z^4 - 2*x*y^3*z^3]
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