# Title: PDEs - The Wave Equation
# Description: Solving the wave equation using both a solve block and the numol solver.
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# CALCULUS AND DIFFERENTIAL EQUATIONS
# quicksheets
# PDEs - The Wave Equation
# This QuickSheet compares solution techniques for the wave equation using a partial differential equation (PDE) solve block and the partial differential equation solver numol.
## PDE Solve Block
# To solve the one-dimensional wave equation
d/dz(v(x, z)) == a^2*d^2/dx^2(w(x, z))
# use the constraint
d/dz(w(x, z)) == v(x, z)
# to cast the first equation as a system of two partial differential equations.
# Set up a PDE solve block:
Given
v_z(x, z) == a^2*w_xx(x, z)
w_z(x, z) == v(x, z)
# with boundary conditions
w(x, 0) == sin(π*x/L)
v(x, 0) == 0
w(0, z) == 0
w(L, z) == 0
a ≡ 3
[w; v] := Pdesolve([w; v], x, [0; L], z, [0; T0])
L ≡ 2*π
T0 ≡ 2*π
# Here is a single solution on the boundary:
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# Create a grid of solutions to be plotted three dimensionally using the constraints defined above:
M := CreateMesh(w, 0, L, 0, T0)
# [component: inputs M]
## Using numol
# This system can also be solved with the command-line solver numol, should you need to include the calculation in a program or have other reasons for not using the solve block implementation. First, define the
# number of partial differential equations and algebraic constraints in your system:
num_pde := 2
num_pae := 0
# The function for evaluating the right-hand side of the PDEs, in this case, a system of equations, is a vector of length num_pde + num_pae. Likewise, the boundary conditions are defined as a column vector of length num_pde + num_pae.
# Vector of PDEs:
rhs(x, z, u, u_x, u_xx) := [u[1]; a^2*u_xx[0]]
# So, here, u_1 = v from above, and u_0 = w.
# Vector of initial conditions:
init(x) := [sin(π*x/L); 0]
# Assume that each left-hand side is the first-order time derivative of the unknown function vector u. The function has as its variables x (space), t (time), the solution u, which can, itself, be a vector of solutions for a system of equations, u_x, which is the first derivative of each solution u in the vector, and u_xx, which is the second spatial derivative of everything in the solution vector u. Note that you must use vector subscripts to address the individual entries in u, u_x, and u_xx.
# The vector of boundary conditions can have three types of rows. Each row is determined by one of the following:
# •  rhs contains second-order spatial derivatives: two boundary conditions (either Dirichlet “D” or Neumann “N”) required, one for each side of the integration region
# •  rhs contains first-order spatial derivatives: one Dirichlet boundary condition at left or right side of the integration region, the other is“NA”
# •  no spatial derivatives, no boundary conditions required
# Boundary conditions at the left and right borders, following the codes above:
bc_func(z) := [init(0)[0], init(L)[0], "D"; "NA", "NA", "D"]
# Now, define the solution:
sol := numol([0; L], 30, [0; T0], 20, num_pde, num_pae, rhs, init, bc_func)
# The result of numol is a matrix that represents each point in space as a row and each point in time as a column. This facilitates animation of solutions by allowing you to pick off one column at a time, representing the solution over all space at a single point in time. When solving a system of equations, the solution matrix for each unknown function is appended to the side of the previous matrix.
rows(sol) = 30
cols(sol) = 40
# For the current example, there are 20 points in time for each function, so the matrix is 40 columns wide.  Pick off just the first solution, u0:
SOL := submatrix(sol, 0, 29, 0, 20)
i := 0 .. 30
L = 6.28319
x[i] := i*L/30
t0 := 1
# Compare numol and Pdesolve solutions at a point, t0:
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# Compare the grid of solutions for values of space and time:
# [component: inputs SOL]
# [component: inputs M]
# To animate the solution, graph column FRAME.  Then choose Animate > Record from the Tools menu. When the Animation dialog box is open, drag a dotted-line selection box around the graph, and Animate for frames 0 through 19.
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# You could use the function generated by the Pdesolve to create an animation as well by using the FRAME variable as the value for z in the function u(x,z).
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