# Title: Two-dimensional Spline Interpolation
# Description: Using the cspline and interp functions.
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# DATA ANALYSIS
# quicksheets
# Two-Dimensional Spline Interpolation
# This QuickSheet demonstrates Mathcad’s cspline and interp functions for 2D interpolation of a surface.
# Enter a matrix specifying a surface:
# [component: outputs Mz]
# Click on the Data Table above until you see the handles and enlarge it to see the matrix Mz used in this example.
# Note: The number of rows in the matrix must equal the number of columns.
rows(Mz) = 6
cols(Mz) = 6
n := rows(Mz)
# Specify X and Y n-vectors that determine the mesh for the matrix:
# [component: outputs X]
# [component: outputs Y]
# Click on the Data Tables above until you see the handles, and enlarge them to see the vectors X and Y used in this example.
Mxy := augment(sort(X), sort(Y))
rows(Mxy) = 6
# Computed spline coefficients:
coef := cspline(Mxy, Mz)
# Fitting function for surface:
fit(x, y) := interp(coef, Mxy, Mz, [x; y])
# Sample interpolated values:
fit(2.5, 3.9) = 0.0149339
fit(0.1, 1.7) = -0.0422046
xlow := Mxy[0, 0]
xhigh := Mxy[n - 1, 0]
ylow := Mxy[0, 1]
yhigh := Mxy[n - 1, 1]
# Density of mesh for interpolation:
xn := 4*n
yn := 4*n
i := 0 .. xn - 1
xind[i] := xlow + i*(xhigh - xlow)/(xn - 1)
j := 0 .. yn - 1
yind[j] := ylow + j*(yhigh - ylow)/(yn - 1)
FIT[i, j] := fit(xind[i], yind[j])
# Surface Plot of 2D Spline Interpolated Surface | Original Surface
# [component: inputs FIT]
# [component: inputs Mz]
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