# Title: File Input and Output
# Description: Using Mathcad's file input/output components and functions.
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# DATA ANALYSIS
# quicksheets
# File Input and Output
# This QuickSheet illustrates working with the File Input and File Output components in Mathcad and the command line functions for reading ASCII, Binary, and Excel files. These functions give you control over what data format to expect, which rows and columns are read, and how to treat delimiters between data.
## Data Wizard
# To import a new file with the most flexible import options, use a File Input component. Choose Data from the Insert menu, then choose File Input. The Wizard allows you to
# •  read a large variety of file formats - including binary, fixed-width, and database formats
# •  preview the data
# •  select delimiters
# •  visually or numerically select rows and columns to import
# •  control other preferences, such as what to do with missing values.
# This Data Wizard-created component reads a text file with headers, starts at the appropriate row, and uses a specified delimiter.
#
# The component displays the data in a data table, or, if desired, just the file name. Note the ellipses in the bottom right cell, indicating there is m
# more data in the table. If you click on the cell, you will see the scroll bars.
# [component: outputs Wizard]
## Import Settings
# Properties can be set by right-clicking in the top left corner. This dialog allows you to change the import settings, but not the file type. If you want to start over, right-click in the top left corner and choose Import. You can also right-click and choose Add Input Variable. You may then type the file name and path into the input variable to more quickly swap files with the same import options.
## Data Preview
# Large data files may take a little time to refresh in the data preview.  Preview is limited to 100 lines in the panes that allow you to select delimiters and text qualifiers and to 250,000 elements in the final pane that allows you to click-select which rows and columns to include in the final import.
# You are still able to include or exclude rows and columns that are not displayed manually using the input text boxes, you just cannot preview them all.
## READFILE Function
# You can also read data files using the READFILE function, designed to give you some of the same options as the Data Wizard. The following program uses READFILE to pack sequential Excel files into a nested matrix of data.
batch_read(dataname) :=
    for i ∈ 0 .. last(dataname)
        filename ← dataname[i]
        M[i] ← READFILE(filename, "Excel", 2)
    M
filenames := ["mydata1.xls"; "anotherdataset.xls"; "somenewdata.xls"]
data := batch_read(filenames)
data = [
    [1, 1; 2, 4; 3, 9; 4, 16; 5, 25; 6, 36]; [1, 1; 2, 4; 3.3, 10.89; 4, 16; 5.1, 26.01; 6, 36]; [1, 1; 2, 4; 2.8, 7.84; 4.4, 19.36; 5.61, 31.4721]
]
# Note: You can use the string manipulation functions to work with data and other Excel cells that are converted to strings.
data[1] = [1, 1; 2, 4; 3.3, 10.89; 4, 16; 5.1, 26.01; 6, 36]
# READFILE has a number of optional arguments that can be used to control which rows and columns get read.
READFILE("data3.txt", "fixed", [14; 14; 14; 14]) = [
    1.78769e-5, 0.000111718, 2.79802e-5, 0.000112716;
    3.89495e-5, 0.000113799, 5.08591e-5, 0.000114973;
    6.37894e-5, 0.000116246, 7.78279e-5, 0.000117626
]
# The subsequent arguments, rows and columns, can either be a single integer specifying the starting row and starting column, or a two-element column vector specifying the starting and ending rows and columns, for example
READFILE("Lanczos1.dat", "delimited", [2; 5], 1) = [2.04433, 0.05; 1.6684, 0.1; 1.36642, 0.15; 1.12323, 0.2]
# The last argument allows you to specify what Mathcad value should be used to fill any missing entries (unfilled columns in any given row).
# Note that the Data Wizard and the READFILE command executes every time a Mathcad document is recalculated. If you wish to import data only once, use a Data Table.
# To extract data, use a lookup function.
## Writing Data
# To write data to a file, use a File Output component or the WRITEPRN command:
# [component: inputs data[1]]
# or
out := WRITEPRN("sunspots.prn", Wizard)  # error: This variable is undefined.
## File Output
# Right-click on the disk icon that represents the File Output component, and choose Properties. This dialog shows you the options for File Output. The WRITEPRN statement outputs the whole file, and returns the value of the data to the assigned variable, out. It's possible to write out a series of data files, each containing a subset of a data matrix, by creating a short program:
write_subsets(Data, Rows) :=
    numFiles ← floor(rows(Data)/Rows)
    for i ∈ 0 .. numFiles
        filename ← concat("output", num2str(i), ".prn")
        datasubset ← submatrix(Data, Rows*i, Rows*(i + 1) - 1, 0, cols(Data) - 1) if Rows*(i + 1) < rows(Data)
        otherwise
            lastrws ← rows(Data) - Rows*i
            datasubset ← submatrix(Data, Rows*i, rows(Data) - 1, 0, cols(Data) - 1)
        WRITEPRN(filename, datasubset)
    return concat(num2str(numFiles + 1), " files written, ", num2str(lastrws), " rows in last file")
write_subsets(Wizard, 100) =  # error: This variable is undefined.
## APPENDPRN
# Any time a worksheet is recalculated, the File Output component and the WRITEPRN function recalculate, overwriting the original file. If you wish to retain previous values and add to the end of the file, use APPENDPRN:
makeafile :=
    for i ∈ 0 .. 10
        M[i] ← i
        APPENDPRN("counting.txt", M)
    M
# The APPENDPRN function creates a file if none exists under that name; otherwise, it appends data to the end of the file.
## Batch Reading of Data
# Here's another example of reading files in batch mode using READPRN with a consistent and sequential file naming structure:
batch_read2(dataname, files) :=
    for i ∈ 0 .. files - 1
        filename ← concat(dataname, num2str(i), ".prn")
        M[i] ← READPRN(filename)
    M
batch_read2("output", 3) = [
    [
        1700, 5;
        1701, 11;
        1702, 16;
        1703, 23;
        1704, 36;
        1705, 58;
        1706, 29;
        1707, 20;
        1708, 10;
        1709, 8
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    ];
    [
        1800, 15;
        1801, 34;
        1802, 45;
        1803, 43;
        1804, 48;
        1805, 42;
        1806, 28;
        1807, 10;
        1808, 8;
        1809, 3
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    ];
    [
        1900, 10;
        1901, 3;
        1902, 5;
        1903, 24;
        1904, 42;
        1905, 64;
        1906, 54;
        1907, 62;
        1908, 49;
        1909, 44
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    ]
]
## Binary Files
# Binary files can be read much like .PRN text files.
File := READBIN("binarydata.bin", "float")
# If you wish to specify the optional arguments to READBIN, you must provide values for all previous optional arguments, or Mathcad cannot distinguish which ones you are setting:
File = [0; 1; 2; 3; 4; 5; 6; 7; 8; 9; 10]
c := 2  # columns per row
skip := 4  # bytes to skip at the start of file
r := 3  # rows to read
# Read the same file a different way:
File := READBIN("binarydata.bin", "float", 0, c, skip, r)
File = [1, 2; 3, 4; 5, 6]
# The WRITEBIN function works much like WRITEPRN. If you wish to use WRITEBIN on the right side of a definition, as was done in the programs above using WRITEPRN and APPENDPRN, you need to specify endian before you specify the matrix of data to write into the file.
M := WRITEBIN("binarydata.bin", "float", 0, makeafile)  # error: Cannot write to this file. Make sure it exists and is not read-only.
## Reading Unique Formats
# If you need to read data from other applications, such as an ODBC database, choose from third-party components available in the Insert menu.
# If your file type defies all of these descriptions, for example, a text file with no delimiters but a known record length, you can write your own component. The Mathsoft Scriptable Object component, available from the Insert > Component menu, or any of the Mathsoft Controls, available from the Insert > Control menu, can be scripted to handle unique file types.
## Mathsoft Pushbutton Control
# Here is an example of a Mathsoft Pushbutton control that has been scripted to read files. Suppose the path to the file is the same as the path to the current worksheet:
path := CWD
path = "C:\VAULT_WORKING_FOLDERS\Mathcad13_Documentation_TRUNK\ResourceCenter\EN\qsheet\Data_Analysis\"
# Supply the file name, record length, and number of expected columns to be sliced out of the continuous text in the file:
filename := "data2.txt"
reclength := 14
columns := 4
# You can add up to 4 input variables on custom components by right-clicking on the component and choosing Add Input Variable. Right-click and select Edit Script to see the way this Control was written. Some error checking is built-in to warn you if it can't find the file or if it can't read the file. The control creates 0's if you ask for more records (reclength * columns) than exist in the file, and it allows you to read in data as either numbers or strings.
# [component: inputs [path, filename, reclength, columns]; outputs Results]
Results =  # error
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