# Title: Using genfit: Power Regression
# Description: Fitting data using a power curve model.
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# DATA ANALYSIS
# quicksheets
# Using Genfit: Power Regression
# This QuickSheet demonstrates the use of Mathcad's genfit functions to fit data to a power curve model. The specialized built-in fitting function, pwrfit, may also be used.
# [component: outputs data]
X := data[:, 0]
Y := data[:, 1]
# First look at the use of genfit, taking the fitting function to be y == A*x^b, where A and b are unknown. From this model, define the function vector for use with the genfit function.
# model function
f(n, A, b) := [A*n^b; n^b; A*ln0(n)*n^b]  # derivative to first parameter
# derivative to second parameter
# The ln0 function is used here instead of ln, because it can be evaluated approximately at 0, which is necessary for adjusting the parameter values while minimizing the error. If you change the above expression for f to use ln, genfit fails to converge.
# Note: Use just the first element in the vector of functions if you wish genfit to calculate the derivatives numerically. Choose "Optimized Levenberg-Marquardt" for the genfit method by right-clicking on genfit to use this option.
# Define a vector of guesses.
guess := [2; 2]
# Use genfit to find the parameters in the model function.
cg := genfit(X, Y, guess, f)
# Here are the values for the coefficients of the power function.
cg = [2.74628; 1.4866]
# Define a function using these coefficients.
h1(x) := cg[0]*x^cg[1]
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# Now take a look at pwrfit. The fitting function is y == a*x^b + c, where a, b, and c are unknown.
# Define a vector of guesses.
Guess := [2; 2; 0]
# Use pwrfit to find the parameters in the model function.
cpw := pwrfit(X, Y, Guess)
cpw = [2.8385; 1.475; -0.452261]
# Define a function using these coefficients, then define a range variable over which to graph the function.
h2(x) := cpw[0]*x^cpw[1] + cpw[2]
x := min(X) .. max(X)
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# Looking at residual plots, it doesn't seem that either model fits the data very well.
# The largest residual values are max(vectorize(h1(X)) - Y) = 14.2074and max(vectorize(h2(X)) - Y) = 14.2878.
# The smallest residual values are min(vectorize(h1(X)) - Y) = -10.471and min(vectorize(h2(X)) - Y) = -10.3791.
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# Calculate the correlation coefficients, however, and the fit seems much better than the residual plot might reveal.
corr(vectorize(h1(X)), Y) = 0.993146
corr(vectorize(h2(X)), Y) = 0.993151
# For data that exists on a large scale, particularly power or exponential data that changes rapidly over larger and larger values of X, a residual plot is not necessarily the best tool for determining the goodness of a fit.
## Weighted genfit
# If you need to modify the vector of functions fed to genfit based on other parameters, you might use local functions to create the vector. For example, suppose you want to create a function that weights the data according to its standard deviations.
# Minimize the merit function:
Error == sum((wt[i]*(f(x[i], coef) - y[i]))^2, i)
f(n, v) := [v[0]*n^v[1]; n^v[1]; v[0]*ln0(n)*n^v[1]]
# You've used the vector input form for parameters so the weighted function can easily be used for other types of fitting functions with an arbitrary number of parameters.
genfitwt(x, y, σ, guess, f) :=
    wt ←
        s ← 1/σ
        s/|s|
    for i ∈ 0 .. last(x)
        vx[i] ← i
    vy ← vectorize(y*wt)
    f_wt(i, v) ← wt[i]*f(x[i], v)
    return genfit(vx, vy, guess, f_wt)
σ := [0.137; 0.157; 1.37; 0.274; 0.356; 0.463; 0.492; 0.638; 0.714; 0.962; 0.837; 1.187; 1.251; 1.384; 1.507]
# Skew one of the data points from the original set and use the set of standard deviations at right.
Y[2] := 123.3
[Ag; bg] := genfitwt(X, Y, σ, guess, f)
fit(x) := f(x, [Ag; bg])[0]
# Using the genfit function without weights:
[Anw; bnw] := genfit(X, Y, guess, f)
fitnw(x) := f(x, [Anw; bnw])[0]
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[Ag; bg] = [2.97761; 1.44598]
[Anw; bnw] = [7.98241; 1.04667]
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