# Title: Using linfit: Logarithmic Regression
# Description: Fitting data to a logarithmic model.
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# DATA ANALYSIS
# quicksheets
# Using Linfit: Logarithmic Regression
# This QuickSheet demonstrates the use of Mathcad’s linfit function to fit data to a logarithmic model. Two specialized built-in fitting functions,  logfit and lnfit, may also be used.
# The following Data Table contains a set of data that may be best approximated by a logarithmic model function.
# [component: outputs data]
X := data[:, 0]
Y := data[:, 1]
# Enter the vector of functions to fit. In this example, we fit this data to the model function y == a*ln(x) + b*sqrt(x) + c, where a, b, and c are unknown.
F(x) := [ln(x); sqrt(x); 1]
# Call the linfit function using the data and the vector of functions, F.
S := linfit(X, Y, F)
# Define a function that uses these newly found parameter values in the logarithmic model. Also, define a range variable over which to graph the function.
f(x) := F(x)*S
z := min(X) .. max(X)
# A graph of the model function with the newly found parameter values and the original data points reveals a good fit.
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corr(vectorize(f(X)), Y) = 0.979481  # correlation coefficient
# A simpler way to perform a customized log fit is by using the lnfit function, which fits data to the model function y == a*ln(x) + b:
T := lnfit(X, Y)
T = [0.880846; 4.17344]
h(x) := T[0]*ln(x) + T[1]
z := 0 .. last(X)  # (range variable for plotting)
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corr(vectorize(h(X)), Y) = 0.978984  # correlation coefficient
# You can also use Mathcad’s logfit function, which fits data to the model function y == a*ln(x + b) + c.
G := [1; 0; 4]  # guess vector
T := logfit(X, Y, G)
T = [0.863853; -0.0969034; 4.22735]
g(x) := T[0]*ln(x + T[1]) + T[2]
z := 0 .. last(X)  # range variable for plotting
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corr(vectorize(g(X)), Y) = 0.979049  # correlation coefficient
# In this case, all three model functions did an excellent job fitting the data. In many cases, however, the data is best fit by one model over another.
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