# Title: Linear Regression
# Description: Using Mathcad to perform linear regressions of X-Y data.
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# DATA ANALYSIS
# quicksheets
# Linear Regression
# This QuickSheet demonstrates Mathcad’s statistical functions for linear regression of X-Y data.
# Enter matrix of X-Y data to be analyzed (x-coordinate in first column, y-coordinate in second):
# [component: outputs data]
# Click on the Data Table above until you see the handles then enlarge it to see the matrix data used in this example.
X := data[:, 0]
Y := data[:, 1]
# Number of data points:
n := rows(data)
n = 14
# Standard deviation:
SD(x) := stdev(x)*sqrt(n/(n - 1))
# X-Coordinates | Y-Coordinates
# Mean
mean(X) = 9.21429
mean(Y) = 41.0871
# Median
median(X) = 9.5
median(Y) = 38.805
# Standard dev.
SD(X) = 6.19154
SD(Y) = 27.2031
# Variance
SD(X)^2 = 38.3352
SD(Y)^2 = 740.008
# Regression Statistics
# Intercept
b[0] := intercept(X, Y)
b[0] = 1.58714
# Slope
b[1] := slope(X, Y)
b[1] = 4.28682
# Correlation coeff.
corr(X, Y) = 0.975699
# R^2
corr(X, Y)^2 = 0.951989
# Covariance
cvar(X, Y) = 152.598
# Standard Error
stderr(X, Y) = 6.20395
# Plots
r(x) := b[0] + b[1]*x
scale := max(vectorize(|r(X) - Y|))*1.1
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