# Title: Built-in and Custom Lookup Functions
# Description: Using built-in and custom functions to find and return values in vectors or matrices.
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# DATA ANALYSIS
# quicksheets
# Built-in and Custom Lookup Functions
# The functions lookup, hlookup, vlookup and match allow you to find
# values in vectors or matrices and return corresponding row or column
# values in the same or other vectors or matrices.
## lookup Examples
# vector form
# [component: outputs cars]
# model number
# % of market
# crash test rating
# average cost per car
# The data set, cars, gives a model number, percentage of market, crash test rating and average cost for 11 automobiles. (Click on the data table to scroll to more columns.) CARS is a transpose of cars for searching the matrix by column.
CARS := transpose(cars)
lookup(33000, CARS[:, 3], CARS[:, 0]) = [8]  # Looks up the model numbers of cars that have an average price of $33000.
lookup(25000, CARS[:, 3], CARS[:, 0]) = [2; 10]  # Looks up the model numbers of cars that have an average price of $25000.
lookup(25000, CARS[:, 3], CARS[:, 2]) = [2; 4]  # Looks up the crash test ratings of cars that have an average price of $25000.
lookup(1, CARS[:, 2], CARS[:, 3]) = [30000; 30000; 28000]  # Looks up the average prices of cars that have a crash test rating of 1.
## lookup Examples
# matrix form
# [component: outputs costgrid]
# brand
# type
# [component: outputs crashgrid]
# brand
# type
# These two data sets give the cost and corresponding crash test rating.
lookup(32000, costgrid, crashgrid) = [3]  # Looks up the cost in one grid and returns the crash test rating in the other.
lookup(25000, costgrid, crashgrid) = [2; 2; 2; 2; 2; 1]  # Looks up the cost in one grid and returns the crash test rating in the other.
lookup(4, crashgrid, costgrid) = [35000]  # Looks up the crash test rating in one grid and returns the cost in the other.
## hlookup and vlookup Examples
# [component: outputs cars]
# model number
# % of market
# crash test rating
# average cost per car
# The data set, cars, gives a model number, percentage of market, crash test rating and average cost for 11 automobiles. (Click on the data table to scroll to more columns.) CARS is a transpose of cars for searching the matrix by column.
CARS := transpose(cars)
hlookup(4, cars, 3) = [29000]  # Looks up the cost of the model specified (#4).
hlookup(6, cars, 2) = [3]  # Looks up the crash test rating of the model specified (#6).
hlookup(9, cars, 1) = [15]  # Looks up the percentage of market of the model specified (#9).
vlookup(4, CARS, 3) = [29000]  # Looks up the cost of the model specified (#4).
vlookup(6, CARS, 2) = [3]  # Looks up the crash test rating of the model specified (#6).
vlookup(9, CARS, 1) = [15]  # Looks up the percentage of market of the model specified (#9).
## match Examples
match(33000, costgrid) = [[0; 4]]  # Looks up the index in the grid of the car with the cost specified.
match(25000, costgrid) = [[3; 3]; [2; 5]; [1; 6]; [3; 8]; [0; 9]; [2; 10]]  # Looks up the index in the grid of the car with the cost specified.
match(4, crashgrid) = [[1; 4]]  # Looks up the index in the grid of the car with the crash test rating specified.
## Custom Lookup functions
# You can write a program to extract from a data vector all the elements that match a given condition, when the condition is more sophisticated than an exact match to a particular number.
# Enter a data vector containing the elements you want to match:
D := rnorm(8, 4, 2)
# Specify a condition the elements must match:
c(x) := 2 ≤ x ≤ 5
# Extracting function:
Extract(V, c) :=
    i ← 0
    U ← 0
    for j ∈ 0 .. rows(V) - 1
        if c(V[j]) == 1
            U[i] ← V[j]
            i ← i + 1
    U
# E contains the elements of D that meet the condition c:
E := Extract(D, c)
D = [3.12206; 2.64119; 3.05343; 2.09707; 0.62863; 4.08706; 3.75873; 5.11285]
E = [3.12206; 2.64119; 3.05343; 2.09707; 4.08706; 3.75873]
# Note: The algorithm is affected by the exact Boolean comparison setting.
# You can get additional built-in functions to perform this type of extensible matching with the Data Analysis Extension Pack.
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