# Title: Using regress: Multivariate Regression
# Description: Fitting n-dimensional data to a higher order polynomial.
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# DATA ANALYSIS
# quicksheets
# Using Regress: Multivariate Regression
# This QuickSheet may be used to perform a multivariate regression to fit n-dimensional data to a higher order polynomial. It uses Mathcad’s built-in function regress to perform the regression analysis and interp to define a polynomial function. Also included in this worksheet is a program that allows you to extract specific coefficients associated with individual monomial terms.
# Enter your data as vectors. Each vector represents one of several independent variables or the dependent variable.
i := 0 .. 14
X[i] := 47, 80, 125, 31, 116, 99, 43, 30, 150, 112, 42, 150, 92, 89, 46
Y[i] := 20, 28, 48, 8, 35, 40, 13, 2, 24, 20, 6, 47, 29, 23, 15
Z[i] := 49, 118, 145, 20, 81, 68, 51, 13, 80, 43, 27, 71, 101, 46, 27
# The higher dimensional form of regress takes three arguments:
#
# •  a real array, M, each column of which represents data corresponding to one of the independent variables
# •  a real vector, V, representing the data for the dependent variable
# •  a positive integer, n, specifying the degree of the polynomial function to which the data will be fit
#
# Define each as follows:
M := augment(X, Y)  # Varies depending on the number of independent variables.
V := Z  # Varies depending upon which vector represents your dependent variable.
n := 2  # Varies depending on the degree of the fitting function.
# Define the regress function, and view the results.
# You could replace the call to regress with a call to the loess function for a different type of fit
R := regress(M, V, n)
R = [3; 3; 2; -0.0557772; 0.0922499; 2.52997; -14.7605; 0.690859; 0.00297988]
# Use the interp function to define a two-variable polynomial function which uses these coefficients. interp is able to interpret the order of the coefficients and the monomial terms with which they are associated. In particular, it uses the first three terms of the vector, R, to determine the built-in function being called (3 for regress), the vector position of the first coefficient (always 3), and the degree of the fitting function (n).
f(x, y) := interp(R, M, V, [x; y])  # This definition varies depending upon the number of independent variables.
# Call the function for specific values but do not use the function to extrapolate. It should be used for interpolation only.
f(90, 12) = 54.9582  # This function call varies depending upon the number of independent variables you have.
# In this example, we are dealing with a 2D case of multivariate regression. Therefore, we can graph the result as a surface over ranges for x and y.
F := CreateMesh(f, min(X), max(X), min(Y), max(Y), 20, 20)
# [component: inputs [(F, (X, Y, Z)), □]]
# The regression surface passes through the space minimizing the distance to each of the data points, shown in black on the graph.
## Extracting Specific Coefficients
# In order to actually extract the specific coefficients associated with individual monomial terms in the model function (rather than letting interp create the function internally), you need to use the programs shown below.
# A polynomial in nvar variables of degree deg has a number of terms given by the function Nterms:
Nterms(nvar, deg) := (nvar + deg)!/(deg!*nvar!)
# The number of variables of the polynomial is:
Nvars := cols(M)
# The number of data points is:
Ndata := rows(M)
# The degree of the fitting function:
deg := n
# Here are the two programs that extract the coefficients.
Step(v, Nvar, deg) :=
    if Nvar == 1
        for i ∈ 0 .. deg
            v[i, 0] ← v[i, 0] + i
    if deg == 1
        for i ∈ 0 .. Nvar - 1
            v[i, i] ← v[i, i] + 1
    otherwise
        inc ← Nterms(Nvar, deg - 1)
        for i ∈ 0 .. inc - 1
            v[i, Nvar - 1] ← v[i, Nvar - 1] + 1
        v ← stack(Step(submatrix(v, 0, inc - 1, 0, cols(v) - 1), Nvar, deg - 1), Step(submatrix(v, inc, rows(v) - 1, 0, cols(v) - 1), Nvar - 1, deg))
    v
COrder(Nvar, deg) :=
    v[Nterms(Nvar, deg) - 1, Nvar - 1] ← 0
    Step(v, Nvar, deg)
# Call the program COrder(Nvars, deg) using the definitions above, and strip the vector, R, of its first three terms.
I := COrder(Nvars, deg)
coeffs := submatrix(R, 3, rows(R) - 1, 0, 0)
I = [1, 1; 0, 2; 0, 1; 0, 0; 1, 0; 2, 0]
coeffs = [-0.0557772; 0.0922499; 2.52997; -14.7605; 0.690859; 0.00297988]
# The first column of I gives the power of the x term of each monomial corresponding to the power of the y term given in the second column. The rows of I and coeffs correspond. Therefore, you can define the model function using the following summation.
poly(x, y) := sum(coeffs[i]*x^I[i, 0]*y^I[i, 1], i = 0 .. last(coeffs))
# Comparing:
poly(90, 50) = 177.68
f(90, 50) = 177.68
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