# Title: Using minerr for Nonlinear Least Squares Fitting
# Description: Returning approximate solutions from non-converging solve blocks.
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# DATA ANALYSIS
# quicksheets
# Using Minerr for Nonlinear Least Squares Fitting
# Minerr is used within solve blocks in the same way as Find, except it returns an approximate solution when Find reports that no solution exists. Minerr returns the last values calculated by Find when the maximum number of iterations towards a solution has been reached, but convergence is not achieved. In all other cases Minerr returns the same results as Find.
## Example
# Two vectors x and y are defined in the collapsed area. (To see the vectors, copy the file into your worksheet and expand the area.)
# [area: Weibull Data]
x := [0.132; 0.322; 0.511; 0.701; 0.891; 1.081; 1.27; 1.46; 1.65; 1.839; 2.029; 2.219]
y := [0.1; 0.258; 0.543; 0.506; 0.606; 0.622; 0.569; 0.453; 0.438; 0.316; 0.29; 0.195]
n := length(y) - 1
i := 1 .. n
# Fitting function F (Weibull density with unknown parameters):
Wb(x, α, β) := α*β*x^(β - 1)*exp(-α*x^β)
# Initial guess for parameters:
α := 0.8
β := 1
## Levenberg-Marquardt
# Use the Levenberg-Marquardt method to minimize this problem. The Levenberg-Marquardt method does its own summing and squaring of the residuals, so the equation to minimize in the Minerr Solve Block is
resid(α, β) := y - vectorize(Wb(x, α, β))
Given
0 == resid(α, β)
# Parameters for best fit:
[α1; β1] := Minerr(α, β)
[α1; β1] = [0.502182; 2.00035]
# Right-click on the Minerr function to see that the Levenberg-Marquardt method is chosen for this problem.
# Sum of squares implicitly minimized by this method:
SSE(α, β) := sum(resid(α, β)^2)
z := 0, 0.1 .. 4
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# Mean squared error (zero if a true solution existed):
SSE(α1, β1)/(n - 2) = 0.00206734
# You can see that this is the same number that is minimized by the solver by checking the internal error variable, ERR. In the case of Levenberg-Marquardt, ERR represents the square root of the SSE (Sum Squared Error).
(ERR^2/(n - 2)) = 0.00206734
# You can also minimize directly using the SSE equation and the Minimize function:
[α2; β2] := Minimize(SSE, α, β)
# Only the Quasi-Newton and Conjugate Gradient methods are available here, but in this problem, they yield similar results.
[α2 - α1; β2 - β1] = [-3.14108e-10; 1.50756e-9]
SSE(α2, β2)/(n - 2) = 0.00206734
## Quasi-Newton or Conjugate Gradient Solver Methods
# To use the Solve Block construction with Quasi-Newton or Conjugate Gradient methods, you must provide the SSE equation(s) instead of relying on the Mathcad solver to construct them.
## Minimize Function
# When you use the Minimize function, the SSE equation is used as the objective function. When Minerr calls a solve block with the Conjugate Gradient or Quasi-Newton method, the SSE equation is treated as a constraint and may yield a different solution. Often, you have to reduce the tolerance (TOL) to get the same quality of results from Minimize as you do with Minerr, even when using the same solver method.
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