# Title: Smoothing of X-Y Data
# Description: Using Mathcad's built-in smoothing functions on X-Y data.
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# DATA ANALYSIS
# quicksheets
# Smoothing of X-Y Data
# This QuickSheet demonstrates smoothing X-Y data using built-in smoothing functions and a moving average routine.
# Enter matrix of X-Y data to be analyzed (x-coordinate in first column, y-coordinate in second):
# [component: outputs data]
# Click on the Data Table above and expand it to see the matrix data used in this example. For some smoothing functions the data must be in increasing order:
data := csort(data, 0)
X := data[:, 0]
Y := data[:, 1]
# Number of data points:
n := rows(data)
n = 100
# The functions ksmooth, medsmooth, and supsmooth, use various methods to smooth the data. See Online Help for more details.
# ksmooth requires a bandwidth argument, b, that controls the smoothing window:
ksmu := ksmooth(X, Y, 4)
# medsmooth requires a smoothing window argument, n, which must be an odd integer:
msmu := medsmooth(Y, 3)
# supsmooth requires no additional arguments:
ssmu := supsmooth(X, Y)
# Compare these smoothed sets of data to the original data:
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# Now, look at a moving average routine:
# Using the same data, enter window size for moving average (integer 0 < w < n):
w := 20
# Number of data points:
n := rows(data)
n = 100
# Smoothed data:
i := 0 .. n - 1
mvg_avg[i] := if(i < w, sum(Y[j], j = 0 .. i)/(i + 1), sum(Y[j], j = i - w + 1 .. i)/w)
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# Depending on the variations in your data, one of the smoothing routines presented here will be better than the others.
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