# Title: Sorting Functions
# Description: Arranging elements of an array in ascending or descending order.
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# DATA ANALYSIS
# quicksheets
# Sorting Functions
# This QuickSheet illustrates functions for arranging elements of an array in ascending or descending order. You may need to sort arrays for the interpolation and regression functions that require sorted inputs.
# Input vector to be sorted:
i := 0 .. 3
x[i] := sin(i)
x = [0; 0.841471; 0.909297; 0.14112]
# Sorting functions for vectors:
sort(x) = [0; 0.14112; 0.841471; 0.909297]
reverse(sort(x)) = [0.909297; 0.841471; 0.14112; 0]
# If you have related columns or rows of data in a matrix, use the sorting functions for matrices to maintain the relationship between entries.
M := READPRN("sunspots.prn")
# Sorted on column one:
csort(M, 1) = [
    1712, 0;
    1711, 0;
    1810, 0;
    1811, 1;
    1913, 1;
    1713, 2;
    1823, 2;
    1901, 3;
    1809, 3;
    1710, 3
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]
# Sorting can also be useful for visually examining your data before further analysis, for example, to decide how many bins to request on a histogram.
sunhist := histogram(190, M[:, 1])
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