# Title: Differentiation and Integration of Data Vectors
# Description: Differentiating and integrating data vectors.
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# DATA ANALYSIS
# quicksheets
# Differentiation and Integration of Data Vectors
# This QuickSheet uses Mathcad's cspline function for performing differentiation and integration of  X-Y data. Additionally, a dspline program shown below computes the derivative exactly.
# Enter a matrix of X-Y data to be interpolated:
# [component: outputs data]
# Click on the Data Table above and expand it by dragging the handles to see the matrix data used in this example.
data := csort(data, 0)
X := data[:, 0]
Y := data[:, 1]
# Spline coefficients:
S := cspline(X, Y)
# Fitting function:
fit(x) := interp(S, X, Y, x)
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## Derivative Fitting Function
dfit(x) := d/dx(fit(x))
n := 0 .. rows(X) - 2
DX[n] := (X[n] + X[n + 1])/2
DY[n] := (Y[n + 1] - Y[n])/(X[n + 1] - X[n])
# This secant approximation to the derivative is a crude but valid comparison.
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## Integral Fitting Function
ifit(x) := integral(fit(ξ), ξ = 0 .. x)
IX[n] := X[n + 1]
# This trapezoidal approximation to the integral is also crude but valid.
IY[0] := ((Y[0] + Y[1])/2)*(X[1] - X[0])
n := 1 .. rows(X) - 2
IY[n] := ((Y[n] + Y[n + 1])/2)*(X[n + 1] - X[n]) + IY[n - 1]
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## dspline Program
# This Mathcad program for differentiating a data vector computes the derivative exactly using knowledge of the interpolating polynomial on any subinterval. The arguments to dspline are the same as those of interp.
dspline(vs, x, y, t) :=
    d2 ← submatrix(vs, 3, last(vs), 0, 0)
    k ← 0 if t ≤ x[1]
    k ← last(x) - 1 if t ≥ x[last(x) - 1]
    otherwise
        k ← 0
        while t > x[k + 1]
            k ← k + 1
    c ← (y[k + 1] - y[k])/(x[k + 1] - x[k]) - (d2[k + 1] + 2*d2[k])*((x[k + 1] - x[k])/6)
    (d2[k + 1] - d2[k])/(x[k + 1] - x[k])*(t - x[k])^2/2 + d2[k]*(t - x[k]) + c
Dfit(x) := dspline(S, X, Y, x)
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max(|vectorize(Dfit(X) - dfit(X))|) = 5.71497e-14
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