# Title: Boolean Operators and Strictness of Comparison
# Description: Using the Boolean operators.
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# PROGRAMMING
# quicksheets
# Boolean Operators and Strictness of Comparison
# This QuickSheet illustrates the use of Mathcad’s Boolean operators (NOT, AND, OR, and XOR)  from the Boolean toolbar, and prefix/infix operators to define new operators. When evaluating a Boolean expression, 1 denotes "true" and 0 denotes "false." For example,
# Boolean EQUALS and GREATER THAN:
1 == 2 = 0
3 > 2 = 1
# Boolean NOT (negation):
P := [0; 1]
vectorize(not P) = [1; 0]
# Boolean AND (conjunction):
P := [1; 1; 0; 0]
Q := [1; 0; 1; 0]
vectorize(P and Q) = [1; 0; 0; 0]
# Hover your mouse over any of the Boolean operators on the toolbar to see its definition. Boolean operators are most frequently used as termination conditions in conditional programs.
## Strict Boolean Comparison
# When doing comparison operations on floating point numbers that differ by less than the maximum accuracy of your computer’s floating point processor, you may want to implement "Use exact equality for comparisons and truncation" within your worksheet in Tools > Worksheet Options, on the Calculation tab. When this option is not checked, the absolute value of the difference between two numbers divided by their average must be less than 10^(–12) for them to be considered equal. When the option is checked, numbers between –10^(–307) and 10^(–307) are considered to be 0, and comparisons are evaluated "strictly," using the numbers themselves up to their double-floating point precision representation.
# Here’s a sample solving routine that implements Newton’s Method and compares it to the result from root. Enter a function and a tolerance setting for the built-in root function:
y(t) := t^3 - 10*t + 2
TOL := 10^-8
# When the values from the built-in root-solver and the programmatically defined solver are considered equal, or the maximum number of iterations is reached, the routine exits and both results are returned, along with the number of iterations performed.
Newt(func, guess, iter) :=
    t[0] ← guess
    check ← root(func(guess), guess)
    for n ∈ 1 .. iter
        prev ← t[n - 1]
        t[n] ← t[n - 1] - y(prev)/d/dprev(func(prev))
        break if t[n] == check
    return [check; t[n]; n]
guess := 2
iter := 10  # Choose a maximum number of iterations.
res := Newt(y, guess, iter)
# result from root
res = [3.05709; 3.05709; 8]  # result from Newton’s Method
# number of iterations
# With the "exact comparison" box unchecked, there are never more than 8 iterations, at which point the result from root and the result from Newton’s Method agree to the required 12 places. Check this by changing iter to less than or greater than 8. If your program termination criteria are critically dependent on very small differences in numbers, be sure to check the exact comparison box.
## Custom Boolean Operators
# Here are two sample definitions that use the custom operator syntax for functions to create new Boolean operators. These could be used independently, as shown, or in programs.
# Implication:
⇒(P, Q) := vectorize(not P or Q)
# Use
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P = [1; 1; 0; 0]
Q = [1; 0; 1; 0]
P ⇒ Q = [1; 0; 1; 1]  # Infix Operator on Evaluation toolbar
# Biconditional:
⇔(P, Q) := vectorize((P ⇒ Q) and (Q ⇒ P))
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P = [1; 1; 0; 0]
Q = [1; 0; 1; 0]
P ⇔ Q = [1; 0; 0; 1]  # Use
## Logic
# Here is a sample demonstration that  P or (Q and R)  and  (P or Q) and (P or R)  are logically equivalent.
P := [1; 1; 1; 1; 0; 0; 0; 0]
Q := [1; 1; 0; 0; 1; 1; 0; 0]
R := [1; 0; 1; 0; 1; 0; 1; 0]
A := vectorize(P or (Q and R))
B := vectorize((P or Q) and (P or R))
A ⇔ B = [1; 1; 1; 1; 1; 1; 1; 1]
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