# Title: Conditional (if) Statements
# Description: Using the conditional if statement and inline if function.
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# PROGRAMMING
# quicksheets
# Conditional If Statements
# This QuickSheet provides examples of using the conditional if statement in Mathcad programs then compares it with the inline if function. Conditional switches are useful for piecewise definitions, determining loop control, or trapping errors in input arguments.
# These programs define functions in a piecewise fashion:
fp(x) :=
    1 if mod(ceil(x), 2) == 1
    -1 otherwise  # Note: You must use the if operator from the Programming toolbar in programs; do not just type "if."
gp(x) :=
    x - floor(x) if mod(ceil(x), 2) == 1
    1 if floor(x) == x and mod(ceil(x), 2) == 1
    -x + ceil(x) otherwise
# These simple programs are equivalent to the command-line if function, although they may be easier to read.
fil(x) := if(mod(ceil(x), 2) == 1, 1, -1)
i := 0 .. 100
x[i] := i*0.05
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# This program allows different solutions to an equation for various parameter regimes.
x := 0, 0.01 .. 2
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invrsfct(y) :=
    if 0 < y < 1
        z ← 0.1
        a ← root(z^z - y, z)
        z ← 0.9
        b ← root(z^z - y, z)
        return [a, b]
    otherwise
        z ← 2
        c ← root(z^z - y, z)
        return c
U1 := invrsfct(0.85)
V1 := invrsfct(2.5)
U1 = [0.0565883, 0.820263]
V1 = 1.70928
vectorize(U1^U1) = [0.85, 0.85]
V1^V1 = 2.5
# This program implements a variable rate structure, using external variables to control the conditional expressions:
rate1 := 0.069
break1 := 240
rate2 := 0.12
break2 := 540
rate3 := 0.14
bill(usage) :=
    if usage < break1
        "lowest bracket"
        return rate1*usage
    if usage < break2
        "middle bracket"
        return rate2*usage
    otherwise
        "highest bracket"
        return rate3*usage
# Note: the use of strings by themselves on lines as comments in the code.
u := 600
bill(u) = 84
# The otherwise statement above only executes if both if statements are false. However, if several sequential if statements in a program are true, they all execute, even if the block ends with an "otherwise." For example:
x := 4
y ← 0
y ← y + 3 if x > 3
y ← y + 2 if x > 2
y ← y + 1 otherwise
y
= 5
## Units in Conditional Programs
# It is not possible to execute a conditional program that returns different units depending on an input value; Mathcad returns an error when you try to execute such a program, as a program cannot be unit balanced without knowing the particular value of the inputs. The expression below can only be executed for dimensionless inputs.
pow(x, n) :=
    x^2 if n < 2
    x^3 otherwise
# These work:
pow(2.5, 1) = 6.25
pow(2.5, 3) = 15.625
# These return an error:
pow(2.5*m, 1) =  # error: This value has units: Length, but must have units: Unitless.
pow(2.5*m, 3) =  # error
## Closing Conditional Blocks with Otherwise
# The previous programs, which have used conditional tests to vary their results, have used otherwise statements as well. The use of otherwise is important, as it prevents the program from returning unpredictable or incorrect results. Take the following program:
f(x) :=
    -1 if x < 0
    1 if x > 0
# In most cases, the program returns the expected result:
f(4) = 1
f(π) = 1
f(-2) = -1
f(-e) = -1
# But if you try to evaluate the function at 0, it returns an error.
f(0) =  # error: This program has no return value. You must account for all cases when using conditional statements in a Mathcad program.
# In this simple case, no definition exists for x == 0. The easiest solution is to initially define the return value:
f(x) :=
    res ← 0
    res ← -1 if x < 0
    res ← 1 if x > 1
f(0) = 0
# When you create more complex programs, however — especially ones involving units — you should close conditional blocks with an otherwise. Use of the otherwise operator guarantees that one of the steps in the conditional block executes.
# Consider the more complex case:
prog(Area, Length, adj) :=
    Vol ← Area*Length
    factor ←
        2.5 if adj ≥ 3
        2.1 if adj == 2
        1.7 if adj < 2
    Vol*factor
prog(2 m^2, 4 cm, 2) = 0.168 m^3
# In this case, the problem isn't so obvious. After all, a value of adj is provided that satisfies one of the tests, so there doesn't appear to be  problem.
# In this case, the problem arises from with Mathcad's static unit checking, which balances the equation before calculation to ensure consistent results. Because the definition of factor could fail for certain values of adj (for example, adj = 2.5), the previous result — in this case, Vol — "falls through" into the definition of factor. As a result, there is a scenario in which the program might return a result of m^6, which doesn't agree with the result if adj = 2, which would be m^3.
# To draw attention to this problem, Mathcad flags the last argument in the definition prior to the problematic if block, and assumes that its units should be changed in order to force the expected result; changing Length from 4 cm to 4 cm^-2 would return the expected result of m^3.
# Using an otherwise prevents the result prior to the if block from affecting the definition of factor:
prog(Area, Length, adj) :=
    Vol ← Area*Length
    factor ←
        2.5 if adj ≥ 3
        1.7 if adj < 2
        2.1 otherwise
    Vol*factor
prog(2 m^2, 4 cm, 2) = 0.168 m^3
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