# Title: Looping and Control
# Description: Using loops to iterate calculations and demonstrating conditional program control.
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# PROGRAMMING
# quicksheets
# Looping and Control
# This QuickSheet provides some examples of using For and While loops to iterate calculations, and demonstrates conditional program control using the if and continue statements. While looping and iteration is implied using range variables and indexes for vectors, it may be more efficient, or clearer to write things as a Mathcad program.
# Copy each program into a blank worksheet, turn on Debug mode, and add trace or pause functions so that you can watch the values of the local variables update as the loops progress. See Program Debugging in the Tutorials.
# For loops range over values specified explicitly in the loop instruction. For example, this program flattens a matrix into a column vector, starting with the last column.
M := identity(3)
flatten(M) :=
    v ← M[:, cols(M) - 1]
    if cols(M) > 1
        for j ∈ cols(M) - 2 .. 0
            v ← stack(v, M[:, j])
    v
transpose(flatten(M)) = [0, 0, 1, 0, 1, 0, 1, 0, 0]
# The value of M is passed as an argument to a function, which is the most reusable way to write programs in Mathcad. You can refer to worksheet variable names directly as well. If you name a local variable by the same name, it refers to the worksheet variable only until it is initialized.
a := 5
reuse :=
    for i ∈ 0 .. 3
        a ← a + i
    a
sum(i, i = 0 .. 3) = 6
reuse = 11
# After the first iteration, a is the local variable, not the worksheet value. Be aware of this if you are renaming variables or functions within loops.
## Continue Operator
# The continue operator stops execution of the current iteration, and restarts it at the top of the nearest enclosing loop for the next iteration. For example, this program adds only odd integers between 0 and n by skipping the even ones using continue.
addOdd(n) :=
    s ← 0
    for k ∈ 0 .. n
        continue if mod(k, 2) == 0
        s ← s + k
    s
addOdd(10) = 25
1 + 3 + 5 + 7 + 9 = 25
# By comparison, the summation operator includes all nonnegative integers.
sum(j, j = 0 .. 10) = 55
## While Loops
# While loops terminate when a condition is first violated. This program finds the square root of a positive real number, terminating when the estimate of the root squared is less than a threshold amount different from target value.
sqrt(a, ε) :=
    estsqrt ← 1
    while |estsqrt^2 - a| ≥ ε
        estsqrt ← 1/2*(estsqrt + a/estsqrt)
sqrt(37, 1*10^-5) = 6.08276
# Find the first element in a vector that exceeds a certain threshold.
j := 0 .. 2.5*10^3
v[j] := sin(j)
t(v, thres) :=
    j ← 0
    while |v[j]| ≤ thres
        j ← j + 1
    [j; v[j]]
t(v, 0.99999) = [11; -0.99999]
## Break Operator
# You can break out of a while or for loop prematurely using the break operator. This program refines the estimate of the square root until it is better than e, or until it has reached its maximum number of iterations.
sqroot(a, ε, maxiter) :=
    estsqrt ← 1
    for i ∈ 0 .. maxiter
        estsqrt ← 1/2*(estsqrt + a/estsqrt)
        if |estsqrt^2 - a| < ε
            maxiter ← i
            break
    [estsqrt; maxiter]
sqroot(3.057*10^3, 10^-6, 100) = [55.2901; 9]
## Defining an Iterative Function
# Below is a factorial function, equivalent to Mathcad's built-in factorial operator.
Fac(n) :=
    f ← 1
    while n ← n - 1
        f ← f*(n + 1)
    f
Fac(6) = 720
# The while loop checks if a condition is true or false, with false equal to 0. When the value of n is assigned to 0, the loop terminates.
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