# Title: Intersection of Two Groups
# Description: Finding the intersection of two lists of numbers contained in vectors.
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# PROGRAMMING
# quicksheets
# Intersection of Two Groups
# This QuickSheet can be used to find the intersection of two lists of numbers contained in vectors.
# Enter two vectors of numbers:
a := [1; 3; 2; 9; 8]
b := [3; 0; 7; 8; 1; 5]
# Test for intersection:
in(v, x) :=
    t1 ← 0
    for y ∈ v
        t1 ← 1 if x == y
    t1
intersect(v, w) :=
    u ← 0
    i ← 0
    for x ∈ v
        if in(w, x)
            u[i] ← x
            i ← i + 1
    u
# Intersection:
transpose(intersect(a, b)) = [1, 3, 8]
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