# Title: Finding Local Max/Min of Vectors
# Description: Determining the local maximum and minimum points in a data vector.
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# PROGRAMMING
# quicksheets
# Finding Local Max/Min of Vectors
# This QuickSheet determines all local maximum and minimum points in a data vector. A local minimum point is less than or equal to adjacent points in the vector.
locmin(v) :=
    j ← 0.000
    if v[0.000] ≤ v[1.000]
        m[j] ← [0.000; v[0.000]]
        j ← j + 1.000
    n ← rows(v) - 1.000
    for k ∈ 1.000 .. n - 1.000
        if (v[k - 1.000] ≥ v[k]) and (v[k] ≤ v[k + 1.000])
            m[j] ← [k; v[k]]
            j ← j + 1.000
    m[j] ← [n; v[n]] if v[n - 1.000] ≥ v[n]
    m
locmax(v) :=
    m ← locmin(-v)
    for j ∈ 0.000 .. rows(m) - 1.000
        M[j] ← [m[j][0.000]; -m[j][1.000]]
    M
# Here is a sample application:
n := 10.000
f(k) := dbinom(k, 30.000, 0.500)
k := 0.000, 1.000 .. 30.000
g(k, n) := f(k) + f(n + k)
u[k] := g(k, 8.000)
v[k] := g(k, 10.000)
w[k] := g(k, 12.000)
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locmin(u)[0.000] = [0; 0.00545096]
locmin(v)[0.000] = [0; 0.0279816]
locmin(w)[0.000] = [0; 0.0805531]
locmin(u)[1.000] = [11; 0.101751]
locmin(v)[1.000] = [10; 0.0559632]
locmin(w)[1.000] = [9; 0.0266491]
locmin(u)[2.000] = [30; 9.31323e-10]
locmin(v)[2.000] = [30; 9.31323e-10]
locmin(w)[2.000] = [30; 9.31323e-10]
locmax(u)[0.000] = [7; 0.14636]
locmax(v)[0.000] = [5; 0.144597]
locmax(w)[0.000] = [3; 0.144468]
locmax(u)[1.000] = [15; 0.14636]
locmax(v)[1.000] = [15; 0.144597]
locmax(w)[1.000] = [15; 0.144468]
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