# Title: On Error Operator and the Error Function
# Description: Error handling in Mathcad programs.
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# PROGRAMMING
# quicksheets
# On Error Operator and the Error Function
# The On Error operator executes the right-hand argument first. If no error occurs, it returns the result of the right argument. If an error occurs, then the error is cleared and the left argument is returned.
ε := 10.000^-15.000
f(x) :=
    try
        1.000/x
    on error
        1.000/(x + ε)
# When the function f is called with 0, it traps the error and returns the alternate expression.
f(0.000) = 1e15
# Otherwise, it returns the right-hand expression:
f(2.000) = 0.5
# The Error function, on the other hand, allows a user to return a user-defined error message.
F(x) :=
    error("x must not be negative, \nand not equal to zero.") if x ≤ 0.000
    1.000/x otherwise
F(3.000) = 0.333333
F(0.000) =  # error: x must not be negative, \nand not equal to zero.
F(-3.000) =  # error
# Click on the undefined expressions to see the intentional error messages. Note the special character sequence, \n, which wraps the error message to a new line.
## Units and Error Trapping
# It is not possible to execute an on error statement that returns different units depending on an input value. Mathcad returns its own error when you try to execute such a program, as it cannot be unit balanced without knowing the particular value of the inputs.
sq(x) :=
    try
        x + m
    on error
        x^3
    x^2
sq(2.5) =  # error: bad_dimensions Length Unitless
sq(2*m) = 4 m^2
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