# Title: Seeded Iteration and Difference Problems
# Description: Estimating solutions using iterated seeding.
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# SOLVING EQUATIONS
# quicksheets
# Seeded Iteration and Difference Equations
# This QuickSheet shows how to estimate solutions using seeded iteration.
# Input positive real number X and initial guess of square root.
X := 700
guess[0] := 30
# The first guess is defined as the first item in a vector, using the subscript operator [.
N := 8
i := 0 .. N
X := 700
guess[i + 1] := (guess[i] + X/guess[i])*1/2
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# Convergence is very fast, but the number of iterations, N, can be increased to suit the needs of the problem.
i = [0; 1; 2; 3; 4; 5; 6; 7; 8]
guess[i] = [30; 26.6667; 26.4583; 26.4575; 26.4575; 26.4575; 26.4575; 26.4575; 26.4575]
guess[i]^2 - X = [200; 11.1111; 0.0434028; 6.72745e-7; 0; 0; 0; 0; 0]
sqrt(X) = 26.4575
## Systems of Difference Equations
# Consider an infection model with four variables:
# ind = the number of individuals infected
# sus = the number susceptible
# dec = the number deceased
# rec = the number recovered
# Input seed values for the simultaneous iteration.
[ind[0]; sus[0]; dec[0]; rec[0]] := [50; 2.2*10^4; 0; 0]
τ := 0 .. 20
[ind[τ + 1]; sus[τ + 1]; dec[τ + 1]; rec[τ + 1]] := [1*10^-4*sus[τ]*ind[τ]; sus[τ] - 1*10^-4*sus[τ]*ind[τ]; dec[τ] + 0.55*ind[τ]; rec[τ] + 0.45*ind[τ]]
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## Matrix Difference Equations
# Consider a Markov process, that is, a vector time series whose present state is found by multiplying the previous state by a state transition matrix A.
A := [0.5, 0, 0.2; 0.25, 0.9, 0.1; 0.25, 0.1, 0.7]
v[:, 0] := [10; 25; 15]  # Initial state
k := 1 .. 8
v[:, k] := A*v[:, k - 1]  # Iteration
v[:, 8] = [6.01676; 29.1241; 14.8591]  # Final state
transpose(v) = [
    10, 25, 15;
    8, 26.5, 15.5;
    7.1, 27.4, 15.5;
    6.65, 27.985, 15.365;
    6.398, 28.3855, 15.2165;
    6.2423, 28.6681, 15.0896;
    6.13907, 28.8708, 14.9901;
    6.06756, 29.0175, 14.9149;
    6.01676, 29.1241, 14.8591
]  # Total history of the process
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