# Title: Convergence and Precision
# Description: Using the built-in variables TOL and ERR.
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# SOLVING EQUATIONS
# quicksheets
# Convergence and Precision
## Introduction
# Like the root function and the integral operators, the solve block algorithm relies on the built-in variable TOL to determine when to stop looking for a solution. Decreasing TOL tightens the requirements for a solution, possibly increasing the accuracy of the returned result.
# Most of the time, a solve block works very well with the default TOL value of 10^-3.
# For example,
x := 1
y := 2
z := 1
Given
x^2*e^y == z
x*y + z^2 == 2
y/(z + x^2) == 4
[x; y; z] := Find(x, y, z)
[x; y; z] = [0.091399; 5.00185; 1.24211]
# as you can see by examining the equations in the system.
x^2*e^y == z
x^2*e^y = 1.24211
z = 1.24211
x*y + z^2 == 2
x*y + z^2 = 2
y/(z + x^2) == 4
y/(z + x^2) = 4
# The involvement of TOL in the solving process and examples of its use are described below.
## The ERR Variable
# The variable ERR is a built-in variable that measures how close the result of a solve block is to a solution.
# Consider the solve block
x := 2
y := 2
Given
nthroot(x, 3) + y == 2
x^2 + y^10 == 3.9
[x; y] := Find(x, y)
[x; y] = [0.652568; 1.13262]
# Following execution of the solve block, look at the value of the variable ERR to discover a number.
ERR = 8.88178e-16
# The value of this variable is determined by computing the difference in both sides of each equation,
nthroot(x, 3) + y - 2 = 0
x^2 + y^10 - 3.9 = -8.88178e-16
# squaring these values, adding them together, then taking the square root of the result yields:
sqrt((nthroot(x, 3) + y - 2)^2 + (x^2 + y^10 - 3.9)^2) = 8.88178e-16
ERR = 8.88178e-16
# ERR is only computed in a solve block that uses Find or Minerr. In the case of Maximize or Minimize, there is no obvious way to measure how close the solution is to a maximum or minimum point since there is no equation that must be satisfied by that point.
# It is a good idea to experiment with values of TOL, but don't get too fussy. Numerical methods or even just the precision of the machine may not be able to give you what you are asking.
# Look at an example with Minerr using a least squares estimation problem.
x := transpose([0.5, 1, 1.5, 2.0, 2.5, 3.0])
y := transpose([120.7, 203.5, 330.9, 240.7, 140.1, 101.5])
m := 1
b := 1
Given
sum((y[i] - m*x[i] - b)^2, i = 0 .. 5) == 0
Minerr(m, b) = [-21.5085; 227.207]
ERR = 35705.2
# The Mathcad built-in functions slope and intercept, which are designed specifically for such problems, produce better results.
M := slope(x, y)
M = -21.5086
B := intercept(x, y)
B = 227.207
# You can improve the solve blocks' performance by decreasing TOL. The next two computations display the values returned by slope and intercept next to those returned by Minerr.
# A smaller TOL of 10^-15 produces a better solution.
m := 1
b := 1
TOL := 10^-15
Given
sum((y[i] - m*x[i] - b)^2, i = 0 .. 5) == 0
Minerr(m, b) = [-21.5086; 227.207]
M = -21.5086
B = 227.207
ERR = 35705.2
# The digits that are well after the decimal point changed. The original answer was pretty good, but by decreasing TOL you increased the precision of the solution.
# TOL determines the point at which the solver determines that a solution has been found. A reduction in the value of TOL may decrease the value of ERR as well, though this is not always true. Consider the example
a := 1
b := 2
c := 3
TOL := 10^-3
Given
a == b*e^c
a*b*c == 5
a^2 == |tan(c)|
Find(a, b, c) = [3.9602; 0.772458; 1.63447]
ERR = 2.13348e-14
# In this case, reducing TOL has no effect, because the solver quickly converged on the solution and successive iterations no longer materially affect the result. To force the solver to return a more accurate solution, you must reduce the deviance on the constraints.
## The Effect of CTOL
# In the case of Find and Minerr, the underlying algorithms work on the problem until the value of each constraint is satisfied to within a margin of error defined by the constraint tolerance, CTOL. The default setting for CTOL is 10^-3.
# For example,
x := 1
y := 1
Given
e^(-(x^2 + y^2)) == 0.1
x + 2*y == 0.3
[a; b] := Find(x, y)
[a; b] = [1.41191; -0.555956]
0.1 - (e^(-(a^2 + b^2))) = 1.38778e-17
0.3 - (a + 2*b) = -5.55112e-17
ERR = 5.72196e-17
CTOL = 0.001
# The value of ERR may be smaller that CTOL, which is a good thing, but all you are guaranteed is that it will be smaller than the value of:
sqrt(m)*CTOL
# where m is the number of constraints.
# Decreasing CTOL forces the solve block to continue its search until ERR is smaller than the new value of sqrt(m)*CTOL.
x := 1
y := 1
CTOL := 10^-8
Given
e^(-(x^2 + y^2)) == 0.1
x + 2*y == 0.3
Find(x, y) = [1.41191; -0.555956]
ERR = 5.72196e-17
# If your ERR has a value of 0, the best you could get, there is no need to modify the value of CTOL.
## TOL and Optimization
# TOL has an effect on solve blocks that use Minimize or Maximize, but the effect is less quantifiable since there is no ERR variable in those cases. Just keep in mind that TOL is tied directly to the condition by which the optimizers decide if they are done. The smaller the value of TOL, the longer the optimizer seeks a solution, and the better a result you will likely get.
# Here's an example of unconstrained optimization.
# The function
M(x, y, z) := 10*(z - y^2)^2 + (y - x)^2 + 3*(x - 2)^2
# has a minimum at the point (2, 2, 4) where
M(2, 2, 4) = 0
# The default TOL does OK, but decreasing TOL hones in on the solution. See if you can convince yourself.
TOL := 10^-3
CTOL := 10^-3
x := 1
y := 1
z := 1
Given
M(x, y, z) == 10*(z - y^2)^2 + (y - x)^2 + 3*(x - 2)^2
Minimize(M, x, y, z) = [2.00095; 1.99934; 3.99756]
# One last note:
# TOL has no impact on linear programming problems. The algorithm for these problems does not use a convergence criterion so there is no idea of "searching longer."
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