# Title: Linear Programming
# Description: Solving linear program problems.
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# SOLVING EQUATIONS
# quicksheets
# Linear Programming
# This QuickSheet illustrates the solution of linear programming problems. A linear program has a linear objective function of the form:
c0*var0 + c1*var1 + c2*var2 + ...
# For example, the function g0(x, y) := x + y  is linear.
## Problem with Two Variables
f(x) := 3*x[0] + 2*x[1]  # Objective function
M := [1, 1; 3, 1; -10, 1]
v := [2*10^3; 3*10^3; 1*10^3]  # Constraint coefficients
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# Graph of
# feasible
# region
x[1] := 0  # Initialization (guess)
# Since this is a linear problem, guess values are only used to determine the size of the result. Only the last element of the vector x is supplied, automatically filling the rest of the vector with zeros. The values are not important, only the number of entries.
Given
M*x ≤ v  # Solve block
x ≥ 0  # The constraints in a linear program must be either equalities or inequalities, which compare linear functions to constants.
Maximize(f, x) = [500; 1500]  # Solution
# You could also use Find, but that requires you to know the maximum value of f.
Given
M*x ≤ v
x ≥ 0
4.5*10^3 == 3*x[0] + 2*x[1]
Find(x) = [500; 1500]
## Problem with Six Variables
f(x) := 8*x[0] + 10*x[1] + 7*x[2] + 6*x[3] + 11*x[4] + 9*x[5]  # Objective function
M := [12, 9, 25, 20, 17, 13; 35, 42, 18, 31, 56, 49; 37, 53, 28, 24, 29, 20]
v := [60; 150; 125]  # Constraint coefficients
x[5] := 0  # Initialization
Given  # Solve block
M*x ≥ v
0 ≤ x ≤ 1
Minimize(f, x) = [1; 0.622697; 0.343479; 1; 0.0475729; 1]  # Solution
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