# Title: Constrained Nonlinear Optimization Problems
# Description: Finding the maxima and minima of equations.
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# SOLVING EQUATIONS
# quicksheets
# Constrained Nonlinear Optimization Problems
# This QuickSheet illustrates the solution of a constrained optimization problem.
# Maximize and minimize the function
f(x, y) := 2 + 2*x + 2*y - x^2 - y^2
# subject to the constraint that (x,y) falls within the right triangle T with vertices (0,0),  (9,0)  and  (0,9).
# [component: inputs f]
# Plot the function.
# Graph the feasible region in the x-y plane.
x := 2 .. 9
y := 2 .. 9
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# Solve the problem with different guess values to find the three points of interest.
x := 4
y := 5
Given
x ≥ 2
# first minimum point at (2,9),
# the uppermost vertex of T
2 ≤ y ≤ 9 - x
P := Minimize(f, x, y)
P = [2; 7]
f(P[0], P[1]) = -33
x := 5
y := 4
Given
x ≥ 2
# second minimum point at (9,2),
# the rightmost vertex of T
2 ≤ y ≤ 9 - x
Q := Minimize(f, x, y)
Q = [7; 2]
f(Q[0], Q[1]) = -33
# Now solve for the maximum:
x := 4
y := 5
Given
x ≥ 2
# maximum point at (1,1),
# an interior point of T
2 ≤ y ≤ 9 - x
R := Maximize(f, x, y)
R = [2; 2]
f(R[0], R[1]) = 2
# Creating a scatter plot on top of the original plot shows the validity of the solution:
X := [P[0]; Q[0]; R[0]]
Y := [P[1]; Q[1]; R[1]]
Z := [f(P[0], P[1]); f(Q[0], Q[1]); f(R[0], R[1])]
# [component: inputs [(f, (X, Y, Z)), □]]
# If you wish to find the overall maximum of the function without constraints then Maximize (or Minimize) can be used by itself without a solve block.
Maximize(f, x, y) = [1; 1]
# which is outside the range of the bounded result:
R = [2; 2]
## Parametric Optimization
# You could also parameterize this equation around the different guesses:
Given
x ≥ 2
2 ≤ y ≤ 9 - x
optf(x, y) := Minimize(f, x, y)
optf(4, 5) = [2; 7]
optf(5, 4) = [7; 2]
# which gives the same result as before. It's also possible to parameterize the original objective function and optimize as a function of the parameter.
f(x, y, a) := 2 + 2*x/a + 2*y - x^2 - y^2
SS(a) := Maximize(f, x, y)
# For a := 1 results in the same answer as before. For other values, a new solution is found.
SS(1) = [1; 1]
SS(2) = [0.5; 1]
# This type of parametrized solution, either as the output of a solve block or a single line, can be used repeatedly in a program.
result(inF) :=
    for i ∈ 0 .. 3
        out[i] ← inF(i + 1)
    out
result(SS) = [[1; 1]; [0.5; 1]; [0.333333; 1]; [0.25; 1]]
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