# Title: Solving for ODE Parameters
# Description: Fitting a numerical ODE solution to a set of data.
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# SOLVING EQUATIONS
# quicksheets
# Solving for ODE Parameters
# You can fit a numerical ODE solution to a set of data by parametrizing the ODE Solve Block, then calculating the vector of residuals for use in a Minerr Solve Block.
# [component: outputs Data]
time := Data[:, 0]
disp := Data[:, 1]
# We solve for the values M, c and k in the following differential equation fit to the above data:
M*d^2/dτ^2(x(τ)) + 2*c/2*d/dτ(x(τ)) + k*x(τ) == 0
τ_end := 6  # end point of solution interval
# Define the odesolve block as a function of the parameters for which you are solving, in this case M, c and k:
Given
M*d^2/dτ^2(x(τ)) + 2*c/2*d/dτ(x(τ)) + k*x(τ) == 0
x(0) == 1
x'(0) == 0
D(M, c, k) := Odesolve(τ, τ_end)
# Define the error vector function using a Mathcad program. Note that you can define functions locally in programs.
resid(M, c, k) :=
    y ← D(M, c, k)
    vectorize(y(time) - disp)
# Use a Minerr solve block to find the unknowns:
M := 1
c := 1
k := 1
Given
resid(M, c, k) == 0
[M; c; k] := Minerr(M, c, k)
# Solution:
M = 1.20882
c = 0.984125
k = 1.01533
y := D(M, c, k)
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