# Title: Finding the Roots of a Polynomial
# Description: Finding all the roots of a polynomial.
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# SOLVING EQUATIONS
# quicksheets
# Finding the Roots of a Polynomial
# This QuickSheet shows how to use polyroots to find all the roots of a polynomial. As an example, type the polynomial
p(x) := x^3 - 10*x + 2
# First, use the symbolic equal sign with the keyword "coeffs" to output a vector v containing the coefficients of the polynomial, beginning with the constant term, as follows:
#
# 1.  Type
# v := □
#
# 2.  In the placeholder, type p(x), then press [Ctrl] [Shift] [.] to insert the symbolic equal sign.
#
# 3.  Type "coeffs" in the placeholder that appears to the left of the symbolic equal sign and press [Enter].
v := p(x) coeffs → [2; -10; 0; 1]
# Mathcad returns a vector containing the coefficients of the polynomial. As you read down the column of v, the coefficients are listed in order of increasing powers of x. Note that the vector v includes zero coefficients.
# Next, apply the function polyroots to the vector v:
r := polyroots(v)
transpose(r) = [-3.2579, 0.20081, 3.05709]
# The graph of the polynomial p(x) and its roots are shown below.
x := -4, -3.99 .. 4
j := 0, 1 .. 2
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# You can also find the roots using the symbolic equal sign with the keyword "solve":
p(z) solve, z; float, 3 → [3.06 + (-3.25e-260)*1i; (-7.59e-260)*1i - 3.26; 0.201 + 8.47e-260i]
## Complex Coefficients
# You can also use polyroots with complex coefficients:
q(x) := x^3 + (3 + 2i)*x^2 + (-4 + 6i)*x - 8i
# A vector of the coefficients, beginning with the constant term.
v := [-8i; -4 + 6i; 3 + 2i; 1]
s := polyroots(v)
s = [-4; -2i; 1]  # All roots are returned, both real and complex.
q(z) == 0 solve, z → [-4; 1; (-2)*1i]
## Improving Root Accuracy
# The root function allows you to change the accuracy of the solution by changing the value of TOL, while the polyroots function does not. You can use root to solve for roots one at a time. Alternatively, the Companion Matrix-based polyroots implementation sometimes provides superior results than does the default Laguerre method. To switch the algorithm used to solve for roots, right-click on the function name and select the desired method.
p(x) := 15*x^4 - 6*x^3 + 4*x^2 - 12*x - 10
# A vector of the coefficients, beginning with the constant term.
c := [-10; -12; 4; -6; 15]
r := polyroots(c)
r_c := polyroots(c)
# LaGuerre method | Companion Matrix method
# Check the results.
vectorize(p(r)) = [4.47743e-8; -6.09946e-8 + 2.43679e-8i; 1.008e-7 - 9.2962e-8i; -5.42199e-8]  # LaGuerre
vectorize(p(r_c)) = [-5.32907e-15; -5.32907e-15 + 4.61853e-14i; -5.32907e-15 - 4.61853e-14i; 2.4869e-14]  # Companion Matrix
# Lower the convergence tolerance and define a function to improve a root estimate.
TOL := 10^-14
Improve(r) := root(p(r), r)
# Use the previous results as guess values.
i := 0 .. last(r)
R1[i] := Improve(r[i])
vectorize(p(R1)) = [0; 3.55271e-15i; -3.55271e-15 - 1.77636e-15i; 3.55271e-15]
# The values of p are closer to 0.
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