# Title: Parameterizing Solutions
# Description: Solving equations dependent upon an unknown parameter.
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# SOLVING EQUATIONS
# quicksheets
# Parametrizing Solutions
# This QuickSheet can be used to define a function that solves an equation or a system dependent on an unknown parameter with either the root function or a solve block. Doing so allows you to solve a whole family of equations, repeatedly, if desired.
# Consider an equation of the form  f(x) == g(x, a), where the parameter a is variable.
f(x) := e^x
g(x, a) := a*x^2
# Solve the equation  f(x) == g(x, a)  for different values of the parameter a. Define a new function, S, to solve the equation for different values of a.
S(a, x) := root(f(x) - g(x, a), x)
a := 1 .. 20
# Initial guess:
x[0] := -1
# The guess for each a is the root from the previous a:
x[a] := S(a, x[a - 1])
a = [1; 2; 3; 4; 5; 6; 7; 8; 9; 10; 11; 12; 13; 14; 15; 16; 17; 18; 19; 20]
x[a] = [-0.703467; -0.539835; -0.458962; -0.407777; -0.371418; -0.343775; -0.321792; -0.303738; -0.28855; -0.27553; -0.2642; -0.254218; -0.245332; -0.237353; -0.230134; -0.22356; -0.217539; -0.211997; -0.206872; -0.202114]
f(x[a]) - g(x[a], a) = [-1.2878e-12; -1.81188e-13; -7.73323e-10; -8.18565e-11; -1.52512e-11; -3.9525e-12; -1.2742e-12; -4.79949e-13; -2.03504e-13; -9.41469e-14; -4.74065e-14; -2.54241e-14; -1.38778e-14; -8.10463e-15; -4.996e-15; -1.45145e-9; -1.10169e-9; -8.49467e-10; -6.64236e-10; -5.25972e-10]
## Applied Example: Friction Factor
# To find friction factor f for given values of ε (pipe roughness), D (pipe diameter), and R (Reynolds number):
# Guess:
f := 0.02
Given
1/sqrt(f) == -2*log(ε*D^-1/3.7 + 2.51/(R*sqrt(f)))
FricFac(ε, D, R) := Find(f)
# The parameters ε, D, and R have not yet been defined. Every time you calculate the function FricFac, you can specify new values for these parameters, and the solve block is called again.
D := 2.5*in
i := 0 .. 19
ε := 8.5*10^-4*in
R[i] := 1*10^4 + 1*10^4*i
ff[i] := FricFac(ε, D, R[i])
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# Repeated calculations are calculated by using range variables and vectors of values for the Reynold's number, but the function FricFac could just as easily have been called inside a program loop.
## Applied Example: Intersection of Circle and Line
# Vary R - at what two points do the circle and line meet?
R := 3
x := -R, -R + 0.01 .. R
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x := 1
y := 1
Given
x^2 + y^2 == R^2
x + y == 2
F(R) := Find(x, y)
R := 2.5, 2.6 .. 3
R = [2.5; 2.6; 2.7; 2.8; 2.9; 3]
F(R)[0] = [-0.457738; -0.542725; -0.626346; -0.708802; -0.790252; -0.870829]
F(R)[1] = [2.45774; 2.54273; 2.62635; 2.7088; 2.79025; 2.87083]
# Here's how to display six solutions, each of which is a two-element vector.
# You could parameterize this solve block on the guess values as well, by defining F(R, x, y). Parametrizing would allow you to solve for the two different solutions for each radius using a single solve block setup.
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