# Title: Solve Blocks with Inequality Constraints
# Description: Using inequalities to control the solution(s) returned by a solve block.
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# SOLVING EQUATIONS
# quicksheets
# Solve Blocks with Inequality Constraints
# This QuickSheet illustrates the use of solve blocks in solving a system of equations with an inequality constraint.
# Consider the intersection of a circle and a line. In the unconstrained case, the guess values determine which solution is found, when multiple solutions exist.
# Guess values:
x := 1
y := 1
Given
x^2 + y^2 == 6  # Circle
x + y == 2  # Line
[xval; yval] := Find(x, y)
xval = -0.414214  # One solution
yval = 2.41421
# Guess values:
x := 2
y := 1
Given
x^2 + y^2 == 6
x + y == 2
[xval; yval] := Find(x, y)
xval = 2.41421  # Another solution
yval = -0.414214
# These are all the solutions, as the plot indicates:
x := -2.45, -2.449 .. 2.45
ξ := -4, -3.99 .. 4
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# Now introduce an additional constraint of the form  x > a,
# where a is constant. The shaded region below is now
# eliminated from consideration.
a := 2
η := -4, -3.6 .. a
ζ := -4, -3.6 .. 4
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# Intersection of a circle and a line (constrained case):
# Guess values:
x := -1
y := 1
Given
x^2 + y^2 == 6  # Circle
x + y == 2  # Line
x > a  # Added constraint
[xval; yval] := Find(x, y)
xval = 2.41421  # The only solution
yval = -0.414214
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