# Title: solvline
# Description: This QuickSheet shows how to solve a linear system of n equations in n unknowns using either the lsolve function or solve blocks.
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# SOLVING EQUATIONS
# quicksheets
# Solving a Linear System of Equations
# This QuickSheet shows how to solve a linear system of n equations in n unknowns using the lsolve function or using solve blocks. You can also solve systems of equations symbolically.
# Enter a non-singular matrix corresponding to n equations in n unknowns:
M := [0.3, 0.2, 6.6, -1.1; 4.5, -1.8, -0.3, 6.5; -7.3, 9.7, 10.9, -4.1; 8.1, -2.7, 8.7, 8.9]
# Enter a vector of n constants:
# Note: The sample matrix and vector shown correspond to the system
0.3*w + 0.2*x + 6.6*y - 1.1*z == 1
v := [1; 0.1; 0.01; 1*10^-3]
4.5*w - 1.8*x - 0.3*y + 6.5*z == 0.1
-7.3*w + 9.7*x + 10.9*y - 4.1*z == 0.01
8.1*w - 2.7*x + 8.7*y + 8.9*z == 1*10^-3
soln := lsolve(M, v)
soln =  # no stored result
## Solve Blocks
# You can also solve this system using a solve block. Note that if you cast the system as a matrix times an unknown vector X, you must solve for all variables in the vector at once. You cannot hold any of the vector elements constant in this formulation.
# A guess is required for the solve block but not for lsolve.
i := 0 .. 3
X[i] := 1
Given
M*X == v
Find(X) =  # no stored result
soln =  # no stored result
# You can also solve for matrices, as in this solution of the algebraic Riccati equation from system and control theory.
A1 := [0, 0; 0, 1]
B1 := [0, 1; 0, -1]
C1 := [1, 0; 0, 0]
P1 := identity(2)  # initial guess
Given
-P1*A1*P1 + P1*B1 + transpose(B1)*P1 + C1 == 0
Find(P1) =  # no stored result
## Symbolic Solution
# Note that you can find the same solution symbolically in several ways. One way is to evaluate the lsolve function with the symbolic equal sign:
lsolve(M, v) → [-3.93715859522; -2.97525734579; 0.745906020951; 1.95161880959]
# Another method is to use the keyword "solve" and evaluate the results as floating point numbers using "float."
M*[w; x; y; z] - v solve, w, x, y, z; float, 4 → [-3.937, -2.975, 0.7459, 1.952]
# Note that you can also enter the equations directly in a column vector, using Boolean equals ([Ctrl] [=]).
[
    0.3*w + 0.2*x + 6.6*y - 1.1*z == 1;
    4.5*w - 1.8*x - 0.3*y + 6.5*z == 0.1;
    -7.3*w + 9.7*x + 10.9*y - 4.1*z == 0.01;
    8.1*w - 2.7*x + 8.7*y + 8.9*z == 1*10^-3
] solve, w, x, y, z; float, 4 → [-3.937, -2.975, 0.7459, 1.952]
## Units in Solve Blocks
# You can also use units in a solve block, but they must balance, as is required in all Mathcad equations. You must assign appropriate units to guess values, constants, and all terms:
V1 := 1*V
V2 := 1*V
V3 := 1*V
Given
(1/(2*Ω) + 1/(2*Ω) + 1/(10*Ω))*V1 - V2/(2*Ω) - V3/(10*Ω) == 0*A
(1/(2*Ω) + 1/(2*Ω))*V2 - V1/(2*Ω) - V3/(2*Ω) == 3*A
(1/(10*Ω) + 1/(2*Ω) + 1/(4*Ω))*V3 - V2/(2*Ω) - V1/(10*Ω) == 0*A
Find(V1, V2, V3) =  # no stored result
# You can also do this symbolically.
Given
(1/(2*Ω) + 1/(2*Ω) + 1/(10*Ω))*V1 - V2/(2*Ω) - V3/(10*Ω) == 0*A
(1/(2*Ω) + 1/(2*Ω))*V2 - V1/(2*Ω) - V3/(2*Ω) == 3*A
(1/(10*Ω) + 1/(2*Ω) + 1/(4*Ω))*V3 - V2/(2*Ω) - V1/(10*Ω) == 0*A
M := Find(V1, V2, V3) → [(114*A*Ω)/31; (222*A*Ω)/31; (144*A*Ω)/31]
M =  # no stored result  # as before.
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