# Title: Solving Nonlinear Systems of Equations
# Description: Using Mathcad to solve a nonlinear system of equations.
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# SOLVING EQUATIONS
# quicksheets
# Solving Nonlinear Systems of Equations
# This QuickSheet can be used to solve a system of n equations in n unknowns using a Mathcad solve block.
# Enter guess values for the n unknowns:
x := 1
y := 1
z := 0
# Enter the n equations:
Given
2*x + y == 5 - 2*z^2  # Note: Use the symbolic equals sign [Ctrl] = to define equations within the solve block.
y^3 + 4*z == 4
x*y + z == e^z
vec := Find(x, y, z)
# Solution:
vec = [1.42247; 0.975389; 0.768008]
## Solving Equations in Matrix Form
# You can also solve matrix equations, using Eigenanalysis or a solve block. Consider the equation X^2 == M..
M := [13, 4, 4; 4, 9, -3; 4, -3, 57]
Vec := eigenvecs(M)
Vals := diag(eigenvals(M))
X := Vec*vectorize(sqrt(Vals))*transpose(Vec)
X = [3.5281, 0.639134, 0.379529; 0.639134, 2.91465, -0.310337; 0.379529, -0.310337, 7.5339]
X^2 = [13, 4, 4; 4, 9, -3; 4, -3, 57]
# Or, using a Solve Block,
Xsb := M  # initial guess
Given
Xsb^2 == M
Xsb := Find(Xsb)
Xsb^2 = [13, 4, 4; 4, 9, -3; 4, -3, 57]
ERR = 7.35098e-15
## Solving for Quantities with Different Units
# You may use solve blocks to solve for quantities of unlike units, but you must structure the output in a particular way. This example determines the velocity of flow through a straight length of pipe.
ρ := 62.4*lb/ft^3
D := 1 in
μ := 6.72*10^-4*lb/(ft*s)
ΔP := 10*lbf/in^2
ΔL := 100 ft
gc := 32.174 lb*ft/(lbf*s^2)
# Guess values for unknowns
f := 1*10^-3
v := 10*ft/s
NRe := 1*10^4
Given
NRe == ρ*v*D/μ
ΔP/ρ == 4*f*v^2*ΔL/(2*D*gc)
1/sqrt(f/2) == 2.5*ln(NRe*sqrt(f/8)) + 1.75
[vsol; fsol; NResol] := Find(v, f, NRe)
# Mathcad cannot store values with different dimensions in a single array. When solving simultaneously for variables with different units, assign the results of the Find statement to individual variables by enclosing them in a vector, but do not evaluate the vector as a whole. The first value in the Find argument list is stored in the first element name in the vector on the left hand side, and so on.
vsol = 2.4058 m/s
[vsol; fsol; NResol] =  # error: The forms of these values must match. This value has the form: Length · Time^-1, but others have the form: Unitless.
fsol = 0.00496571
NResol = 61077.2
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