# Title: Solving an Equation in a Single Unknown
# Description: Using Mathcad to solve a single equation with one variable.
# Worksheet setting: ORIGIN = 1
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# SOLVING EQUATIONS
# quicksheets
# Solving an Equation in a Single Unknown
# This QuickSheet can be used to find a solution to the equation f(x) == 0 for a function f(x) you specify using the built-in root function.
# Enter a function f(x):
f(x) := sin(π*x/5.2) + 0.84*e^x
# Enter a guess value for the solution, and modify until the solver is converging appropriately. It is helpful to graph the function to find a value that is reasonably close to the root as a starting guess.
x := 3
r0 := root(f(x), x)
# Note: For a complex solution, input a complex guess value.
# Another solution can be found by using bracketing within the root function:
r1 := root(f(q), q, -6, -2)
r0 = -0.706955
r1 = -5.19227
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# Note: In the case of complex roots, only the real part of the root is shown on the plot.
## Finding Multiple Roots
# For an expression with multiple roots, it's possible to solve for additional roots by dividing out known roots and reusing the same guess value.
h(x) := f(x)/(x - r0)
r0 = -0.706955
f(r0) = 2.39388e-9
r1 := root(h(x), x)
r1 = -5.19227
k(x) := h(x)/(x - r1)
f(r1) = -1.09824e-13
r2 := root(k(x), x)
r2 = -10.4
f(r2) = -5.68984e-10
# For more accurate roots, reduce the value of TOL. The root function is set with a maximum TOL of 10^-5, because this value is speedy for most evaluations, and larger values produce poor convergence. If your equation is a polynomial, you can find all roots at once using the polyroots function.
## Units and the Root Function
# You may also use units with the root function:
R := 1*10^3*Ω
C := 3.2*10^-6*farad
τ := R*C
τ = 0.0032 s
# Enter a guess value for the solution. If you are searching for a root with units, use units in the guess.
v(γ) := (-exp(-γ/τ) + 1)*volt
st := 0.5*volt
γ_guess := 5*10^-3*sec
γ_sol := root(v(γ_guess) - st, γ_guess)
γ_sol = 0.00221807 s
γ := 0*sec, 5*10^-4*sec .. 2*10^-2*sec
# Change the value of st to find different rise times at which the particular voltage is reached.
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## Solving Tolerance
# You can change the accuracy of root function solutions by changing TOL for your worksheet. From before
γ_sol = 0.00221807 s
v(γ_sol) - st = -3.00424e-11 V
# Now reduce the value of TOL (increase the tolerance) from its default value of TOL = 0.001.
TOL := 10^-7
γ_new := root(v(γ_guess) - st, γ_guess)
γ_new = 0.00221807 s
v(γ_new) - st = 1.11022e-16 V
# Reducing TOL to excessively small values may increase calculation time and can also cause the solver not to converge, if the convergence criteria of the value of the function at the root, and the change between successive solutions never meet the specified tolerance. Values smaller than 10^-12 are probably not meaningful.
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