# Title: Single-Factor ANOVA
# Description: Using the F distribution function and programming operators to conduct an analysis of variance (ANOVA) test.
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# STATISTICS
# quicksheets
# Single-Factor ANOVA
# This QuickSheet demonstrates using Mathcad's F distribution function and programming operators to conduct an analysis of variance (ANOVA) test.
# Enter sample data used in test:
# An element of D represents the data collected with a particular factor.
D[0] := [10.7; 8.3; 9.2; 9.8]
D[1] := [12.8; 13.1; 11.9; 10.7; 12.4]
D[2] := [15.1; 13.7; 14.2]
# Enter level of significance α:
α := 0.05
# Program for conducting ANOVA test:
ANOVA(D, α) :=
    n_total ← 0
    SX ← 0
    SX2 ← 0
    T ← 0
    for i ∈ 0 .. last(D)
        SDi ← sum(D[i])
        nDi ← length(D[i])
        SX ← SX + SDi
        SX2 ← SX2 + sum(vectorize(D[i]*D[i]))
        T ← T + SDi^2/nDi
        n_total ← n_total + nDi
    SS_factor ← T - SX^2/n_total
    SS_error ← SX2 - T
    SS_total ← SX2 - SX^2/n_total
    df_factor ← length(D) - 1
    df_error ← n_total - length(D)
    df_total ← n_total - 1
    Analysis[0] ← [
        SS_factor, df_factor, SS_factor/df_factor;
        SS_error, df_error, SS_error/df_error;
        SS_total, df_total, 0
    ]
    Analysis[1] ← Analysis[0][0, 2]/Analysis[0][1, 2]
    Analysis[2] ← qF(1 - α, df_factor, df_error)
    Analysis[3] ← Analysis[1] < Analysis[2]
    Analysis
# Conducting an analysis of variance:
# For a given set of grouped data D and level of significance α:
ANOVA(D, α) = [[41.1278, 2, 20.5639; 7.61467, 9, 0.846074; 48.7425, 11, 0]; 24.3051; 4.25649; 0]
# returns
# The ANOVA table
ANOVA(D, α)[0] = [41.1278, 2, 20.5639; 7.61467, 9, 0.846074; 48.7425, 11, 0]
ANOVA(D, α)[1] = 24.3051  # The observed F statistic
ANOVA(D, α)[2] = 4.25649  # The critical F quantile
ANOVA(D, α)[3] = 0
# The hypothesis test conclusion at the specified level of significance:
#
# 0 = reject hypothesis that variance across factors is insignificant.
#
# 1 = accept hypothesis that variance across factors is insignificant.
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