# Title: Confidence Interval for Estimating a Normal Mean — Variance Unknown
# Description: Using the qt function to determine confidence interval limits.
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# STATISTICS
# quicksheets
# Confidence Interval for Estimating a Normal Mean - Variance Unknown
# This QuickSheet demonstrates using Mathcad's qt function to determine confidence interval limits.
# Enter data to be tested:
# [component: outputs X]
# Click on the Data Table above and expand it to see the vector X used in this example.
n := length(X)
n = 50
# Enter level of significance:
α := 0.1
# Confidence level:
1 - α = 90 %
# Sample standard deviation:
s := sqrt(n/(n - 1)*var(X))
# Degrees of freedom:
df := n - 1
df = 49
# Limit determination:
# critical value:
t1_0 := qt(1 - α/2, df)
t1_0 = 1.67655
# upper limit:
U := mean(X) + t1_0*s/sqrt(n)
U = 1.94224
# lower limit:
L := mean(X) - t1_0*s/sqrt(n)
L = 1.29137
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