# Title: Estimating the Mean of a Normal Population
# Description: Calculating a confidence interval for an estimate of the mean of a normal population with unknown population variance.
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# STATISTICS
# quicksheets
# Estimating the Mean of a Normal Population
# This QuickSheet can be used to calculate a confidence interval for an estimate of the mean of a normal population when the population variance is unknown.
# Enter a vector of data to be analyzed:
# [component: outputs data]
# Click on the Data Table above and expand it to see the vector data used in this example.
# Enter a value for two-tailed percentage point:
α := 0.05
# Confidence level:
1 - α = 0.95
# Number of data points:
n := length(data)
n = 40
# Sample mean:
m := mean(data)
m = 4.95639
# Standard dev.:
s := stdev(data)*sqrt(n/(n - 1))
s = 1.30793
# Confidence interval:
[L, U] := [m - |qt(α/2, n - 1)|*s/sqrt(n), m + |qt(α/2, n - 1)|*s/sqrt(n)]
[L, U] = [4.5381, 5.37468]
i := 0 .. n - 1
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