# Title: Chi-Square Test for Goodness of Fit
# Description: Performing a chi-square test to determine goodness of fit between observed and expected results.
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# STATISTICS
# quicksheets
# Chi-Square Test for Goodness of Fit
# This QuickSheet can be used to carry out a chi-square test to determine goodness of fit between observed results and "expected" results based on a model. The null hypothesis is that the expected results fit the observations.
# Enter vectors of observed and expected frequencies:
obs := [12; 39; 17; 18; 9]
exp1 := [9.5; 42.75; 19; 14.25; 9.5]
# Note:  The number of expected values in each category must be at least equal to 5 for this analysis to be valid. Sum of observed values must equal sum of expected values.
sum(obs) = 95
sum(exp1) = 95
# Enter the significance level:
α := 0.05
# Degrees of freedom:
ν := length(obs) - 1
ν = 4
# Chi-square statistic:
χ2 := sum(vectorize((obs - exp1)^2/exp1))
χ2 = 2.21053
# P (χ2 statistic at least this large):
P := 1 - pchisq(χ2, ν)
P = 0.697103
# α percentage point:
Χ2 := qchisq(1 - α, ν)
Χ2 = 9.48773
# Reject the null hypothesis if  Χ^2<χ^2
Χ2 < χ2 = 0
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