# Title: Hypothesis Test of a Normal Median
# Description: Using the normal distribution functions to conduct a hypothesis test of normal, independent data.
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# STATISTICS
# quicksheets
# Hypothesis Test of a Normal Mean
# This QuickSheet uses Mathcad's normal distribution functions to conduct a hypothesis test for normal, independent data.
# Enter a vector of sample data:
# [component: outputs X]
# Click on the Data Table above and expand it to see the vector X used in this example.
n := length(X)
n = 50
# Enter population standard deviation (known):
σ := 1.5
# Enter level of significance:
α := 0.1
# Enter value of mean to be tested:
μ_0 := 2
# Test statistic computation:
z := (mean(X) - μ_0)/(σ/sqrt(n))
z = -1.80642
## Two-tailed Hypothesis Test
# H_0:
μ == μ_0
# H_1:
μ ≠ μ_0
# Critical value determination:
z_t := qnorm(1 - α/2, 0, 1)
z_t = 1.64485
# Test H_0 in terms of p-values:
α/2 < pnorm(z, 0, 1) < 1 - α/2 = 0  # if 1 do not reject H_0
# Test H_0 in terms of q-values:
|z| < z_t = 0  # if 1 do not reject H_0
# Test H_0 graphically:
q := -4, -3.9 .. 4
k := 0 .. 1
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## One-tailed Hypothesis Test (left tail)
# H_0:
μ ≥ μ_0
# H_1:
μ < μ_0
# Critical value determination:
z_L := qnorm(α, 0, 1)
z_L = -1.28155
# Test H_0 in terms of p-values:
pnorm(z, 0, 1) > α = 0  # if 1 do not reject H_0
# Test H_0 in terms of q-values:
z > z_L = 0  # if 1 do not reject H_0
# Test H_0 graphically:
q := -4, -3.9 .. 4
k := 0 .. 1
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## One-tailed Hypothesis Test (right tail)
# H_0:
μ ≤ μ_0
# H_1:
μ > μ_0
# Critical value determination:
z_R := qnorm(1 - α, 0, 1)
z_R = 1.28155
# Test H_0 in terms of p-values:
pnorm(z, 0, 1) < 1 - α = 1  # if 1 do not reject H_0
# Test H_0 in terms of q-values:
z < z_R = 1  # if 1 do not reject H_0
# Test H_0 graphically:
q := -4, -3.9 .. 4
k := 0 .. 1
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