# Title: Monte Carlo Probability Estimation
# Description: Using Mathcad's random number generators in probability estimation.
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# STATISTICS
# quicksheets
# Monte Carlo Probability Estimation
# This QuickSheet uses Mathcad's random number generators to illustrate how large sampling methods can estimate probabilities of quantities whose distributions are unknown. Estimation of a sample mean of a logistic distribution is used as an example.
# Statement of Problem
# Determine empirically the probability that the sample mean, based on a sample of size 100, of a logistic distribution with parameters L and S will lie in the interval [a, b].
# Set problem parameters:
L := 1
S := 0.5
a := 0.9
b := 1.1
# Set Monte Carlo sampling parameters:
NSamples := 1*10^4  # number of individual samples to collect
SSize := 100  # number of data points in each sample
# Perform sampling and collect sample statistics:
i := 0 .. NSamples - 1
Means[i] := mean(rlogis(SSize, L, S))
# Estimate desired probability:
Success := sum(a ≤ Means[i - 1] ≤ b, i = 1 .. NSamples)
Prob := Success/NSamples
Prob = 0.7409
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