# Title: Probability Density and Cumulative Distribution
# Description: Using various probability functions.
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# STATISTICS
# quicksheets
# Probability Density and Cumulative Distribution
# This QuickSheet demonstrates the distinction between various probability functions.
x := -2, -1.9 .. 4
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# The dnorm function generates the familiar bell curve, here shown with mean = 2.
# The pnorm function is the running area under the dnorm curve.
# How big does x have to be before the area under the curve reaches 0.5? As expected, this is the mean, 2:
qnorm(0.5, 2, 1) = 2
integral(x*dnorm(x, 2, 1), x = -25 .. 25) = 2
# Plugging this back into pnorm shows that the two functions are inverses of each other.
pnorm(2, 2, 1) = 0.5
# The 75th, 90th, and 95th percentiles of the normal (2,1) distribution:
a := qnorm(0.75, 2, 1)
a = 2.67449
b := qnorm(0.9, 2, 1)
b = 3.28155
c := qnorm(0.95, 2, 1)
c = 3.64485
y := 0 .. 1
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