# Title: Prinicpal Component Analysis
# Description: Performing principal component analysis in Mathcad.
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# STATISTICS
# quicksheets
# Principal Component Analysis
# This QuickSheet demonstrates using Mathcad's eigenvalue and eigenvector routines to perform principal component analysis.
# Enter sample data used in analysis:
# [component: outputs D]
# Click on the Data Table above and expand it to see the matrix D used in this example.
# Each row represents one observation, each column a measured characteristic.
# Covariance matrix of sample:
Covar(D) :=
    for i ∈ 0 .. cols(D) - 1
        X[:, i] ← D[:, i] - mean(D[:, i])
    transpose(X)*X/(rows(D) - 1)
S := Covar(D)
S = [1.29385, 1.94846, 0.637692; 1.94846, 2.98962, 0.996923; 0.637692, 0.996923, 0.435385]
# Compute and sort eigenvalues:
V := reverse(sort(eigenvals(S)))
V = [4.60271; 0.101249; 0.0148863]
# Compute transform matrix:
j := 0 .. cols(D) - 1
T[:, j] := eigenvec(S, V[j])
T = [0.526669, -0.271947, -0.805397; 0.804985, -0.144904, 0.575327; 0.273163, 0.95134, -0.142597]
# Transform the original data:
D2 := D*T
# Compute covariance matrix of transformed data:
Covar(D2) = [4.60271, 0, 0; 0, 0.101249, 0; 0, 0, 0.0148863]
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