# Title: Probability Distributions
# Description: Using Mathcad's built-in probability distributions.
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# STATISTICS
# quicksheets
# Probability Distributions
# This QuickSheet provides some examples of using Mathcad's built-in probability distributions in place of tables.
# 95th percentile for the standard normal distribution:
qnorm(0.95, 0, 1) = 1.64485
# Probability that a standard normal variable exceeds 1.0:
1 - pnorm(1, 0, 1) = 0.158655
# Probability that a chi-square variable with 7 degrees of freedom (dof) is less than 5.6:
pchisq(5.6, 7) = 0.412849
# 95th percentile for the F distribution with 9 and 8 dof:
qF(0.95, 9, 8) = 3.38813
# 99th percentile for the t distribution with 6 dof:
qt(0.99, 6) = 3.14267
# Given a chi-square variable with 11 dof, the probability density at 5.5:
dchisq(5.5, 11) = 0.0579163
# Given a t variable with 4 dof, the probability density at -1.56:
dt(-1.56, 4) = 0.1143
# Probability that a binomial variable with size 15 and parameter 0.6 is less than or equal to 10:
pbinom(10, 15, 0.6) = 0.782722
# Probability that a beta variable with α = 3 and β = 2 exceeds 0.8:
1 - pbeta(0.8, 3, 2) = 0.1808
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