# Title: Generating Random Numbers
# Description: Using Mathcad's random number generators.
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# STATISTICS
# quicksheets
# Generating Random Numbers
# This QuickSheet can be used to create a vector of random numbers that are 1) uniformly distributed, 2) normally distributed, or 3) exponentially distributed over an interval. Also included in this worksheet are two programs that allow you to control the seed used to generate random numbers.
## Uniformly Distributed
# Enter the number of random deviates:
n := 1*10^3
# Enter the lower and upper endpoints:
lo := 0
hi := 2
# Enter the number of bins for histogram:
bin := 20
# Vector of random deviates:
N := runif(n, lo, hi)
# Frequency distribution:
lower := floor(min(N))
upper := ceil(max(N))
h := (upper - lower)/bin
j := 0 .. bin
int[j] := lower + h*j
f := hist(int, N)
int := int + h*0.5
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# Note: If you click on the definition for N, above, and press [F9] to recalculate, you get a new set of random numbers that nonetheless has the same distribution. That is because a new Seed value is used each time you recalculate. Press [F9] multiple times and observe the behavior of the graph.
## Normally Distributed
# Enter the number of random deviates:
n := 1*10^3
# Enter the mean μ:
μ := 0
# Enter the standard deviation σ:
σ := 2
# Enter the number of bins for histogram:
bin := 20
# Vector of random deviates:
N := rnorm(n, μ, σ)
# Frequency distribution:
lower := floor(min(N))
upper := ceil(max(N))
h := (upper - lower)/bin
j := 0 .. bin
int[j] := lower + h*j
f := hist(int, N)
int := int + 0.5*h
# Normal fitting function:
F(x) := n*h*dnorm(x, μ, σ)
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# Note: If you click on the definition for N, above, and press [F9] to recalculate, you get a new set of random numbers with the same distribution. Observe the graph to see this effect.
## Exponentially Distributed
# Enter the number of random deviates:
n := 1*10^3
# Enter the rate α:
α := 0.5
# Enter the number of bins for histogram:
bin := 20
# Vector of random deviates:
N := rexp(n, α)
# Frequency distribution:
lower := floor(min(N))
upper := ceil(max(N))/2
h := (upper - lower)/bin
j := 0 .. bin
int[j] := lower + h*j
f := hist(int, N)
int := int + 0.5*h
# Exponential fitting function:
F(x) := n*h*dexp(x, α)
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# Note: If you click on the definition for N, above, and press [F9] to recalculate, you get a new set of random numbers with the same distribution. Observe the graph to see this effect.
## Controlling the Seed Value
# The following program allows you to generate the same set of normally distributed random numbers with each iteration by resetting the value of Seed.
n := 1*10^3
μ := 0
σ := 2
SameNormal(n, μ, σi) :=
    for i ∈ 0 .. 5
        Seed(1)
        nums ← rnorm(n, μ, σ)
        M[:, i] ← nums
    M
SameNormal(n, μ, σ) = [
    -0.877942, -0.877942, -0.877942, -0.877942, -0.877942, -0.877942;
    -1.35881, -1.35881, -1.35881, -1.35881, -1.35881, -1.35881;
    -0.946572, -0.946572, -0.946572, -0.946572, -0.946572, -0.946572;
    -1.90293, -1.90293, -1.90293, -1.90293, -1.90293, -1.90293;
    -3.37137, -3.37137, -3.37137, -3.37137, -3.37137, -3.37137;
    0.0870606, 0.0870606, 0.0870606, 0.0870606, 0.0870606, 0.0870606;
    -0.24127, -0.24127, -0.24127, -0.24127, -0.24127, -0.24127;
    1.11285, 1.11285, 1.11285, 1.11285, 1.11285, 1.11285;
    4.38357, 4.38357, 4.38357, 4.38357, 4.38357, 4.38357;
    1.61747, 1.61747, 1.61747, 1.61747, 1.61747, 1.61747
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]
# Notice that the exact same set of random numbers is generated each time - each column contains the same numbers in the same order.
# Similarly, this program allows you to control and iterate the process of generating a new set of random numbers based on a particular Seed value.
DiffNormal(n, μ, σ) :=
    for i ∈ 0 .. 4
        Seed(i + 1)
        nums ← rnorm(n, μ, σ)
        M[:, i] ← nums
    M
DiffNormal(n, μ, σ) = [
    -0.877942, -0.20867, 0.643455, 0.876588, 0.935698;
    -1.35881, -3.4697, -1.38341, -3.48175, -1.40738;
    -0.946572, -1.11919, -1.13504, -0.764169, -1.21426;
    -1.90293, 0.78729, -2.32557, -1.16163, -1.59158;
    -3.37137, -2.40057, 1.26638, -0.635752, 0.136014;
    0.0870606, -0.916414, -2.44044, -0.173445, -0.733811;
    -0.24127, 0.384389, -4.11148, -0.391838, 1.30637;
    1.11285, 0.647342, 1.13024, 0.851753, -2.96882;
    4.38357, 1.54414, -1.47531, -1.1164, 1.72801;
    1.61747, -1.20708, 0.701089, 2.98605, -0.781993
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]
M := DiffNormal(n, μ, σ)
# You can graph these columns to see the effect:
# [component: outputs sel]
# [area: area with graph parameters]
lower := floor(min(M[:, sel - 1]))
upper := ceil(max(M[:, sel - 1]))
h := (upper - lower)/bin
j := 0 .. bin
int[j] := lower + h*j
int := int + 0.5*h
Fit(x) := n*h*dnorm(x, μ, σ)
Q := hist(int, M[:, sel - 1])
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