# Title: Hypothesis Test of a Median
# Description: Using the binomial distribution functions to conduct a nonparametric sign test of a median.
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# STATISTICS
# quicksheets
# Hypothesis Test of a Median
# This QuickSheet demonstrates the use of Mathcad's binomial distribution functions to conduct a nonparametric sign test of a median.
# Enter sample data used in test:
# [component: outputs S]
# Click on the Data Table above and expand it to see the vector S used in this example.
# Enter level of significance:
α := 0.1
# Enter value of median to be tested:
m_0 := 7
# Test statistic computation:
nplus := sum(vectorize(S > m_0))
nminus := sum(vectorize(S < m_0))
nsigns := min([nplus; nminus])
nsigns = 3
N := nplus + nminus
N = 17
# Define sign test statistic distribution functions:
C(n, k) :=
    1 if k == 0
    n/k*C(n - 1, k - 1) otherwise
dsign(k, N) :=
    0 if k ≠ floor(k)
    0 if k < 0
    0 if k > N/2
    C(N, k)/2^N if k == N/2
    C(N, k)/2^(N - 1) otherwise
qsign(p, N) :=
    i ← 0
    cum ← dsign(i, N)
    while cum < p
        i ← i + 1
        cum ← cum + dsign(i, N)
    i - 1
## Two-Tailed Hypothesis Test
# H_0:
m == m_0
# H_1:
m ≠ m_0
# Critical value determination:
n_t := qsign(α, N)
n_t = 4
# Test H_0 in terms of q-values:
nsigns > n_t = 0  # if 1, do not reject H_0
## One-Tailed Hypothesis Test (Left Tail)
# H_0:
m ≥ m_0
# H_1:
m < m_0
# Critical value determination:
n_L := qsign(2*α, N)
n_L = 5
# Test H_0 in terms of q-values:
nsigns > n_L = 0  # if 1, do not reject H_0
## One-Tailed Hypothesis Test (Right Tail)
# H_0:
m ≤ m_0
# H_1:
m > m_0
# Critical value determination:
n_R := qsign(1 - 2*α, N)
n_R = 7
# Test H_0 in terms of q-values:
nsigns < n_R = 1  # if 1, do not reject H_0
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