# Title: Computing Standard Errors
# Description: Using Mathcad's basic statistics functions to determine standard errors of estimation in data sets.
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# STATISTICS
# quicksheets
# Computing Standard Errors
# This QuickSheet uses Mathcad's basic statistics functions to determine standard errors of estimation on data sets.
# Enter sample data for illustration:
# [component: outputs S]
N := length(S)
# ... to illustrate standard error of the mean
# [component: outputs Sp]
Np := rows(Sp)
# ... to illustrate standard error of a proportion
# [component: outputs Spair]
Npair := rows(Spair)
# ... to illustrate standard error of regression slope and intercept
# Click on the Data Tables above and expand them to see the data S, Sp, and Spair used in this example.
# Standard error of the mean:
SE_mean := sqrt(N/(N - 1)*var(S))
SE_mean = 1.7072
# Standard error of a proportion:
p := sum(Sp)/Np
SE_pr := sqrt(p*(1 - p)/Np)
SE_pr = 0.0470213
# Standard error of the regression slope:
X := Spair[:, 0]
Y := Spair[:, 1]
m := slope(X, Y)
b := intercept(X, Y)
SE_slope := sqrt(sum((Y[i - 1] - (m*X[i - 1] + b))^2, i = 1 .. Npair)/((Npair - 2)*Npair*var(X)))
SE_slope = 0.0577807
# Standard error of the regression intercept:
SE_intercept := 1/Npair*sqrt(sum((Y[i - 1] - (m*X[i - 1] + b))^2, i = 1 .. Npair)*sum(X[i - 1]^2, i = 1 .. Npair)/var(X))
SE_intercept = 34.0669
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