# Title: t Test on Normal Means
# Description: Performing a t test on the hypothesis that two normal populations have equal means.
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# STATISTICS
# quicksheets
# t Test on Normal Means
# This QuickSheet illustrates carrying out a t test on the hypothesis that two normal populations have equal means.
# Enter two vectors of data to be analyzed:
# [component: outputs data1]
# [component: outputs data2]
# Click on the Data Tables above and expand them to see the vectors data1 and data2 used in this example.
# Enter the two-tailed significance level:
α := 0.01
# Sample sizes:
n1 := length(data1)
n2 := length(data2)
n1 = 10
n2 = 10
# Means:
m1 := mean(data1)
m2 := mean(data2)
m1 = 55.1
m2 = 54.2
# Standard deviations:
s1 := stdev(data1)*sqrt(n1/(n1 - 1))
s2 := stdev(data2)*sqrt(n2/(n2 - 1))
s1 = 30.1052
s2 = 28.2009
# Degrees of freedom:
ν := n1 + n2 - 2
ν = 18
# Estimated standard error of the difference:
s := sqrt(((n1 - 1)*s1^2 + (n2 - 1)*s2^2)/ν*(1/n1 + 1/n2))
s = 13.0446
# t statistic:
t1 := (m1 - m2)/s
t1 = 0.0689942
# P(|T|>|t|):
P := 2*(1 - pt(|t1|, ν))
P = 0.945755
# α/2 percentage point:
T := |qt(α/2, ν)|
T = 2.87844
# Reject the null hypothesis if |t| > T.
|t1| > T = 0
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