# Title: t Score of a Vector of Data
# Description: Computing a t statistic for a vector of normally distributed data with respect to a specified mean.
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# STATISTICS
# quicksheets
# t Score of a Vector of Data
# This QuickSheet can be used to compute a t statistic for a vector of normally distributed data with respect to a specified mean.
# Enter a vector of data to be analyzed:
# [component: outputs X]
# Click on the Data Table above and expand it to see the vector X used in this example.
# Enter the two-tailed significance level:
α := 0.05
# Enter proposed population mean:
μ := 7
# Sample size:
N := length(X)
N = 10
# Degrees of freedom:
ν := N - 1
ν = 9
# Sample mean:
m_s := mean(X)
m_s = 7.025
# Sample standard deviation:
s := stdev(X)*sqrt(N/(N - 1))
s = 0.0440328
# Standard error of the mean:
SEM := s/sqrt(N)
SEM = 0.0139244
# t statistic on mean:
t1 := (m_s - μ)/(s/sqrt(N))
t1 = 1.79541
# P(|T|>|t|):
P := 2*(1 - pt(|t1|, ν))
P = 0.106159
# α/2 percentage point:
T := |qt(α/2, ν)|
T = 2.26216
# Reject the null hypothesis if t > T.
|t1| > T = 0
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