# Title: Z Score of a Vector of Data
# Description: Computing a Z statistic for a vector of normally distributed data with known population standard deviation.
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# STATISTICS
# quicksheets
# Z Score of a Vector of Data
# This QuickSheet can be used to compute a z statistic for a vector of normally distributed data with known population standard deviation.
# Enter a vector of data to be analyzed:
# [component: outputs X]
# Click on the Data Table above and expand it to see the vector X used in this example.
# Enter the two-tailed significance level:
α := 0.01
# Enter population standard deviation:
σ := 5
# Enter proposed population mean:
μ := 2
# Sample size:
N := length(X)
N = 100
# Sample mean:
m_s := mean(X)
m_s = 5.12485
# Z statistic on mean:
z := (m_s - μ)/(σ/sqrt(N))
z = 6.2497
# P(|Z|>|z|):
P := 2*(1 - pnorm(z, 0, 1))
P = 4.11242e-10
# α/2 percentage point:
zα := |qnorm(α/2, 0, 1)|
zα = 2.57583
# Reject the null hypothesis if z > zα.
|z| > zα = 1
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