# Title: Symbolic Constants
# Description: Evaluating Euler's and Catalan's constants numerically.
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# SYMBOLIC MATH
# quicksheets
# Symbolic Constants
# Mathcad sometimes returns special symbolic constants that cannot be evaluated directly using the numerical equal sign. Two examples are Euler's constant and Catalan's constant. You can evaluate these constants numerically using the symbolic equal sign with the keyword "float." Alternatively, you can define new constants using the output of the symbolic equal sign and then evaluate these constants with the numerical equal sign.
## γ:  Euler's Constant
# Euler's constant γ  is defined as follows.
limit(sum(1/k, k = 1 .. N) - ln(N), N → ∞) → γ
# You can evaluate γ numerically using the keyword "float."
γ float → 0.577215664902
# If you need to evaluate γ with the numerical equal sign, first define a new constant,  gamma, using the preceding result.
gamma := γ float → 0.577215664902
# You can then evaluate gamma with the numerical equal sign.
gamma = 0.577216
# Euler's constant arises in a number of definite integrals:
integral(e^(-x)*ln(x), x = 0 .. ∞) → -γ
integral((1/(1 + x^2) - cos(x))*1/x, x = 0 .. ∞) → γ + limit(Ei(1, (-1i)*x)/2 + Ei(1, 1i*x)/2 - 1/2*ln(x^2 + 1) + ln(x), x → ∞)
integral(e^(-x^2)*ln(x), x = 0 .. ∞) collect, π → -1/4*sqrt(π)*(γ + ln(4))
## G:  Catalan's Constant
# Catalan's constant G is defined as follows.
sum((-1)^n/(2*n + 1)^2, n = 0 .. ∞) → Catalan
# You can evaluate Catalan's constant as follows.
Catalan float → 0.915965594177
# If you need to evaluate Catalan's constant using the numerical equal sign, first define a new constant G using the preceding result.
G := Catalan float → 0.915965594177
# You can then evaluate G with the numerical equal sign:
G = 0.915966
# You can also use the following integral  to obtain a good approximation of  Catalan's constant:
integral(asinh(sin(x)), x = 0 .. π/2) float, 20 → 0.91596559417721901505
# Catalan's constant arises in a number of other integrals:
integral(ln(x)/(1 + x^2), x = 0 .. 1) → -Catalan
integral(atan(x)/x, x = 0 .. 1) → Catalan
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