# Title: Symbolic Functions
# Description: Computing the value of special symbolic functions.
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# SYMBOLIC MATH
# quicksheets
# Symbolic Functions
# Symbolic math sometimes returns functions that can only be evaluated with the symbolic equal sign. To evaluate these functions numerically, use the keyword "float" before the symbolic equal sign. This QuickSheet describes the following symbolic functions:
# Beta
# Dilog
# Polylog
# Dirac Delta
# Digamma
# Polygamma
# Double Factorial
# Lambert's W
# Riemann Zeta
# Hypergeometric
## Beta
# The beta function, beta(x, y), is defined as follows:
beta(x, y) == Γ(x)*Γ(y)/Γ(x + y)
# Γ(x) is the Gamma function.
# The beta function appears in the result of the following integral:
integral(sin(x)^(2*m + 1), x = 0 .. π/2) → beta(1/2, m + 1)/2
m := 2
beta(1/2, m + 1)/2 → 8/15
## Dilog
# The dilogarithm function, dilog(x), is defined as follows:
dilog(x) == integral(1/(1 - τ)*ln(τ), τ = 1 .. x)
# To evaluate dilog numerically, use the keyword "float."
dilog(1/2) float → 0.582240526465
## Polylog
# The polylogarithm function, polylog(n, x) is defined as follows:
polylog(n, x) == sum(x^k/k^n, k = 1 .. ∞)
# The following integral returns a result in terms of polylog:
integral(τ/(e^τ - 1), τ) → polylog(2, e^τ) - τ^2/2 + τ*ln(1 - e^τ)
# polylog is related to dilog by the following:
polylog(2, x) == dilog(1 - x)
# For example,
polylog(2, 3) float → 2.32018042331 - 3.45139229522i
dilog(1 - 3) float → 2.32018042331 - 3.45139229522i
## Dirac Delta (Unit Impulse)
# The Dirac delta, Δ(x), is defined by:
# Δ(x) == 0  if  x ≠ 0  and
integral(Δ(x), x = -∞ .. ∞) == 1
# The Dirac delta has the following properties:
integral(Δ(τ), τ = -∞ .. ∞) → 1
integral(Δ(τ)*f(τ), τ = -∞ .. ∞) → f(0)
integral(Δ(τ - a)*f(τ), τ = -∞ .. ∞) → f(a)
# The following transforms return results in terms of the Dirac delta:
1 fourier, τ → 2*π*Δ(ω)
1 invlaplace, s → Δ(t)
Φ(τ) fourier, τ → (π*ω*Δ(ω) + 1i)/ω
# Φ is the Heaviside step function.
Δ(n, x)  # returns the nth derivative of the Dirac delta function.
d/dτ(Δ(n, τ)) → Δ(n + 1, τ)
## Digamma Function
# The digamma function, Psi(x), is defined to be the derivative of the natural logarithm of the Gamma function Γ(x):
Psi(x) == d/dx(ln(Γ(x)))
# In the following examples, γ is Euler's constant.
Psi(2) float, 20 → 0.42278433509846713939
Psi(1) → -γ
Psi(2) → 1 - γ
Psi(3) → 3/2 - γ
Psi(1/2) → -γ - 2*ln(2)
Psi(3/2) → 2 - 2*ln(2) - γ
Psi(5/2) → 8/3 - 2*ln(2) - γ
## Polygamma Function
# The polygamma function, Psi(k, x), is defined to be the kth derivative of the Gamma function:
ψ(k, x) == d^k/dx^k(ln(Γ(x)))
Psi(2, 2) float → -0.404113806319
Psi(1, 2) → π^2/6 - 1
Psi(1, 2) float, 20 → 0.64493406684822643647
Psi(1, 1) → π^2/6
Psi(2, 1) → -2*Zeta(3)
Psi(3, 1) → π^4/15
Psi(1, 1/2) → π^2/2
Psi(1, 3/2) → π^2/2 - 4
Psi(1, 5/2) → π^2/2 - 40/9
## Double Factorial
# The double factorial function, fact2(n), is defined as follows.
# For n even:
fact2(n) == 2*4*6*...*n
# For n odd:
fact2(n) == 1*3*5*...*n
## Lambert's W Function
# Lambert's W function, LambertW(x), is the inverse of the function x.e^x.
LambertW(x)*e^LambertW(x) == x
# Lambert's W function appears in the symbolic solution of the following equations:
5*u - e^u == 0 solve, u → -LambertW(-1/5)
a + b*v == c*e^(-v) solve, v → -(a - b*LambertW(c*e^(a/b)/b))/b
x*exp(x) - 15/2 == 0 solve, x → LambertW(15/2)
# The following gives the integral, the derivative, and the Taylor series expansion of the LambertW function:
integral(LambertW(x), x) → x*LambertW(x) - x + x/LambertW(x)
d/dx(LambertW(x)) → LambertW(x)/(x*(LambertW(x) + 1))
LambertW(x) series, x == 0, 6 → x - x^2 + 3*x^3/2 - 8*x^4/3 + 125*x^5/24 - 54*x^6/5
# LambertW(n, x) is the nth branch of LambertW(x) (as a function in the complex plane).
## Riemann Zeta Function
# The Riemann Zeta function, Zeta(z), is defined as follows:
Zeta(z) == sum(1/n^z, n = 1 .. ∞)
# For example,
Zeta(5) float, 13 → 1.036927755143
# Here are some values of Zeta(x) at even integer arguments:
Zeta(2) → π^2/6
Zeta(4) → π^4/90
Zeta(6) → π^6/945
# The Zeta function appears in the output of the following integral and series:
1/2*integral(τ^2/(e^τ - 1), τ = 0 .. ∞) → Zeta(3)
sum(1/(2*k + 1)^7, k = 0 .. ∞) → 127*Zeta(7)/128
## Hypergeometric Function
# The hypergeometric function, hypergeom(n, d, x), is defined for vectors a and b as follows:
n == [n_1; n_2; ...; n_p]
b == [d_1; d_2; ...; d_q]
hypergeom(n, d, x) == sum(n_1[k]*n_2[k]*...*n_p[k]/(n_1[k]*n_2[k]*...*n_q[k])*x^k/k!, k = 0 .. ∞)
# (c)_k is the rising factorial defined by:
c[k] == c*(c + 1)*...*(c + k - 1)  # c[0]
# The hypergeometric function appears in the result of the following integral:
integral(1/(1 + x^8), x) → x*hypergeom([1/8; 1], [9/8], -x^8)
# Evaluate the result at the endpoints of the interval [0, 1].
a := 0
b := 1
b*hypergeom([1/8; 1], [9/8], -b^8) - a*hypergeom([1/8; 1], [9/8], -a^8) float → 0.924651705776
# This agrees with the value of the following definite integral:
integral(1/(1 + x^8), x = 0 .. 1) = 0.924652
# The built-in function mhyper returns the same results as hypergeom(n, d, x) for the special case in which
n == [a]
d == [c]
# For example,
a := 1
c := 2
n1 := [a]
d := [c]
mhyper(a, c, 1/2) = 1.29744
hypergeom(n1, d, 1/2) float → 1.2974425414
# The built-in function fhyper returns the same results as hypergeom(n, d, x) for the special case in which
n == [a; b]
d == [c]
# For example,
b := 1
n2 := [a; b]
fhyper(a, b, c, 1/2) = 1.38629
hypergeom(n2, d, 1/2) float → 1.38629436112
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