# Title: Symbolic Elliptic Integral Functions
# Description: Computing the value of complete and incomplete elliptic integrals of the first and second kinds.
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# SYMBOLIC MATH
# quicksheets
# Symbolic Elliptic Integral Functions
# This QuickSheet describes the elliptic integral functions, which appear in many symbolic calculations. The QuickSheet also shows how to evaluate these functions numerically, by defining Mathcad functions that compute the elliptic integrals.
## EllipticK:  Complete Elliptic Integral of the First Kind
# The complete elliptic integral of the first kind, EllipticK(m), is defined as follows:
EllipticK(m) == integral(1/(sqrt(1 - τ^2)*sqrt(1 - m*τ^2)), τ = 0 .. 1)
integral(1/(sqrt(1 - τ^2)*sqrt(1 - m*τ^2)), τ = 0 .. 1) → EllipticK(m)
# To evaluate EllipticK numerically, define a function that computes the above integral:
ellipticKnum(m) := integral(1/(sqrt(1 - τ^2)*sqrt(1 - m*τ^2)), τ = 0 .. 1)
ellipticKnum(1/4) = 1.68575
integral(1/(sqrt(1 - τ^2)*sqrt(1 - (1 - m)*τ^2)), τ = 0 .. 1)
## EllipticF:  Incomplete Elliptic Integral of the First Kind
# The incomplete integral of the first kind, EllipticF(x, m), is defined as follows:
EllipticF(x, m) == integral(1/(sqrt(1 - τ^2)*sqrt(1 - m*τ^2)), τ = 0 .. sin(x))
integral(1/(sqrt(1 - τ^2)*sqrt(1 - m*τ^2)), τ = 0 .. sin(x)) assume, -π/2 < x < π/2 → EllipticF(x, m)
# This is related to EllipticK by
EllipticF(π/2, m) == ellipticK(m)
# To evaluate EllipticF(x, m) numerically, define a function that computes the above integral:
ellipticFnum(x, m) := integral(1/(sqrt(1 - τ^2)*sqrt(1 - m*τ^2)), τ = 0 .. sin(x))
# For example,
ellipticFnum(π/3, 1/4) = 1.08955
## EllipticE:  Complete and Incomplete Elliptic Integral of the Second Kind
# The complete elliptic integral of the second kind, EllipticE(m), is defined as
EllipticE(m) == integral(sqrt(1 - m*τ^2)/sqrt(1 - τ^2), τ = 0 .. 1)
integral(sqrt(1 - m*τ^2)/sqrt(1 - τ^2), τ = 0 .. 1) → EllipticE(m)
# Alternatively, the function is given by
integral(sqrt(1 - m*sin(θ)^2), θ = 0 .. π/2) → EllipticE(m)
# To evaluate EllipticE(m) numerically, define a function that computes the above integral:
ellipticE_complete(m) := integral(sqrt(1 - m*τ^2)/sqrt(1 - τ^2), τ = 0 .. 1)
# For example,
ellipticE_complete(1/5) = 1.48904
# The incomplete elliptic integral of the second kind, EllipticE(x, m), is defined as follows:
EllipticE(x, m) == integral(sqrt(1 - m*τ^2)/sqrt(1 - τ^2), τ = 0 .. sin(x))
integral(sqrt(1 - m*τ^2)/sqrt(1 - τ^2), τ = 0 .. sin(x)) assume, -1 < x < 1 → EllipticE(x, m)
# To evaluate EllipticE(m) numerically, define a function that computes the above integral:
ellipticE_incomplete(x, m) := integral(sqrt(1 - m*τ^2)/sqrt(1 - τ^2), τ = 0 .. sin(x))
# Note that
EllipticE(π/2, m) == EllipticE(m)
# For example,
ellipticE_incomplete(π/2, 1/4) = 1.46746
ellipticE_complete(1/4) = 1.46746
## EllipticPi:  Complete and Incomplete Elliptic Integrals of the Third Kind
# The complete elliptic integral of the third kind, EllipticPi(n, m), is defined as follows:
EllipticPi(n, m) == integral(1/((1 - n*τ^2)*sqrt(1 - τ^2)*sqrt(1 - m*τ^2)), τ = 0 .. 1)
integral(1/((1 - n*τ^2)*(sqrt(1 - τ^2)*sqrt(1 - m*τ^2))), τ = 0 .. 1) → EllipticPi(n, m)
# To evaluate EllipticPi(n, m) numerically, define a function that computes the above integral:
ellipticPi_complete(n, m) := integral(1/((1 - n*τ^2)*sqrt(1 - τ^2)*sqrt(1 - m*τ^2)), τ = 0 .. 1)
n := 1/4
m := 1/5
TOL := 10^-4
ellipticPi_complete(n, m) = 1.92406
# The incomplete elliptic integral of the third kind, EllipticPi(x, n, m) is defined as follows:
EllipticPi(x, n, m) == integral(1/((1 - n*τ^2)*sqrt(1 - τ^2)*sqrt(1 - m*τ^2)), τ = 0 .. sin(x))
# To evaluate EllipticPi(x,n, m) numerically, define a function that computes the above integral:
ellipticPi_incomplete(x, n, m) := integral(1/((1 - n*τ^2)*sqrt(1 - τ^2)*sqrt(1 - m*τ^2)), τ = 0 .. sin(x))
# Note that
EllipticPi(π/2, n, m) == EllipticPi(n, m)
# For example,
n := 1/4
m := 1/5
ellipticPi_incomplete(π/2, n, m) = 1.92406
ellipticPi_complete(n, m) = 1.92406
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