# Title: Symbolic Integral Functions
# Description: Computing the value of special symbolic functions.
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# SYMBOLIC MATH
# quicksheets
# Symbolic Integral Functions
# Symbolic math sometimes returns functions that can only be evaluated with the symbolic equal sign, but not with the numerical equal sign. To evaluate these functions numerically, use the keyword "float." This QuickSheet describes several of these special functions: the exponential integral, the sine and cosine integrals, and the Fresnel sine and cosine integrals.
## Ei: Exponential Integral
# The exponential integral function Ei(x), for a real number x, is defined by
Ei(x) == -integral(e^τ/τ, t = -x .. ∞)
# For x > 0, the integral is interpreted as the Cauchy principal value.
# To evaluate Ei(x) numerically, use the keyword "float."
Ei(2) float → 4.954234356
# There is also a two-argument version of Ei, defined for n = 1 as follows:
Ei(1, x) == -γ - ln(x) - sum((-x)^k/(k*k!), k = 1 .. ∞)
# For an arbitrary integer n, Ei(n, x) is defined by the recurrence relation:
n*E(n + 1, x) == e^(-x) - x*E(n, x)
# You can use Ei(n, x) to compute the complex exponential integral function, which is defined by the right hand side of the following equation:
-Ei(1, -x) == γ + ln(-x) + sum(x^k/(k*k!), k = 1 .. ∞)
# where γ is Euler's constant.
# Note: Ei(x) returns only the real part of the complex exponential integral function. Ei(x) is related to Ei(n, x) by
Ei(x) == Re(-Ei(1, -x))
# For a real number x,
-Ei(1, -x) == Ei(x) + π*1i
# for
x > 0
-Ei(1, -x) == Ei(x)  # for
x < 0
# The following integrals return answers in terms of the exponential integral function:
integral(e^(-τ)/τ, τ = x .. ∞) assume, x > 0 → Ei(1, x)
integral(e^τ/τ, τ = -∞ .. x) assume, x ≤ 0 → -Ei(1, -x)
integral(e^(-b*τ)/(a + τ), τ = 0 .. ∞) assume, a > 0, b > 0 → e^(a*b)*Ei(1, a*b)
integral(e^(-c^2*τ)/τ^2, τ = 1 .. ∞) assume, c > 0 → e^(-c^2) - c^2*Ei(1, c^2)
## Ci: Cosine Integral
# The cosine integral function, Ci(x), is defined as follows:
Ci(x) == γ + ln(x) + integral((cos(τ) - 1)/τ, τ = 0 .. x)
γ + ln(x) + integral((cos(τ) - 1)/τ, τ = 0 .. x) → Ci(x)
# Ci(x) has the following series representation:
Ci(x) == γ + ln(x) + sum((-1)^n*x^(2*n)/((2*n)*2*n!), n = 1 .. ∞)
Ci(2) float → 0.422980828775
# The following integrals return answers in terms of the cosine integral function:
integral(cos(τ)/τ, τ = 1 .. x) → Ci(x) - Ci(1)
integral(cos(τ)/τ, τ = x .. ∞) assume, x > 0 → -Ci(x)
## Si: Sine Integral
# The sine integral, Si(x), is defined as follows:
Si(x) == integral(sin(τ)/τ, τ = 0 .. x)
# Si(x) has the following series representation:
Si(x) == sum((-1)^n*x^(2*n + 1)/((2*n + 1)*(2*n + 1)!), n = 0 .. ∞)
Si(2) float → 1.6054129768
# The following integrals return answers in terms of the sine integral function:
integral(1/τ*sin(τ), τ = 0 .. 2) → Si(2)
π/2 - integral(sin(τ)/τ, τ = x .. ∞) → Si(x)
## FresnelC: Fresnel Cosine Integral
# The Fresnel cosine integral function, FresnelC(x), is defined as follows:
FresnelC(x) == integral(cos(π/2*τ^2), τ = 0 .. x)
# For example,
FresnelC(2) float → 0.488253406075
# The following integral returns an answer in terms of the Fresnel cosine integral function:
integral(cos(u)/sqrt(u), u = 0 .. x) → sqrt(2)*sqrt(π)*FresnelC(sqrt(2)*sqrt(x)/sqrt(π))
## FresnelS: Fresnel Sine Integral
# The Fresnel sine integral function is defined as follows:
FresnelS(x) == integral(sin(π/2*τ^2), τ = 0 .. x)
# For example,
FresnelS(2) float, 15 → 0.343415678363698
# The following integral returns a result in terms of the Fresnel sine integral:
integral(sin(x^2 + b*x + c), x) → sqrt(2)*sqrt(π)*(cos(b^2/4 - c)*FresnelS(sqrt(2)*(b/2 + x)/sqrt(π)) - sin(b^2/4 - c)*FresnelC(sqrt(2)*(b/2 + x)/sqrt(π)))/2
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