# Title: Simplifying and Rewriting Expressions
# Description: Factoring an expression symbolically.
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# SYMBOLIC MATH
# quicksheets
# Simplifying and Rewriting Expressions
# This QuickSheet shows how to combine and rewrite expressions using the symbolic keywords "combine" and "rewrite." A keyword specifies an operation before the symbolic equal sign.
## Simplify Keyword
# The keyword "simplify" is an all-purpose tool for simplifying expressions. Here are some examples:
e^(2*x)*e^(7*y) simplify → e^(2*x + 7*y)
sin(x)^2 + cos(x)^2 simplify → 1
## Combine Keyword
# To combine expressions using specific types of identities, or to rewrite expressions in special forms, use the keywords "combine" or "rewrite."
2*sin(x)*cos(x) combine, sincos → sin(2*x)
# The modifier "sincos" after "combine" tells Mathcad to use identities for sines and cosines to combine the terms.
# Here are some more examples using "combine":
e^x*e^(2*y) combine, exp → e^(x + 2*y)
2*ln(3) - 3*ln(2) combine, ln → -ln(8/9)
2*log(3, b) - 3*log(2, b) combine, log → log(9/8)/log(b)
sinh(x)*sinh(y) combine, sinhcosh → cosh(x + y)/2 - cosh(x - y)/2
## Rewrite Keyword
# To rewrite expressions in terms of elementary functions, use the keyword "rewrite."
sin(x) rewrite, exp → -e^(x*1i)*1i/2 + e^(-x*1i)*1i/2
# annotation to a formula above: Factoring an expression symbolically.
# The modifier "exp" tells Mathcad to rewrite sin(x) in terms of exponential functions.
# These examples use other modifiers of "rewrite":
sin(x)^2 rewrite, cos → 1 - cos(x)^2
asinh(x) rewrite, ln → ln(x + sqrt(x^2 + 1))
ln(7) rewrite, log → log(7)*log(10, e)
-e^(x*1i)*1i/2 + e^(-x*1i)*1i/2 rewrite, sincos → sin(x)
e^x rewrite, sinh → 2*sinh(x/2)^2 + sinh(x) + 1
n! rewrite, gamma → Γ(n + 1)
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