# Title: Symbolic Calculus
# Description: Calculus and the symbolic processor.
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# SYMBOLIC MATH
# quicksheets
# Symbolic Calculus
# This QuickSheet illustrates how to solve symbolic problems in calculus. You can solve these problems in either of the following ways:
# •  Evaluate the expression for the problem using the symbolic equal sign, adding keywords to modify the problem if necessary. This is the recommended method because results are automatically updated when you make changes elsewhere in the worksheet.
#
# •  Select items from the Symbolics menu. In this case, results are not automatically updated.
# The examples in this QuickSheet illustrate the first method. The QuickSheet covers the following topics:
# Derivatives and Integrals
# Limits
# Taylor and Maclaurin Series
# Partial Fractions
# Continued Fractions
## Derivatives and Integrals
# To find the derivative of z*atan(z):
# 1.  Press [?] to insert the derivative operator or click the derivative operator on the Calculus toolbar and fill in the placeholders as shown:
d/dz(z*atan(z))
# 2.  Press [Ctrl] [.] to insert the symbolic equal sign and then press [Enter].
d/dz(z*atan(z)) → atan(z) + z/(z^2 + 1)
# Alternatively, type just the expression z*atan(z) without the derivative operator, click on the variable of differentiation z, and select Variable > Differentiate from the Symbolics menu. However, in this case the result is not "live," and does not update if you change the value of z in your worksheet.
# You can assign the result of a symbolic differentiation to a function, which can be useful if you don't have values for all the variables. For example:
f(x) := d/dx(2*x^2 + y) → 4*x
f(2) = 8
# You can also take the derivative of a complex function:
d/dx(sin(x*1i + y)) → cos(y + x*1i)*1i
# To display the result in the standard form a + b*i, use the keyword "rectangular":
d/dx(sin(x*1i + y)) rectangular → sinh(x)*sin(y) + cosh(x)*cos(y)*1i
# To find the indefinite integral of a function, press [Ctrl] I to insert the indefinite integral operator and then type the integrand in the placeholder. Then press [Ctrl] [.] to insert the symbolic equal sign. For example:
integral(e^x*sin(x), x) → -e^x*(cos(x) - sin(x))/2
# Note: You cannot evaluate an indefinite integral with the numerical equal sign.
# To find a definite integral, press [&] to insert the definite integral operator and then type the integrand and the limits of integration in the placeholders.
integral(e^x*sin(x), x = 0 .. 1) → e*sin(1)/2 - cos(1)*e/2 + 1/2
# Note that Mathcad returns the answer symbolically. To evaluate a definite integral numerically, use the numerical equal sign:
integral(e^x*sin(x), x = 0 .. 1) = 0.909331
# For greater accuracy, use the keyword "float":
integral(e^x*sin(x), x = 0 .. 1) float, 30 → 0.909330673631478617034602154687
# You can also use parameters in the integrand or limits of integration:
integral(x^3, x = 1 .. c) → c^4/4 - 1/4  # Press [&] for definite integrals.
integral(a*x^2, x) → a*x^3/3  # Press [Ctrl] I for indefinite integrals.
# Whether a parameterized integral is finite might depend on the value of a parameter. For example, the following integral is finite only when c > 0 , so Mathcad returns the result in terms of a limit:
integral(e^(-c*t1), t1 = 0 .. ∞) → 1/c - limit(e^(-c*t1), t1 → ∞-)/c
# To evaluate the integral only for values of c > 0 , use the keyword "assume":
integral(e^(-c*t1), t1 = 0 .. ∞) assume, c > 0 → 1/c
# Mathcad knows the Fundamental Theorem of Calculus, which states the following relationships between derivatives and integrals:
integral(d/dx(G(x)), x) → G(x)
d/dx(integral(g(t1), t1 = a .. x)) → g(x)
## Limits
# You can evaluate the limits of functions symbolically. For example, to evaluate the limit of the function sin(x)/x as x approaches 0:
# 1.  Press [Ctrl] L to insert the limit operator. Then type the variable x in the placeholder to the left of the arrow, the value it approaches, 0, in the placeholder to the right of the arrow, and the function sin(x)/x in the placeholder to the right of "lim":
limit(sin(x)/x, x → 0)
# 2.  Press [Ctrl] [.] to insert the symbolic equal sign and then press [Enter].
limit(sin(x)/x, x → 0) → 1
# Note: You cannot evaluate limits using the numerical equal sign.
# You can also compute left- and right-handed limits of functions:
# Left-handed limit:
limit(h(x), x → p-) → h(p)
# Right-handed limit:
limit(h(x), x → p+) → h(p)
## Taylor and Maclaurin Series
# You can expand functions in a Taylor or Maclaurin series using the keyword "series." For example, the following expression generates a Maclaurin series for sin(x):
sin(x) series → x - x^3/6 + x^5/120
# By default, Mathcad returns the terms up to order 6, so that the highest power in the answer is 5. To increase the order of the terms to 10, type a comma after "series" and then type x, 10 in the placeholder:
sin(x) series, x, 10 → x - x^3/6 + x^5/120 - x^7/5040 + x^9/362880
# To expand sin(x) in a Taylor series about 1, type (x == 1) after "series," using Boolean equals ([Ctrl] [=]).
sin(x) series, x == 1 → sin(1) + cos(1)*(x - 1) - sin(1)*(x - 1)^2/2 - cos(1)*(x - 1)^3/6 + sin(1)*(x - 1)^4/24 + cos(1)*(x - 1)^5/120
# You can also expand functions in more than one variable. Here is the series expansion for e^(x + y) around the point (x, y) == (0, 1):
e^(x + y) series, x == 0, y == 1 → e + e*(y - 1) + e*(y - 1)^2/2 + e*(y - 1)^3/6 + e*(y - 1)^4/24 + e*(y - 1)^5/120 + x*e + x*e*(y - 1) + x*e*(y - 1)^2/2 + x*e*(y - 1)^3/6 + x*e*(y - 1)^4/24 + x^2*e/2 + x^2*e*(y - 1)/2 + x^2*e*(y - 1)^2/4 + x^2*e*(y - 1)^3/12 + x^3*e/6 + x^3*e*(y - 1)/6 + x^3*e*(y - 1)^2/12 + x^4*e/24 + x^4*e*(y - 1)/24 + x^5*e/120
# To display the coefficients as 3 digit numbers instead of in terms of e,
#
# 1.  Place the cursor to the right of y == 1 and press [Ctrl] [Shift] [.] to insert a placeholder for a second keyword.
e^(x + y) series, x == 0, y == 1 →  # error: This placeholder is empty.
# 2.  Type "float" in the placeholder.
e^(x + y) series, x == 0, y == 1; float → 2.718 + (2.718*y - 2.718) + 1.359*(y - 1)^2 + 0.453*(y - 1)^3 + 0.113*(y - 1)^4 + 0.023*(y - 1)^5 + 2.718*x + 2.718*x*(y - 1) + 1.359*x*(y - 1)^2 + 0.453*x*(y - 1)^3 + 0.113*x*(y - 1)^4 + 1.359*x^2 + 1.359*x^2*(y - 1) + 0.68*x^2*(y - 1)^2 + 0.227*x^2*(y - 1)^3 + 0.453*x^3 + 0.453*x^3*(y - 1) + 0.227*x^3*(y - 1)^2 + 0.113*x^4 + 0.113*x^4*(y - 1) + 0.023*x^5
# To specify the number of decimal places displayed in the coefficients, select Result on the Format menu and check the box next to Apply to symbolic results. Then type an integer in the Number of decimal places field. The series above uses the default value of 3.
# The following expression expands around the point (x, y) == (0, 1) but shows only terms up to order 3, that is, terms whose exponents sum to less than 3.
e^(x + y) series, x == 0, y == 1, 3; float, 3 → 2.72 + (2.72*y - 2.72) + 1.36*(y - 1.0)^2 + 2.72*x + 2.72*x*(y - 1.0) + 1.36*x^2
## Partial Fractions
# You can perform a partial fraction decomposition of a rational function (quotient of polynomials) using the keyword "parfrac":
(2*x^2 - 3*x + 1)/(x^3 + 2*x^2 - 9*x - 18) parfrac → 1/(3*(x - 3)) - 3/(x + 2) + 14/(3*(x + 3))
# Here is another example defined via the range product
x^2*product(1/(x + n), n = 1 .. 4) parfrac, x → 1/(6*(x + 1)) - 2/(x + 2) + 9/(2*(x + 3)) - 8/(3*(x + 4))
# Note that because the expression contains more than one variable, you must specify the variable with respect to which you want to perform the partial fractions decomposition after "parfrac."
## Decompositions Over the Real or Complex Numbers
# By default, Mathcad performs the partial fractions decomposition over the field of rational numbers. That is, if the initial expression is a quotient of polynomials with rational coefficients, the polynomials in the result also have rational coefficients. For example,
1/((x^2 + 1)*(x^2 - 2)) parfrac → 1/(3*(x^2 - 2)) - 1/(3*(x^2 + 1))
# To perform a further decomposition of one of the terms in the expression, apply "parfrac" to just that term and type a root of the denominator as an argument after "parfrac." For example,
1/(3*(x^2 - 2)) parfrac, sqrt(2) → sqrt(2)/(12*(x - sqrt(2))) - sqrt(2)/(12*(x + sqrt(2)))
# For expressions with complex roots, type the imaginary number i after "parfrac."
1/(3*x^2 + 3) parfrac, 1i → -1i/(6*(x - 1i)) + 1i/(6*(x + 1i))
# To perform a complete partial fractions decomposition of a rational function over the complex numbers, type "domain = complex" after "parfrac", using the Boolean equals sign [Ctrl] [=].
1/(x^4 - 4) parfrac, domain == complex → sqrt(2)/(16*(x - sqrt(2))) - sqrt(2)/(16*(x + sqrt(2))) + sqrt(2)*1i/(16*(x - sqrt(2)*1i)) - sqrt(2)*1i/(16*(x + sqrt(2)*1i))
# To obtain a decomposition over the real numbers, you can combine the last two terms into a single term with real coefficients, using the keyword "simplify" as follows:
(1/16)*1i*sqrt(2)/(x - 1i*sqrt(2)) - 1/16*1i*sqrt(2)/(x + 1i*sqrt(2)) simplify → -1/(4*x^2 + 8)
# Then substitute this result for the last two terms in the decomposition over the complex numbers to obtain the decomposition over the real numbers:
1/(x^4 - 4) == sqrt(2)/(16*(x - sqrt(2))) - sqrt(2)/(16*x + 16*sqrt(2)) - 1/(4*x^2 + 8)
# Note: Suppose that the original expression is a quotient of polynomials with real coefficients. Then, in the decomposition over the complex numbers, the terms containing complex coefficients occur in pairs corresponding to complex conjugate roots. To obtain a decomposition over the real numbers, combine each such pair of terms as in the example above.
## Continued Fractions
# To find the continued fraction expansion of a number or function, use the keyword "confrac," which returns a vector containing the terms of the continued fraction. For example,
(14 + sqrt(3))/5 confrac → [3; 6; 1; 4; 1; 7; 1; 4; 1; 7; 1; 4]
# To see the actual continued fraction, rather than the vector, add the modifier "fraction" after "confrac."
(14 + sqrt(3))/5 confrac, fraction → 3 + 1/(6 + 1/(1 + 1/(4 + 1/(1 + 1/(7 + 1/(1 + 1/(4 + 1/(1 + 1/(7 + 1/(1 + 1/4))))))))))
# By default, Mathcad returns enough terms of the continued fraction so that the answer is accurate to 10 significant digits. To return results with a different degree of accuracy, add a positive integer specifying the number of significant digits after "confrac." For example:
(14 + sqrt(3))/5 confrac, 3 → [3; 6; 1; 4]
(14 + sqrt(3))/5 confrac, 3, fraction → 3 + 1/(6 + 1/(1 + 1/4))
# If you expand a function as a continued fraction, Mathcad returns a second column containing the powers of x corresponding to the terms.
sin(x) confrac → [0, x; 1, x^2; 6, x^2; -10/7, 0]
# This corresponds to the continued fraction
sin(x) confrac, fraction → x/(1 + x^2/(6 + x^2/(-10/7)))
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