# Title: Symbolic Summation
# Description: Using symbolics in evaluating sums of both finite and infinite series.
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# SYMBOLIC MATH
# quicksheets
# Symbolic Summation
# This QuickSheet illustrates how to symbolically evaluate sums of both finite and infinite series.
# Evaluating a series numerically returns a number:
Su(x) := sum(3!/(k!*(3 - k)!)*x^k*2^(3 - k), k = 0 .. 3)
Su(2) = 64
Su(-5) = -27
# However, evaluating a series using the symbolic equal sign (→) returns a symbolic result that can yield insight into the underlying expression:
Su(x) → x^3 + 6*x^2 + 12*x + 8
# For example, you can use symbolic evaluation to find the formula for the  sum of a finite geometric series:
sum(a^i, i = 0 .. n) simplify → {
    1/(a - 1)*(a^(n + 1) - 1) if a ≠ 1
    n + 1 if a == 1
}
# You can also find the sum of an infinite geometric series ( |a| < 1 ) symbolically:
sum(a^i, i = 0 .. ∞) → {
    1/(a - 1)*∞ if 1 < a
    -1/(a - 1) if a ≠ 1 and |a| < 1
    ∞ if a == 1
}
# Mathcad recognizes the Taylor series for a function and returns the function. For example:
sum(x^n/(2^n*n!), n = 0 .. ∞) → e^(x/2)
sum((-1)^k*x^(2*k + 1)/(7^(2*k + 1)*(2*k + 1)!), k = 0 .. ∞) → sin(x/7)
# Note that the symbolic evaluation of an infinite series is exact, as opposed to the numerical evaluation, which approximates the sum by a finite number of terms.
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