# Title: Symbolic Transforms
# Description: Performing symbolic Fourier, Laplace, z transforms, and their inverses.
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# SYMBOLIC MATH
# quicksheets
# Symbolic Transforms
# This QuickSheet shows how to perform symbolic Fourier, Laplace, and z transforms, and their inverses. You can calculate the transform of a function in either of the following ways:
# •  Use the symbolic equal sign (→) with a keyword for the transform. This is the recommended method because results are automatically updated when you make changes in the worksheet.
# •  Select Transform from the Symbolics menu and then select a transform from the drop-down menu. In this case, results are not automatically updated.
## Fourier and Inverse Fourier Transforms
# To find the Fourier transform of a function, select the function, press [Ctrl] [Shift] [.], and type "fourier" in the placeholder that appears. This equation finds the Fourier transform of the Dirac delta function :
Δ(t) fourier → 1
# As expected, this returns a constant frequency.
# The next example finds the Fourier transform of a function involving the Heaviside step function Φ(t):
-Φ(-t - c) + Φ(-t + c) fourier; simplify, trig → sin(ω*c)*(π*ω*Δ(ω) - 1i)*2*1i/ω
## Z and Inverse Z Transforms
# To calculate the z-transform of a function, use the keyword "ztrans."
n ztrans → z/(z - 1)^2
sin(a*n) ztrans → z*sin(a)/(z^2 - 2*cos(a)*z + 1)
# To calculate the inverse z-transform of a function, use the keyword "invztrans."
z/(z - 1) invztrans → 1
z/(z - e) invztrans → e^n
## Changing the Default Variable for a Transform
# You can change the default variable in the function returned by a transform by adding a pair of arguments after the transform keyword. The first argument is the independent variable for the domain function; the second argument is the independent variable for the transformed function. For example, to change the default variable returned by the inverse Laplace transform "invlaplace" from t to t1, perform the following steps:
# 1.  Type the function you want to transform and press [Ctrl] [Shift] [.] to insert a placeholder followed by the symbolic equal sign.
#
# 2.  Type "invlaplace," followed by a comma, in the placeholder. This inserts another placeholder.
#
# 3.  Type the independent variable for the function, followed by a comma, in the second placeholder. This inserts another placeholder.
#
# 4.  Type t1 in the third placeholder and press [Enter].
s/(a + s) invlaplace, s, t1 → Δ(t1) - a*e^(-a*t1)
# Mathcad returns the inverse Laplace transform using the variable t1 as the independent variable. Δ(t1) is the Dirac delta function. Although you cannot evaluate Δ(t1) with the numerical equal sign, you can evaluate it with the symbolic equal sign. See the Dirac Delta Function for more details.
# You can find the Laplace transform of the result, using the keyword "laplace," as follows
Δ(t1) - a*e^(-a*t1) laplace, t1, s → s/(a + s)
## Using More Than One Keyword at a Time
# If the results of a symbolic calculation are not be in the form you want, you can add a keyword after the transform keyword to modify the format of the result. For example, suppose you want to expand the denominator (z - 1)^3 in the following result:
k^2 ztrans → k^2*z/(z - 1)
# To do so:
# 1.  Place the cursor to the right of k^2and press [Ctrl] [Shift] [.] to insert a vertical bar and a placeholder below "ztrans."
k^2 ztrans →  # error: This placeholder is empty.
# 2.  Type "expand" in the placeholder.
k^2 ztrans, k; expand → z^2/(z^3 - 3*z^2 + 3*z - 1) + z/(z^3 - 3*z^2 + 3*z - 1)
# Here is another example using the keyword "simplify":
sinh(τ)*cos(τ) laplace, τ; simplify → (s^2 - 2)/(s^4 + 4)
# Here are examples of inverse Fourier transforms:
c := 1
sin(c*ω)/ω invfourier, ω, τ; simplify → Φ(τ + 1)/2 - Φ(τ - 1)/2
sinc(c*ω) invfourier, ω, τ; simplify → Φ(τ + 1)/2 - Φ(τ - 1)/2
# For input functions that have no symbolic transform, use the numerical FFT.
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