# Title: Batch Processing with Animation
# Description: Calculating and storing values from a repeated calculation using range variables and animation.
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# MATHCAD TECHNIQUES
# quicksheets
# Batch Processing with Animation
# This QuickSheet can be used to calculate and store values from a repeated calculation using range variables and animation.
# Suppose we were calculating the roots of a rational function, to create a root locus diagram. Create a vector of test gains, and a function which calculates the roots:
i_max := 200
i := 0 .. i_max
K_max := 400
Ktest[i] := i/i_max*K_max
sysroots(Kp) := polyroots([320; 20 + Kp; 60; 1])
locus := vectorize(sysroots(Ktest))
# Pull the roots off into loci that can be graphed:
locus1[i] := locus[i][0]
locus2[i] := locus[i][1]
locus3[i] := locus[i][2]
# On the graph, show a single root corresponding to a particular gain. This root is selected using the FRAME variable, so you can animate the root locus plot by choosing Animation > Record from the Tools menu, then selecting the plot and animating with FRAME between 0 and 40.
index := 5*FRAME
Ktest[index] = 0
marker := locus[index]
marker = [-59.7549; -0.12254 - 2.31089i; -0.12254 + 2.31089i]
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APPENDPRN("rtlocus.dat") := transpose(marker)
# Animate the plot above from FRAME 0 to 40. Do not enclose the APPENDPRN command in the animation. Each time the animation tool recalculates the worksheet to create a new graph, it also recalculates the APPENDPRN command, as long as it is visible on screen when you do the animation. This recalculation stores the value of all the marker roots used in the animation as a data file. You could also use WRITEPRN in the same way by creating file names that included the value of the FRAME variable, so the data files aren't overwritten.
READPRN("rtlocus.dat") = [
    "root1", "root2", "root3";
    -59.75, -0.1225 - 2.311i, -0.1225 + 2.311i;
    -59.75, -0.1225 - 2.311i, -0.1225 + 2.311i;
    -59.75, -0.1225 - 2.311i, -0.1225 + 2.311i;
    -59.75, -0.1225 - 2.311i, -0.1225 + 2.311i;
    -59.75, -0.1225 - 2.311i, -0.1225 + 2.311i;
    -59.75, -0.1225 - 2.311i, -0.1225 + 2.311i;
    -59.75, -0.1225 - 2.311i, -0.1225 + 2.311i;
    -59.75, -0.1225 - 2.311i, -0.1225 + 2.311i;
    -59.75, -0.1225 - 2.311i, -0.1225 + 2.311i;
    -59.75, -0.1225 - 2.311i, -0.1225 + 2.311i;
    -59.75, -0.1225 - 2.311i, -0.1225 + 2.311i;
    -59.75, -0.1225 - 2.311i, -0.1225 + 2.311i;
    -59.75, -0.1225 - 2.311i, -0.1225 + 2.311i;
    -59.75, -0.1225 - 2.311i, -0.1225 + 2.311i;
    -59.75, -0.1225 - 2.311i, -0.1225 + 2.311i;
    -59.75, -0.1225 - 2.311i, -0.1225 + 2.311i;
    -59.75, -0.1225 - 2.311i, -0.1225 + 2.311i;
    -59.75, -0.1225 - 2.311i, -0.1225 + 2.311i;
    -59.75, -0.1225 - 2.311i, -0.1225 + 2.311i;
    -59.75, -0.1225 - 2.311i, -0.1225 + 2.311i;
    -59.75, -0.1225 - 2.311i, -0.1225 + 2.311i;
    -59.75, -0.1225 - 2.311i, -0.1225 + 2.311i;
    -59.75, -0.1225 - 2.311i, -0.1225 + 2.311i;
    -59.75, -0.1225 - 2.311i, -0.1225 + 2.311i
]
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