# Title: String Variable Manipulation
# Description: Manipulating strings with Mathcad's string functions.
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# MATHCAD TECHNIQUES
# quicksheets
# String Variable Manipulation
# This QuickSheet shows how to use concatenation, substrings and other elementary manipulations of character strings.
## Strings for Filenames
# Input character strings:
a := "myfile.dat"
b := CWD
b = "C:\Vault_Folder\Mathcad13_Documentation\ResourceCenter\EN\qsheet\Techniques\"
# Concatenation can be used, for example, with the current working directory (CWD) variable to build pathnames for file reading functions.
c := concat(b, a)
c = "C:\Vault_Folder\Mathcad13_Documentation\ResourceCenter\EN\qsheet\Techniques\myfile.dat"
# This variable name could be passed to the READFILE function, for example, or looped through a program to read sequential files from a directory.
## Substrings and Position
# Substring starting at position 6 and 5 characters long:
substr(c, 6, 5) = "lt_Fo"
# String length:
strlen(c) = 86
# Starting position of the file extension substring within c:
search(c, ".dat", 0) = 82
# Find all occurrences of a substring in a character string.
find_all(txt, phs) :=
    j ← 0
    k ← 0
    while search(txt, phs, k) > -1
        v[j] ← search(txt, phs, k)
        k ← v[j] + 1
        j ← j + 1
    v if k > 0
    -1 otherwise
find_all("The rain in Spain stays mainly on the plain", "in") = [6; 9; 15; 26; 41]
## Converting Strings to Numbers
# Convert string to a number:
M := [0, "123,0", 3; "3,14", e, "12,3"; ",3333", ",001", π]
# Note: Strings and numbers can be mixed in matrices. You can use lookup functions to search for strings as well as numbers.
Excel2num(m) :=
    for i ∈ 0 .. rows(m) - 1
        for j ∈ 0 .. cols(m) - 1
            if IsString(m[i, j])
                while (k ← search(m[i, j], ",", 0)) ≠ -1
                    m[i, j] ← concat(substr(m[i, j], 0, k), ".", substr(m[i, j], k + 1, strlen(m[i, j])))
                m[i, j] ← str2num(m[i, j])
    m
nyM := Excel2num(M)
nyM = [0, 123, 3; 3.14, 2.71828, 12.3; 0.3333, 0.001, 3.14159]
# Given a character string consisting of a numerical sequence
primes := "2, 3, 5, 7, 11, 13, 17, 19, 23, 29, 31"
# the following program computes the vector with the same data elements. Each number is separated from the preceding number by a comma and a space.
cs := ", "
find_all(S, s) :=
    j ← 0
    k ← 0
    while search(S, s, k) > -1
        v[j] ← search(S, s, k)
        k ← v[j] + 1
        j ← j + 1
    v if k > 0
    -1 otherwise
seq2vec(S, s) :=
    v ← find_all(S, s)
    m ← strlen(s)
    V ← str2num(S) if rows(v) == 0
    otherwise
        i ← 0
        for j ∈ 0 .. rows(v) - 1
            V[j] ← str2num(substr(S, i, v[j] - i))
            i ← v[j] + m
        V[rows(v)] ← str2num(substr(S, i, strlen(S) - i))
    V
transpose(seq2vec(primes, cs)) = [2, 3, 5, 7, 11, 13, 17, 19, 23, 29, 31]
## ASCII Code Conversions
# Convert a string to a vector of ASCII codes, and vice versa:
s := "Math"
S := str2vec(s)
S = [77; 97; 116; 104]
vec2str(S) = "Math"
# These can be used, for example, to perform uppercase/lowercase transformations for character strings.
S := "TO BE OR NOT TO BE"
# Input character string:
A := str2vec("A")
Z := str2vec("Z")
a := str2vec("a")
z := str2vec("z")
# from uppercase to lowercase:
low_chr(i) := i + ((A[0] ≤ i)*(i ≤ Z[0])*(a[0] - A[0]))
low_str(s) := vec2str(vectorize(low_chr(str2vec(s))))
T := low_str(S)
T = "to be or not to be"
# from lowercase to uppercase:
upp_chr(i) := i - (a[0] ≤ i)*(i ≤ z[0])*(a[0] - A[0])
upp_str(s) := vec2str(vectorize(upp_chr(str2vec(s))))
upp_str(T) = "TO BE OR NOT TO BE"
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