# Title: Complex Numbers: Polar Notation and Custom Operators
# Description: Constructing a complex number and finding its polar representation using a custom operator.
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# MATHCAD TECHNIQUES
# quicksheets
# Complex Numbers: Polar Notation
# This QuickSheet can be used to construct a complex number and to find its polar representation using a custom operator. Enter a complex number:
z := 1 + 2i
# Note: For the imaginary unit, type a constant immediately followed by i or j, such as "1i" or "1j." Click in the complex number expression above and notice that "2i" is really 2i, not 2 * i, which defines it as the imaginary unit and not 2 times the variable i.
# In polar form, this number is
|z| = 2.23607
arg(z) = 63.4349 deg
# and we can reconstruct the original rectangular form by
|z|*cos(arg(z)) + |z|*sin(arg(z))*1i = 1 + 2i
# Construct an operator that does the polar notation conversion. Use the polar symbol to create a function:
∠(mag, ang) := mag*(cos(ang*deg) + 1i*sin(ang*deg))
# Degrees are included in the definition. If you want to assume that this new operator takes radians, delete the degree unit multipliers.
# To use the new function as an operator, use the custom operator buttons on the Evaluation toolbar. The infix operator is used in this example. The button is labeled xfy, indicating where the function goes, in the middle.
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# Clicking on this toolbar button produces three placeholders:
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# Type the magnitude into the first placeholder, the angle symbol (the new function name) into the second placeholder, and the angle in degrees into the third placeholder.
z1 := 2.236 ∠ 63.435
# You can create an inverse polar function that returns the polar form of a value using the units placeholder.
# Note: The / in front of the function name means that this inverse should be used when the function name appears in the units placeholder.
/∠(cval) := [|cval|, arg(cval)/deg]
z1 = [2.236, 63.435] ∠
# The custom operator format can be combined with any other required operators.
# Number:
z1 = 0.999968 + 1.99994i
# Conjugate:
z1c := conj(2.236 ∠ 63.435)  # Type " after the expression for the conjugate operator.
z1c = 0.999968 - 1.99994i
# Real and imaginary components:
Re(2.236 ∠ 63.435) = 0.999968
Im(2.236 ∠ 63.435) = 1.99994
# Magnitude and phase give the results we might expect:
|2.236 ∠ 63.435| = 2.236
arg(2.236 ∠ 63.435) = 63.435 deg
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