# Title: Vectorizing an Expression
# Description: Using the vectorize operator.
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# MATHCAD TECHNIQUES
# quicksheets
# Vectorizing an Expression
# This QuickSheet shows how to apply the vectorize operator to repeatedly calculate certain scalar operators and functions.
# Input matrices:
A0 := [1, 2, 3; 2, 3, 1; 3, 1, 2]
B0 := [4, 5, 6; 7, 8, 7; 6, 5, 4]
# Compute the element by element (or Hadamard) product of A and B. The vectorize operator may be applied either from the Matrix toolbar, or by pressing [Ctrl] [-].
vectorize(A0*B0) = [4, 10, 18; 14, 24, 7; 18, 5, 8]
A0*B0 = [36, 36, 32; 35, 39, 37; 31, 33, 33]
# Note that this is not the same as the corresponding ordinary matrix product.
# Vectorizing is useful when trying to evaluate a function or operator over a vector of values where it is ambiguous whether an argument should be treated as a vector or as a series of values, or if it is impossible to perform the operation on a vector.
A1 := [1; 2; 3]
B1 := [3; 2; 1]
A1*B1 = 10
vectorize(A1*B1) = [3; 4; 3]
# Built-in Mathcad functions that only accept a vector as an argument ignore the vectorize operator. For example, the following produce the same result:
reverse(A1) = [3; 2; 1]
vectorize(reverse(A1)) = [3; 2; 1]
# Functions you define yourself cannot ignore the vectorize operator even if they take a vector argument, which can lead to error messages or ambiguous results while Mathcad is trying to treat arguments element-wise. For example,
flip(M) := reverse(M)
vectorize(A1/flip(A1)) =  # error: This value must be a matrix.
# generates an error, while the built-in function inside the same expression works, because it ignores the vectorize operator on its argument.
vectorize(A1/reverse(A1)) = [0.333333; 1; 3]
## Symbolic Evaluation of Vectorized Functions
# Vectorizing is also useful for applying a function or operator to a vector and evaluating the result symbolically. The following example shows how to vectorize the natural logarithm function ln, apply it to a vector, and evaluate the result symbolically:
vectorize(ln([1/2; 1; 2])) → [-ln(2); 0; ln(2)]
# Note that it is not necessary to vectorize this function if you evaluate the result with the numerical equal sign (=), which implicitly vectorizes the function ln, as it does with most built-in functions.
# The vectorize operator affects all function applications underneath the arrow, not just the topmost function. Versions of Mathcad prior to 2000 ignored vectorization of user-defined functions which called built-in functions that ignore vectorization, but this is no longer the case, and may affect the evaluation of old worksheets.
# The following example shows how this arises in practice:
NN := 2^8
i := 0 .. NN - 1
x[i] := i
sig1[i] := sin(x[i]*π/100) - rnd(0.5)
Sig1 := CFFT(sig1)
window(v) :=
    n ← last(v)
    for i ∈ 0 .. n
        out[i] ← |i - n/2| ≥ (n/2 - NN/32)
    out
# We wish to do an element-by-element multiplication of the transformed signal with the window. The window is generated by a function based on the length of the signal, which is expected to be a vector. Vectorizing this multiplication vectorizes the window function as well, and causes an error.
Win := vectorize(Sig1*window(Sig1))  # error: This value must be a vector.
# The problem is caused by the last function in the program, which is expecting a vector input, not a single element, as specified by the vectorize operator. Better to explicitly assign the output of these functions to new variable names, and perform the multiplication on signals, not on functions.
filt := window(Sig1)
Win := vectorize(Sig1*filt)
ret := Re(ICFFT(Win))
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