# Title: Binary, Octal and Hexadecimal Numbers
# Description: Calculating in non-decimal bases.
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# MATHCAD TECHNIQUES
# quicksheets
# Number Bases (Octal, Hexadecimal, and Binary) and Decimal Places
# This QuickSheet can be used to convert a decimal integer to its octal, hexadecimal, and binary representations.
# Enter an integer:
x := 345
# Decimal representation:
x = 345
# Double-click on a numerical result to change the radix of the result from decimal to hexadecimal, octal, or binary. Under the Display Options tab, change the Radix setting.
# Octal representation:
x = 345
# Hexadecimal representation:
x = 345
# Binary representation:
x = 345
# To enter numbers with different base representations, type the appropriate suffix immediately after the number.
1011001b = 89
2F5B5h = 193973
# To enter hexadecimal numbers that begin with a letter A through F, it is necessary to start the number with a leading zero. Otherwise Mathcad will interpret the entry as a variable name. For example, to enter the hexadecimal number B4, enter 0B4h and backspace over the multiplication inserted between "0" and "B."
0B4h = 180
## Stripping Decimal Places
# To find the number of decimal places in a number of any base, find the ceil of the log of the number in its base, for example:
y := 10010100b
ceil(log(y, 2)) = 8
x := 165432087
ceil(log(x, 10)) = 9
q := 0F42h
ceil(log(q, 16)) = 3
# To find the digit occupying a particular decimal place, divide the number by its base raised to the desired decimal place minus 1, and find the floor of the remainder.  So, to find the digit in the 5th place:
floor(mod(x/10^4, 10)) = 3
floor(mod(y/2^4, 2)) = 1
# Program to create a vector with each decimal stripped to its own entry:
Dec2vec(x, base) :=
    n ← floor(log(x, base))
    for i ∈ 0 .. n
        digit[i] ← floor(mod(x/base^(n - i), base))
    digit
x = 165432087
transpose(Dec2vec(x, 10)) = [1, 6, 5, 4, 3, 2, 0, 8, 7]
y = 148
transpose(Dec2vec(y, 2)) = [1, 0, 0, 1, 0, 1, 0, 0]
q = 3906
transpose(Dec2vec(q, 10h)) = [15, 4, 2]
# Using the same reasoning, you could create a function to strip off the last n digits of a number in any preferred base.
strip(x, base, digits) := mod(x, base^digits)
i := 0 .. 5
z[i] := 100*i
# Note that leading 0's aren't displayed.
strip(z, 2, 4) = [0; 4; 8; 12; 0; 4]
z = [0; 100; 200; 300; 400; 500]
## Non-integers
# In Mathcad, non-integer numbers are represented in binary by placing a decimal point after the 2^0 place, and using negative powers of two, in decreasing order, for each subsequent place, that is
2.125 = 2.125
# So our strip function, based on mod, leaves all the decimal remainders intact for positive powers of the base
strip(1101101.01101b, 2, 3) = 5.40625
# and strips down the decimal digits if we use negative powers of the base
strip(1101101.01101b, 2, -2) = 0.15625
# Note that the Results Format for this worksheet has been universally set to show 17 digits and to use an exponential tolerance of 15, so that all available digits are displayed.
# Note also that you can improve the precision of your results by being careful about the order of operations for any base number system:
6000 - 120*(200/π)*π/4 = 9.09495e-13
# but
6000 - 120*((200/π)*π/4) = 0
# because of the roundoff error in the first expression that results from converting π to a number, then dividing and multiplying by it.  In some cases, you may wish to adjust the display tolerances for complex and 0 thresholds in the Result Format dialog.
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