# Title: Custom Operators: Temperature Conversion
# Description: Using custom operators to perform calculations.
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# MATHCAD TECHNIQUES
# quicksheets
# Custom Operators
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# This QuickSheet illustrates using functions as operators with choices from the Evaluation toolbar. Rather than giving arguments using comma-separated lists, one or more placeholders are created for the argument(s) and function name.
## Postfix Operator
# Converting from Celsius to Fahrenheit:
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37 °C = 98.6 °F  # Use  # on the left side.
# Use an inverse conversion function for temperature
(450*K) /°C = 176.85
# This is useful if you wish to convert scaling on a graph:
i := 0 .. 10
T[i] := (i*30) °C
R := 8.3145*J/K
P[i] := R*T[i]/(3*cm^3)  # The expression in the x-axis placeholder is the postfix application of the Kelvin to Celsius conversion to the vector T.
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## Infix and Tree Operators
# Approximately equals:
≈(a, b) := if(|a - b| < 10^-5, 1, 0)
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3 ≈ 3 = 1  # Use
# Parallel resistance:
||(R1, R2) := R1*R2/(R1 + R2)
# Use
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(3*Ω) || (60*Ω) = 2.85714 Ω
R_in || R_4 → (R_4*R_in)/(R_4 + R_in)
# Choosing one of two numbers at random:
∙(x, y) := if(rnd(1) < 0.5, x, y)
∙(3, 7) = 7  # To make an operator look like a function, press [F9] on this several times to see randomness.
# To display an operator the usual way, use
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3 ∙ 7 = 7
∙(3, 7) = 3  # To display the operator differently, but perform the same operation, use
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## Prefix Operator
# Trigonometric functions:
cos(π) = -1  # To display a function the usual way.
cos(π) = -1
# To display the same function as if it were an operator, use
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