# Title: New Engine and Static Unit Checking
# Description: Description of new functionality and differences provided by Mathcad's new engine.
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# MATHCAD TECHNIQUES
# quicksheets
# Improving Array Calculation Speed
# This QuickSheet gives guidance on how to optimize calculation speed when using arrays. Some of these tips show you how to create large arrays efficiently, and some show how to write multiple-step array calculations so that they calculate quickly.
## Preallocate Large Arrays
# Large vectors and matrices can be assigned and manipulated more quickly if you preallocate space in memory for the array. For example, your calculation speed increases if you first create a 0 entry at the last index of a matrix, telling the computer how big a space to set aside for filling with other values. Otherwise, a new, larger space must be created when an array grows, and the previously assigned entries must be copied into it.
Matfast(imax, jmax, f) :=
    M[imax, jmax] ← 0
    "preallocate the matrix"
    for i ∈ 0 .. imax
        for j ∈ 0 .. jmax
            M[i, j] ← f(i^2, j/4)
    return M
Matslow(imax, jmax, f) :=
    for i ∈ 0 .. imax
        for j ∈ 0 .. jmax
            M[i, j] ← f(i^2, j/4)
    return M
f1(x, y) := x/(10*(y + 1))
rws := 500
cls := 800  # Increase these numbers to experience how long each matrix creation takes.
Mfast := Matfast(rws, cls, f1)
Mslow := Matslow(rws, cls, f1)
rws*cls =  # no stored result  # elements
# This strategy is equally important for assigning long vectors inside a program.
## Allocate Fewer Matrices
# Each matrix you create at the worksheet level, such as Mslow and Mfast above, takes space in memory. While a worksheet is open, the memory stays in use, which means less virtual memory space for calculations, other storage, other open worksheets, etc. If you create many large matrices for intermediate values in a calculation, you may run out of space before your calculation is complete.
# A better strategy is to perform intermediate array operations inside a program. Arrays are created only while the program is executed. Once the program finishes, any intermediate arrays are cleared from memory. This tactic speeds up your worksheet and lets you perform larger array calculations overall.
#
# Consider the Engineering QuickSheet which creates a spectogram. This operation requires creating three large intermediate matrices to hold sliced, filtered, and Fourier transformed versions of the data before returning a result. For signals of realistic length, it's better to write a program that temporarily allocates memory for these intermediate matrices: So, for example, write
specto(sigin, win, lap) :=
    len ← length(sigin)
    slices ← floor(len/(win*(1 - lap))) - ceil(1/(1 - lap))
    "preallocate the output matrix"
    spectra[win/2, slices] ← 0
    "Count the range backwards to assign the largest element first."
    "This is equivalent to preallocation."
    for i ∈ win - 1 .. 0
        w[i] ← .54 - .46*cos(2*π*i/(win - 1))
    for i ∈ 0 .. slices
        start ← i*floor(win*(1 - lap))
        slice ← submatrix(sigin, start, start + win - 1, 0, 0)
        wslice ← vectorize(slice*w)
        spectra[:, i] ← 20*vectorize(log(|fft(wslice)|^2 + .0001))
    return spectra
# Note further that by writing this as a program, it's not necessary to store the entire matrix for each intermediate value. We can calculate the column vectors, find the spectra for each, then discard the intermediate results and replace them with the next column. In this case, the program is both faster than the individual regions, and requires less overall memory to run. This approach leaves more space for inputs and results.
## Avoid Unnecessary Repetition of Operations
# As you develop a calculation, you may be focusing more on getting the right result than reducing repeated operations. For example, look again at the spectogram QuickSheet. It calculates the index of the data vector using a range expression rather than a value.
M[i + j*floor(ss*(1 - overlap))]
# This means that the expression
floor(ss*(1 - overlap))
# is recalculated every time a new matrix entry is assigned, even though its value is constant. For large matrices, the additional operations can be significant. Assign it to a value, then use the value in the range expression:
offset := floor(ss*(1 - overlap))  # disabled
M[i + j*offset]
# produces the same result in less time. This idea is particularly important with matrix operations, such as matrix transposition and stacking/augmenting, which are time intensive. Note that stacking and augmenting prevents you from preallocating the matrix, and thus increases computation time. Consider these two methods for creating the same matrix:
# Method 1:
M ← ["label1", "label2", "label3"]
for t ∈ 0 .. 3
    M ← stack(M, transpose(rnorm(3, 1, 2)))
M =  # no stored result
# Method 2:
M[2, 5] ← 0
M ← ["label1"; "label2"; "label3"]
for t ∈ 1 .. 4
    M[:, t] ← rnorm(3, 1, 2)
transpose(M) =  # no stored result
# Working with the column vectors until the last operation avoids transposing at each step, saving time. Avoiding the stack function allows us to preallocate the matrix. For these tiny arrays, the difference isn't noticeable, but for calculations with thousands of elements, these changes do make a difference.
# A similar strategy applies if you only need an operation performed on certain elements of a matrix. It is quicker to extract the elements you need first, then apply operations, rather than operating on all matrix elements then extracting the meaningful values. For example,
Re(M)[:, i]
# is slower than
Re(M[:, i])
# particularly for large matrices.
## Avoid Unnecessary Vectorization
# Mathcad's vectorize operator is a quick way to specify the element-wise meaning of an operation that performs differently with vectors or scalars. Many Mathcad operations vectorize automatically, as appropriate. What is important to know is that vectorizing an operation that vectorizes itself natively is time consuming. It removes the efficiencies that the built-in definitions apply, and can increase matrix calculation time significantly.
#
# So, for example,
M + N
# is more efficient than
vectorize(M + N)
# although it produces the same result. Be sure when you use vectorization on large problems that it's really necessary. Indexing elements and performing operations that would otherwise require vectorization can also be faster.
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