# Title: Converting Radians to Deg-Min-Sec
# Description: Converting between radians and degrees.
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# MATHCAD TECHNIQUES
# quicksheets
# Converting Radians to Deg-Min-Sec
# Under the DMS (degrees-minutes-seconds) method of measuring angles, there are 60 minutes in a degree and 60 seconds in a minute. There is a built-in function and its inverse, DMS, for converting these angles. This worksheet shows you how to write functions of this sort for use in conversion and display (units placeholder).
# To convert a vector of degrees/minutes/seconds measurements into radians, you can call the function as normal, or use the postfix operator.
DMS([26; 17; 13]) = 0.458794
[26; 17; 13] DMS = 0.458794
# Both deg and DMS can be used to convert results in the units placeholder:
0.459*rad = 26.2988 deg
0.459*rad = [26; 17; 55.5461] DMS
# As a demonstration, here's how to write your own version of this function to convert from DMS to radians.  Suppose you wish to use a row vector of entries:
dms(v) := π/180*(v[0, 0] + v[0, 1]/60 + v[0, 2]/60^2)
# Conversion using both postfix and function notations:
[26, 17, 13] dms = 26.2869 deg
dms([26, 17, 13]) = 26.2869 deg
# To convert from radians to DMS, use the formula:
/dms(x) := [floor(180/π*x + ε), floor(60*mantissa(180/π*x + ε)), 60*mantissa(60*(180/π*x + ε))]
# Angle in radians:
θ := 0.459
# Angle in DMS:
/dms(θ) = [26, 17, 55.5461]
θ = [26, 17, 55.5461] dms
# Note: The inverse function is used in the unit placeholder without typing the / that indicates inverse, just as a scalar unit would divide by that unit, rather than multiply by it.
# Required functions to compute dms:
mantissa(x) ≡ x - floor(x)
ε ≡ 10^-13
round(x) ≡ if(x - floor(x) < 0.5, floor(x), ceil(x))
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