# Title: Truncation and Round-Off Functions
# Description: Rounding and truncating numbers in Mathcad.
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# MATHCAD TECHNIQUES
# quicksheets
# Truncation and Roundoff Functions
# This QuickSheet illustrates the various truncation and roundoff functions. Enter your number and threshold. The variable z below can be real or complex.
z := π - 2*π*1i
thresh := 0.1
z = 3.14159 - 6.28319i
## floor and Floor functions
floor(z) = 3 - 7i  # Gives the number rounded down to the nearest whole number.
Floor(z, thresh) = 3.1 - 6.3i  # Similarly, gives the number rounded down to a multiple of the threshold.
Floor(z, 1) = 3 - 7i  # Returns the same result as floor.
# Here's an example with units.
meas := 1.1234567*ft
Floor(meas, 0.01*ft) = 1.12 ft
# Note: When rounding numbers involving units, use a united expression as your threshold to ensure you always get the same result no matter what unit system your worksheet uses.
# Use the units placeholder in the result to display the solution in the units you want.
Floor(meas, ft) = 1 ft
Floor(meas, ft) = 12 in
# The lowercase versions of these functions do not accept arguments with units.
## ceil and Ceil functions
ceil(z) = 4 - 6i  # Gives the number rounded up to the nearest whole number.
Ceil(z, thresh) = 3.2 - 6.2i  # Gives the number rounded up to a multiple of the threshold.
# Note: If you evaluate ceil or floor symbolically using the symbolic equals sign or commands on the Symbolics menu, you may get different results.
floor(z) = 3 - 7i
# versus
floor(z) → 3 + (-7)*1i
ceil(z) = 4 - 6i
# versus
ceil(z) → 4 + (-6)*1i
# The algorithm for evaluating floor numerically:
a := Re(z) - floor(Re(z))
b := Im(z) - floor(Im(z))
Z(a, b) :=
    0 if a + b < 1
    1 if (a + b ≥ 1) and (a ≥ b)
    1i if (a + b ≥ 1) and (a < b)
# The value of floor returned by the symbolic engine:
floor(Re(z)) + 1i*floor(Im(z)) + Z(a, b) = 3 - 7i
# Use the definition that makes sense within your application.
## trunc and Trunc functions
trunc(z) = 3 - 6i  # Gives the number truncated to a whole number.
Trunc(z, thresh) = 3.1 - 6.2i  # Gives the number truncated to a multiple of the threshold.
# Note: The trunc and Trunc functions always return the number without some or all of its decimal part. The floor, ceil, and round functions always round the number up or down to a particular threshold. For example:
trunc(z) = 3 - 6i
floor(z) = 3 - 7i
# But
trunc(-z) = -3 + 6i
ceil(-z) = -3 + 7i
# You can define the mantissa of a number, which gives the decimal part of the number.
mantissa(x) := x - floor(x)
mantissa(π) = 0.141593
## round and Round functions
round(z, 2) = 3.14 - 6.28i  # Gives the number rounded to the number of digits specified.
round(z, 4) = 3.1416 - 6.2832i
round(z, 6) = 3.14159 - 6.28318i
Round(z, thresh) = 3.1 - 6.3i  # Gives the number rounded to a particular threshold.
# Note that the following constructs are equivalent:
int := 2
round(z, int) = 3.14 - 6.28i
Round(z, 10^(-int)) = 3.14 - 6.28i
# The uppercase Round can be used with units, as with the other uppercase truncation functions. The multiplier on the unit dictates the number of places in the result when expressed in that unit.
Round(0.12345678*ft, .001*ft) = 0.123 ft
Round((12.345 - 0.066i)*volt, .05*volt) = (12.35 - 0.05i) V
## Truncation and Precision
# If you find that a result from a truncation function seems inconsistent, check the full 17-digit computational precision of the argument by choosing Result from the Format menu.
ex := 10
d := 2^ex + 2^(ex - 1) - 2^(ex - 52)
d = 1536  # Displayed to 3 digits of precision
d = 1536  # Displayed to 17 digits of precision
floor(d) = 1535
# In particular, remember that floating point computations are limited to representations of numbers that are only approximations. For example, the (apparently) surprising result:
ceil(5*1*ft/(12*in)) = 6  # because
5*1*ft/(12*in) = 5
# You can modify this behavior by unchecking the exact equality box on the Calculation tab under Tools > Worksheet Options. This option allows comparisons and truncation functions to only 12 decimal places. It is equivalent to rounding all numbers before calculating the truncated values. Try changing this switch to see the difference in the results on this page.
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