# Title: Mapping and Projection - Rotating Earth Animation
# Description: Cartographic projection and animation of a spinning globe.
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# MATHCAD TECHNIQUES
# quicksheets
# Mapping and Projection: Rotating Earth Animation
# This QuickSheet demonstrates cartographic projection and  animation of a spinning globe.
## Plotting a 2D Cylindrical Cartographic Projection
# Large data set of longitudes and latitudes:
world := READPRN("world.prn")
lon := world[:, 0]
lat := world[:, 1]
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## Converting Data from Spherical into Cartesian (x,y,z) Coordinates
lon := lon + 180
lat := lat - 90
x := vectorize(sin(lat*deg)*cos(lon*deg))
y := vectorize(sin(lat*deg)*sin(lon*deg))
z := vectorize(cos(lat*deg))
## Plotting the World Data on a Sphere
# The following expressions calculate the rotation of the x and y coordinates in 3-D as we turn the globe. The z coordinate remains unchanged.
rot(θ) := [cos(θ), -sin(θ); sin(θ), cos(θ)]
WORLD := augment(x, y)*rot(θ)
## Adding a Sphere to the Graph
N := 30
i := 0 .. N
φ[i] := i*π/N
r := 1
j := 0 .. N
θ[j] := j*2*π/N
X[i, j] := r*sin(φ[i])*cos(θ[j])
Y[i, j] := r*sin(φ[i])*sin(θ[j])
Z[i, j] := r*cos(φ[i])
World[1] := [X; Y; Z]
World[0] := [WORLD[:, 0]; WORLD[:, 1]; z]
# [component: inputs [World, □]]
θ ≡ 10*FRAME*deg
# To animate the plot and simulate the circadian cycle, drag the mouse left to right across the middle of the plot while holding the [Shift] key.
# If you wish to animate the plot and save it to a file, choose Animate from the Tools menu, drag-select the plot, and animate from 0 to 36 frames.
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