# Title: Inserting and Extracting Subarrays
# Description: Inserting an array within another, replacing the original elements.
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# VECTORS AND MATRICES
# quicksheets
# Inserting and Extracting Subarrays
# This QuickSheet shows how to insert an array at a given position in a larger array, replacing the original elements.
# Enter the larger array:
A := identity(6)
# Enter the smaller array:
B := [2, 2, 2; 2, 2, 2; 2, 2, 2]
# Enter the row and column number where the upper left element of the smaller array goes:
r := 2
c := 1
# Function to replace part of A by B:
repl(A, B, r, c) :=
    U ← A
    for i ∈ 0 .. rows(B) - 1
        for j ∈ 0 .. cols(B) - 1
            U[r + i, c + j] ← B[i, j]
    U
# C is the original array A with B inserted at position (r, c):
C := repl(A, B, r, c)
C = [
    1, 0, 0, 0, 0, 0;
    0, 1, 0, 0, 0, 0;
    0, 2, 2, 2, 0, 0;
    0, 2, 2, 2, 0, 0;
    0, 2, 2, 2, 1, 0;
    0, 0, 0, 0, 0, 1
]
## Extracting a Submatrix
# This QuickSheet illustrates the use of the submatrix function.
# Input matrix:
M := [1, 7, 1, 4, 4; -5, -8, -2, 3, 3; -6, -9, -3, 2, 3; 1, 2, 3, 4, 3; 4, 5, 5, 6, 8]
# Extract all elements common to both rows 1 and 2 and columns 0, 1, and 2:
submatrix(M, 1, 2, 0, 2) = [-5, -8, -2; -6, -9, -3]
# Swapping the last two arguments reverses the order of the columns:
submatrix(M, 1, 2, 2, 0) = [-2, -8, -5; -3, -9, -6]
# Swapping the first two scalar arguments reverses the order of the rows:
submatrix(M, 2, 1, 2, 0) = [-3, -9, -6; -2, -8, -5]
# You can also use the picture operator to extract pieces of an array visually.
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