# Title: Elementary Row Operations on Matrices
# Description: Performing elementary row operations on a matrix.
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# VECTORS AND MATRICES
# quicksheets
# Elementary Row Operations on Matrices
# This QuickSheet illustrates how to perform three types of elementary row operations on an m x n matrix and shows a connection with the row-reduced echelon form.
# Input matrix:
A := [2, -1, 3, 2; 1, 4, 0, -1; 2, 6, -1, 5]
# First operation: multiplication of one row of A by a scalar c:
e1(A, c, r) :=
    B ← transpose(A)
    B[:, r] ← c*transpose(A)[:, r]
    transpose(B)
A = [2, -1, 3, 2; 1, 4, 0, -1; 2, 6, -1, 5]
e1(A, 3, 0) = [6, -3, 9, 6; 1, 4, 0, -1; 2, 6, -1, 5]
# Second operation: replacement of the r^th row of A by
# row r plus c times row s:
e2(A, c, r, s) :=
    B ← transpose(A)
    B[:, r] ← transpose(A)[:, r] + c*transpose(A)[:, s]
    transpose(B)
A = [2, -1, 3, 2; 1, 4, 0, -1; 2, 6, -1, 5]
e2(A, 2, 2, 0) = [2, -1, 3, 2; 1, 4, 0, -1; 6, 4, 5, 9]
# Third operation: interchange two rows of A:
e3(A, r, s) :=
    B ← transpose(A)
    B[:, s] ← transpose(A)[:, r]
    B[:, r] ← transpose(A)[:, s]
    transpose(B)
A = [2, -1, 3, 2; 1, 4, 0, -1; 2, 6, -1, 5]
e3(A, 2, 1) = [2, -1, 3, 2; 2, 6, -1, 5; 1, 4, 0, -1]
# Consider the following sequence of operations:
A = [2, -1, 3, 2; 1, 4, 0, -1; 2, 6, -1, 5]
A1 := e2(A, -2, 0, 1)
A1 = [0, -9, 3, 4; 1, 4, 0, -1; 2, 6, -1, 5]
A2 := e2(A1, -2, 2, 1)
A2 = [0, -9, 3, 4; 1, 4, 0, -1; 0, -2, -1, 7]
A3 := e1(A2, -1/2, 2)
A3 = [0, -9, 3, 4; 1, 4, 0, -1; 0, 1, 0.5, -3.5]
A4 := e2(A3, -4, 1, 2)
A4 = [0, -9, 3, 4; 1, 0, -2, 13; 0, 1, 0.5, -3.5]
A5 := e2(A4, 9, 0, 2)
A5 = [0, 0, 7.5, -27.5; 1, 0, -2, 13; 0, 1, 0.5, -3.5]
A6 := e1(A5, 2/15, 0)
A6 = [0, 0, 1, -3.66667; 1, 0, -2, 13; 0, 1, 0.5, -3.5]
A7 := e2(A6, 2, 1, 0)
A7 = [0, 0, 1, -3.66667; 1, 0, 0, 5.66667; 0, 1, 0.5, -3.5]
A8 := e2(A7, -1/2, 2, 0)
A8 = [0, 0, 1, -3.66667; 1, 0, 0, 5.66667; 0, 1, 0, -1.66667]
A9 := e3(A8, 1, 0)
A9 = [1, 0, 0, 5.66667; 0, 0, 1, -3.66667; 0, 1, 0, -1.66667]
e3(A9, 2, 1) = [1, 0, 0, 5.66667; 0, 1, 0, -1.66667; 0, 0, 1, -3.66667]
rref(A) = [1, 0, 0, 5.66667; 0, 1, 0, -1.66667; 0, 0, 1, -3.66667]
# The above sequence of elementary row operations gives (for this example) the row-reduced echelon form of the matrix.
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