# Title: Eignevectors and Eigenvalues
# Description: Using Mathcad to find eigenvectors and eigenvalues of matrices.
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# VECTORS AND MATRICES
# quicksheets
# Eigenvectors and Eigenvalues
# This QuickSheet uses eigenvecs to find all the eigenvectors of a real or complex matrix at once. Given a square matrix M, a nonzero vector v is an eigenvector of M if you can find a number λ such that M*v == λ*v.
# Input square matrix:
A := [4i, -2, 6; 3, 0, 10; 2, 5, -1]
# To find all the corresponding eigenvectors at once, use eigenvecs:
c := eigenvals(A)
c = [7.23666 + 0.329002i; -0.636447 + 3.66461i; -7.60022 + 0.00638765i]
v := eigenvecs(A)
v = [
    0.175848 + 0.0893152i, 0.913144, -0.496243 + 0.236103i;
    0.818511, -0.304924 - 0.152904i, -0.582437 - 0.0936854i;
    0.539574 + 0.000134649i, -0.198503 - 0.102011i, 0.591598
]
# The first column of v is the eigenvector corresponding to the first element of c. Similarly, the second column of v is the eigenvector corresponding to the second element of c, and so on.
# Checking:
c[0] = 7.23666 + 0.329002i
v[:, 0] = [0.175848 + 0.0893152i; 0.818511; 0.539574 + 0.000134649i]  # First element of c
A*v[:, 0] = [1.24316 + 0.704198i; 5.92329 + 0.269292i; 3.90467 + 0.178496i]
c[0]*v[:, 0] = [1.24316 + 0.704198i; 5.92329 + 0.269292i; 3.90467 + 0.178496i]
c[1] = -0.636447 + 3.66461i
v[:, 1] = [0.913144; -0.304924 - 0.152904i; -0.198503 - 0.102011i]  # Second element of c
A*v[:, 1] = [-0.581168 + 3.34632i; 0.754403 - 1.02011i; 0.500168 - 0.662511i]
c[1]*v[:, 1] = [-0.581168 + 3.34632i; 0.754403 - 1.02011i; 0.500168 - 0.662511i]
c[2] = -7.60022 + 0.00638765i
v[:, 2] = [-0.496243 + 0.236103i; -0.582437 - 0.0936854i; 0.591598]  # Third element of c
A*v[:, 2] = [3.77005 - 1.7976i; 4.42725 + 0.708309i; -4.49627 + 0.00377892i]
c[2]*v[:, 2] = [3.77005 - 1.7976i; 4.42725 + 0.708309i; -4.49627 + 0.00377892i]
# You can also return a single eigenvector for a particular eigenvalue:
eigenvec(A, c[0]) = [0.17924 + 0.0822957i; 0.817871 - 0.0323485i; 0.539158 - 0.02119i]
v[:, 0] = [0.175848 + 0.0893152i; 0.818511; 0.539574 + 0.000134649i]
# The results returned by eigenvec and eigenvecs do not necessarily match, yet they are both valid solutions. An eigenvector is not unique, but is related to all others by a scale factor. For a given eigenvalue, there are infinitely many eigenvectors. You can evaluate eigenvectors symbolically, yielding a third solution.
eigenvecs(A) float, 2 → [
    0.33 + 0.17i, 0.4i - 0.84, 1.9i - 3.6;
    1.5 + (-0.00038)*1i, (-0.16)*1i - 0.98, 1.5 + (-0.015)*1i;
    1.0, 1.0, 1.0
]
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