# Title: Array Algebra
# Description: Symbolic and numeric algebra of vectors and matrices.
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# VECTORS AND MATRICES
# quicksheets
# Array Algebra
# This QuickSheet illustrates the algebra of vectors and matrices, both numerically and symbolically.
# Enter vectors:
v := [3 + 10; 1 - 4; 5*10]
w := 2*v + [7; 2i; -18]
# Results:
v = [13; -3; 50]
w = [33; -6 + 2i; 82]
# Vector addition / scalar multiplication:
3*v + w = [72; -15 + 2i; 232]
# Negative:
-w = [-33; 6 - 2i; -82]
# Transpose:
transpose(v) = [13, -3, 50]
transpose([x, 1, a; -b, x^2, -a; 1, b, x^3]) → [x, -b, 1; 1, x^2, b; a, -a, x^3]
# Complex conjugate:
conj(w) = [33; -6 - 2i; 82]
# Dot product:
v*w = 4547 + 6i
# Note: The dot product is now calculated by multiplying each element
# of the first vector by the corresponding element of the complex
# conjugate of the second vector, and then summing the result. This
# behavior differs from versions of Mathcad earlier than 11.
# Cross product:
v×w = [54 - 100i; 584; 21 + 26i]
# Magnitude:
|w| = 88.6172
sqrt(w*w) = 88.6172
# Sum of components:
sum(v) = 60
# or
i := 0 .. last(v)
sum(v[i], i) = 60
# Enter matrix:
M := [0, 1, 2; 3, 0, 2; 5, 3, 1]
# Transpose:
transpose(M) = [0, 3, 5; 1, 0, 3; 2, 2, 1]
# Determinant:
|M| = 25
det([x, 1, a; -b, x^2, -a; 1, b, x^3]) → b*x^3 - a*b^2 + a*b*x + x^6 - a*x^2 - a
# (Square Matrix Determinant chosen on right-click menu.)
# Powers:
M^3 = [38, 25, 42; 67, 34, 46; 109, 65, 61]
# Inverse:
M^-1 = [-0.24, 0.2, 0.08; 0.28, -0.4, 0.24; 0.36, 0.2, -0.12]
M*M^-1 = [1, 0, 0; 0, 1, 0; 0, 0, 1]
M^-1*M = [1, 0, 0; 0, 1, 0; 0, 0, 1]
X(λ) := [λ, 2, 1 - λ; 0, 1, -2; 0, 0, -λ]
X(λ)^-1 → [1/λ, -2/λ, -1/λ^2*(λ - 5); 0, 1, -2/λ; 0, 0, -1/λ]
X(λ)^2 → [λ^2, 2*λ + 2, -4; 0, 1, 2*λ - 2; 0, 0, λ^2]
# Solve a linear system  Mx = v with inverse:
x := M^-1*v
x = [0.28; 16.84; -1.92]
M*x = [13; -3; 50]
# Enter nested array:
α[0] := v
α[1] := M
α[2] := w
# Results:
α = [[13; -3; 50]; [0, 1, 2; 3, 0, 2; 5, 3, 1]; [33; -6 + 2i; 82]]
α[0] = [13; -3; 50]
α = [[13; -3; 50]; [0, 1, 2; 3, 0, 2; 5, 3, 1]; [33; -6 + 2i; 82]]
α[1] = [0, 1, 2; 3, 0, 2; 5, 3, 1]
α[2] = [33; -6 + 2i; 82]
# To display the contents of nested matrices, double-click on the matrix, choose the Display Options tab, and check "Expand nested arrays."
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