# Title: Nested Arays
# Description: Defining, displaying, and using nested arrays.
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# VECTORS AND MATRICES
# quicksheets
# Nested Arrays
# This QuickSheet illustrates the definition, display, and use of nested arrays. You can create nested arrays in the same way you create any Mathcad array.
# Using range variables:
p := 0 .. 2
n := 0 .. 2
M[p, n] := identity(p + 1)
# An array containing 9 nested arrays, the row by column size of which is shown in curly braces.
M = [
    [1], [1], [1];
    [1, 0; 0, 1], [1, 0; 0, 1], [1, 0; 0, 1];
    [1, 0, 0; 0, 1, 0; 0, 0, 1], [1, 0, 0; 0, 1, 0; 0, 0, 1], [1, 0, 0; 0, 1, 0; 0, 0, 1]
]
M[0, 0] = [1]
M[1, 1] = [1, 0; 0, 1]
M[2, 2] = [1, 0, 0; 0, 1, 0; 0, 0, 1]
# Use the Matrix command in the Insert menu, or from the Matrix toolbar.
v := [2, 4]
V := [M; v]
V = [
    [
        [1], [1], [1];
        [1, 0; 0, 1], [1, 0; 0, 1], [1, 0; 0, 1];
        [1, 0, 0; 0, 1, 0; 0, 0, 1], [1, 0, 0; 0, 1, 0; 0, 0, 1], [1, 0, 0; 0, 1, 0; 0, 0, 1]
    ];
    [2, 4]
]
V[0] = [
    [1], [1], [1];
    [1, 0; 0, 1], [1, 0; 0, 1], [1, 0; 0, 1];
    [1, 0, 0; 0, 1, 0; 0, 0, 1], [1, 0, 0; 0, 1, 0; 0, 0, 1], [1, 0, 0; 0, 1, 0; 0, 0, 1]
]
V[1] = [2, 4]
# Defining element by element:
B[0] := 1
B[1] := identity(2)
B[2] := [B[0], 2, v]
B[1] = [1, 0; 0, 1]
B[2] = [1, 2, [2, 4]]
B[2] = [1, 2, [2, 4]]
# Display the contents of a nested array, instead of its size, by double-clicking on the array, choosing the Display Options tab, then checking "expand nested arrays."
# Using the READPRN function:
A := [READPRN("DV1.prn"); π*e; READPRN("DA1.prn")]
A[1] = 8.53973
A[0] = [0.1033; 1.254; 1.34; 2.973; 7.829; 7.905]
A[2] = [
    5.433, 7.124, 6.38, 7.609;
    7.297, 7.222, 7.564, 5.648;
    7.042, 7.189, 6.454, 6.521;
    5.237, 7.284, 7.354, 5.091
]
# Nested arrays can be used to store the results of repeated sequential calculations or file reads, or to return a variety of results with different sizes from a program, packed into a single return parameter.
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