# Title: Sums and Products
# Description: Examples of summation and product operators.
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# VECTORS AND MATRICES
# quicksheets
# Sums and Products
# This QuickSheet shows sample summation and product operators, taken over all values of an index. You can either cast the elements to be summed or multiplied as vectors, or you can implicitly specify the elements in the range of the operator itself.
# Input upper limit:
N := 20
i := 0 .. N
# Input functions to be added or multiplied:
f(n) := sqrt(n)
x[i] := f(i)
g(n) := 1/3*exp(0.1*n)
y[i] := g(i)
# Choose an operator, depending on whether your inputs have already been vectorized.
sum(f(n), n = 0 .. N) = 61.666
sum(x[i], i) = 61.666
product(g(n), n = 0 .. N) = 0.126078
product(y[i], i) = 0.126078
# You can perform multiple summations or products:
sum(sum(n^m, m = 0 .. 3), n = 0 .. N) = 47201  # Sample multiple summation
product(sum(1/i, i = 1 .. j), j = 1 .. 5) = 13.0816  # Sample product of summations, with variable summation limit
# Summation with variable upper limit:
k := 0 .. 10
f(x) := sum(k^2*(k ≤ x), k)
f(-1) = 0
f(0) = 0
f(1) = 1
f(3) = 14
f(10) = 385
f(2) = 5
p := 1 .. 5
q := 1 .. 5
# Sample product of summations, with variable summation limit:
product(sum(1/p*(p ≤ q), p), q) = 13.0816
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