# Title: Picking Elements from a Vector
# Description: Picking every nth element from a vector, starting with the first.
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# VECTORS AND MATRICES
# quicksheets
# Downsampling a Vector
# This QuickSheet illustrates a convenient method for picking every nth element from a data vector, starting with the first, and is used to demonstrate the effects of excessive downsampling (Nyquist's theorem).
# Create a signal vector:
i := 0 .. 200
ti[i] := i/fs
v[i] := sin(2*π*ti[i]/T0)
1/T0 =  # no stored result
# Using an integer less than the length of the vector, n =, vector indexing is used to extract the desired elements.
j := 0 .. (length(v) - 1)/n
u[j] := v[n*j]
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# period
T0 ≡ 2*sec
# sampling frequency
fs ≡ 16*Hz
# Take every nth point
n ≡ 28
# where 1/n*fs = is the new sampling frequency.
# When the new sampling rate is too slow (infrequent), the signal can look very distorted (try n = 15), disappear entirely (only sampling the 0 points - try n = 16), or aliasing can occur, that is, the signal appears to be of an incorrect frequency (n = 28, shown), because there aren't enough samples to accurately represent the information in the signal.
# Sampling has consequences for any numerical algorithm which is approximating a result at discrete intervals, such as the fast fourier transform, or differential equation solvers.
# Note: To downsample a signal properly without aliasing, the signal must be lowpass filtered with a cutoff of p/n before removing every nth point. For details, see Oppenheim and Schafer, Discrete Time Signal Processing, Prentice Hall, pp 102-105, ©1989. The Mathcad Signal Processing Extension Pack has functions that include this filtering automatically along with resampling coefficients.
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