# Title: Creating Arrays from a Range and a Function
# Description: Creating vectors and matrices over a specified range.
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# VECTORS AND MATRICES
# quicksheets
# Creating Arrays from a Range and a Function
# This QuickSheet can be used to create vectors and matrices over a specified range, which is useful for plotting or creating a signal input for data generation.
## Creating Vectors
# Enter starting number of range:
start := -1.6*sec
# Enter ending number of range:
end := 10*sec
# Enter spacing between points:
incr := .13*sec
N := ceil((end - start)/incr)
N = 90
i := 0 .. N
tx[i] := (start + i*incr)
tx = [
    -1.6; -1.47; -1.34; -1.21; -1.08; -0.95; -0.82; -0.69; -0.56; -0.43
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] s
# Or, create a function to create the vector:
Range2Vec(s, e, i) :=
    N ← ceil((e - s)/i)
    v[0] ← s
    for j ∈ 1 .. N
        v[j] ← j*i + s
    return v
Vout := Range2Vec(start, end, incr)
transpose(Vout) = [
    -1.6, -1.47, -1.34, -1.21, -1.08, -0.95, -0.82, -0.69, -0.56, -0.43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] s
transpose(tx) = [
    -1.6, -1.47, -1.34, -1.21, -1.08, -0.95, -0.82, -0.69, -0.56, -0.43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] s
## Creating Matrices
# To create a matrix in which the ijth element contains f(i,j) over a specified range of i and j, use the matrix function.
f(x, y) := sin(x^2 + y^2)
X(x) := -1.5 + 0.15*x
Y(y) := -1.5 + 0.15*y
# Input function and upper limits on x and y:
fp(x, y) := f(X(x), Y(y))
m := 20
n := 20
M := matrix(m, n, fp)
# [component: inputs M]
# You can also use vector subscripts to create this matrix, but for large arrays, the matrix function is quicker.
i := 0 .. m - 1
j := 0 .. n - 1
M1[i, j] := f(i, j)
# To create nested matrices of X, Y, and Z coordinates for surface plotting using a function and a range, use the CreateMesh and CreateSpace functions.
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