# Title: Special Characteristics of Matrices
# Description: Special characteristics of matrices.
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# VECTORS AND MATRICES
# quicksheets
# Special Characteristics of Matrices
# This QuickSheet can be used to find the trace, rank, norms, and condition numbers of a matrix.
# Input a square matrix:
M := [3.02, -1.05, 2.53; 4.33, 0.56, -1.78; -0.83, -0.54, 1.47]
# Trace of M, that is, the sum of the diagonal elements:
tr(M) = 5.05
# Rank of the real-valued matrix M:
rank(M) = 3
# L_1 norm of M:
norm1(M) = 8.18
# L_2 norm of M:
norm2(M) = 5.35314
# Euclidean norm of M:
norme(M) = 6.48044
# Infinity norm of M:
normi(M) = 6.67
# L_1 condition number of M:
cond1(M) = 7724.78
# L_2 condition number of M:
cond2(M) = 4293.53
# Euclidean condition number of M:
conde(M) = 5197.69
# Infinity condition number of M:
condi(M) = 7594.97
# For example:
# L_1 norm is the maximum of the absolute column sums  (max taken over j=0, 1, 2)
# sum(|M[i, j]|, i = 0 .. 2)
max([sum(vectorize(|M|)[:, 0]); sum(vectorize(|M|)[:, 1]); sum(vectorize(|M|)[:, 2])]) = 8.18
# Infinity norm is the maximum of the absolute row sums  (max taken over i=0, 1, 2)
# sum(|M[i, j]|, j = 0 .. 2)
max([
    sum(vectorize(|transpose(M)|)[:, 0]);
    sum(vectorize(|transpose(M)|)[:, 1]);
    sum(vectorize(|transpose(M)|)[:, 2])
]) = 6.67
# Euclidean norm for a matrix is analogous to that for a vector:
sum(sum(M[i, j]^2, j = 0 .. 2), i = 0 .. 2)^(1/2) = 6.48044
# Condition number of M is the product of two matrix norms; measures the sensitivity of a linear system solution to errors in input vector:
normi(M)*normi(M^-1) = 7594.97
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