# Title: Special Types of Matrices
# Description: Special types of matrices.
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# VECTORS AND MATRICES
# quicksheets
# Special Types of Matrices
# This QuickSheet illustrates a few special types of matrices.
# 3x3 identity matrix:
identity(3) = [1, 0, 0; 0, 1, 0; 0, 0, 1]
# Input vectors:
v := [1; 2; 3; 4]
w := [1; 3; 5; 7; 9; 11]
# A diagonal matrix formed from a vector:
diag(v) = [1, 0, 0, 0; 0, 2, 0, 0; 0, 0, 3, 0; 0, 0, 0, 4]
# Program for forming an upper triangular matrix:
upptriag(v) :=
    n ← ceil((-1 + sqrt(1 + 8*rows(v)))/2)
    M[n - 1, n - 1] ← 0
    k ← 0
    for i ∈ 0, 1 .. n - 1
        for j ∈ i, i + 1 .. n - 1
            if k ≤ rows(v) - 1
                M[i, j] ← v[k]
                k ← k + 1
    M
upptriag(v) = [1, 2, 3; 0, 4, 0; 0, 0, 0]
upptriag(w) = [1, 3, 5; 0, 7, 9; 0, 0, 11]
# Program for forming a lower triangular matrix:
lowtriag(v) :=
    n ← ceil((-1 + sqrt(1 + 8*rows(v)))/2)
    M[n - 1, n - 1] ← 0
    k ← 0
    for i ∈ 0, 1 .. n - 1
        for j ∈ 0, 1 .. i
            if k ≤ rows(v) - 1
                M[i, j] ← v[k]
                k ← k + 1
    M
lowtriag(v) = [1, 0, 0; 2, 3, 0; 4, 0, 0]
lowtriag(w) = [1, 0, 0; 3, 5, 0; 7, 9, 11]
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