# Title: Decomposition of Matrices
# Description: Matrix decompositions available in Mathcad.
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# VECTORS AND MATRICES
# quicksheets
# Decomposition of Matrices
# This QuickSheet can be used to perform QR, SVD, cholesky, and LU decompositions of a matrix, useful in solving linear systems. The algorithms underlying these functions are also used in lsolve.
# Input real matrix (not necessarily square):
A := [1, 2, -1; 2.3, 4, 4; -2, 5.1, 1; 0, 0.8, 6]
# QR Decomposition:
M := qr(A)
M = [
    0.31174, 0.278884, -0.411182, -0.80992, 3.2078, 0.31174, 1.93279;
    0.717002, 0.553496, 0.116563, 0.407387, 0, 6.82296, 3.41457;
    -0.62348, 0.775963, -0.071544, 0.0635347, 0, 0, 6.2133;
    0, 0.117251, 0.901235, -0.417167, 0, 0, 0
]
Q := submatrix(M, 0, 3, 0, 3)
R := submatrix(M, 0, 3, 4, 6)
Q*transpose(Q) = [1, 0, 0, 0; 0, 1, 0, 0; 0, 0, 1, 0; 0, 0, 0, 1]
Q*R = [1, 2, -1; 2.3, 4, 4; -2, 5.1, 1; 0, 0.8, 6]
R = [3.2078, 0.31174, 1.93279; 0, 6.82296, 3.41457; 0, 0, 6.2133; 0, 0, 0]
# Upper triangular matrix;
# Q is an orthonormal matrix
# SVD Decomposition:
M := svd2(A)
s := M[0]
U := M[1]
V := M[2]
M = [
    [8.65743; 5.17428; 3.03573];
    [
        -0.0707223, 0.377402, -0.443391;
        -0.67099, 0.0211077, -0.619162;
        -0.448422, 0.70041, 0.551639;
        -0.586249, -0.605432, 0.340201
    ];
    [-0.082837, -0.64469, -0.759943; -0.188407, 0.758943, -0.623304; -0.978591, -0.091546, 0.184333]
]
U*diag(s)*V = [1, 2, -1; 2.3, 4, 4; -2, 5.1, 1; 0, 0.8, 6]
# returns
A = [1, 2, -1; 2.3, 4, 4; -2, 5.1, 1; 0, 0.8, 6]
transpose(s) = [8.65743, 5.17428, 3.03573]  # vector of singular values
# Input real, square, positive-definite matrix:
B := [13, 4, 4; 4, 9, -3; 4, -3, 57]
L := cholesky(B)  # cholesky decomposition
L = [3.60555, 0, 0; 1.1094, 2.78733, 0; 1.1094, -1.51786, 7.312]  # lower triangular
L*transpose(L) = [13, 4, 4; 4, 9, -3; 4, -3, 57]  # returns B
# Input real, square matrix:
C := [3, -1, 2; 1, 2, 3; 2, -2, -1]
M := lu(C)  # LU decomposition
M = [
    0, 0, 1, 1, 0, 0, 2, -2, -1;
    0, 1, 0, 0.5, 1, 0, 0, 3, 3.5;
    1, 0, 0, 1.5, 0.666667, 1, 0, 0, 1.16667
]
P := submatrix(M, 0, 2, 0, 2)
L := submatrix(M, 0, 2, 3, 5)  # lower triangular
U := submatrix(M, 0, 2, 6, 8)  # upper triangular
P*C = [2, -2, -1; 1, 2, 3; 3, -1, 2]
L*U = [2, -2, -1; 1, 2, 3; 3, -1, 2]
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