# Title: Graphing Complex-Valued Functions or Data
# Description: Plotting data containing complex numbers.
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# GRAPHING AND VISUALIZATION
# quicksheets
# Plotting Complex-Valued Functions or Data
# This QuickSheet illustrates visualization of complex functions. Mathcad 2D plots skip numbers with an imaginary part, so you must separate the real and imaginary parts before plotting, or otherwise render the numbers real. For example, plotting the output of an FFT usually produces a blank plot, since each value has a complex part. You need to take the magnitude, or the Real components.
N0 := 2^5
k := 0 .. N0 - 1
n[k] := k
sig := sin(n*π/4)
Sig := fft(sig)
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## Complex 3D Plots
# Mathcad 3D plots ignore the imaginary part of any inputs and plot only the real part. So again, the two components must be separated for complex-valued outputs. Input a complex function:
f(z) := z^2
N := 30
m := 0 .. N
n := 0 .. N
# Real part of the input:
rz[m] := -2 + m*4/N
# Imaginary part of the input:
iz[m] := -2 + m*4/N
# The real and imaginary axes are oriented as shown:
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# Matrix input to plotting routines:
C[m, n] := f(rz[m] + 1i*iz[n])
# [component: inputs C]
# [component: inputs Im(C)]
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