# Title: Two Dimensional Image Convolution
# Description: Convolving a two dimensional image using fast Fourier transforms.
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# GRAPHING AND VISUALIZATION
# quicksheets
# Two-Dimensional Image Convolution
# This QuickSheet illustrates a sample convolution of a 2D image with a window using FFTs.
S := READBMP("cross.bmp")  # First example
M := READBMP("mona.bmp")  # Second example
I := submatrix(M, 60, 160, 50, 150)
cnvl2D(M, iwidth, jwidth) :=
    rowmax ← rows(M) - 1
    colmax ← cols(M) - 1
    rowctr ← ceil(rowmax/2)
    colctr ← ceil(colmax/2)
    for i ∈ -iwidth .. iwidth
        for j ∈ -jwidth .. jwidth
            A[rowmax, colmax] ← 0
            A[rowctr + i, colctr + j] ← 255
    C ← Re(icfft(vectorize(cfft(A)*cfft(M))))
    for p ∈ 0 .. rowmax
        for q ∈ 0 .. colmax
            J[mod(p + rowctr, rows(M)), mod(q + colctr, cols(M))] ← C[p, q]
    [A; J]
# This convolution produces a blurred or smoothed image.
S' := cnvl2D(S, 3, 3)
# Original image | Square aperture window | Convolved image
# [component: inputs S]
# [component: inputs S'[0]]
# [component: inputs S'[1]]
I' := cnvl2D(I, 2, 2)
I'[1] := 255*(max(I'[1]) - min(I'[1]))^-1*(I'[1] - min(I'[1]))
# [component: inputs I'[0]]
# [component: inputs I]
# [component: inputs I'[1]]
dcnvl2D(M, iwidth, jwidth) :=
    rowmax ← rows(M) - 1
    colmax ← cols(M) - 1
    rowctr ← ceil(rowmax/2)
    colctr ← ceil(colmax/2)
    for i ∈ -iwidth .. iwidth
        for j ∈ -jwidth .. jwidth
            A[rowmax, colmax] ← 0
            A[rowctr + i, colctr + j] ← 255
    D ← Re(icfft(vectorize(cfft(M)/(cfft(A) + 1*10^-5))))
    for p ∈ 0 .. rowmax
        for q ∈ 0 .. colmax
            J[mod(p + rowctr, rows(M)), mod(q + colctr, cols(M))] ← D[p, q]
    [A; J]
# Deconvolution sharpens up any similarly blurred image.
T := dcnvl2D(S'[1], 3, 3)
# Convolved image | Square aperture window | Deconvolved image
# [component: inputs S'[1]]
# [component: inputs T[0]]
# [component: inputs T[1]]
J := dcnvl2D(I'[1], 2, 2)
J[1] := 255*(max(J[1]) - min(J[1]))^-1*(J[1] - min(J[1]))
# [component: inputs I'[1]]
# [component: inputs J[0]]
# [component: inputs J[1]]
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