# Title: 2D Correlation and Kernel Matching
# Description: Correlation of a 2D kernel with an image in the spatial domain.
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# GRAPHING AND VISUALIZATION
# quicksheets
# 2D Correlation and Prototype Matching
# This QuickSheet illustrates correlation of a 2D kernel with an image in the spatial domain.
# One interesting kernel is the Gaussian kernel, which produces a smoothing effect. Here, a 5×5 kernel is generated.
M := READ_IMAGE("dog.bmp")
i := 0 .. 4
j := 0 .. 4
K[i, j] := exp(-(i - 2)^2/1.5)*exp(-(j - 2)^2/1.5)
K = [
    0.00482795, 0.035674, 0.0694835, 0.035674, 0.00482795;
    0.035674, 0.263597, 0.513417, 0.263597, 0.035674;
    0.0694835, 0.513417, 1, 0.513417, 0.0694835;
    0.035674, 0.263597, 0.513417, 0.263597, 0.035674;
    0.00482795, 0.035674, 0.0694835, 0.035674, 0.00482795
]
# Note that this kernel is symmetric, so the effect is the same as convolution - equivalent to correlation with the kernel reversed.
# Calculate the correlation, then scale the result to 8 bit grayscale from 0 to 255.
mcscale(x) := ((x - min(x))/(max(x) - min(x))*255)
CORR := mcscale(correl2d(M, K))
# [component: inputs M]
# [component: inputs CORR]
## 2D Correlation - Prototype Matching
M := READ_IMAGE("peas_carrots.jpg")
# [component: inputs M; outputs [size; carrot]]
# The selection picks out a representative carrot as a template. Click and drag on the image to select a new template carrot.
# We want to know the number of matches to a rectangular template of uniform density, which roughly picks out the carrots in this random sampling from a frozen vegetable package.
val(i, j) := 1
width := size[2] - size[0]
height := size[3] - size[1]
template := matrix(height, width, val)
# [component: inputs template]
# [component: inputs carrot]
# You can either use the uniform template of the same size as the selected carrot, or use the selected representative carrot image itself. Try selecting different carrots in the image, and different thresholds for the correlation to see which ones work best for finding others.
CORR := mcscale(correl2d(M, template))
tval := 160
thresh(elem) := (elem > tval)
CORRt := vectorize(thresh(CORR))
# [component: inputs vectorize(M*CORRt)]
# Most of the peas are blacked out by the uncorrelated, threshold values, and most of the carrots are still visible.
# The approximate percentage of carrots is given by
size := cols(CORRt)*rows(CORRt)
size = 33824
sum(sum(CORRt[i, j], j = 0 .. cols(CORRt) - 1), i = 0 .. rows(CORRt) - 1)/size = 45.5239 %
# This technique is also useful for bacteria counting, and other image feature percentage estimation.
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