# Title: Extracting a Subimage from an Image
# Description: Methods for extracting a portion of an image.
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# GRAPHING AND VISUALIZATION
# quicksheets
# Extracting a Subimage from an Image
# This QuickSheet illustrates using the Picture toolbar or the submatrix function to extract a section of an image. Since images in Mathcad are just matrices, you can use any matrix function to operate on them.
# The submatrix function extracts a subimage if you know the indices you wish to extract. Input the name of the image and the desired row and column ranges:
D := READRGB("dog.bmp")
# If you are working with color images, separate the matrix first into RGB components, then take a subset of each component, and reassemble them.
w := cols(D)/3
rdog := submatrix(D, 0, rows(D) - 1, 0, w - 1)
gdog := submatrix(D, 0, rows(D) - 1, w, 2*w - 1)
bdog := submatrix(D, 0, rows(D) - 1, 2*w, 3*w - 1)
rs := 35
re := 95
cs := 15
ce := 75
r := submatrix(rdog, rs, re, cs, ce)
g := submatrix(gdog, rs, re, cs, ce)
b := submatrix(bdog, rs, re, cs, ce)
# [component: inputs [(rdog, gdog, bdog), □, □]; outputs [coords; mat]]
# [component: inputs [(r, g, b), □, □]]
# The preceding supposes that you know the row and column numbers you wish to extract. If you want to do the selection visually, click on the picture so you see hash marks around its border. The Picture toolbar pops up. Right-click on the image, and select Properties. Choose "Output Selected Coordinates," or "Output Selected Matrix." A placeholder and a definition equals appear to the left of your image. Select the dotted square icon, and use the mouse to define the desired subimage.
# Both options have been defined for the above image. The coordinates are returned as the column, then row of the top left corner, then the column and row of the bottom right corner.
# [component: inputs mat]
coords = [13; 40; 60; 94]
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