# Title: Image Processing
# Description: Using Mathcad to perform image processing.
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# GRAPHING AND VISUALIZATION
# quicksheets
# Image Processing
# Matrix arithmetic provides for a wide variety of image processing techniques. The vectorize operator vectorize(f(M)) applies a function to an entire image at once. Some matrix operations can be conveniently performed from the Picture toolbar as well.
# More sophisticated image processing functions can be found in the Image Processing Extension Pack.
M := READBMP("mona.bmp")
S := submatrix(M, 60, 160, 50, 150)
# [component: inputs S]
S1 := S/2 + 120  # looks like
# [component: inputs S1]
S2 := 255 - S  # image inversion
# [component: inputs S2]
S3 := reverse(S)  # image rotation
# [component: inputs S3]
S4 := 100*vectorize(log(S))  # intensity scaling
# [component: inputs S4]
# Define a custom threshold function:
f(x) := if(x < 120, 0, 255)
S5 := vectorize(f(S))
# [component: inputs S5]
# Add some noise, for example, by turning each pixel white with probability 0.1:
g(x) := if(rnd(1) < 0.1, 255, x)
S6 := vectorize(g(S))
# [component: inputs S6]
# Make a 2D median filter:
medflt(M, k) :=
    for i ∈ (k - 1)/2 .. rows(M) - (k + 1)/2
        for j ∈ (k - 1)/2 .. cols(M) - (k + 1)/2
            for r ∈ 0 .. k - 1
                for s ∈ 0 .. k - 1
                    A[r, s] ← M[i + r - (k - 1)/2, j + s - (k - 1)/2]
            N[i, j] ← median(A)
    N
S6f := medflt(S6, 5)
# [component: inputs S6f]
# Pick out a particular gray range:
h(x) := if(75 < x < 150, x, 255)
S7 := vectorize(h(S))
# [component: inputs S7]
# Here is a transformation based on image coordinates. The row index will be m and the column index n.
m := 0 .. rows(S) - 1
n := 0 .. cols(S) - 1
# The following transformation adds concentric waves emanating from the center.
S8[m, n] := S[m, n]*((sin(sqrt((m - 51)^2 + (n - 51)^2)) + 9)/10)
# [component: inputs S8]
# You can shrink the picture by leaving out alternate rows and columns:
r := 0 .. 49
s := 0 .. 49
S9[r, s] := S[2*r, 2*s]
# [component: inputs S9]
# . . . or by averaging pixels in groups of four.
S10[r, s] := 1/4*(S[2*r, 2*s] + S[2*r, 2*s + 1] + S[2*r + 1, 2*s] + S[2*r + 1, 2*s + 1])
# [component: inputs S10]
# Image coordinates also permit synthetic constructions. Here are a few examples, using an 80 by 80 square image.
p := 0 .. 80
q := 0 .. 80
# Waves:
A1[p, q] := 128 + 127*sin(q/4)
# [component: inputs A1]
# Grid:
A2[p, q] := if((mod(p + 1, 5) == 1) + (mod(q + 1, 10) == 1), 100, 255)
# [component: inputs A2]
# Light spot:
A3[p, q] := 255/((((p - 41)^2 + (q - 41)^2)/400) + 1)
# [component: inputs A3]
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