# Title: Contour Plots or Level Curves
# Description: Plotting level curves, using Mathcad's contour plot operator.
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# GRAPHING AND VISUALIZATION
# quicksheets
# Contour Plots or Level Curves
# This QuickSheet can be used to produce level curves of a function of two variables using a Mathcad contour plot.
# Enter a function f of two variables:
f(x, y) := cos(x + sin(y))
# Enter the endpoints of the x range:
xlow := 0
xhigh := 2*π
# Enter the number of divisions of x range:
xn := 20
# Enter the endpoints of the y range:
ylow := 0
yhigh := 2*π
# Enter the number of divisions of y range:
yn := 20
# Use CreateMesh to build a grid of values:
F := CreateMesh(f, xlow, xhigh, ylow, yhigh, xn, yn)
# View the function in a contour plot:
# [component: inputs F]
## Contour Plot of Data
# You can also display a matrix as a contour plot. This example shows the Fire colormap from the Advanced tab of the plot formatting dialog.
M := transpose(READPRN("spectogram.txt"))
mindata := min(M)
maxdata := max(M)
maxdata =  # no stored result
mindata =  # no stored result
# [component: inputs M]
## Scales and Numbering
# You can number the contours on a contour plot using the Special tab on the formatting dialog, but this may be a cumbersome way to show scale on some data. You can create a color legend by calculating the minimum and maximum of the data, putting these into a matrix of stepped values, and plotting as a surface plot with 0 tilt, 0 rotation, and 0 twist.
rw := rows(M)
i := 0 .. rw - 1
map[i] := mindata + (maxdata - mindata)/(rw - 1)*i
j := 0 .. 10
colscale[:, j] := map
# [component: inputs colscale]
## Picture Operator for Contour Plots
# The picture operator can be a viable alternative to a contour plot as it allows you to select subsections of your contours for further analysis. The picture operator displays 255 bit images on the screen, so data should be scaled in the 0 to 255 range.
scl(M, Min, Max) := (Max - Min)*((M - min(M))/(max(M) - min(M))) + Min
M_s := scl(transpose(M), 0, 255)
# [component: inputs M_s; outputs subM]
# Right-click on the picture operator to see more options.
subM =  # no stored result
# You can also display a colorized version of the image.
# You can click on a picture operator to zoom, select rows and columns of your data, or select areas, by choosing appropriate buttons from the Picture toolbar.
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