# Title: Parametric Curves in 2D and 3D
# Description: Plotting parametric curves in two and three dimensions.
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# GRAPHING AND VISUALIZATION
# quicksheets
# Parametric Curves in 2D and 3D
# This QuickSheet shows how to plot the points of a curve whose coordinates are functions of one or more parameters.
## Parametric Curve in 2 Dimensions (1 Parameter)
# Enter equations for x and y in terms of parameter a:
x(a) := sin(2*a)
y(a) := sin(3*a)
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## Parametric Curve in 2 Dimensions (2 Parameters)
# You can also generate vectors and plot those.
# Number of points:
N := 40
i := 0 .. N
# Create range of parameters:
θ[i] := 2*π*i/N
r[i] := cos(θ[i]) + 1
# Then the parametrized coordinate vectors:
x[i] := r[i]*cos(θ[i])
y[i] := r[i]*sin(θ[i])
# Recording the function values as tables of data lets you reuse them or write them out for other applications.
M := augment(θ, r, x, y)
M := stack(["ang", "rad", "x", "y"], M)
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M =  # no stored result
# Of course, this particular curve could be handled non-parametrically as a polar plot.
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## Parametric Curves in 3 Dimensions (1 Parameter)
# Use the CreateSpace function to generate a nested matrix for use with 3D plots, the elements of which are the x-, y-, and z-coordinates of a space curve based on a parametrically-defined function or functions.
# Input function:
curve(a) := [sin(a); cos(a); a]
# Input lower limit on a: | Input upper limit on a:
a0 := 0
a1 := 10
S := CreateSpace(curve, a0, a1)
# [component: inputs S]
# CreateSpace allows you to specify the bounds on the parameter, and, if desired, the spacing of points, external to the plot. You could also use the function as the argument to the 3D Plot operator, in which case the bounds can be set on the QuickPlot Data tab from the Plot Format dialog box.
# You can also use three separate functions to define the three coordinates. In this case, the input functions define radius, horizontal angle and vertical angle in spherical coordinates.
Q(a) := a
R(a) := a
S(a) := a
# Input mesh size for z:
amesh := 400
# Define the mesh with a built-in mapping function from spherical to XYZ coordinates as the optional last argument:
L := CreateSpace(Q, R, S, 0, 100, amesh, sph2xyz)
# [component: inputs L]
# Note: The mapping from spherical to Cartesian coordinates can also be set on the QuickPlot Data tab.
## Parametric Surfaces in 3 Dimensions (2 Parameters)
# To parameterize a surface, use CreateMesh instead of a space curve. Enter three functions to plot, representing the three coordinates:
X(u, v) := (2 + cos(u))*cos(v)
Y(u, v) := (2 + cos(u))*sin(v)
Z(u, v) := 2*sin(u)
# Input mesh size for u: | Input mesh size for v:
xmesh := 40
ymesh := 40
N1 := CreateMesh(X, Y, Z, xmesh, ymesh)
# [component: inputs N1]
# Or, a single vector function giving three coordinates:
S1(u, v) := [u; u; v]
S2 := CreateMesh(S1, 0, 5*π, 0, π, 30, sph2xyz)
# [component: inputs S2]
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