# Title: Quick Gradient Field Plot
# Description: Plotting the gradient field of a function of two variables.
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# GRAPHING AND VISUALIZATION
# quicksheets
# Quick Gradient Field Plot
# This QuickSheet can be used to produce a 2D plot of the gradient field of a function of two variables.
# Enter a function f(x,y):
f(x, y) := sin(x)*cos(y)
# Enter the endpoints of the x range:
xlow := -2
xhigh := 2
# Enter the number of x values in range:
xn := 20
# Enter the endpoints of the y range:
ylow := -4
yhigh := 4
# Enter the number of y values in range:
yn := 20
# Gradient function:
grad(x, y) := [d/dx(f(x, y)); d/dy(f(x, y))]
i := 0 .. xn - 1
xind[i] := xlow + i*(xhigh - xlow)/(xn - 1)
j := 0 .. yn - 1
yind[j] := ylow + j*(yhigh - ylow)/(yn - 1)
V[i, j] := grad(xind[i], yind[j])
M[i, j] := V[i, j][0]
N[i, j] := V[i, j][1]
# Gradient field:
# [component: inputs (M, N)]
# Surface plot of f:
surf := CreateMesh(f, xlow, xhigh, ylow, yhigh, xn, yn)
# [component: inputs surf]
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