# Title: Quick Vector Field Plot
# Description: Plotting a vector field of a vector-valued function of two variables.
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# GRAPHING AND VISUALIZATION
# quicksheets
# Quick Vector Field Plot
# This QuickSheet can be used to produce a 2D plot of a vector field of a vector-valued function of two variables.
# Enter a function V(x,y) that returns a 2-vector:
V(x, y) := [y; (1 - x^2)*y - x]
# Enter the endpoints of the x range:
xlow := -2
xhigh := 2
# Enter the number of x values in range:
xn := 20
# Enter the endpoints of the y range:
ylow := -4
yhigh := 4
# Enter the number of y values in range:
yn := 20
i := 0 .. xn - 1
xind[i] := xlow + i*(xhigh - xlow)/(xn - 1)
j := 0 .. yn - 1
yind[j] := ylow + j*(yhigh - ylow)/(yn - 1)
F[i, j] := V(xind[i], yind[j])
M[i, j] := F[i, j][0]
N[i, j] := F[i, j][1]
# Vector field plot:
# [component: inputs (M, N)]
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