# Title: Surfaces of Rotation
# Description: Creating a surface by revolving a function about an axis.
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# GRAPHING AND VISUALIZATION
# quicksheets
# Surfaces of Revolution
# This QuickSheet can be used to create a surface by revolving a function of x about the x-axis or y-axis.
# Enter a function f(x):
f(x) := x*sin(x)^2
# Enter upper and lower limits of x interval:
a := 0
b := π
# Enter mesh size for points:
mesh := 30
## Surface of Revolution About the X-Axis
# Parametric equations for the surface of revolution about the x-axis:
F(u, v) := u
G(u, v) := f(u)*cos(v)
H(u, v) := f(u)*sin(v)
# Plot of f(x) over the interval:
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# Surface of revolution:
S := CreateMesh(F, G, H, a, b, 0, 2*π, mesh)
# [component: inputs S]
## Surface of Revolution About the Y-Axis
# Parametric equations for the surface of revolution about the y-axis:
F(u, v) := u*cos(v)
G(u, v) := f(u)
H(u, v) := u*sin(v)
# Plot of f(x) over the interval:
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# Surface of revolution:
S := CreateMesh(F, G, H, a, b, -π, π, mesh)
# [component: inputs S]
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