# Title: Animation to Demonstrate Concepts
# Description: Animating common mathematical and engineering concepts using Mathcad.
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# GRAPHING AND VISUALIZATION
# quicksheets
# Animation to Demonstrate Concepts
# This QuickSheet shows how to animate common mathematical and engineering concepts using Mathcad graphics. First, plot a function and its tangent line passing through (a, f(a)), for various values of a.
# Function:
f(x) := x*sin(x)
f'(x) := d/dx(f(x))
# Tangent line:
y(a, x) := f'(a)*(x - a) + f(a)
# Parameter defined in terms of FRAME variable:
a := π + FRAME/5
a = 3.14159
x := 0, 0.1 .. 4*π
# Animate the regions below by choosing Animation > Record from the Tools menu, then insert values of FRAME from 0 to 30 in the dialog. Drag-select the regions you want to see in your animation, then press Animate. If you include the display of a and f'(a), you will also see the values update along with the graph.
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# x value:
a = 1*π
# slope of tangent:
f'(a) = -1*π
# To play the animation, just click on the graph below. Use the scroll bar to pause the animation if you wish to play it more slowly.
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## A 2D Standing Wave Animation
# Equations defining matrix:
N := 40
i := 0 .. N - 1
j := 0 .. N - 1
scale := 12*π/N
d(x, y) := sqrt((x - N/2)^2 + (y - N/2)^2)*scale
# Parameter defined in terms of FRAME variable:
φ := FRAME*π/10
M[i, j] := sin(d(i, j) - φ)
# Insert values of FRAME from 0 to 20 in the dialog when animating the graph.
# [component: inputs M]
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