# Title: Waterfall Plots
# Description: Plotting arrays of multiple traces.
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# GRAPHING AND VISUALIZATION
# quicksheets
# Waterfall Plots
# Waterfall plots are plots of the same process or data repeated for slightly different values of a single parameter. You can make both  2D and 3D waterfall plots in Mathcad
## 2D Waterfall Plots
# The 2D waterfall plot packs all the response data values into columns of a y matrix, and the input values into columns of an x matrix. The 2D plot pairs the columns and creates multiple traces.
# [component: outputs y]
i := 0 .. cols(y) - 1
j := 0 .. rows(y) - 1
xrange[j] := j/10 - 2
# You can plot the y data versus this x vector, but if you wish to provide an offset for each x value as well as each y value, you need to create an x matrix as well.  The x and y values must be offset slightly for each column so that the otherwise overlapping traces can be made visible.
xoffset := 0.2
yoffset := 0.03
xo[:, i] := xrange + i*xoffset
yo[:, i] := y[:, i] + i*yoffset
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# Note that the offset means that only the first trace retains the correct data values according to the numbering on the plot.
# If you have traces of unequal lengths to display in this fashion, you can pack the empty entries in the array with NaNs (Not a Number).
empty := 0 .. 17
yo[empty, 12] := NaN
yo[empty + 83, 15] := NaN
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# The NaN entries are not displayed, leaving blanks in the line.
## 3D Waterfall Plots
# You can achieve a similar effect using a 3D scatter plot and the y-values only. Choose Graph > 3D Scatter Plot from the Insert menu, enter the y matrix in the placeholder, and double-click on the plot to bring up the format dialog.  Choose the Appearance tab. Under Line Options, select lines, and under Point Options, deselect points. Your plot should resemble the one below.
# [component: inputs y]
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