# Title: Table of Derivative Formulas
# Description: Derivative formulas.
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# CALCULUS REFERENCE FORMULAS
# reference tables
# Table of Derivative Formulas
## Constant Multiple Rule
d/dx(c*f(x)) == c*d/dx(f(x))
# annotation to a formula above: Constant Multiple Rule
## Power Rule
d/dx(x^n) == n*x^(n - 1)
# annotation to a formula above: Power Rule
## Product Rule
d/dx(f(x)*g(x)) == f(x)*d/dx(g(x)) + g(x)*d/dx(f(x))
# annotation to a formula above: Product Rule
## Sum Rule
d/dx(f(x) + g(x)) == d/dx(f(x)) + d/dx(g(x))
# annotation to a formula above: Sum Rule
## Quotient Rule
d/dx(f(x)/g(x)) == (g(x)*d/dx(f(x)) - f(x)*d/dx(g(x)))/g(x)^2
# annotation to a formula above: Quotient Rule
## Chain Rule
y == f(u)
u == g(x)
d/dx(f(u)) == (d/du(f(u)))*(d/dx(g(x)))
# annotation to a formula above: Chain Rule - step 1 of 3
# annotation to a formula above: Chain Rule - step 2 of 3
# annotation to a formula above: Chain Rule - step 3 of 3
## Derivatives of Trigonometric Functions
d/dx(sin(x)) == cos(x)
d/dx(cos(x)) == -sin(x)
# annotation to a formula above: Derivatives of Trigonometric Functions
d/dx(tan(x)) == sec(x)^2
d/dx(cot(x)) == -csc(x)^2
d/dx(sec(x)) == sec(x)*tan(x)
d/dx(csc(x)) == -csc(x)*cot(x)
## Derivatives of Logarithms and Exponential Functions
d/dx(ln(|x|)) == 1/x
d/dx(e^x) == e^x
# annotation to a formula above: Derivatives of Logarithms and Exponential Functions
d/dx(a^x) == a^x*ln(a)
a > 0
## Derivatives of Inverse Trigonometric Functions
d/dx(asin(x)) == 1/sqrt(1 - x^2)
d/dx(atan(x)) == 1/(1 + x^2)
# annotation to a formula above: Derivatives of Inverse Trigonometric Functions
d/dx(acos(x)) == -1/sqrt(1 - x^2)
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# ^(* Green parentheses in this file indicate annotations to an expression. To read an annotation, right-click on the entire expression within the parentheses and choose View/Edit Annotation. If the expression is copied to another file, the annotation will be preserved.)
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