# Title: Triginometric Identities
# Description: Various triginometric identities.
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# CALCULUS REFERENCE FORMULAS
# reference tables
# Trigonometric Identities
## Basic Identities
sin(x)/cos(x) == tan(x)
# annotation to a formula above: Basic trigonometric identity
sin(x)^2 + cos(x)^2 simplify → 1
# annotation to a formula above: Trigonometric basic identity
## Complex Identities
sin(z) == (e^(1i*z) - e^(-1i*z))/2i
cos(z) == (e^(1i*z) + e^(-1i*z))/2
# annotation to a formula above: Complex trigonometric identity
e^(1i*z) == cos(z) + 1i*sin(z)
e^(x + 1i*y) == e^x*(cos(y) + 1i*sin(y))
ln(x + 1i*y) == ln(|x + 1i*y|) + 1i*atan(y/x) + 2.0i*π
## Hyperbolic Functions and Exponentials
sinh(x) == (e^x - e^(-x))/2
csch(x) == 1/sinh(x)
# annotation to a formula above: Trigonometric identity involving hyperbolic functions and exponentials
cosh(x) == (e^x + e^(-x))/2
sech(x) == 1/cosh(x)
tanh(x) == (e^x - e^(-x))/(e^x + e^(-x))
coth(x) == 1/tanh(x)
## Hyperbolic Functions and Trig Relationships
sinh(z) == -1i*sin(1i*z)
csch(z) == 1i/sin(1i*z)
# annotation to a formula above: Trigonometric identity involving hyperbolic functions and trigonometric relationships
cosh(z) == cos(1i*z)
sech(z) == 1/cos(1i*z)
tanh(x) == -1i*tan(1i*z)
tanh(x) == 1i/tan(1i*z)
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# ^(* Green parentheses in this file indicate annotations to an expression. To read an annotation, right-click on the entire expression within the parentheses and choose View/Edit Annotation. If the expression is copied to another file, the annotation will be preserved.)
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