# Title: Capacitance: Parallel Plates
# Description: Calculating the capacitance of parallel plates.
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# CAPACITANCE
# reference tables
# Parallel Plates
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# Capacitance:
ε*A/d
# annotation to a formula above: from Electronics Engineers' Handbook, by Donald G. Fink and Donald Christiansen, Editors, 3rd Edition, McGraw-Hill Book Company (1989).
# Example: Determine the capacitance between two closely spaced parallel plates given the area of the plates, A, the distance between the plates, d, and the permittivity of the material, ε.
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A := 1*mm^2
d := 0.001*mm
ε_0 = 8.85419e-12 F/m
ε := 8.859*10^-12*F/m  # Permittivity of air
C := ε*A/d
C = 8.859e-12 F
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# ^(* Green parentheses in this file indicate annotations to an expression. To read an annotation, right-click on the entire expression within the parentheses and choose View/Edit Annotation. If the expression is copied to another file, the annotation will be preserved.)
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