# Title: Capacitance: Concentric Spheres
# Description: Calculating the capacitance of concentric spheres.
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# CAPACITANCE
# reference tables
# Concentric Spheres
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# Capacitance:
4*π*ε/(1/r_1 - 1/r_2)
# annotation to a formula above: from Electronics Engineers' Handbook, by Donald G. Fink and Donald Christiansen, Editors, 3rd Edition, McGraw-Hill Book Company (1989).
# Example: Determine the capacitance between two concentric spheres given the radii of the two spheres and the permittivity of the material, ε.
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r_1 := 20*mm
r_2 := 1*m
ε := 6.906*10^-10*F/m  # Permittivity of distilled water
C := 4*π*ε/(1/r_1 - 1/r_2)
C = 0.177109 nF
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# ^(* Green parentheses in this file indicate annotations to an expression. To read an annotation, right-click on the entire expression within the parentheses and choose View/Edit Annotation. If the expression is copied to another file, the annotation will be preserved.)
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