# Title: Oscillators: RC Phase Shift
# Description: Calculating the frequency of an RC phase shift oscillator.
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# OSCILLATORS
# reference tables
# RC Phase Shift
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# Gain requirement:
A_v ≥ -(5 - (ωο_ο*R*C)^2)/(ωο_ο*R*C)^2 ≥ -29
# annotation to a formula above: from Schaum's Outline of Theory and Problems of Electronics Technology, by M. Kaufman and J. A. Wilson, McGraw-Hill Book Company (1982).
# Frequency of oscillation (radians/sec):
1/(sqrt(6)*R*C)
# Example: Find the frequency of oscillation of an RC phase shift oscillator with capacitance C and resistance R.
C := 0.02*μF
R := 125*Ω
ωο_ο := 1/(sqrt(6)*R*C)  # Frequency of oscillation in radians per second
f_o := ωο_ο/(2*π)  # Frequency in hertz
f_o = 25989.9 Hz
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# ^(* Green parentheses in this file indicate annotations to an expression. To read an annotation, right-click on the entire expression within the parentheses and choose View/Edit Annotation. If the expression is copied to another file, the annotation will be preserved.)
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