# Title: Oscillators: Tuned Output
# Description: Calculating the frequency of a tuned output oscillator.
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# OSCILLATORS
# reference tables
# Tuned Output
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# Gain requirement:
A_v ≤ M
# annotation to a formula above: from Schaum's Outline of Theory and Problems of Electronics Technology, by M. Kaufman and J. A. Wilson, McGraw-Hill Book Company (1982).
# Frequency of Oscillation (radians/sec):
sqrt(1/(L_1*C_1))
# Example:  Find the frequency of oscillation of a tuned output oscillator with inductance L1 and capacitance C1.
L_1 := 3.5*mH
C_1 := 0.01*μF
ωο_ο := sqrt(1/(L_1*C_1))  # Frequency of oscillation in radians per second
f_o := ωο_ο/(2*π)  # Frequency in hertz
f_o = 26902.1 Hz
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# ^(* Green parentheses in this file indicate annotations to an expression. To read an annotation, right-click on the entire expression within the parentheses and choose View/Edit Annotation. If the expression is copied to another file, the annotation will be preserved.)
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