# Title: Oscillators: Colpitts
# Description: Calculating the frequency of a Colpitts oscillator.
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# OSCILLATORS
# reference tables
# Colpitts
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# Gain requirement:
A_v ≥ C_2/C_1
# annotation to a formula above: from Schaum's Outline of Theory and Problems of Electronics Technology, by M. Kaufman and J. A. Wilson, McGraw-Hill Book Company (1982).
# Frequency of oscillation (radians/sec):
sqrt((C_1 + C_2)/(L*C_1*C_2))
# Example: Find the frequency of oscillation of a Colpitts oscillator with capacitances C1 and C2 and inductance L.
C_1 := 0.004*μF
C_2 := 0.03*μF
L := 4*mH
ωο_ο := sqrt((C_1 + C_2)/(L*C_1*C_2))  # Frequency of oscillation in radians per second
f_o := ωο_ο/(2*π)  # Frequency in hertz
f_o = 42.3583 kHz
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# ^(* Green parentheses in this file indicate annotations to an expression. To read an annotation, right-click on the entire expression within the parentheses and choose View/Edit Annotation. If the expression is copied to another file, the annotation will be preserved.)
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