# Title: Oscillators: Clapp
# Description: Calculating the frequency of a Clapp oscillator.
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# OSCILLATORS
# reference tables
# Clapp
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# Gain requirement:
A_v ≥ C_2/C_1
# annotation to a formula above: from Schaum's Outline of Theory and Problems of Electronics Technology, by M. Kaufman and J. A. Wilson, McGraw-Hill Book Company (1982).
# Frequency of oscillation (radians/sec):
1/sqrt(L*C_3)
# Example: Find the frequency of oscillation of a Clapp oscillator with inductance L and capacitance C3.
L := 1.5*mH
C_3 := 0.008*μF
ωο_ο := 1/sqrt(L*C_3)  # Frequency of oscillation in radians per second
f_o := ωο_ο/(2*π)  # Frequency in hertz
f_o = 45.9441 kHz
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# ^(* Green parentheses in this file indicate annotations to an expression. To read an annotation, right-click on the entire expression within the parentheses and choose View/Edit Annotation. If the expression is copied to another file, the annotation will be preserved.)
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