# Title: Oscillators: Hartley
# Description: Calculating the frequency of a Hartley oscillator.
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# OSCILLATORS
# reference tables
# Hartley
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# Gain requirement:
A_v ≥ (L_1 + L_2 + 2*M)/L_2
# annotation to a formula above: from Schaum's Outline of Theory and Problems of Electronics Technology, by M. Kaufman and J. A. Wilson, McGraw-Hill Book Company (1982).
# Frequency of oscillation (radians/sec):
1/sqrt((L_1 + L_2 + 2*M)*C)
# Example: Find the frequency of oscillation of a Hartley oscillator with inductances L1 and L2, mutual inductance M and capacitance C.
L_1 := 1.0*mH
L_2 := 2.0*mH
M := 3.0*mH
C := 0.005*μF
ωο_ο := 1/sqrt((L_1 + L_2 + 2*M)*C)  # Frequency of oscillation in radians per second
f_o := ωο_ο/(2*π)  # Frequency in hertz
f_o = 23.7254 kHz
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# ^(* Green parentheses in this file indicate annotations to an expression. To read an annotation, right-click on the entire expression within the parentheses and choose View/Edit Annotation. If the expression is copied to another file, the annotation will be preserved.)
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