# Title: Oscillators: Pierce
# Description: Calculating the frequency of a Pierce oscillator.
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# OSCILLATORS
# reference tables
# Pierce
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# Gain requirement:
A_v ≥ 1
# annotation to a formula above: from Schaum's Outline of Theory and Problems of Electronics Technology, by M. Kaufman and J. A. Wilson, McGraw-Hill Book Company (1982).
# Frequency of oscillation (radians/sec):
1/sqrt(L*C)
# Example: Find the frequency of oscillation of a Pierce oscillator with inductance L and capacitance C.
L := 5.0*mH
C := 0.015*μF
ωο_ο := 1/sqrt(L*C)  # Frequency of oscillation in radians per second
f_o := ωο_ο/(2*π)  # Frequency in hertz
f_o = 18.3776 kHz
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# ^(* Green parentheses in this file indicate annotations to an expression. To read an annotation, right-click on the entire expression within the parentheses and choose View/Edit Annotation. If the expression is copied to another file, the annotation will be preserved.)
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