# Title: Gases: Specific Gravity
# Description: Specific gravity of common gases.
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# PROPERTIES OF GASES
# reference tables
# Specific Gravity
## Specific Gravity
## Specific Gravity
## Gas
## Gas
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# Acetylene | 0.90 | Hydrogen (H_2) | 0.070
# annotation to a formula above: Specific gravity of Acetylene, from CRC Handbook of Tables for Applied Engineering Science, 2nd ed, edited by R. Bolz and G. Tuve, CRC Press (1973).
# annotation to a formula above: Specific gravity of Hydrogen (H2), from CRC Handbook of Tables for Applied Engineering Science, 2nd ed, edited by R. Bolz and G. Tuve, CRC Press (1973).
# Air (mixture) | 1.00 | Hydrogen chloride (HCl) | 1.26
# annotation to a formula above: Specific gravity of Air (mixture), from CRC Handbook of Tables for Applied Engineering Science, 2nd ed, edited by R. Bolz and G. Tuve, CRC Press (1973).
# annotation to a formula above: Specific gravity of Hydrogen chloride (HCl), from CRC Handbook of Tables for Applied Engineering Science, 2nd ed, edited by R. Bolz and G. Tuve, CRC Press (1973).
# Ammonia (NH_3) | 0.59 | Hydrogen sulfide (H_2S) | 1.18
# annotation to a formula above: Specific gravity of Ammonia (NH3), from CRC Handbook of Tables for Applied Engineering Science, 2nd ed, edited by R. Bolz and G. Tuve, CRC Press (1973).
# annotation to a formula above: Specific gravity of Hydrogen sulfide (H2S), from CRC Handbook of Tables for Applied Engineering Science, 2nd ed, edited by R. Bolz and G. Tuve, CRC Press (1973).
# Argon (Ar) | 1.38 | Krypton (Kr) | 2.89
# annotation to a formula above: Specific gravity of Argon (Ar), from CRC Handbook of Tables for Applied Engineering Science, 2nd ed, edited by R. Bolz and G. Tuve, CRC Press (1973).
# annotation to a formula above: Specific gravity of Krypton (Kr), from CRC Handbook of Tables for Applied Engineering Science, 2nd ed, edited by R. Bolz and G. Tuve, CRC Press (1973).
# Butadiene (C_4H_6) | 1.87 | Methane (CH_4) | 0.554
# annotation to a formula above: Specific gravity of Butadiene (C4H6), from CRC Handbook of Tables for Applied Engineering Science, 2nd ed, edited by R. Bolz and G. Tuve, CRC Press (1973).
# annotation to a formula above: Specific gravity of Methane (CH4), from CRC Handbook of Tables for Applied Engineering Science, 2nd ed, edited by R. Bolz and G. Tuve, CRC Press (1973).
# n-Butane, Isobutane (C_4H_10) | 2.07 | Methyl chloride (CH_3Cl) | 1.74
# annotation to a formula above: Specific gravity of n-Butane (C4H10), from CRC Handbook of Tables for Applied Engineering Science, 2nd ed, edited by R. Bolz and G. Tuve, CRC Press (1973).
# annotation to a formula above: Specific gravity of Methyl chloride (CH3Cl), from CRC Handbook of Tables for Applied Engineering Science, 2nd ed, edited by R. Bolz and G. Tuve, CRC Press (1973).
# 1-Butene (butylene) (C_4H_8) | 1.94 | Neon (Ne) | 0.697
# annotation to a formula above: 1-Butene (butylene) (C4H8), from CRC Handbook of Tables for Applied Engineering Science, 2nd ed, edited by R. Bolz and G. Tuve, CRC Press (1973).
# annotation to a formula above: Specific gravity of Neon (Ne), from CRC Handbook of Tables for Applied Engineering Science, 2nd ed, edited by R. Bolz and G. Tuve, CRC Press (1973).
# Carbon dioxide (CO_2) | 1.52 | Nitric oxide (NO) | 1.04
# annotation to a formula above: Specific gravity of Carbon dioxide (CO2), from CRC Handbook of Tables for Applied Engineering Science, 2nd ed, edited by R. Bolz and G. Tuve, CRC Press (1973).
# annotation to a formula above: Specific gravity of Nitric oxide (NO), from CRC Handbook of Tables for Applied Engineering Science, 2nd ed, edited by R. Bolz and G. Tuve, CRC Press (1973).
# Carbon monoxide (CO) | 0.967 | Nitrogen (N_2) | 0.967
# annotation to a formula above: Specific gravity of Carbon monoxide (CO), from CRC Handbook of Tables for Applied Engineering Science, 2nd ed, edited by R. Bolz and G. Tuve, CRC Press (1973).
# annotation to a formula above: Specific gravity of Nitrogen (N2), from CRC Handbook of Tables for Applied Engineering Science, 2nd ed, edited by R. Bolz and G. Tuve, CRC Press (1973).
# Chlorine (Cl_2) | 2.45 | Nitrous oxide (N_2O) | 1.52
# annotation to a formula above: Specific gravity of Chlorine (Cl2), from CRC Handbook of Tables for Applied Engineering Science, 2nd ed, edited by R. Bolz and G. Tuve, CRC Press (1973).
# annotation to a formula above: Specific gravity of Nitrous oxide (N2O), from CRC Handbook of Tables for Applied Engineering Science, 2nd ed, edited by R. Bolz and G. Tuve, CRC Press (1973).
# Deuterium (D_2) | 0.070 | Oxygen (O_2) | 1.105
# annotation to a formula above: Specific gravity of Deuterium (D2), from CRC Handbook of Tables for Applied Engineering Science, 2nd ed, edited by R. Bolz and G. Tuve, CRC Press (1973).
# annotation to a formula above: Specific gravity of Oxygen (O2), from CRC Handbook of Tables for Applied Engineering Science, 2nd ed, edited by R. Bolz and G. Tuve, CRC Press (1973).
# Ethane (C_2H_6) | 1.04 | Ozone (O_3) | 1.66
# annotation to a formula above: Specific gravity of Ethane (C2H6), from CRC Handbook of Tables for Applied Engineering Science, 2nd ed, edited by R. Bolz and G. Tuve, CRC Press (1973).
# annotation to a formula above: Specific gravity of Ozone (O3), from CRC Handbook of Tables for Applied Engineering Science, 2nd ed, edited by R. Bolz and G. Tuve, CRC Press (1973).
# Ethyl chloride (C_2H_5Cl) | 2.23 | Propane (C_3H_8) | 1.52
# annotation to a formula above: Specific gravity of Ethyl chloride (C2H5Cl), from CRC Handbook of Tables for Applied Engineering Science, 2nd ed, edited by R. Bolz and G. Tuve, CRC Press (1973).
# annotation to a formula above: Specific gravity of Propane (C3H8), from CRC Handbook of Tables for Applied Engineering Science, 2nd ed, edited by R. Bolz and G. Tuve, CRC Press (1973).
# Ethylene (ethene) (C_2H_4) | 0.969 | Propylene (C_3H_6) | 1.45
# annotation to a formula above: Specific gravity of Ethylene (ethene) (C2H4), from CRC Handbook of Tables for Applied Engineering Science, 2nd ed, edited by R. Bolz and G. Tuve, CRC Press (1973).
# annotation to a formula above: Specific gravity of Propylene (C3H6), from CRC Handbook of Tables for Applied Engineering Science, 2nd ed, edited by R. Bolz and G. Tuve, CRC Press (1973).
# Fluorine (F_2) | 1.31 | Sulfur dioxide (SO_2) | 2.21
# annotation to a formula above: Specific gravity of Fluorine (F2), from CRC Handbook of Tables for Applied Engineering Science, 2nd ed, edited by R. Bolz and G. Tuve, CRC Press (1973).
# annotation to a formula above: Specific gravity of Sulfur dioxide (SO2), from CRC Handbook of Tables for Applied Engineering Science, 2nd ed, edited by R. Bolz and G. Tuve, CRC Press (1973).
# Helium (He) | 0.138 | Xenon (Xe) | 4.53
# annotation to a formula above: Specific gravity of Helium (He), from CRC Handbook of Tables for Applied Engineering Science, 2nd ed, edited by R. Bolz and G. Tuve, CRC Press (1973).
# annotation to a formula above: Specific gravity of Xenon (Xe), from CRC Handbook of Tables for Applied Engineering Science, 2nd ed, edited by R. Bolz and G. Tuve, CRC Press (1973).
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# ^(* Green parentheses in this file indicate annotations to an expression. To read an annotation, right-click on the entire expression within the parentheses and choose View/Edit Annotation. If the expression is copied to another file, the annotation will be preserved.)
# Data from CRC Handbook of Tables for Applied Engineering Science, 2nd ed, edited by R. Bolz and G. Tuve, CRC Press (1973).
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