# Title: Gases: Specific Heat at 1.0 Atm Pressure, 20ºC, Except as Noted
# Description: Specific heat of common gases at atmospheric pressure.
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# PROPERTIES OF GASES
# reference tables
# Specific Heat at 1.0 Atm Pressure, 20ºC, Except as Noted
## Ratio of Specific Heat (γ)
## Gas
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# C_p
# Acetylene | 1.674*10^3*J/(kg*K) | 1.25
# annotation to a formula above: Specific heat of Acetylene, from CRC Handbook of Tables for Applied Engineering Science, 2nd ed., edited by R. Bolz and G. Tuve, CRC Press (1973).
# annotation to a formula above: Ratio of specific heat for Acetylene, from CRC Handbook of Tables for Applied Engineering Science, 2nd ed., edited by R. Bolz and G. Tuve, CRC Press (1973).
# Air (mixture) | 1.005*10^3*J/(kg*K) | 1.4
# annotation to a formula above: Specific heat of Air (mixture), from CRC Handbook of Tables for Applied Engineering Science, 2nd ed., edited by R. Bolz and G. Tuve, CRC Press (1973).
# annotation to a formula above: Ratio of specific heat for Air (mixture), from CRC Handbook of Tables for Applied Engineering Science, 2nd ed., edited by R. Bolz and G. Tuve, CRC Press (1973).
# Ammonia (NH_3) | 2.175*10^3*J/(kg*K) | 1.31
# annotation to a formula above: Specific heat of Ammonia (NH3), from CRC Handbook of Tables for Applied Engineering Science, 2nd ed., edited by R. Bolz and G. Tuve, CRC Press (1973).
# annotation to a formula above: Ratio of specific heat for Ammonia (NH3), from CRC Handbook of Tables for Applied Engineering Science, 2nd ed., edited by R. Bolz and G. Tuve, CRC Press (1973).
# Argon (Ar) | 523*J/(kg*K) | 1.67
# annotation to a formula above: Specific heat of Argon (Ar), from CRC Handbook of Tables for Applied Engineering Science, 2nd ed., edited by R. Bolz and G. Tuve, CRC Press (1973).
# annotation to a formula above: Ratio of specific heat for Argon (Ar), from CRC Handbook of Tables for Applied Engineering Science, 2nd ed., edited by R. Bolz and G. Tuve, CRC Press (1973).
# Butadiene (C_4H_6) | 1.427*10^3*J/(kg*K) | 1.12
# annotation to a formula above: Specific heat of Butadiene (C4H6), from CRC Handbook of Tables for Applied Engineering Science, 2nd ed., edited by R. Bolz and G. Tuve, CRC Press (1973).
# annotation to a formula above: Ratio of specific heat for Butadiene (C4H6), from CRC Handbook of Tables for Applied Engineering Science, 2nd ed., edited by R. Bolz and G. Tuve, CRC Press (1973).
# n-Butane (C_4H_10) | 1.675*10^3*J/(kg*K) | 1.096
# annotation to a formula above: Specific heat of n-Butane (C4H10), from CRC Handbook of Tables for Applied Engineering Science, 2nd ed., edited by R. Bolz and G. Tuve, CRC Press (1973).
# annotation to a formula above: Ratio of specific heat for n-Butane (C4H10), from CRC Handbook of Tables for Applied Engineering Science, 2nd ed., edited by R. Bolz and G. Tuve, CRC Press (1973).
# 1-Butene (butylene) (C_4H_8) | 1.505*10^3*J/(kg*K) | 1.112
# annotation to a formula above: Specific heat of 1-Butene (butylene) (C4H8), from CRC Handbook of Tables for Applied Engineering Science, 2nd ed., edited by R. Bolz and G. Tuve, CRC Press (1973).
# annotation to a formula above: Ratio of specific heat for 1-Butene (butylene) (C4H8), from CRC Handbook of Tables for Applied Engineering Science, 2nd ed., edited by R. Bolz and G. Tuve, CRC Press (1973).
# Carbon dioxide (CO_2) | 876*J/(kg*K) | 1.3
# annotation to a formula above: Specific heat of Carbon dioxide (CO2), from CRC Handbook of Tables for Applied Engineering Science, 2nd ed., edited by R. Bolz and G. Tuve, CRC Press (1973).
# annotation to a formula above: Ratio of specific heat for Carbon dioxide (CO2), from CRC Handbook of Tables for Applied Engineering Science, 2nd ed., edited by R. Bolz and G. Tuve, CRC Press (1973).
# Carbon monoxide (CO) | 1.046*10^3*J/(kg*K) | 1.4
# annotation to a formula above: Specific heat of Carbon monoxide (CO), from CRC Handbook of Tables for Applied Engineering Science, 2nd ed., edited by R. Bolz and G. Tuve, CRC Press (1973).
# annotation to a formula above: Ratio of specific heat for Carbon monoxide (CO), from CRC Handbook of Tables for Applied Engineering Science, 2nd ed., edited by R. Bolz and G. Tuve, CRC Press (1973).
# Chlorine (Cl_2) | 477*J/(kg*K) | 1.35
# annotation to a formula above: Specific heat of Chlorine (Cl2), from CRC Handbook of Tables for Applied Engineering Science, 2nd ed., edited by R. Bolz and G. Tuve, CRC Press (1973).
# annotation to a formula above: Ratio of specific heat for Chlorine (Cl2), from CRC Handbook of Tables for Applied Engineering Science, 2nd ed., edited by R. Bolz and G. Tuve, CRC Press (1973).
# Deuterium (D_2) | 7.238*10^3*J/(kg*K) | 1.4
# annotation to a formula above: Specific heat of Deuterium (D2), from CRC Handbook of Tables for Applied Engineering Science, 2nd ed., edited by R. Bolz and G. Tuve, CRC Press (1973).
# annotation to a formula above: Ratio of specific heat for Deuterium (D2), from CRC Handbook of Tables for Applied Engineering Science, 2nd ed., edited by R. Bolz and G. Tuve, CRC Press (1973).
# Ethane (C_2H_6) | 1.715*10^3*J/(kg*K) | 1.2
# annotation to a formula above: Specific heat of Ethyl chloride (C2H5Cl), from CRC Handbook of Tables for Applied Engineering Science, 2nd ed., edited by R. Bolz and G. Tuve, CRC Press (1973).
# annotation to a formula above: Ratio of specific heat of Ethane (C2H6), from CRC Handbook of Tables for Applied Engineering Science, 2nd ed., edited by R. Bolz and G. Tuve, CRC Press (1973).
# Ethyl chloride (C_2H_5Cl) | 1.13*10^3*J/(kg*K) | 1.13
# annotation to a formula above: Ratio of specific heat for Ethyl chloride (C2H5Cl), from CRC Handbook of Tables for Applied Engineering Science, 2nd ed., edited by R. Bolz and G. Tuve, CRC Press (1973).
# Ethylene (ethene) (C_2H_4) | 1.548*10^3*J/(kg*K) | 1.24
# annotation to a formula above: Specific heat of Ethylene (ethene) (C2H4), from CRC Handbook of Tables for Applied Engineering Science, 2nd ed., edited by R. Bolz and G. Tuve, CRC Press (1973).
# annotation to a formula above: Ratio of specific heat for Ethylene (ethene) (C2H4), from CRC Handbook of Tables for Applied Engineering Science, 2nd ed., edited by R. Bolz and G. Tuve, CRC Press (1973).
# Fluorine (F_2) | 828*J/(kg*K) | 1.35
# annotation to a formula above: Specific heat of Fluorine (F2), from CRC Handbook of Tables for Applied Engineering Science, 2nd ed., edited by R. Bolz and G. Tuve, CRC Press (1973).
# annotation to a formula above: Ratio of specific heat for Fluorine (F2), from CRC Handbook of Tables for Applied Engineering Science, 2nd ed., edited by R. Bolz and G. Tuve, CRC Press (1973).
# Helium (He) | 5.188*10^3*J/(kg*K) | 1.66
# annotation to a formula above: Specific heat of Helium (He), from CRC Handbook of Tables for Applied Engineering Science, 2nd ed., edited by R. Bolz and G. Tuve, CRC Press (1973).
# annotation to a formula above: Ratio of specific heat for Helium (He), from CRC Handbook of Tables for Applied Engineering Science, 2nd ed., edited by R. Bolz and G. Tuve, CRC Press (1973).
# Hydrogen (H_2) | 1.431*10^4*J/(kg*K) | 1.41
# annotation to a formula above: Specific heat of Hydrogen (H2), from CRC Handbook of Tables for Applied Engineering Science, 2nd ed., edited by R. Bolz and G. Tuve, CRC Press (1973).
# annotation to a formula above: Ratio of specific heat of Hydrogen (H2), from CRC Handbook of Tables for Applied Engineering Science, 2nd ed., edited by R. Bolz and G. Tuve, CRC Press (1973).
# Hydrogen chloride (HCl) | 812*J/(kg*K) | 1.39
# annotation to a formula above: Specific heat of Hydrogen chloride (HCl), from CRC Handbook of Tables for Applied Engineering Science, 2nd ed., edited by R. Bolz and G. Tuve, CRC Press (1973).
# annotation to a formula above: Ratio of specific heat for Hydrogen chloride (HCl), from CRC Handbook of Tables for Applied Engineering Science, 2nd ed., edited by R. Bolz and G. Tuve, CRC Press (1973).
# Hydrogen sulfide (H_2S) | 962*J/(kg*K) | 1.33
# annotation to a formula above: Specific heat of Hydrogen sulfide (H2S), from CRC Handbook of Tables for Applied Engineering Science, 2nd ed., edited by R. Bolz and G. Tuve, CRC Press (1973).
# annotation to a formula above: Ratio of specific heat for Hydrogen sulfide (H2S), from CRC Handbook of Tables for Applied Engineering Science, 2nd ed., edited by R. Bolz and G. Tuve, CRC Press (1973).
# Krypton (Kr) | 247*J/(kg*K) | 1.68
# annotation to a formula above: Specific heat of Krypton (Kr), from CRC Handbook of Tables for Applied Engineering Science, 2nd ed., edited by R. Bolz and G. Tuve, CRC Press (1973).
# annotation to a formula above: Ratio of specific heat for Krypton (Kr), from CRC Handbook of Tables for Applied Engineering Science, 2nd ed., edited by R. Bolz and G. Tuve, CRC Press (1973).
# Methane (CH_4) | 2.26*10^3*J/(kg*K) | 1.31
# annotation to a formula above: Specific heat of Methane (CH4), from CRC Handbook of Tables for Applied Engineering Science, 2nd ed., edited by R. Bolz and G. Tuve, CRC Press (1973).
# annotation to a formula above: Ratio of specific heat for Methane (CH4), from CRC Handbook of Tables for Applied Engineering Science, 2nd ed., edited by R. Bolz and G. Tuve, CRC Press (1973).
# Methyl chloride (CH_3Cl) | 837*J/(kg*K) | 1.28
# annotation to a formula above: Specific heat of Methyl chloride (CH3Cl), from CRC Handbook of Tables for Applied Engineering Science, 2nd ed., edited by R. Bolz and G. Tuve, CRC Press (1973).
# annotation to a formula above: Ratio of specific heat for Methyl chloride (CH3Cl), from CRC Handbook of Tables for Applied Engineering Science, 2nd ed., edited by R. Bolz and G. Tuve, CRC Press (1973).
# Neon (Ne) | 1.03*10^3*J/(kg*K) | 1.64
# annotation to a formula above: Specific heat of Neon (Ne), from CRC Handbook of Tables for Applied Engineering Science, 2nd ed., edited by R. Bolz and G. Tuve, CRC Press (1973).
# annotation to a formula above: Ratio of specific heat for Neon (Ne), from CRC Handbook of Tables for Applied Engineering Science, 2nd ed., edited by R. Bolz and G. Tuve, CRC Press (1973).
# Nitric oxide (NO) | 983*J/(kg*K) | 1.4
# annotation to a formula above: Specific Heat of Nitric oxide (NO), from CRC Handbook of Tables for Applied Engineering Science, 2nd ed., edited by R. Bolz and G. Tuve, CRC Press (1973).
# annotation to a formula above: Ratio of specific heat for Nitric oxide (NO), from CRC Handbook of Tables for Applied Engineering Science, 2nd ed., edited by R. Bolz and G. Tuve, CRC Press (1973).
# Nitrogen (N_2) | 1.04*10^3*J/(kg*K) | 1.4
# annotation to a formula above: Specific heat of Nitrogen (N2), from CRC Handbook of Tables for Applied Engineering Science, 2nd ed., edited by R. Bolz and G. Tuve, CRC Press (1973).
# annotation to a formula above: Ratio of specific heat for Nitrogen (N2), from CRC Handbook of Tables for Applied Engineering Science, 2nd ed., edited by R. Bolz and G. Tuve, CRC Press (1973).
# Nitrous oxide (N_2O) | 879*J/(kg*K) | 1.31
# annotation to a formula above: Specific heat of Nitrous oxide (N2O), from CRC Handbook of Tables for Applied Engineering Science, 2nd ed., edited by R. Bolz and G. Tuve, CRC Press (1973).
# annotation to a formula above: Ratio of specific heat for Nitrous oxide (N2O), from CRC Handbook of Tables for Applied Engineering Science, 2nd ed., edited by R. Bolz and G. Tuve, CRC Press (1973).
# Oxygen (O_2) | 920*J/(kg*K) | 1.4
# annotation to a formula above: Specific heat of Oxygen (O2), from CRC Handbook of Tables for Applied Engineering Science, 2nd ed., edited by R. Bolz and G. Tuve, CRC Press (1973).
# annotation to a formula above: Ratio of specific heat for Oxygen (O2), from CRC Handbook of Tables for Applied Engineering Science, 2nd ed., edited by R. Bolz and G. Tuve, CRC Press (1973).
# Ozone (O_3) | 820*J/(kg*K) | __
# annotation to a formula above: Specific heat of Ozone (O3), from CRC Handbook of Tables for Applied Engineering Science, 2nd ed., edited by R. Bolz and G. Tuve, CRC Press (1973).
# Propane (C_3H_8) | 1.63*10^3*J/(kg*K) | 1.2
# annotation to a formula above: Specific heat of Propane (C3H8), from CRC Handbook of Tables for Applied Engineering Science, 2nd ed., edited by R. Bolz and G. Tuve, CRC Press (1973).
# annotation to a formula above: Ratio of specific heat for Propane (C3H8), from CRC Handbook of Tables for Applied Engineering Science, 2nd ed., edited by R. Bolz and G. Tuve, CRC Press (1973).
# Propylene (C_3H_6) | 1.506*10^3*J/(kg*K) | 1.16
# annotation to a formula above: Specific heat of Propylene (C3H6), from CRC Handbook of Tables for Applied Engineering Science, 2nd ed., edited by R. Bolz and G. Tuve, CRC Press (1973).
# annotation to a formula above: Ratio of specific heat for Propylene (C3H6), from CRC Handbook of Tables for Applied Engineering Science, 2nd ed., edited by R. Bolz and G. Tuve, CRC Press (1973).
# Sulfur dioxide (SO_2) | 460*J/(kg*K) | 1.29
# annotation to a formula above: Specific heat of Sulfur dioxide (SO2), from CRC Handbook of Tables for Applied Engineering Science, 2nd ed., edited by R. Bolz and G. Tuve, CRC Press (1973).
# annotation to a formula above: Ratio of specific heat for Sulfur dioxide (SO2), from CRC Handbook of Tables for Applied Engineering Science, 2nd ed., edited by R. Bolz and G. Tuve, CRC Press (1973).
# Xenon (Xe) | 481*J/(kg*K) | 1.67
# annotation to a formula above: Specific heat of Xenon (Xe), from CRC Handbook of Tables for Applied Engineering Science, 2nd ed., edited by R. Bolz and G. Tuve, CRC Press (1973).
# annotation to a formula above: Ratio of specific heat for Xenon (Xe), from CRC Handbook of Tables for Applied Engineering Science, 2nd ed., edited by R. Bolz and G. Tuve, CRC Press (1973).
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# ^(* Green parentheses in this file indicate annotations to an expression. To read an annotation, right-click on the entire expression within the parentheses and choose View/Edit Annotation. If the expression is copied to another file, the annotation will be preserved.)
# Data from CRC Handbook of Tables for Applied Engineering Science, 2nd ed., edited by R. Bolz and G. Tuve, CRC Press (1973).
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