# Title: Gases: Sound Velocity at 1.0 Atm Pressure, 25ºC, Except as Noted
# Description: Velocity of sound through common gases at atmospheric pressure.
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# PROPERTIES OF GASES
# reference tables
# Sound Velocity at 1.0 Atm Pressure, 25ºC, Except as Noted
## Sound Velocity
## Sound Velocity
## Gas
## Gas
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# Acetylene | 343*m/sec | Hydrogen (H_2) | 1.315*10^3*m/sec
# annotation to a formula above: Sound velocity of Acetylene, from CRC Handbook of Tables for Applied Engineering Science, 2nd ed., edited by R. Bolz and G. Tuve, CRC Press (1973).
# annotation to a formula above: Sound velocity of Hydrogen (H2), from CRC Handbook of Tables for Applied Engineering Science, 2nd ed., edited by R. Bolz and G. Tuve, CRC Press (1973).
# Air (mixture) | 346*m/sec | Hydrogen chloride (HCl) | 310*m/sec
# annotation to a formula above: Sound velocity of Air (mixture), from CRC Handbook of Tables for Applied Engineering Science, 2nd ed., edited by R. Bolz and G. Tuve, CRC Press (1973).
# annotation to a formula above: Sound velocity of Hydrogen chloride (HCl), from CRC Handbook of Tables for Applied Engineering Science, 2nd ed., edited by R. Bolz and G. Tuve, CRC Press (1973).
# Ammonia (NH_3) | 415*m/sec | Hydrogen sulfide (H_2S) | 302*m/sec
# annotation to a formula above: Sound velocity of Ammonia (NH3), from CRC Handbook of Tables for Applied Engineering Science, 2nd ed., edited by R. Bolz and G. Tuve, CRC Press (1973).
# annotation to a formula above: Sound velocity of Hydrogen sulfide (H2S), from CRC Handbook of Tables for Applied Engineering Science, 2nd ed., edited by R. Bolz and G. Tuve, CRC Press (1973).
# Argon (Ar) | 322*m/sec | Krypton (Kr) | 223*m/sec
# annotation to a formula above: Sound velocity of Argon (Ar), from CRC Handbook of Tables for Applied Engineering Science, 2nd ed., edited by R. Bolz and G. Tuve, CRC Press (1973).
# annotation to a formula above: Sound velocity of Krypton (Kr), from CRC Handbook of Tables for Applied Engineering Science, 2nd ed., edited by R. Bolz and G. Tuve, CRC Press (1973).
# Butadiene (C_4H_6) | 226*m/sec | Methane (CH_4) | 446*m/sec
# annotation to a formula above: Sound velocity of Butadiene (C4H6), from CRC Handbook of Tables for Applied Engineering Science, 2nd ed., edited by R. Bolz and G. Tuve, CRC Press (1973).
# annotation to a formula above: Sound velocity of Methane (CH4), from CRC Handbook of Tables for Applied Engineering Science, 2nd ed., edited by R. Bolz and G. Tuve, CRC Press (1973).
# n-Butane, Isobutane  (C_4H_10) | 216*m/sec | Methyl chloride (CH_3Cl) | 251*m/sec
# annotation to a formula above: Sound velocity of n-Butane (C4H10), from CRC Handbook of Tables for Applied Engineering Science, 2nd ed., edited by R. Bolz and G. Tuve, CRC Press (1973).
# annotation to a formula above: Sound velocity of Methyl chloride (CH3Cl), from CRC Handbook of Tables for Applied Engineering Science, 2nd ed., edited by R. Bolz and G. Tuve, CRC Press (1973).
# 1-Butene (butylene) (C_4H_8) | 222*m/sec | Neon (Ne) | 454*m/sec
# annotation to a formula above: Sound velocity of 1-Butene (butylene) (C4H8), from CRC Handbook of Tables for Applied Engineering Science, 2nd ed., edited by R. Bolz and G. Tuve, CRC Press (1973).
# annotation to a formula above: Sound velocity of Neon (Ne), from CRC Handbook of Tables for Applied Engineering Science, 2nd ed., edited by R. Bolz and G. Tuve, CRC Press (1973).
# Carbon dioxide (CO_2) | 270*m/sec | Nitric oxide (NO) | 341*m/sec
# annotation to a formula above: Sound velocity of Carbon dioxide (CO2), from CRC Handbook of Tables for Applied Engineering Science, 2nd ed., edited by R. Bolz and G. Tuve, CRC Press (1973).
# annotation to a formula above: Sound velocity of Nitric oxide (NO), from CRC Handbook of Tables for Applied Engineering Science, 2nd ed., edited by R. Bolz and G. Tuve, CRC Press (1973).
# Carbon monoxide (CO) | 352*m/sec | Nitrogen (N_2) | 353*m/sec
# annotation to a formula above: Sound velocity of Carbon monoxide (CO), from CRC Handbook of Tables for Applied Engineering Science, 2nd ed., edited by R. Bolz and G. Tuve, CRC Press (1973).
# annotation to a formula above: Sound velocity of Nitrogen (N2), from CRC Handbook of Tables for Applied Engineering Science, 2nd ed., edited by R. Bolz and G. Tuve, CRC Press (1973).
# Chlorine (Cl_2) | 215*m/sec | Nitrous oxide (N_2O) | 268*m/sec
# annotation to a formula above: Sound velocity of Chlorine (Cl2), from CRC Handbook of Tables for Applied Engineering Science, 2nd ed., edited by R. Bolz and G. Tuve, CRC Press (1973).
# annotation to a formula above: Sound velocity of Nitrous oxide (N2O), from CRC Handbook of Tables for Applied Engineering Science, 2nd ed., edited by R. Bolz and G. Tuve, CRC Press (1973).
# Deuterium (D_2) | 930*m/sec | Oxygen (O_2) | 329*m/sec
# annotation to a formula above: Sound velocity of Deuterium (D2), from CRC Handbook of Tables for Applied Engineering Science, 2nd ed., edited by R. Bolz and G. Tuve, CRC Press (1973).
# annotation to a formula above: Sound velocity of Oxygen (O2), from CRC Handbook of Tables for Applied Engineering Science, 2nd ed., edited by R. Bolz and G. Tuve, CRC Press (1973).
# Ethane (C_2H_6) | 316*m/sec | Propane (C_3H_8) | 253*m/sec
# annotation to a formula above: Sound velocity of Ethane (C2H6), from CRC Handbook of Tables for Applied Engineering Science, 2nd ed., edited by R. Bolz and G. Tuve, CRC Press (1973).
# annotation to a formula above: Sound velocity of Propane (C3H8), from CRC Handbook of Tables for Applied Engineering Science, 2nd ed., edited by R. Bolz and G. Tuve, CRC Press (1973).
# Ethyl chloride (C_2H_5Cl) | 204*m/sec | Propylene (C_3H_6) | 261*m/sec
# annotation to a formula above: Sound velocity of Propylene (C3H6), from CRC Handbook of Tables for Applied Engineering Science, 2nd ed., edited by R. Bolz and G. Tuve, CRC Press (1973).
# annotation to a formula above: Sound velocity of Ethyl chloride (C2H5Cl), from CRC Handbook of Tables for Applied Engineering Science, 2nd ed., edited by R. Bolz and G. Tuve, CRC Press (1973).
# Ethylene (ethene) (C_2H_4) | 331*m/sec | Sulfur dioxide (SO_2) | 220*m/sec
# annotation to a formula above: Sound velocity of Sulfur dioxide (SO2), from CRC Handbook of Tables for Applied Engineering Science, 2nd ed., edited by R. Bolz and G. Tuve, CRC Press (1973).
# annotation to a formula above: Sound velocity of Ethylene (ethene) (C2H4), from CRC Handbook of Tables for Applied Engineering Science, 2nd ed., edited by R. Bolz and G. Tuve, CRC Press (1973).
# Fluorine (F_2) | 290*m/sec | Xenon (Xe) | 177*m/sec
# annotation to a formula above: Sound velocity of Xenon (Xe), from CRC Handbook of Tables for Applied Engineering Science, 2nd ed., edited by R. Bolz and G. Tuve, CRC Press (1973).
# annotation to a formula above: Sound velocity of Fluorine (F2), from CRC Handbook of Tables for Applied Engineering Science, 2nd ed., edited by R. Bolz and G. Tuve, CRC Press (1973).
# Helium (He) | 1.015*10^3*m/sec
# annotation to a formula above: Sound velocity of Helium (He), from CRC Handbook of Tables for Applied Engineering Science, 2nd ed., edited by R. Bolz and G. Tuve, CRC Press (1973).
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# ^(* Green parentheses in this file indicate annotations to an expression. To read an annotation, right-click on the entire expression within the parentheses and choose View/Edit Annotation. If the expression is copied to another file, the annotation will be preserved.)
# Data from CRC Handbook of Tables for Applied Engineering Science, 2nd ed., edited by R. Bolz and G. Tuve, CRC Press (1973).
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