# Title: Gases: Molecular Weight at 1.0 Atm Pressure, 20ºC, Except as Noted
# Description: Molecular weight of common gases at atmospheric pressure.
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# PROPERTIES OF GASES
# reference tables
# Molecular Weight at 1.0 Atm Pressure, 20ºC, Except as Noted
## Molecular Weight
## Gas
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# Acetylene | 26.04
# annotation to a formula above: Molecular weight of Acetylene, from CRC Handbook of Tables for Applied Engineering Science, 2nd ed., edited by R. Bolz and G. Tuve, CRC Press (1973).
# Air (mixture) | 28.966
# annotation to a formula above: Molecular weight of Air (mixture), from CRC Handbook of Tables for Applied Engineering Science, 2nd ed., edited by R. Bolz and G. Tuve, CRC Press (1973).
# Ammonia (NH_3) | 17.02
# annotation to a formula above: Molecular weight of Ammonia (NH3), from CRC Handbook of Tables for Applied Engineering Science, 2nd ed., edited by R. Bolz and G. Tuve, CRC Press (1973).
# Argon (Ar) | 39.948
# annotation to a formula above: Molecular weight of Argon (Ar), from CRC Handbook of Tables for Applied Engineering Science, 2nd ed., edited by R. Bolz and G. Tuve, CRC Press (1973).
# Butadiene (C_4H_6) | 54.09
# annotation to a formula above: Molecular weight of Butadiene (C4H6), from CRC Handbook of Tables for Applied Engineering Science, 2nd ed., edited by R. Bolz and G. Tuve, CRC Press (1973).
# n-Butane, Isobutane (C_4H_10) | 58.12
# annotation to a formula above: Molecular weight of n-Butane (C4H10), from CRC Handbook of Tables for Applied Engineering Science, 2nd ed., edited by R. Bolz and G. Tuve, CRC Press (1973).
# 1-Butene (butylene) (C_4H_8) | 56.108
# annotation to a formula above: Molecular weight of 1-Butane (butylene) (C4H8), from CRC Handbook of Tables for Applied Engineering Science, 2nd ed., edited by R. Bolz and G. Tuve, CRC Press (1973).
# Carbon dioxide (CO_2) | 44.01
# annotation to a formula above: Molecular weight of Carbon dioxide (CO2), from CRC Handbook of Tables for Applied Engineering Science, 2nd ed., edited by R. Bolz and G. Tuve, CRC Press (1973).
# Carbon monoxide (CO) | 28.011
# annotation to a formula above: Molecular weight of Carbon monoxide (CO), from CRC Handbook of Tables for Applied Engineering Science, 2nd ed., edited by R. Bolz and G. Tuve, CRC Press (1973).
# Chlorine (Cl_2) | 70.906
# annotation to a formula above: Molecular weight of Chlorine (Cl2), from CRC Handbook of Tables for Applied Engineering Science, 2nd ed., edited by R. Bolz and G. Tuve, CRC Press (1973).
# Deuterium (D_2) | 2.014
# annotation to a formula above: Molecular weight of Deuterium (D2), from CRC Handbook of Tables for Applied Engineering Science, 2nd ed., edited by R. Bolz and G. Tuve, CRC Press (1973).
# Ethane (C_2H_6) | 30.070
# annotation to a formula above: Molecular weight of Ethane (C2H6), from CRC Handbook of Tables for Applied Engineering Science, 2nd ed., edited by R. Bolz and G. Tuve, CRC Press (1973).
# Ethyl chloride (C_2H_5Cl) | 64.515
# annotation to a formula above: Molecular weight of Ethyl chloride (C2H5Cl), from CRC Handbook of Tables for Applied Engineering Science, 2nd ed., edited by R. Bolz and G. Tuve, CRC Press (1973).
# Ethylene (ethene) (C_2H_4) | 28.054
# annotation to a formula above: Molecular weight of Ethylene (ethene) (C2H4), from CRC Handbook of Tables for Applied Engineering Science, 2nd ed., edited by R. Bolz and G. Tuve, CRC Press (1973).
# Fluorine (F_2) | 37.996
# annotation to a formula above: Molecular weight of Fluorine (F2), from CRC Handbook of Tables for Applied Engineering Science, 2nd ed., edited by R. Bolz and G. Tuve, CRC Press (1973).
# Helium (He) | 4.0026
# annotation to a formula above: Molecular weight of Helium (He), from CRC Handbook of Tables for Applied Engineering Science, 2nd ed., edited by R. Bolz and G. Tuve, CRC Press (1973).
# Hydrogen (H_2) | 2.016
# annotation to a formula above: Molecular weight of Hydrogen (H2), from CRC Handbook of Tables for Applied Engineering Science, 2nd ed., edited by R. Bolz and G. Tuve, CRC Press (1973).
# Hydrogen chloride (HCl) | 36.461
# annotation to a formula above: Molecular weight of Hydrogen chloride (HCl), from CRC Handbook of Tables for Applied Engineering Science, 2nd ed., edited by R. Bolz and G. Tuve, CRC Press (1973).
# Hydrogen sulfide (H_2S) | 34.076
# annotation to a formula above: Molecular weight of Hydrogen sulfide (H2S), from CRC Handbook of Tables for Applied Engineering Science, 2nd ed., edited by R. Bolz and G. Tuve, CRC Press (1973).
# Krypton (Kr) | 83.80
# annotation to a formula above: Molecular weight of Krypton (Kr), from CRC Handbook of Tables for Applied Engineering Science, 2nd ed., edited by R. Bolz and G. Tuve, CRC Press (1973).
# Methane (CH_4) | 16.044
# annotation to a formula above: Molecular weight of Methane (CH4), from CRC Handbook of Tables for Applied Engineering Science, 2nd ed., edited by R. Bolz and G. Tuve, CRC Press (1973).
# Methyl chloride (CH_3Cl) | 50.488
# annotation to a formula above: Molecular weight of Methyl chloride (CH3Cl), from CRC Handbook of Tables for Applied Engineering Science, 2nd ed., edited by R. Bolz and G. Tuve, CRC Press (1973).
# Neon (Ne) | 20.179
# annotation to a formula above: Molecular weight of Neon (Ne), from CRC Handbook of Tables for Applied Engineering Science, 2nd ed., edited by R. Bolz and G. Tuve, CRC Press (1973).
# Nitric oxide (NO) | 30.006
# annotation to a formula above: Molecular weight of Nitric oxide (NO), from CRC Handbook of Tables for Applied Engineering Science, 2nd ed., edited by R. Bolz and G. Tuve, CRC Press (1973).
# Nitrogen (N_2) | 28.0134
# annotation to a formula above: Molecular weight of Nitrogen (N2), from CRC Handbook of Tables for Applied Engineering Science, 2nd ed., edited by R. Bolz and G. Tuve, CRC Press (1973).
# Nitrous oxide (N_2O) | 44.012
# annotation to a formula above: Molecular weight of Nitrous oxide (N2O), from CRC Handbook of Tables for Applied Engineering Science, 2nd ed., edited by R. Bolz and G. Tuve, CRC Press (1973).
# Oxygen (O_2) | 31.9988
# annotation to a formula above: Molecular weight of Oxygen (O2), from CRC Handbook of Tables for Applied Engineering Science, 2nd ed., edited by R. Bolz and G. Tuve, CRC Press (1973).
# Ozone (O_3) | 47.998
# annotation to a formula above: Molecular weight of Ozone (O3), from CRC Handbook of Tables for Applied Engineering Science, 2nd ed., edited by R. Bolz and G. Tuve, CRC Press (1973).
# Propane (C_3H_8) | 44.097
# annotation to a formula above: Molecular weight of Propane (C3H8), from CRC Handbook of Tables for Applied Engineering Science, 2nd ed., edited by R. Bolz and G. Tuve, CRC Press (1973).
# Propylene (C_3H_6) | 42.08
# annotation to a formula above: Molecular weight of Propylene (C3H6), from CRC Handbook of Tables for Applied Engineering Science, 2nd ed., edited by R. Bolz and G. Tuve, CRC Press (1973).
# Sulfur dioxide (SO_2) | 64.06
# annotation to a formula above: Molecular weight of Sulfur dioxide (SO2), from CRC Handbook of Tables for Applied Engineering Science, 2nd ed., edited by R. Bolz and G. Tuve, CRC Press (1973).
# Xenon (Xe) | 131.30
# annotation to a formula above: Molecular weight of Xenon (Xe), from CRC Handbook of Tables for Applied Engineering Science, 2nd ed., edited by R. Bolz and G. Tuve, CRC Press (1973).
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# ^(* Green parentheses in this file indicate annotations to an expression. To read an annotation, right-click on the entire expression within the parentheses and choose View/Edit Annotation. If the expression is copied to another file, the annotation will be preserved.)
# Data from CRC Handbook of Tables for Applied Engineering Science, 2nd ed., edited by R. Bolz and G. Tuve, CRC Press (1973).
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