# Title: Area and Perimeters: Triangle
# Description: Calculating the area and perimeter of a triangle.
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# AREAS AND PERIMETERS
# reference tables
# Triangle
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# Expressions for Area:
# 1/2*h*b | area in terms of h and b
# annotation to a formula above: From Mathematical Handbook of Formulas and Tables, by Murray R. Spiegel, McGraw-Hill Book Company (1968).
sqrt(s*(s - a)*(s - b)*(s - c))  # Heron's formula, where s is the semiperimeter
1/2*a*b*sin(θ)  # area in terms of a, b, and θ
# Perimeter:
a + b + c
# Example 1: Find the area of a triangle given an altitude, h, and a corresponding base, b.
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h := 5*cm
b := 13*cm
Area := 1/2*h*b
Area = 32.5 cm^2
# Example 2: Find the area and perimeter of a triangle given the lengths of the sides, a, b, and c.
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a := 17*in
b := 35*in
c := 25*in
s := 1/2*(a + b + c)  # semiperimeter
# Heron's formula:
Area := sqrt(s*(s - a)*(s - b)*(s - c))
Area = 197.765 in^2
# Find the perimeter.
Perimeter := a + b + c
Perimeter = 77 in
# Example 3: Find the area of a triangle given two sides, a and b, and their included angle, θ.
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a := 3/4*in
b := 2*in
θ := 35*deg
Area := 1/2*b*a*sin(θ)
Area = 0.430182 in^2
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# ^(* Green parentheses in this file indicate annotations to an expression. To read an annotation, right-click on the entire expression within the parentheses and choose View/Edit Annotation. If the expression is copied to another file, the annotation will be preserved.)
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