# Title: Area and Perimeters: Regular Polygon
# Description: Calculating the area and perimeter of a regular polygon.
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# AREAS AND PERIMETERS
# reference tables
# Regular Polygon
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# Area:
1/4*n*b^2*cot(π/n)
# annotation to a formula above: From Mathematical Handbook of Formulas and Tables, by Murray R. Spiegel, McGraw-Hill Book Company (1968).
# Perimeter: | n*b
# Example: Find the area and perimeter of a regular polygon given the length of each side, b, and the number of sides, n.
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b := 5/8*yd
n := 8
Area := 1/4*n*b^2*cot(π/n)
Area = 1.8861 yd^2
# Find the perimeter.
Perimeter := n*b
Perimeter = 5 yd
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# ^(* Green parentheses in this file indicate annotations to an expression. To read an annotation, right-click on the entire expression within the parentheses and choose View/Edit Annotation. If the expression is copied to another file, the annotation will be preserved.)
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