# Title: Area and Perimeters: Inscribed Polygon
# Description: Calculating the area and perimeter of an inscribed polygon.
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# AREAS AND PERIMETERS
# reference tables
# Inscribed Polygon
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# Area:
1/2*n*r^2*sin(2*π/n)
# annotation to a formula above: From Mathematical Handbook of Formulas and Tables, by Murray R. Spiegel, McGraw-Hill Book Company (1968).
# Perimeter:
2*n*r*sin(π/n)
# Example: Find the area and perimeter of an inscribed regular polygon given the radius of the circle, r, and the number of sides of the polygon, n.
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r := 9*ft
n := 8
Area := 1/2*n*r^2*sin(2*π/n)
Area = 229.103 ft^2
# Find the perimeter.
Perimeter := 2*n*r*sin(π/n)
Perimeter = 55.1064 ft
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# ^(* Green parentheses in this file indicate annotations to an expression. To read an annotation, right-click on the entire expression within the parentheses and choose View/Edit Annotation. If the expression is copied to another file, the annotation will be preserved.)
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