# Title: Area and Perimeters: Lemniscate
# Description: Calculating the area of a lemniscate.
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# AREAS AND PERIMETERS
# reference tables
# Lemniscate
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# Area for both loops: | a^2
# annotation to a formula above: From Mathematical Handbook of Formulas and Tables, by Murray R. Spiegel, McGraw-Hill Book Company (1968).
# Equation in polar coordinates:
r^2 == a^2*cos(2*θ)
# Example 1: Find the area of a single loop of a lemniscate given a.
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a := 6*in
Area := a^2/2
Area = 18 in^2
# Example 2: The equation for the lemniscate is given below.
a := 6
n := 100
r^2 == a^2*cos(2*θ)  # equation in polar coordinates
r(θ) := a*sqrt(cos(2*θ))  # assume a is positive
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# ^(* Green parentheses in this file indicate annotations to an expression. To read an annotation, right-click on the entire expression within the parentheses and choose View/Edit Annotation. If the expression is copied to another file, the annotation will be preserved.)
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