# Title: Area and Perimeters: Rectangle
# Description: Calculating the area and perimeter of a rectangle.
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# AREAS AND PERIMETERS
# reference tables
# Rectangle
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# Area: | a*b
# annotation to a formula above: From Mathematical Handbook of Formulas and Tables, by Murray R. Spiegel, McGraw-Hill Book Company (1968).
# Perimeter:
2*a + 2*b
# Example:  Find the area and perimeter of a rectangle given its length, b, and width, a.
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a := 3.4*in
b := 12.8*in
Area := a*b
Area = 43.52 in^2
Perimeter := 2*a + 2*b
Perimeter = 32.4 in
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# ^(* Green parentheses in this file indicate annotations to an expression. To read an annotation, right-click on the entire expression within the parentheses and choose View/Edit Annotation. If the expression is copied to another file, the annotation will be preserved.)
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