# Title: Area and Perimeters: Parallelogram
# Description: Calculating the area and perimeter of a parallelogram.
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# AREAS AND PERIMETERS
# reference tables
# Parallelogram
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# Expressions for Area:
# b*h | area in terms of b and h
# annotation to a formula above: From Mathematical Handbook of Formulas and Tables, by Murray R. Spiegel, McGraw-Hill Book Company (1968).
a*b*sin(θ)  # area in terms of a, b, and θ
# Perimeter:
2*a + 2*b
# Example 1: Find the area of a parallelogram given the length of a base, b, and a corresponding height, h.
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b := 16*ft
h := 1*yd
Area := b*h
Area = 48 ft^2
# Example 2: Find the area and perimeter of a parallelogram given the lengths of two adjacent sides and an angle, θ.
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a := 1.5*cm
b := 4.25*cm
θ := 70*deg
Area := a*b*sin(θ)
Area = 5.99054 cm^2
Perimeter := 2*a + 2*b
Perimeter = 11.5 cm
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# ^(* Green parentheses in this file indicate annotations to an expression. To read an annotation, right-click on the entire expression within the parentheses and choose View/Edit Annotation. If the expression is copied to another file, the annotation will be preserved.)
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