# Title: Area and Perimeters: Inscribed Circle
# Description: Calculating the radius and area of an inscribed circle.
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# AREAS AND PERIMETERS
# reference tables
# Inscribed Circle
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# Radius of inscribed circle:
sqrt(s*(s - a)*(s - b)*(s - c))/s
# annotation to a formula above: From Mathematical Handbook of Formulas and Tables, by Murray R. Spiegel, McGraw-Hill Book Company (1968).
# where s is the semiperimeter of the triangle.
# Example: Find the radius and area of a circle inscribed in a triangle given the lengths of the sides of the triangle,
# a, b, and c.
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a := 2*m
b := 2.75*m
c := 2.6*m
# First, find the radius of the circle.
s := 1/2*(a + b + c)  # Semiperimeter
r := sqrt(s*(s - a)*(s - b)*(s - c))/s
r = 0.673215 m
Area := π*r^2
Area = 1.42383 m^2
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# ^(* Green parentheses in this file indicate annotations to an expression. To read an annotation, right-click on the entire expression within the parentheses and choose View/Edit Annotation. If the expression is copied to another file, the annotation will be preserved.)
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