# Title: Area and Perimeters: Circumscribed Circle
# Description: Calculating the radius and area of a circumscribed circle.
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# AREAS AND PERIMETERS
# reference tables
# Circumscribed Circle
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# Radius of circumscribed circle:
a*b*c/(4*sqrt(s*(s - a)*(s - b)*(s - c)))
# annotation to a formula above: From Mathematical Handbook of Formulas and Tables, by Murray R. Spiegel, McGraw-Hill Book Company (1968).
# where s is the semiperimeter of the triangle.
# Example: Find the radius and area of a circle circumscribed about a triangle given the lengths of the sides of the triangle,
# a, b, and c.
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a := 9*in
b := 8*in
c := 10*in
# First, find the radius of the circle.
s := 1/2*(a + b + c)  # Semiperimeter
r := a*b*c/(4*sqrt(s*(s - a)*(s - b)*(s - c)))
r = 5.26361 in
Area := π*r^2
Area = 87.0398 in^2
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# ^(* Green parentheses in this file indicate annotations to an expression. To read an annotation, right-click on the entire expression within the parentheses and choose View/Edit Annotation. If the expression is copied to another file, the annotation will be preserved.)
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