# Title: Area and Perimeters: Sector of a Circle
# Description: Calculating the area and arc length of a sector of a circle.
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# AREAS AND PERIMETERS
# reference tables
# Sector of a Circle
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# Area: | 1/2*r^2*θ
# annotation to a formula above: From Mathematical Handbook of Formulas and Tables, by Murray R. Spiegel, McGraw-Hill Book Company (1968).
# Arc length: | r*θ
# Example: Find the area and arc length, s, of a sector of a circle given the radius, r, and the subtended angle, θ.
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r := 4*ft
θ := 22*deg  # Use radians or degrees.
Area := 1/2*r^2*θ
Area = 3.07178 ft^2
# Find the length of the intercepted arc, s.
s := r*θ
s = 1.53589 ft
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# ^(* Green parentheses in this file indicate annotations to an expression. To read an annotation, right-click on the entire expression within the parentheses and choose View/Edit Annotation. If the expression is copied to another file, the annotation will be preserved.)
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