# Title: Area and Perimeters: Circular Segment
# Description: Calculating the area of circular segment.
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# AREAS AND PERIMETERS
# reference tables
# Circular Segment
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# Area:
1/2*r^2*(θ - sin(θ))
# annotation to a formula above: From Mathematical Handbook of Formulas and Tables, by Murray R. Spiegel, McGraw-Hill Book Company (1968).
# Example: Find the area of a circular segment given the radius of the circle, r, and the central angle, θ.
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r := 10*cm
θ := 110*deg
Area := 1/2*r^2*(θ - sin(θ))
Area = 49.0085 cm^2
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# ^(* Green parentheses in this file indicate annotations to an expression. To read an annotation, right-click on the entire expression within the parentheses and choose View/Edit Annotation. If the expression is copied to another file, the annotation will be preserved.)
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