# Title: Volumes and Surface Areas: Rectangular Prism
# Description: Calculating the volume and surface area of a rectangular prism.
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# VOLUMES AND SURFACE AREAS
# reference tables
# Rectangular Prism
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# Volume:
a*b*c
# annotation to a formula above: From Mathematical Handbook of Formulas and Tables, by Murray R. Spiegel, McGraw-Hill Book Company (1968).
# Surface Area:
2*(a*b + a*c + b*c)
# Example: Find the volume of a rectangular prism (or right parallelepiped) given the length, a, height, b, and width, c.
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a := 23.5*m
b := 4.6*m
c := 7.6*m
Volume := a*b*c
Volume = 821.56 m^3
# Find the surface area.
SA := 2*(a*b + a*c + b*c)
SA = 643.32 m^2
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# ^(* Green parentheses in this file indicate annotations to an expression. To read an annotation, right-click on the entire expression within the parentheses and choose View/Edit Annotation. If the expression is copied to another file, the annotation will be preserved.)
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