# Title: Volumes and Surface Areas: Spherical Cap
# Description: Calculating the volume and surface area of a spherical cap.
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# VOLUMES AND SURFACE AREAS
# reference tables
# Spherical Cap
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# Volume:
1/3*π*h^2*(3*r - h)
# annotation to a formula above: From Mathematical Handbook of Formulas and Tables, by Murray R. Spiegel, McGraw-Hill Book Company (1968).
# Surface area:
2*π*r*h
# Example: Find the volume and surface area of a spherical cap given the radius, r, and height, h.
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r := .938*ft
h := 4.375*in
Volume := 1/3*π*h^2*(3*r - h)
Volume = 589.154 in^3
# Find the surface area.
SA := 2*π*r*h
SA = 309.415 in^2
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# ^(* Green parentheses in this file indicate annotations to an expression. To read an annotation, right-click on the entire expression within the parentheses and choose View/Edit Annotation. If the expression is copied to another file, the annotation will be preserved.)
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