# Title: Volumes and Surface Areas: Spherical Triangle
# Description: Calculating the area of a spherical triangle.
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# VOLUMES AND SURFACE AREAS
# reference tables
# Spherical Triangle
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# Area of a spherical triangle, ABC:
(A + B + C - π)*r^2
# annotation to a formula above: From Mathematical Handbook of Formulas and Tables, by Murray R. Spiegel, McGraw-Hill Book Company (1968).
# Example: Find the area of a spherical triangle given the angles of the triangle, A, B, and C, and the radius of the sphere, r.
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A := π/2*rad
B := 2/3*π*rad
C := π/2*rad
r := 1*yd
Area_ABC := (A + B + C - π)*r^2
Area_ABC = 2.0944 yd^2
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# ^(* Green parentheses in this file indicate annotations to an expression. To read an annotation, right-click on the entire expression within the parentheses and choose View/Edit Annotation. If the expression is copied to another file, the annotation will be preserved.)
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