# Title: Volumes and Surface Areas: Torus
# Description: Calculating the volume and surface area of a torus.
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# VOLUMES AND SURFACE AREAS
# reference tables
# Torus
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# Volume:
1/4*π^2*(a + b)*(b - a)^2
# annotation to a formula above: From Mathematical Handbook of Formulas and Tables, by Murray R. Spiegel, McGraw-Hill Book Company (1968).
# Surface area:
π^2*(b^2 - a^2)
# Example: Find the volume and surface area of a torus given the inner diameter, a, and outer diameter, b.
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a := 0.67*m
b := 0.96*m
Volume := 1/4*π^2*(a + b)*(b - a)^2
Volume = 0.338239 m^3
# Find the surface area.
SA := π^2*(b^2 - a^2)
SA = 4.66536 m^2
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# ^(* Green parentheses in this file indicate annotations to an expression. To read an annotation, right-click on the entire expression within the parentheses and choose View/Edit Annotation. If the expression is copied to another file, the annotation will be preserved.)
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