# Title: Volumes and Surface Areas: Paraboloid
# Description: Calculating the volume of a paraboloid.
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# VOLUMES AND SURFACE AREAS
# reference tables
# Paraboloid
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# Volume:
1/2*π*b^2*a
# annotation to a formula above: From Mathematical Handbook of Formulas and Tables, by Murray R. Spiegel, McGraw-Hill Book Company (1968).
# Example: Find the volume of a paraboloid given the perpendicular lengths, a and b.
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a := 10*ft
b := 4.333*ft
Volume := 1/2*π*b^2*a
Volume = 294.915 ft^3
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# ^(* Green parentheses in this file indicate annotations to an expression. To read an annotation, right-click on the entire expression within the parentheses and choose View/Edit Annotation. If the expression is copied to another file, the annotation will be preserved.)
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