# Title: Volumes and Surface Areas: Right Circular Cylinder
# Description: Calculating the volume and lateral surface area of a right circular cylinder.
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# VOLUMES AND SURFACE AREAS
# reference tables
# Right Circular Cylinder
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# Volume:
π*r^2*h
# annotation to a formula above: From Mathematical Handbook of Formulas and Tables, by Murray R. Spiegel, McGraw-Hill Book Company (1968).
# Lateral surface area:
2*π*r*h
# Example: Find the volume and lateral surface area of a right circular cylinder given the radius of the base, r, and the height, h.
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r := 25.6*ft
h := 70.5*ft
Volume := π*r^2*h
Volume = 145151 ft^3
# Find the lateral surface area.
Lateral_SA := 2*π*r*h
Lateral_SA = 11339.9 ft^2
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# ^(* Green parentheses in this file indicate annotations to an expression. To read an annotation, right-click on the entire expression within the parentheses and choose View/Edit Annotation. If the expression is copied to another file, the annotation will be preserved.)
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