# Title: Volumes and Surface Areas: Pyramid
# Description: Calculating the volume of a pyramid.
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# VOLUMES AND SURFACE AREAS
# reference tables
# Pyramid
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# Volume:
1/3*A*h
# annotation to a formula above: From Mathematical Handbook of Formulas and Tables, by Murray R. Spiegel, McGraw-Hill Book Company (1968).
# Example: Find the volume of a pyramid with base area, A, and height, h.
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A := 38.7*mm^2
h := 9.2*mm
Volume := 1/3*A*h
Volume = 118.68 mm^3
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# ^(* Green parentheses in this file indicate annotations to an expression. To read an annotation, right-click on the entire expression within the parentheses and choose View/Edit Annotation. If the expression is copied to another file, the annotation will be preserved.)
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