# Title: Volumes and Surface Areas: Frustum of Right Circular Cone
# Description: Calculating the volume and lateral surface area of the frustum of a right circular cone.
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# VOLUMES AND SURFACE AREAS
# reference tables
# Frustum of Right Circular Cone
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# Volume:
1/3*π*h*(a^2 + a*b + b^2)
# annotation to a formula above: From Mathematical Handbook of Formulas and Tables, by Murray R. Spiegel, McGraw-Hill Book Company (1968).
# Expression for lateral surface area:
π*(a + b)*sqrt(h^2 + (b - a)^2)
# Lateral surface area in terms of
# a, b, and h
π*(a + b)*l  # Lateral surface area in terms of a, b, and l
# Example 1: Find the volume and lateral surface area of a frustum given the radii of the bases, a and b, and the height, h.
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a := 2.07*mm
b := 3.62*mm
h := 4.15*mm
Volume := 1/3*π*h*(a^2 + a*b + b^2)
Volume = 108.137 mm^3
# Find the lateral surface area.
Lateral_SA := π*(a + b)*sqrt(h^2 + (b - a)^2)
Lateral_SA = 79.1894 mm^2
# Example 2: Find the lateral surface area of a frustum given the radii of the bases, a and b, and the lateral height, l.
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a := 19*in
b := 25*in
l := 30*in
Lateral_SA := π*(a + b)*l
Lateral_SA = 4146.9 in^2
# Note that this is an alternative form of the surface area equation given in Example 1, where:
l := sqrt(h^2 + (b - a)^2)
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# ^(* Green parentheses in this file indicate annotations to an expression. To read an annotation, right-click on the entire expression within the parentheses and choose View/Edit Annotation. If the expression is copied to another file, the annotation will be preserved.)
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