# Title: Polyhedra: Even-Faced Polyhedra (2 of 3)
# Description: Names, duals and Wythoff numbers of polyhedra.
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# POLYHEDRA
# reference tables
# More Even-Faced Polyhedra
# [component: inputs Polyhedron("#33")]
# Truncated Icosidodecahedron
# name
PolyLookup(33) = ["truncated icosidodecahedron"; "disdyakistriacontahedron"; "2 3 5|"]  # dual
# Wythoff number
# [component: inputs Polyhedron("#44")]
# Small Rhombidodecahedron
# name
PolyLookup(44) = ["small rhombidodecahedron"; "small rhombidodecacron"; "2 5/2 5|"]  # dual
# Wythoff number
# [component: inputs Polyhedron("#50")]
# Icositruncated Dodecadodecahedron
# name
PolyLookup(50) = ["icositruncated dodecadodecahedron"; "tridyakisicosahedron"; "5/3 3 5|"]  # dual
# Wythoff number
# [component: inputs Polyhedron("#55")]
# Small Dodecicosahedron
# name
PolyLookup(55) = ["small dodecicosahedron"; "small dodecicosacron"; "3/2 3 5|"]  # dual
# Wythoff number
# [component: inputs Polyhedron("#61")]
# Rhombicosahedron
# name
PolyLookup(61) = ["rhombicosahedron"; "rhombicosacron"; "2 5/2 3|"]  # dual
# Wythoff number
# Links to More Even-Faced Polyhedra.
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