# Title: Polyhedra: Even-Faced Polyhedra (3 of 3)
# Description: Names, duals and Wythoff numbers of polyhedra.
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# POLYHEDRA
# reference tables
# More Even-Faced Polyhedra
# [component: inputs Polyhedron("#64")]
# Truncated Dodecadodecahedron
# name
PolyLookup(64) = ["truncated dodecadodecahedron"; "medial disdyakistriacontahedron"; "5/3 2 5|"]  # dual
# Wythoff number
# [component: inputs Polyhedron("#68")]
# Great Dodecicosahedron
# name
PolyLookup(68) = ["great dodecicosahedron"; "great dodecicosacron"; "5/3 5/2 3|"]  # dual
# Wythoff number
# [component: inputs Polyhedron("#73")]
# Great Truncated Icosidodecahedron
# name
PolyLookup(73) = ["great truncated icosidodecahedron"; "great disdyakistriacontahedron"; "5/3 2 3|"]  # dual
# Wythoff number
# [component: inputs Polyhedron("#78")]
# Great Rhombidodecahedron
# name
PolyLookup(78) = ["great rhombidodecahedron"; "great rhombidodecacron"; "3/2 5/3 2|"]  # dual
# Wythoff number
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