# Title: Polyhedra: Even-Faced Polyhedra (1 of 3)
# Description: Names, duals and Wythoff numbers of polyhedra.
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# POLYHEDRA
# reference tables
# Even-Faced Polyhedra
# [component: inputs Polyhedron("#16")]
# Truncated Cuboctahedron
# name
PolyLookup(16) = ["truncated cuboctahedron"; "disdyakisdodecahedron"; "2 3 4|"]  # dual
# Wythoff number
# [component: inputs Polyhedron("#21")]
# Cubitruncated Cuboctahedron
# name
PolyLookup(21) = ["cubitruncated cuboctahedron"; "tetradyakishexahedron"; "4/3 3 4|"]  # dual
# Wythoff number
# [component: inputs Polyhedron("#23")]
# Small Rhombihexahedron
# name
PolyLookup(23) = ["small rhombihexahedron"; "small rhombihexacron"; "3/2 2 4|"]  # dual
# Wythoff number
# [component: inputs Polyhedron("#25")]
# Great Truncated Cuboctahedron
# name
PolyLookup(25) = ["great truncated cuboctahedron"; "great disdyakisdodecahedron"; "4/3 2 3|"]  # dual
# Wythoff number
# [component: inputs Polyhedron("#26")]
# Great Rhombihexahedron
# name
PolyLookup(26) = ["great rhombihexahedron"; "great rhombihexacron"; "4/3 3/2 2|"]  # dual
# Wythoff number
# Links to More Even-Faced Polyhedra.
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