# Title: Polyhedra: Regular and Quasi-Regular Polyhedra (1 of 3)
# Description: Names, duals and Wythoff numbers of polyhedra.
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# POLYHEDRA
# reference tables
# Regular and Quasi-Regular Polyhedra
# [component: inputs Polyhedron("#6")]
# Tetrahedron
# name
PolyLookup(6) = ["tetrahedron"; "tetrahedron"; "3|2 3"]  # dual
# Wythoff number
# [component: inputs Polyhedron("#10")]
# Octahedron
# name
PolyLookup(10) = ["octahedron"; "cube"; "4|2 3"]  # dual
# Wythoff number
# [component: inputs Polyhedron("#11")]
# Cube
# name
PolyLookup(11) = ["cube"; "octahedron"; "3|2 4"]  # dual
# Wythoff number
# [component: inputs Polyhedron("#12")]
# Cuboctahedron
# name
PolyLookup(12) = ["cuboctahedron"; "rhombic dodecahedron"; "2|3 4"]  # dual
# Wythoff number
# [component: inputs Polyhedron("#27")]
# Icosahedron
# name
PolyLookup(27) = ["icosahedron"; "dodecahedron"; "5|2 3"]  # dual
# Wythoff number
# [component: inputs Polyhedron("#28")]
# Dodecahedron
# name
PolyLookup(28) = ["dodecahedron"; "icosahedron"; "3|2 5"]  # dual
# Wythoff number
# More Regular and Quasi-Regular Polyhedra
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