# Title: Polyhedra: Regular and Quasi-Regular Polyhedra (2 of 3)
# Description: Names, duals and Wythoff numbers of polyhedra.
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# POLYHEDRA
# reference tables
# More Regular and Quasi-Regular Polyhedra
# [component: inputs Polyhedron("#29")]
# Icosidodecahedron
# name
PolyLookup(29) = ["icosidodecahedron"; "rhombic triacontahedron"; "2|3 5"]  # dual
# Wythoff number
# [component: inputs Polyhedron("#35")]
# Small Ditriagonal Icosidodecahedron
# name
PolyLookup(35) = ["small ditrigonal icosidodecahedron"; "small triambic icosahedron"; "3|5/2 3"]  # dual
# Wythoff number
# [component: inputs Polyhedron("#39")]
# Small Stellated Dodecahedron
# name
PolyLookup(39) = ["small stellated dodecahedron"; "great dodecahedron"; "5|2 5/2"]  # dual
# Wythoff number
# [component: inputs Polyhedron("#40")]
# Great Dodecahedron
# name
PolyLookup(40) = ["great dodecahedron"; "small stellated dodecahedron"; "5/2|2 5"]  # dual
# Wythoff number
# [component: inputs Polyhedron("#41")]
# Dodecadodecahedron
# name
PolyLookup(41) = ["great dodecadodecahedron"; "medial rhombic triacontahedron"; "2|5/2 5"]  # dual
# Wythoff number
# [component: inputs Polyhedron("#46")]
# Ditriagonal Dodecadodecahedron
# name
PolyLookup(46) = ["ditrigonal dodecadodecahedron"; "medial triambic icosahedron"; "3|5/3 5"]  # dual
# Wythoff number
# More Regular and Quasi-Regular Polyhedra
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