# Title: Polyhedra: Regular and Quasi-Regular Polyhedra (3 of 3)
# Description: Names, duals and Wythoff numbers of polyhedra.
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# POLYHEDRA
# reference tables
# More Regular and Quasi-Regular Polyhedra
# [component: inputs Polyhedron("#52")]
# Great Ditriagonal Icosidodecahedron
# name
PolyLookup(52) = ["great ditrigonal icosidodecahedron"; "great triambic icosahedron"; "3/2|3 5"]  # dual
# Wythoff number
# [component: inputs Polyhedron("#57")]
# Great Stellated Dodecahedron
# name
PolyLookup(57) = ["great stellated dodecahedron"; "great icosahedron"; "3|2 5/2"]  # dual
# Wythoff number
# [component: inputs Polyhedron("#58")]
# Great Icosahedron
# name
PolyLookup(58) = ["great icosahedron"; "great stellated dodecahedron"; "5/2|2 3"]  # dual
# Wythoff number
# [component: inputs Polyhedron("#59")]
# Great Icosidodecahedron
# name
PolyLookup(59) = ["great icosidodecahedron"; "great rhombic triacontahedron"; "2|5/2 3"]  # dual
# Wythoff number
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