# Title: Polyhedra: Semi-Regular Polyhedra (2 of 6)
# Description: Names, duals and Wythoff numbers of polyhedra.
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# POLYHEDRA
# reference tables
# More Semi-Regular Polyhedra
# [component: inputs Polyhedron("#18")]
# Small Cubicuboctahedron
# name
PolyLookup(18) = ["small cubicuboctahedron"; "small hexacronic icositetrahedron"; "3/2 4|4"]  # dual
# Wythoff number
# [component: inputs Polyhedron("#19")]
# Great Cubicuboctahedron
# name
PolyLookup(19) = ["great cubicuboctahedron"; "great hexacronic icositetrahedron"; "3 4|4/3"]  # dual
# Wythoff number
# [component: inputs Polyhedron("#20")]
# Cubohemioctahedron
# name
PolyLookup(20) = ["cubohemioctahedron"; "hexahemioctacron"; "4/3 4|3"]  # dual
# Wythoff number
# [component: inputs Polyhedron("#22")]
# Great Rhombicuboctahedron
# name
PolyLookup(22) = ["great rhombicuboctahedron"; "great deltoidal icositetrahedron"; "3/2 4|2"]  # dual
# Wythoff number
# [component: inputs Polyhedron("#24")]
# Stellated Truncated Hexahedron
# name
PolyLookup(24) = ["stellated truncated hexahedron"; "great triakisoctahedron"; "2 3|4/3"]  # dual
# Wythoff number
# [component: inputs Polyhedron("#30")]
# Truncated Icosahedron
# name
PolyLookup(30) = ["truncated icosahedron"; "pentakisdodecahedron"; "2 5|3"]  # dual
# Wythoff number
# More Semi-Regular Polyhedra
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