# Title: Polyhedra: Semi-Regular Polyhedra (3 of 6)
# Description: Names, duals and Wythoff numbers of polyhedra.
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# POLYHEDRA
# reference tables
# More Semi-Regular Polyhedra
# [component: inputs Polyhedron("#31")]
# Truncated Dodecahedron
# name
PolyLookup(31) = ["truncated dodecahedron"; "triakisicosahedron"; "2 3|5"]  # dual
# Wythoff number
# [component: inputs Polyhedron("#32")]
# Rhombicosidodecahedron
# name
PolyLookup(32) = ["rhombicosidodecahedron"; "deltoidal hexecontahedron"; "3 5|2"]  # dual
# Wythoff number
# [component: inputs Polyhedron("#36")]
# Small Icosicosidodecahedron
# name
PolyLookup(36) = ["small icosicosidodecahedron"; "small icosacronic hexecontahedron"; "5/2 3|3"]  # dual
# Wythoff number
# [component: inputs Polyhedron("#38")]
# Small Dodecicosidodecahedron
# name
PolyLookup(38) = ["small dodecicosidodecahedron"; "small dodecacronic hexecontahedron"; "3/2 5|5"]  # dual
# Wythoff number
# [component: inputs Polyhedron("#42")]
# Truncated Great Dodecahedron
# name
PolyLookup(42) = ["truncated great dodecahedron"; "small stellapentakisdodecahedron"; "2 5/2|5"]  # dual
# Wythoff number
# [component: inputs Polyhedron("#43")]
# Rhombidodecadodecahedron
# name
PolyLookup(43) = ["rhombidodecadodecahedron"; "medial deltoidal hexecontahedron"; "5/2 5|2"]  # dual
# Wythoff number
# More Semi-Regular Polyhedra
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