# Title: Polyhedra: Semi-Regular Polyhedra (4 of 6)
# Description: Names, duals and Wythoff numbers of polyhedra.
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# POLYHEDRA
# reference tables
# More Semi-Regular Polyhedra
# [component: inputs Polyhedron("#47")]
# Great Ditriagonal Dodecicosidodecahedron
# name
PolyLookup(47) = ["great ditrigonal dodecicosidodecahedron"; "great ditrigonal dodecacronic hexecontahedron"; "3 5|5/3"]  # dual
# Wythoff number
# [component: inputs Polyhedron("#48")]
# Small Ditriagonal Dodecicosidodecahedron
# name
PolyLookup(48) = ["small ditrigonal dodecicosidodecahedron"; "small ditrigonal dodecacronic hexecontahedron"; "5/3 3|5"]  # dual
# Wythoff number
# [component: inputs Polyhedron("#49")]
# Icosidodecadodecahedron
# name
PolyLookup(49) = ["icosidodecadodecahedron"; "medial icosacronic hexecontahedron"; "5/3 5|3"]  # dual
# Wythoff number
# [component: inputs Polyhedron("#53")]
# Great Icosicosidodecahedron
# name
PolyLookup(53) = ["great icosicosidodecahedron"; "great icosacronic hexecontahedron"; "3/2 5|3"]  # dual
# Wythoff number
# [component: inputs Polyhedron("#54")]
# Small Icosicosidodecahedron
# name
PolyLookup(54) = ["small icosihemidodecahedron"; "small icosihemidodecacron"; "3/2 3|5"]  # dual
# Wythoff number
# [component: inputs Polyhedron("#56")]
# Small Dodecahemidodecahedron
# name
PolyLookup(56) = ["small dodecahemidodecahedron"; "small dodecahemidodecacron"; "5/4 5|5"]  # dual
# Wythoff number
# More Semi-Regular Polyhedra
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