# Title: Polyhedra: Semi-Regular Polyhedra (5 of 6)
# Description: Names, duals and Wythoff numbers of polyhedra.
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# POLYHEDRA
# reference tables
# More Semi-Regular Polyhedra
# [component: inputs Polyhedron("#60")]
# Great Truncated Icosihedron
# name
PolyLookup(60) = ["great truncated icosahedron"; "great stellapentakisdodecahedron"; "2 5/2|3"]  # dual
# Wythoff number
# [component: inputs Polyhedron("#63")]
# Small Stellated Truncated Dodecahedron
# name
PolyLookup(63) = ["small stellated truncated dodecahedron"; "great pentakisdodekahedron"; "2 5|5/3"]  # dual
# Wythoff number
# [component: inputs Polyhedron("#66")]
# Great Dodecicosidodecahedron
# name
PolyLookup(66) = ["great dodecicosidodecahedron"; "great dodecacronic hexecontahedron"; "5/2 3|5/3"]  # dual
# Wythoff number
# [component: inputs Polyhedron("#67")]
# Small Dodecahemicosahedron
# name
PolyLookup(67) = ["small dodecahemicosahedron"; "small dodecahemicosacron"; "5/3 5/2|3"]  # dual
# Wythoff number
# [component: inputs Polyhedron("#70")]
# Great Dodecahemicosahedron
# name
PolyLookup(70) = ["great dodecahemicosahedron"; "great dodecahemicosacron"; "5/4 5|3"]  # dual
# Wythoff number
# [component: inputs Polyhedron("#71")]
# Great Stellated Truncated Dodecahedron
# name
PolyLookup(71) = ["great stellated truncated dodecahedron"; "great triakisicosahedron"; "2 3|5/3"]  # dual
# Wythoff number
# More Semi-Regular Polyhedra
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