# Title: Polyhedra: Semi-Regular Polyhedra (6 of 6)
# Description: Names, duals and Wythoff numbers of polyhedra.
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# POLYHEDRA
# reference tables
# More Semi-Regular Polyhedra
# [component: inputs Polyhedron("#72")]
# Great Rhombicosidodecahedron
# name
PolyLookup(72) = ["great rhombicosidodecahedron"; "great deltoidal hexecontahedron"; "5/3 3|2"]  # dual
# Wythoff number
# [component: inputs Polyhedron("#75")]
# Great Dodecahemidodecahedron
# name
PolyLookup(75) = ["great dodecahemidodecahedron"; "great dodecahemidodecacron"; "5/3 5/2|5/3"]  # dual
# Wythoff number
# [component: inputs Polyhedron("#76")]
# Great Icosihemidodecahedron
# name
PolyLookup(76) = ["great icosihemidodecahedron"; "great icosihemidodecacron"; "3/2 3|5/3"]  # dual
# Wythoff number
# [component: inputs Polyhedron("#1")]
# Pentagonal Prism
# name
PolyLookup(1) = ["pentagonal prism"; "pentagonal dipyramid"; "2 5|2"]  # dual
# Wythoff number
# [component: inputs Polyhedron("#3")]
# Pentagrammic Prism
# name
PolyLookup(3) = ["pentagrammic prism"; "pentagrammic dipyramid"; "2 5/2|2"]  # dual
# Wythoff number
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