# Title: Polyhedra: Semi-Regular Polyhedra (1 of 6)
# Description: Names, duals and Wythoff numbers of polyhedra.
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# POLYHEDRA
# reference tables
# Semi-Regular Polyhedra
# [component: inputs Polyhedron("#7")]
# Truncated Tetrahedron
# name
PolyLookup(7) = ["truncated tetrahedron"; "triakistetrahedron"; "2 3|3"]  # dual
# Wythoff number
# [component: inputs Polyhedron("#8")]
# Octahemioctahedron
# name
PolyLookup(8) = ["octahemioctahedron"; "octahemioctacron"; "3/2 3|3"]  # dual
# Wythoff number
# [component: inputs Polyhedron("#9")]
# Tetrahemihexahedron
# name
PolyLookup(9) = ["tetrahemihexahedron"; "tetrahemihexacron"; "3/2 3|2"]  # dual
# Wythoff number
# [component: inputs Polyhedron("#13")]
# Truncated Octahedron
# name
PolyLookup(13) = ["truncated octahedron"; "tetrakishexahedron"; "2 4|3"]  # dual
# Wythoff number
# [component: inputs Polyhedron("#14")]
# Truncated Cube
# name
PolyLookup(14) = ["truncated cube"; "triakisoctahedron"; "2 3|4"]  # dual
# Wythoff number
# [component: inputs Polyhedron("#15")]
# Rhombicuboctahedron
# name
PolyLookup(15) = ["rhombicuboctahedron"; "deltoidal icositetrahedron"; "3 4|2"]  # dual
# Wythoff number
# More Semi-Regular Polyhedra
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