# Title: Polyhedra: Snub Polyhedra (2 of 2)
# Description: Names, duals and Wythoff numbers of polyhedra.
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# POLYHEDRA
# reference tables
# More Snub Polyhedra
# [component: inputs Polyhedron("#69")]
# Great Snub Dodecicosiadodecahedron
# name
PolyLookup(69) = ["great snub dodecicosidodecahedron"; "great hexagonal hexecontahedron"; "|5/3 5/2 3"]  # dual
# Wythoff number
# [component: inputs Polyhedron("#74")]
# Great Inverted Snub Icosidodecahedron
# name
PolyLookup(74) = ["great inverted snub icosidodecahedron"; "great inverted pentagonal hexecontahedron"; "|5/3 2 3"]  # dual
# Wythoff number
# [component: inputs Polyhedron("#77")]
# Small Retrosnub Icosicosidodecahedron
# name
PolyLookup(77) = ["small retrosnub icosicosidodecahedron"; "small hexagrammic hexecontahedron"; "|3/2 3/2 5/2"]  # dual
# Wythoff number
# [component: inputs Polyhedron("#79")]
# Great Retrosnub Icosicosidodecahedron
# name
PolyLookup(79) = ["great retrosnub icosidodecahedron"; "great pentagrammic hexecontahedron"; "|3/2 5/3 2"]  # dual
# Wythoff number
# [component: inputs Polyhedron("#2")]
# Pentagonal Antiprism
# name
PolyLookup(2) = ["pentagonal antiprism"; "pentagonal deltohedron"; "|2 2 5"]  # dual
# Wythoff number
# [component: inputs Polyhedron("#4")]
# Pentagrammatic Antiprism
# name
PolyLookup(4) = ["pentagrammic antiprism"; "pentagrammic deltohedron"; "|2 2 5/2"]  # dual
# Wythoff number
# [component: inputs Polyhedron("#5")]
# Pentagrammic Crossed Antiprism
# name
PolyLookup(5) = ["pentagrammic crossed antiprism"; "pentagrammic concave deltohedron"; "|2 2 5/3"]  # dual
# Wythoff number
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