# Title: Polyhedra: Snub Polyhedra (1 of 2)
# Description: Names, duals and Wythoff numbers of polyhedra.
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# POLYHEDRA
# reference tables
# Snub Polyhedra
# [component: inputs Polyhedron("#17")]
# Snub Cube
# name
PolyLookup(17) = ["snub cube"; "pentagonal icositetrahedron"; "|2 3 4"]  # dual
# Wythoff number
# [component: inputs Polyhedron("#34")]
# Snub Dodecahedron
# name
PolyLookup(34) = ["snub dodecahedron"; "pentagonal hexecontahedron"; "|2 3 5"]  # dual
# Wythoff number
# [component: inputs Polyhedron("#37")]
# Small Snub Icosicosidodecahedron
# name
PolyLookup(37) = ["small snub icosicosidodecahedron"; "small hexagonal hexecontahedron"; "|5/2 3 3"]  # dual
# Wythoff number
# [component: inputs Polyhedron("#45")]
# Snub Dodecadodecahedron
# name
PolyLookup(45) = ["snub dodecadodecahedron"; "medial pentagonal hexecontahedron"; "|2 5/2 5"]  # dual
# Wythoff number
# [component: inputs Polyhedron("#51")]
# Snub Icosidodecadodecahedron
# name
PolyLookup(51) = ["snub icosidodecadodecahedron"; "medial hexagonal hexecontahedron"; "|5/3 3 5"]  # dual
# Wythoff number
# [component: inputs Polyhedron("#62")]
# Great Snub Icosidodecahedron
# name
PolyLookup(62) = ["great snub icosidodecahedron"; "great pentagonal hexecontahedron"; "|2 5/2 3"]  # dual
# Wythoff number
# [component: inputs Polyhedron("#65")]
# Inverted Snub Dodecdodecahedron
# name
PolyLookup(65) = ["inverted snub dodecadodecahedron"; "medial inverted pentagonal hexecontahedron"; "|5/3 2 5"]  # dual
# Wythoff number
# Links to More Snub Polyhedra
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