# Title: Liquids: Density at 1.0 Atm Pressure, 300 K
# Description: Density of liquids at atmospheric pressure.
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# PROPERTIES OF LIQUIDS
# reference tables
# Density at 1.0 Atm Pressure, 300 K
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# Liquid
# Density
# Liquid
# Density
# Acetic acid | 1049*kg/m^3 | Fl refrigerant R-12 | 1311*kg/m^3
# annotation to a formula above: Density of Acetic acid, from CRC Handbook of Tables for Applied Engineering Science, 2nd edition, edited by R. Bolz and G. Tuve, CRC Press (1973).
# annotation to a formula above: Density of Fl refrigerant R-12, from CRC Handbook of Tables for Applied Engineering Science, 2nd edition, edited by R. Bolz and G. Tuve, CRC Press (1973).
# Acetone | 784.6*kg/m^3 | Fl refrigerant R-22 | 1194*kg/m^3
# annotation to a formula above: Density of Acetone, from CRC Handbook of Tables for Applied Engineering Science, 2nd edition, edited by R. Bolz and G. Tuve, CRC Press (1973).
# annotation to a formula above: Density of Fl refrigerant R-22, from CRC Handbook of Tables for Applied Engineering Science, 2nd edition, edited by R. Bolz and G. Tuve, CRC Press (1973).
# Alcohol, ethyl | 785.1*kg/m^3 | Glycerine | 1259*kg/m^3
# annotation to a formula above: Density of Alcohol, ethyl, from CRC Handbook of Tables for Applied Engineering Science, 2nd edition, edited by R. Bolz and G. Tuve, CRC Press (1973).
# annotation to a formula above: Density of Glycerine, from CRC Handbook of Tables for Applied Engineering Science, 2nd edition, edited by R. Bolz and G. Tuve, CRC Press (1973).
# Alcohol, methyl | 786.5*kg/m^3 | Heptane | 679.5*kg/m^3
# annotation to a formula above: Density of Alcohol, methyl, from CRC Handbook of Tables for Applied Engineering Science, 2nd edition, edited by R. Bolz and G. Tuve, CRC Press (1973).
# annotation to a formula above: Density of Heptane, from CRC Handbook of Tables for Applied Engineering Science, 2nd edition, edited by R. Bolz and G. Tuve, CRC Press (1973).
# Alcohol, propyl | 800.0*kg/m^3 | Hexane | 654.8*kg/m^3
# annotation to a formula above: Density of Alcohol, propyl, from CRC Handbook of Tables for Applied Engineering Science, 2nd edition, edited by R. Bolz and G. Tuve, CRC Press (1973).
# annotation to a formula above: Density of Hexane, from CRC Handbook of Tables for Applied Engineering Science, 2nd edition, edited by R. Bolz and G. Tuve, CRC Press (1973).
# Ammonia (aqua) | 823.5*kg/m^3 | Kerosene | 820.1*kg/m^3
# annotation to a formula above: Density of Ammonia (aqua), from CRC Handbook of Tables for Applied Engineering Science, 2nd edition, edited by R. Bolz and G. Tuve, CRC Press (1973).
# annotation to a formula above: Density of Kerosene, from CRC Handbook of Tables for Applied Engineering Science, 2nd edition, edited by R. Bolz and G. Tuve, CRC Press (1973).
# Benzene | 873.8*kg/m^3 | Linseed oil | 929.1*kg/m^3
# annotation to a formula above: Density of Benzene, from CRC Handbook of Tables for Applied Engineering Science, 2nd edition, edited by R. Bolz and G. Tuve, CRC Press (1973).
# annotation to a formula above: Density of Linseed oil, from CRC Handbook of Tables for Applied Engineering Science, 2nd edition, edited by R. Bolz and G. Tuve, CRC Press (1973).
# Carbon disulfide | 1261*kg/m^3 | Octane | 698.6*kg/m^3
# annotation to a formula above: Density of Carbon disufide, from CRC Handbook of Tables for Applied Engineering Science, 2nd edition, edited by R. Bolz and G. Tuve, CRC Press (1973).
# annotation to a formula above: Density of Octane, from CRC Handbook of Tables for Applied Engineering Science, 2nd edition, edited by R. Bolz and G. Tuve, CRC Press (1973).
# Carbon tetrachloride | 1584*kg/m^3 | Phenol | 1072*kg/m^3
# annotation to a formula above: Density of Carbon tetrachloride, from CRC Handbook of Tables for Applied Engineering Science, 2nd edition, edited by R. Bolz and G. Tuve, CRC Press (1973).
# annotation to a formula above: Density of Phenol, from CRC Handbook of Tables for Applied Engineering Science, 2nd edition, edited by R. Bolz and G. Tuve, CRC Press (1973).
# Castor oil | 956.1*kg/m^3 | Propane | 493.5*kg/m^3
# annotation to a formula above: Density of Castor oil, from CRC Handbook of Tables for Applied Engineering Science, 2nd edition, edited by R. Bolz and G. Tuve, CRC Press (1973).
# annotation to a formula above: Density of Propane, from CRC Handbook of Tables for Applied Engineering Science, 2nd edition, edited by R. Bolz and G. Tuve, CRC Press (1973).
# Chloroform | 1465*kg/m^3 | Propylene | 514.4*kg/m^3
# annotation to a formula above: Density of Chloroform, from CRC Handbook of Tables for Applied Engineering Science, 2nd edition, edited by R. Bolz and G. Tuve, CRC Press (1973).
# annotation to a formula above: Density of Propylene, from CRC Handbook of Tables for Applied Engineering Science, 2nd edition, edited by R. Bolz and G. Tuve, CRC Press (1973).
# Decane | 726.3*kg/m^3 | Propylene glycol | 965.3*kg/m^3
# annotation to a formula above: Density of Decane, from CRC Handbook of Tables for Applied Engineering Science, 2nd edition, edited by R. Bolz and G. Tuve, CRC Press (1973).
# annotation to a formula above: Density of Propylene glycol, from CRC Handbook of Tables for Applied Engineering Science, 2nd edition, edited by R. Bolz and G. Tuve, CRC Press (1973).
# Dodecane | 754.6*kg/m^3 | Sea water | 1025*kg/m^3
# annotation to a formula above: Density of Dodecane, from CRC Handbook of Tables for Applied Engineering Science, 2nd edition, edited by R. Bolz and G. Tuve, CRC Press (1973).
# annotation to a formula above: Density of Sea water, from CRC Handbook of Tables for Applied Engineering Science, 2nd edition, edited by R. Bolz and G. Tuve, CRC Press (1973).
# Ether | 713.5*kg/m^3 | Toluene | 862.3*kg/m^3
# annotation to a formula above: Density of Ether, from CRC Handbook of Tables for Applied Engineering Science, 2nd edition, edited by R. Bolz and G. Tuve, CRC Press (1973).
# annotation to a formula above: Density of Toulene, from CRC Handbook of Tables for Applied Engineering Science, 2nd edition, edited by R. Bolz and G. Tuve, CRC Press (1973).
# Ethylene glycol | 1097*kg/m^3 | Turpentine | 868.2*kg/m^3
# annotation to a formula above: Density of Ethylene glycol, from CRC Handbook of Tables for Applied Engineering Science, 2nd edition, edited by R. Bolz and G. Tuve, CRC Press (1973).
# annotation to a formula above: Density of Turpentine, from CRC Handbook of Tables for Applied Engineering Science, 2nd edition, edited by R. Bolz and G. Tuve, CRC Press (1973).
# Fl refrigerant R-11 | 1476*kg/m^3 | Water | 997.1*kg/m^3
# annotation to a formula above: Density of Fl refrigerant R-11, from CRC Handbook of Tables for Applied Engineering Science, 2nd edition, edited by R. Bolz and G. Tuve, CRC Press (1973).
# annotation to a formula above: Density of Water, from CRC Handbook of Tables for Applied Engineering Science, 2nd edition, edited by R. Bolz and G. Tuve, CRC Press (1973).
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# ^(* Green parentheses in this file indicate annotations to an expression. To read an annotation, right-click on the entire expression within the parentheses and choose View/Edit Annotation. If the expression is copied to another file, the annotation will be preserved.)
# Data from CRC Handbook of Tables for Applied Engineering Science, 2nd edition, edited by R. Bolz and G. Tuve, CRC Press (1973).
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