# Title: Liquids: Viscosity at 1.0 Atm Pressure, 300 K
# Description: Viscosity of liquids at atmospheric pressure.
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# PROPERTIES OF LIQUIDS
# reference tables
# Viscosity at 1.0 Atm Pressure, 300 K
## Liquid
## Viscosity
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# Acetic acid
0.001155*newton*sec/m^2
# annotation to a formula above: Viscosity of Acetic acid, from CRC Handbook of Tables for Applied Engineering Science, 2nd edition, edited by R. Bolz and G. Tuve, CRC Press (1973).
# Acetone
0.000316*newton*sec/m^2
# annotation to a formula above: Viscosity of Acetone, from CRC Handbook of Tables for Applied Engineering Science, 2nd edition, edited by R. Bolz and G. Tuve, CRC Press (1973).
# Alcohol, ethyl
0.001095*newton*sec/m^2
# annotation to a formula above: Viscosity of Alcohol, ethyl, from CRC Handbook of Tables for Applied Engineering Science, 2nd edition, edited by R. Bolz and G. Tuve, CRC Press (1973).
# Alcohol, methyl
0.00056*newton*sec/m^2
# annotation to a formula above: Viscosity of Alcohol, methyl, from CRC Handbook of Tables for Applied Engineering Science, 2nd edition, edited by R. Bolz and G. Tuve, CRC Press (1973).
# Alcohol, propyl
0.00192*newton*sec/m^2
# annotation to a formula above: Viscosity of Alcohol, propyl, from CRC Handbook of Tables for Applied Engineering Science, 2nd edition, edited by R. Bolz and G. Tuve, CRC Press (1973).
# Benzene
0.000601*newton*sec/m^2
# annotation to a formula above: Viscosity of Benzene, from CRC Handbook of Tables for Applied Engineering Science, 2nd edition, edited by R. Bolz and G. Tuve, CRC Press (1973).
# Bromine
0.00095*newton*sec/m^2
# annotation to a formula above: Viscosity of Bromine, from CRC Handbook of Tables for Applied Engineering Science, 2nd edition, edited by R. Bolz and G. Tuve, CRC Press (1973).
# Carbon disulfide
0.00036*newton*sec/m^2
# annotation to a formula above: Viscosity of Carbon disulfide, from CRC Handbook of Tables for Applied Engineering Science, 2nd edition, edited by R. Bolz and G. Tuve, CRC Press (1973).
# Carbon tetrachloride
0.00091*newton*sec/m^2
# annotation to a formula above: Viscosity of Carbon tetrachloride, from CRC Handbook of Tables for Applied Engineering Science, 2nd edition, edited by R. Bolz and G. Tuve, CRC Press (1973).
# Castor oil
0.650*newton*sec/m^2
# annotation to a formula above: Density of Castor oil, from CRC Handbook of Tables for Applied Engineering Science, 2nd edition, edited by R. Bolz and G. Tuve, CRC Press (1973).
# Chloroform
0.00053*newton*sec/m^2
# annotation to a formula above: Viscosity of Chloroform, from CRC Handbook of Tables for Applied Engineering Science, 2nd edition, edited by R. Bolz and G. Tuve, CRC Press (1973).
# Decane
0.000859*newton*sec/m^2
# annotation to a formula above: Viscosity of Decane, from CRC Handbook of Tables for Applied Engineering Science, 2nd edition, edited by R. Bolz and G. Tuve, CRC Press (1973).
# Dodecane
0.001374*newton*sec/m^2
# annotation to a formula above: Viscosity of Dodecane, from CRC Handbook of Tables for Applied Engineering Science, 2nd edition, edited by R. Bolz and G. Tuve, CRC Press (1973).
# Ether
0.000223*newton*sec/m^2
# annotation to a formula above: Viscosity of Ether, from CRC Handbook of Tables for Applied Engineering Science, 2nd edition, edited by R. Bolz and G. Tuve, CRC Press (1973).
# Ethylene glycol
0.0162*newton*sec/m^2
# annotation to a formula above: Viscosity of Ethylene glycol, from CRC Handbook of Tables for Applied Engineering Science, 2nd edition, edited by R. Bolz and G. Tuve, CRC Press (1973).
# Fl refrigerant R-11
0.00042*newton*sec/m^2
# annotation to a formula above: Viscosity of Fl refrigerant R-11, from CRC Handbook of Tables for Applied Engineering Science, 2nd edition, edited by R. Bolz and G. Tuve, CRC Press (1973).
# Glycerine
0.950*newton*sec/m^2
# annotation to a formula above: Viscosity of Glycerine, from CRC Handbook of Tables for Applied Engineering Science, 2nd edition, edited by R. Bolz and G. Tuve, CRC Press (1973).
# Heptane
0.000376*newton*sec/m^2
# annotation to a formula above: Viscosity of Heptane, from CRC Handbook of Tables for Applied Engineering Science, 2nd edition, edited by R. Bolz and G. Tuve, CRC Press (1973).
# Hexane
0.000297*newton*sec/m^2
# annotation to a formula above: Viscosity of Hexane, from CRC Handbook of Tables for Applied Engineering Science, 2nd edition, edited by R. Bolz and G. Tuve, CRC Press (1973).
# Kerosene
0.00164*newton*sec/m^2
# annotation to a formula above: Viscosity of Kerosene, from CRC Handbook of Tables for Applied Engineering Science, 2nd edition, edited by R. Bolz and G. Tuve, CRC Press (1973).
# Linseed oil
0.0331*newton*sec/m^2
# annotation to a formula above: Viscosity of Linseed oil, from CRC Handbook of Tables for Applied Engineering Science, 2nd edition, edited by R. Bolz and G. Tuve, CRC Press (1973).
# Mercury
0.00153*newton*sec/m^2
# annotation to a formula above: Viscosity of Mercury, from CRC Handbook of Tables for Applied Engineering Science, 2nd edition, edited by R. Bolz and G. Tuve, CRC Press (1973).
# Octane
0.00051*newton*sec/m^2
# annotation to a formula above: Viscosity of Octane, from CRC Handbook of Tables for Applied Engineering Science, 2nd edition, edited by R. Bolz and G. Tuve, CRC Press (1973).
# Phenol
0.0080*newton*sec/m^2
# annotation to a formula above: Viscosity of Phenol, from CRC Handbook of Tables for Applied Engineering Science, 2nd edition, edited by R. Bolz and G. Tuve, CRC Press (1973).
# Propane
0.00011*newton*sec/m^2
# annotation to a formula above: Viscosity of Propane, from CRC Handbook of Tables for Applied Engineering Science, 2nd edition, edited by R. Bolz and G. Tuve, CRC Press (1973).
# Propylene
0.00009*newton*sec/m^2
# annotation to a formula above: Viscosity of Propylene, from CRC Handbook of Tables for Applied Engineering Science, 2nd edition, edited by R. Bolz and G. Tuve, CRC Press (1973).
# Propylene glycol
0.042*newton*sec/m^2
# annotation to a formula above: Viscosity of Propylene glycol, from CRC Handbook of Tables for Applied Engineering Science, 2nd edition, edited by R. Bolz and G. Tuve, CRC Press (1973).
# Toluene
0.000550*newton*sec/m^2
# annotation to a formula above: Viscosity of Toluene, from CRC Handbook of Tables for Applied Engineering Science, 2nd edition, edited by R. Bolz and G. Tuve, CRC Press (1973).
# Turpentine
0.001375*newton*sec/m^2
# annotation to a formula above: Viscosity of Turpentine, from CRC Handbook of Tables for Applied Engineering Science, 2nd edition, edited by R. Bolz and G. Tuve, CRC Press (1973).
# Water
0.00089*newton*sec/m^2
# annotation to a formula above: Viscosity of Water, from CRC Handbook of Tables for Applied Engineering Science, 2nd edition, edited by R. Bolz and G. Tuve, CRC Press (1973).
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# ^(* Green parentheses in this file indicate annotations to an expression. To read an annotation, right-click on the entire expression within the parentheses and choose View/Edit Annotation. If the expression is copied to another file, the annotation will be preserved.)
# Data from CRC Handbook of Tables for Applied Engineering Science, 2nd edition, edited by R. Bolz and G. Tuve, CRC Press (1973).
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