# Title: Liquids: Specific Gravity at 1.0 Atm Pressure, 25°C
# Description: Specific gravity of liquids at atmospheric pressure.
# Worksheet setting: ORIGIN = 1
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# PROPERTIES OF LIQUIDS
# reference tables
# Specific Gravity at 1.0 Atm Pressure, 25ºC
# Specific
# Gravity
# Specific
# Gravity
## Liquid
## Liquid
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# Acetic acid | 1.049 | Fl refrigerant R-22 | 1.197
# annotation to a formula above: Specific gravity of Acetic acid, from CRC Handbook of Tables for Applied Engineering Science, 2nd edition, edited by R. Bolz and G. Tuve, CRC Press (1973).
# annotation to a formula above: Specific gravity of Fl refrigerant R-22, from CRC Handbook of Tables for Applied Engineering Science, 2nd edition, edited by R. Bolz and G. Tuve, CRC Press (1973).
# Acetone | 0.787 | Glycerine | 1.263
# annotation to a formula above: Specific gravity of Acetone, from CRC Handbook of Tables for Applied Engineering Science, 2nd edition, edited by R. Bolz and G. Tuve, CRC Press (1973).
# annotation to a formula above: Specific gravity of Glycerine, from CRC Handbook of Tables for Applied Engineering Science, 2nd edition, edited by R. Bolz and G. Tuve, CRC Press (1973).
# Alcohol, ethyl | 0.787 | Heptane | 0.681
# annotation to a formula above: Specific gravity of Alcohol, ethyl, from CRC Handbook of Tables for Applied Engineering Science, 2nd edition, edited by R. Bolz and G. Tuve, CRC Press (1973).
# annotation to a formula above: Specific gravity of Heptane, from CRC Handbook of Tables for Applied Engineering Science, 2nd edition, edited by R. Bolz and G. Tuve, CRC Press (1973).
# Alcohol, methyl | 0.789 | Hexane | 0.657
# annotation to a formula above: Specific gravity of Alcohol, methyl, from CRC Handbook of Tables for Applied Engineering Science, 2nd edition, edited by R. Bolz and G. Tuve, CRC Press (1973).
# annotation to a formula above: Specific gravity of Hexane, from CRC Handbook of Tables for Applied Engineering Science, 2nd edition, edited by R. Bolz and G. Tuve, CRC Press (1973).
# Alcohol, propyl | 0.802 | Kerosene | 0.823
# annotation to a formula above: Specific gravity of Alcohol, propyl, from CRC Handbook of Tables for Applied Engineering Science, 2nd edition, edited by R. Bolz and G. Tuve, CRC Press (1973).
# annotation to a formula above: Specific gravity of Kerosene, from CRC Handbook of Tables for Applied Engineering Science, 2nd edition, edited by R. Bolz and G. Tuve, CRC Press (1973).
# Ammonia (aqua) | 0.826 | Linseed oil | 0.93
# annotation to a formula above: Specific gravity of Ammonia (aqua), from CRC Handbook of Tables for Applied Engineering Science, 2nd edition, edited by R. Bolz and G. Tuve, CRC Press (1973).
# annotation to a formula above: Specific gravity of Linseed oil, from CRC Handbook of Tables for Applied Engineering Science, 2nd edition, edited by R. Bolz and G. Tuve, CRC Press (1973).
# Benzene | 0.876 | Mercury | 13.633
# annotation to a formula above: Specific gravity of Benzene, from CRC Handbook of Tables for Applied Engineering Science, 2nd edition, edited by R. Bolz and G. Tuve, CRC Press (1973).
# annotation to a formula above: Specific gravity of Mercury, from CRC Handbook of Tables for Applied Engineering Science, 2nd edition, edited by R. Bolz and G. Tuve, CRC Press (1973).
# Carbon disulfide | 1.265 | Octane | 0.701
# annotation to a formula above: Specific gravity of Carbon disulfide, from CRC Handbook of Tables for Applied Engineering Science, 2nd edition, edited by R. Bolz and G. Tuve, CRC Press (1973).
# annotation to a formula above: Specific gravity of Octane, from CRC Handbook of Tables for Applied Engineering Science, 2nd edition, edited by R. Bolz and G. Tuve, CRC Press (1973).
# Carbon tetrachloride | 1.59 | Phenol | 1.07
# annotation to a formula above: Specific gravity of Carbon tetrachloride, from CRC Handbook of Tables for Applied Engineering Science, 2nd edition, edited by R. Bolz and G. Tuve, CRC Press (1973).
# annotation to a formula above: Specific gravity of Phenol, from CRC Handbook of Tables for Applied Engineering Science, 2nd edition, edited by R. Bolz and G. Tuve, CRC Press (1973).
# Castor oil | 0.960 | Propane | 0.495
# annotation to a formula above: Specific gravity of Castor oil, from CRC Handbook of Tables for Applied Engineering Science, 2nd edition, edited by R. Bolz and G. Tuve, CRC Press (1973).
# annotation to a formula above: Specific gravity of Propane, from CRC Handbook of Tables for Applied Engineering Science, 2nd edition, edited by R. Bolz and G. Tuve, CRC Press (1973).
# Chloroform | 1.47 | Propylene | 0.516
# annotation to a formula above: Specific gravity of Chloroform, from CRC Handbook of Tables for Applied Engineering Science, 2nd edition, edited by R. Bolz and G. Tuve, CRC Press (1973).
# annotation to a formula above: Specific gravity of Propylene, from CRC Handbook of Tables for Applied Engineering Science, 2nd edition, edited by R. Bolz and G. Tuve, CRC Press (1973).
# Decane | 0.728 | Propylene glycol | 0.968
# annotation to a formula above: Specific gravity of Decane, from CRC Handbook of Tables for Applied Engineering Science, 2nd edition, edited by R. Bolz and G. Tuve, CRC Press (1973).
# annotation to a formula above: Specific gravity of Propylene glycol, from CRC Handbook of Tables for Applied Engineering Science, 2nd edition, edited by R. Bolz and G. Tuve, CRC Press (1973).
# Ether | 0.715 | Sea water | 1.03
# annotation to a formula above: Specific gravity of Ether, from CRC Handbook of Tables for Applied Engineering Science, 2nd edition, edited by R. Bolz and G. Tuve, CRC Press (1973).
# annotation to a formula above: Specific gravity of Sea water, from CRC Handbook of Tables for Applied Engineering Science, 2nd edition, edited by R. Bolz and G. Tuve, CRC Press (1973).
# Ethylene glycol | 1.100 | Toluene | 0.865
# annotation to a formula above: Specific gravity of Ethylene glycol, from CRC Handbook of Tables for Applied Engineering Science, 2nd edition, edited by R. Bolz and G. Tuve, CRC Press (1973).
# annotation to a formula above: Specific gravity of Toluene, from CRC Handbook of Tables for Applied Engineering Science, 2nd edition, edited by R. Bolz and G. Tuve, CRC Press (1973).
# Fl refrigerant R-11 | 1.480 | Turpentine | 0.87
# annotation to a formula above: Specific gravity of Fl refrigerant R-11, from CRC Handbook of Tables for Applied Engineering Science, 2nd edition, edited by R. Bolz and G. Tuve, CRC Press (1973).
# annotation to a formula above: Specific gravity of Turpentine, from CRC Handbook of Tables for Applied Engineering Science, 2nd edition, edited by R. Bolz and G. Tuve, CRC Press (1973).
# Fl refrigerant R-12 | 1.315 | Water | 1.00
# annotation to a formula above: Specific gravity of Fl refrigerant R-12, from CRC Handbook of Tables for Applied Engineering Science, 2nd edition, edited by R. Bolz and G. Tuve, CRC Press (1973).
# annotation to a formula above: Specific gravity of Water, from CRC Handbook of Tables for Applied Engineering Science, 2nd edition, edited by R. Bolz and G. Tuve, CRC Press (1973).
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# ^(* Green parentheses in this file indicate annotations to an expression. To read an annotation, right-click on the entire expression within the parentheses and choose View/Edit Annotation. If the expression is copied to another file, the annotation will be preserved.)
# Data from CRC Handbook of Tables for Applied Engineering Science, 2nd edition, edited by R. Bolz and G. Tuve, CRC Press (1973).
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