# Title: Liquids: Sound Velocity at 1.0 Atm Pressure, 25°C
# Description: Velocity of sound through liquids at atmospheric pressure.
# Worksheet setting: ORIGIN = 1
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# PROPERTIES OF LIQUIDS
# reference tables
# Sound Velocity at 1.0 Atm Pressure, 25ºC, Except as Noted
## Sound Velocity (m/sec)
## Sound Velocity (m/sec)
## Liquid
## Liquid
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# Acetic acid (50°C) | 1.584*10^3 | Glycerine | 1.909*10^3
# annotation to a formula above: Sound velocity of Acetic acid (at 50°C), from CRC Handbook of Tables for Applied Engineering Science, 2nd edition, edited by R. Bolz and G. Tuve, CRC Press (1973).
# annotation to a formula above: Sound velocity of Glycerine, from CRC Handbook of Tables for Applied Engineering Science, 2nd edition, edited by R. Bolz and G. Tuve, CRC Press (1973).
# Acetone | 1.174*10^3 | Heptane | 1.138*10^3
# annotation to a formula above: Sound velocity of Acetone, from CRC Handbook of Tables for Applied Engineering Science, 2nd edition, edited by R. Bolz and G. Tuve, CRC Press (1973).
# annotation to a formula above: Sound velocity of Heptane, from CRC Handbook of Tables for Applied Engineering Science, 2nd edition, edited by R. Bolz and G. Tuve, CRC Press (1973).
# Alcohol, ethyl | 1.144*10^3 | Hexane | 1.203*10^3
# annotation to a formula above: Sound velocity of Alcohol, ethyl, from CRC Handbook of Tables for Applied Engineering Science, 2nd edition, edited by R. Bolz and G. Tuve, CRC Press (1973).
# annotation to a formula above: Sound velocity of Hexane, from CRC Handbook of Tables for Applied Engineering Science, 2nd edition, edited by R. Bolz and G. Tuve, CRC Press (1973).
# Alcohol, methyl | 1.103*10^3 | Kerosene | 1.32*10^3
# annotation to a formula above: Sound velocity of Alcohol, methyl, from CRC Handbook of Tables for Applied Engineering Science, 2nd edition, edited by R. Bolz and G. Tuve, CRC Press (1973).
# annotation to a formula above: Sound velocity of Kerosene, from CRC Handbook of Tables for Applied Engineering Science, 2nd edition, edited by R. Bolz and G. Tuve, CRC Press (1973).
# Alcohol, propyl | 1.205*10^3 | Mercury | 1.45*10^3
# annotation to a formula above: Sound velocity of Alcohol, propyl, from CRC Handbook of Tables for Applied Engineering Science, 2nd edition, edited by R. Bolz and G. Tuve, CRC Press (1973).
# annotation to a formula above: Sound velocity of Mercury, from CRC Handbook of Tables for Applied Engineering Science, 2nd edition, edited by R. Bolz and G. Tuve, CRC Press (1973).
# Benzene | 1.298*10^3 | Octane | 1.171*10^3
# annotation to a formula above: Sound velocity of Benzene, from CRC Handbook of Tables for Applied Engineering Science, 2nd edition, edited by R. Bolz and G. Tuve, CRC Press (1973).
# annotation to a formula above: Sound velocity of Octane, from CRC Handbook of Tables for Applied Engineering Science, 2nd edition, edited by R. Bolz and G. Tuve, CRC Press (1973).
# Carbon disulfide | 1.149*10^3 | Phenol (100°C) | 1.274*10^3
# annotation to a formula above: Sound velocity of Carbon disulfide, from CRC Handbook of Tables for Applied Engineering Science, 2nd edition, edited by R. Bolz and G. Tuve, CRC Press (1973).
# annotation to a formula above: Sound velocity of Phenol (at 100°C), from CRC Handbook of Tables for Applied Engineering Science, 2nd edition, edited by R. Bolz and G. Tuve, CRC Press (1973).
# Carbon tetrachloride | 924 | Sea water | 1.535*10^3
# annotation to a formula above: Sound velocity of Carbon tetrachloride, from CRC Handbook of Tables for Applied Engineering Science, 2nd edition, edited by R. Bolz and G. Tuve, CRC Press (1973).
# annotation to a formula above: Sound velocity of Sea water, from CRC Handbook of Tables for Applied Engineering Science, 2nd edition, edited by R. Bolz and G. Tuve, CRC Press (1973).
# Castor oil | 1.474*10^3 | Toluene (30°C) | 1.275*10^3
# annotation to a formula above: Sound velocity of Castor oil, from CRC Handbook of Tables for Applied Engineering Science, 2nd edition, edited by R. Bolz and G. Tuve, CRC Press (1973).
# annotation to a formula above: Sound velocity of Toluene (at 30°C), from CRC Handbook of Tables for Applied Engineering Science, 2nd edition, edited by R. Bolz and G. Tuve, CRC Press (1973).
# Chloroform | 995 | Turpentine | 1.24*10^3
# annotation to a formula above: Sound velocity of Chloroform, from CRC Handbook of Tables for Applied Engineering Science, 2nd edition, edited by R. Bolz and G. Tuve, CRC Press (1973).
# annotation to a formula above: Sound velocity of Turpentine, from CRC Handbook of Tables for Applied Engineering Science, 2nd edition, edited by R. Bolz and G. Tuve, CRC Press (1973).
# Ether | 985 | Water | 1.498*10^3
# annotation to a formula above: Sound velocity of Ether, from CRC Handbook of Tables for Applied Engineering Science, 2nd edition, edited by R. Bolz and G. Tuve, CRC Press (1973).
# annotation to a formula above: Sound velocity of Water, from CRC Handbook of Tables for Applied Engineering Science, 2nd edition, edited by R. Bolz and G. Tuve, CRC Press (1973).
1.644*10^3
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# Ethylene glycol
# annotation to a formula above: Sound velocity of Ethylene glycol, from CRC Handbook of Tables for Applied Engineering Science, 2nd edition, edited by R. Bolz and G. Tuve, CRC Press (1973).
# ^(* Green parentheses in this file indicate annotations to an expression. To read an annotation, right-click on the entire expression within the parentheses and choose View/Edit Annotation. If the expression is copied to another file, the annotation will be preserved.)
# From CRC Handbook of Tables for Applied Engineering Science, 2nd edition, edited by R. Bolz and G. Tuve, CRC Press (1973).
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