# Title: Liquids: Surface Tension at 1.0 Atm Pressure, 25°C
# Description: Surface tension of liquids at atmospheric pressure.
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# PROPERTIES OF LIQUIDS
# reference tables
# Surface Tension at 1.0 Atm Pressure, 25ºC
## Liquid
## Surface Tension
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# Acetic acid | 0.0273*newton/m
# annotation to a formula above: Surface tension of Acetic acid, from CRC Handbook of Tables for Applied Engineering Science, 2nd edition, edited by R. Bolz and G. Tuve, CRC Press (1973).
# Acetone | 0.0231*newton/m
# annotation to a formula above: Surface tension of Acetone, from CRC Handbook of Tables for Applied Engineering Science, 2nd edition, edited by R. Bolz and G. Tuve, CRC Press (1973).
# Alcohol, ethyl | 0.02233*newton/m
# annotation to a formula above: Surface tension of Alcohol, ethyl, from CRC Handbook of Tables for Applied Engineering Science, 2nd edition, edited by R. Bolz and G. Tuve, CRC Press (1973).
# Alcohol, methyl | 0.0222*newton/m
# annotation to a formula above: Surface tension of Alcohol, methyl, from CRC Handbook of Tables for Applied Engineering Science, 2nd edition, edited by R. Bolz and G. Tuve, CRC Press (1973).
# Alcohol, propyl | 0.0235*newton/m
# annotation to a formula above: Surface tension of Alcohol, propyl, from CRC Handbook of Tables for Applied Engineering Science, 2nd edition, edited by R. Bolz and G. Tuve, CRC Press (1973).
# Benzene | 0.02818*newton/m
# annotation to a formula above: Surface tension of Benzene, from CRC Handbook of Tables for Applied Engineering Science, 2nd edition, edited by R. Bolz and G. Tuve, CRC Press (1973).
# Bromine | 0.0415*newton/m
# annotation to a formula above: Surface tension of Bromine, from CRC Handbook of Tables for Applied Engineering Science, 2nd edition, edited by R. Bolz and G. Tuve, CRC Press (1973).
# Carbon disulfide | 0.03233*newton/m
# annotation to a formula above: Surface tension of Carbon disulfide, from CRC Handbook of Tables for Applied Engineering Science, 2nd edition, edited by R. Bolz and G. Tuve, CRC Press (1973).
# Carbon tetrachloride | 0.0263*newton/m
# annotation to a formula above: Surface tension of Carbon tetrachloride, from CRC Handbook of Tables for Applied Engineering Science, 2nd edition, edited by R. Bolz and G. Tuve, CRC Press (1973).
# Chloroform | 0.02714*newton/m
# annotation to a formula above: Surface tension of Chloroform, from CRC Handbook of Tables for Applied Engineering Science, 2nd edition, edited by R. Bolz and G. Tuve, CRC Press (1973).
# Decane | 0.02343*newton/m
# annotation to a formula above: Surface tension of Decane, from CRC Handbook of Tables for Applied Engineering Science, 2nd edition, edited by R. Bolz and G. Tuve, CRC Press (1973).
# Ether | 0.01642*newton/m
# annotation to a formula above: Surface tension of Ether, from CRC Handbook of Tables for Applied Engineering Science, 2nd edition, edited by R. Bolz and G. Tuve, CRC Press (1973).
# Ethylene glycol | 0.0482*newton/m
# annotation to a formula above: Surface tension of Ethylene glycol, from CRC Handbook of Tables for Applied Engineering Science, 2nd edition, edited by R. Bolz and G. Tuve, CRC Press (1973).
# Fl refrigerant R-11 | 0.0183*newton/m
# annotation to a formula above: Surface tension of Fl refrigerant R-11, from CRC Handbook of Tables for Applied Engineering Science, 2nd edition, edited by R. Bolz and G. Tuve, CRC Press (1973).
# Fl refrigerant R-12 | 0.00887*newton/m
# annotation to a formula above: Surface tension of Fl refrigerant R-12, from CRC Handbook of Tables for Applied Engineering Science, 2nd edition, edited by R. Bolz and G. Tuve, CRC Press (1973).
# Fl refrigerant R-22 | 0.00835*newton/m
# annotation to a formula above: Surface tension of Fl refrigerant R-22, from CRC Handbook of Tables for Applied Engineering Science, 2nd edition, edited by R. Bolz and G. Tuve, CRC Press (1973).
# Glycerine | 0.0630*newton/m
# annotation to a formula above: Surface tension of Glycerine, from CRC Handbook of Tables for Applied Engineering Science, 2nd edition, edited by R. Bolz and G. Tuve, CRC Press (1973).
# Heptane | 0.0199*newton/m
# annotation to a formula above: Surface tension of Heptane, from CRC Handbook of Tables for Applied Engineering Science, 2nd edition, edited by R. Bolz and G. Tuve, CRC Press (1973).
# Hexane | 0.0180*newton/m
# annotation to a formula above: Surface tension of Hexane, from CRC Handbook of Tables for Applied Engineering Science, 2nd edition, edited by R. Bolz and G. Tuve, CRC Press (1973).
# Mercury | 0.484*newton/m
# annotation to a formula above: Surface tension of Mercury, from CRC Handbook of Tables for Applied Engineering Science, 2nd edition, edited by R. Bolz and G. Tuve, CRC Press (1973).
# Octane | 0.02114*newton/m
# annotation to a formula above: Surface tension of Octane, from CRC Handbook of Tables for Applied Engineering Science, 2nd edition, edited by R. Bolz and G. Tuve, CRC Press (1973).
# Phenol | 0.0404*newton/m
# annotation to a formula above: Surface tension of Phenol, from CRC Handbook of Tables for Applied Engineering Science, 2nd edition, edited by R. Bolz and G. Tuve, CRC Press (1973).
# Propane | 0.0066*newton/m
# annotation to a formula above: Surface tension of Propane, from CRC Handbook of Tables for Applied Engineering Science, 2nd edition, edited by R. Bolz and G. Tuve, CRC Press (1973).
# Propylene | 0.0070*newton/m
# annotation to a formula above: Surface tension of Propylene, from CRC Handbook of Tables for Applied Engineering Science, 2nd edition, edited by R. Bolz and G. Tuve, CRC Press (1973).
# Propylene glycol | 0.0363*newton/m
# annotation to a formula above: Surface tension of Propylene glycol, from CRC Handbook of Tables for Applied Engineering Science, 2nd edition, edited by R. Bolz and G. Tuve, CRC Press (1973).
# Toluene | 0.0273*newton/m
# annotation to a formula above: Surface tension of Toluene, from CRC Handbook of Tables for Applied Engineering Science, 2nd edition, edited by R. Bolz and G. Tuve, CRC Press (1973).
# Water | 0.07197*newton/m
# annotation to a formula above: Surface tension of Water, from CRC Handbook of Tables for Applied Engineering Science, 2nd edition, edited by R. Bolz and G. Tuve, CRC Press (1973).
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# ^(* Green parentheses in this file indicate annotations to an expression. To read an annotation, right-click on the entire expression within the parentheses and choose View/Edit Annotation. If the expression is copied to another file, the annotation will be preserved.)
# Data from CRC Handbook of Tables for Applied Engineering Science, 2nd edition, edited by R. Bolz and G. Tuve, CRC Press (1973).
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