# Title: Liquids: Dielectric Constant at 1.0 Atm Pressure, 25°C
# Description: Dielectric constant of liquids at atmospheric pressure.
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# PROPERTIES OF LIQUIDS
# reference tables
# Dielectric Constant at 1.0 Atm Pressure, 25ºC
## Dielectric Constant
## Dielectric Constant
## Liquid
## Liquid
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# Acetic acid | 6.15 | Decane | 2.0
# annotation to a formula above: Dielectric constant of Acetic acid, from CRC Handbook of Tables for Applied Engineering Science, 2nd edition, edited by R. Bolz and G. Tuve, CRC Press (1973).
# annotation to a formula above: Dielectric constant of Decane, from CRC Handbook of Tables for Applied Engineering Science, 2nd edition, edited by R. Bolz and G. Tuve, CRC Press (1973).
# Acetone | 20.7 | Ether | 4.3
# annotation to a formula above: Dielectric constant, from CRC Handbook of Tables for Applied Engineering Science, 2nd edition, edited by R. Bolz and G. Tuve, CRC Press (1973).
# annotation to a formula above: Dielectric constant of Ether, from CRC Handbook of Tables for Applied Engineering Science, 2nd edition, edited by R. Bolz and G. Tuve, CRC Press (1973).
# Alcohol, ethyl | 24.3 | Ethylene glycol | 37.7
# annotation to a formula above: Dielectric constant of Alcohol, ethyl, from CRC Handbook of Tables for Applied Engineering Science, 2nd edition, edited by R. Bolz and G. Tuve, CRC Press (1973).
# annotation to a formula above: Dielectric constant of Ethylene glycol, from CRC Handbook of Tables for Applied Engineering Science, 2nd edition, edited by R. Bolz and G. Tuve, CRC Press (1973).
# Alcohol, methyl | 32.6 | Fl refrigerant R-12 | 2.0
# annotation to a formula above: Dielectric constant of Alcohol, methyl, from CRC Handbook of Tables for Applied Engineering Science, 2nd edition, edited by R. Bolz and G. Tuve, CRC Press (1973).
# annotation to a formula above: Dielectric constant of Fl refrigerant R-12, from CRC Handbook of Tables for Applied Engineering Science, 2nd edition, edited by R. Bolz and G. Tuve, CRC Press (1973).
# Alcohol, propyl | 20.1 | Glycerine | 40
# annotation to a formula above: Dielectric constant of Alcohol, propyl, from CRC Handbook of Tables for Applied Engineering Science, 2nd edition, edited by R. Bolz and G. Tuve, CRC Press (1973).
# annotation to a formula above: Dielectric constant of Glycerine, from CRC Handbook of Tables for Applied Engineering Science, 2nd edition, edited by R. Bolz and G. Tuve, CRC Press (1973).
# Ammonia (aqua) | 16.9 | Heptane | 1.92
# annotation to a formula above: Dielectric constant of Ammonia (aqua), from CRC Handbook of Tables for Applied Engineering Science, 2nd edition, edited by R. Bolz and G. Tuve, CRC Press (1973).
# annotation to a formula above: Dielectric constant of Heptane, from CRC Handbook of Tables for Applied Engineering Science, 2nd edition, edited by R. Bolz and G. Tuve, CRC Press (1973).
# Benzene | 2.2 | Iodine | 11
# annotation to a formula above: Dielectric constant of Benzene, from CRC Handbook of Tables for Applied Engineering Science, 2nd edition, edited by R. Bolz and G. Tuve, CRC Press (1973).
# annotation to a formula above: Dielectric constant of Iodine, from CRC Handbook of Tables for Applied Engineering Science, 2nd edition, edited by R. Bolz and G. Tuve, CRC Press (1973).
# Bromine | 3.20 | Phenol | 9.8
# annotation to a formula above: Dielectric constant of Bromine, from CRC Handbook of Tables for Applied Engineering Science, 2nd edition, edited by R. Bolz and G. Tuve, CRC Press (1973).
# annotation to a formula above: Dielectric constant of Phenol, from CRC Handbook of Tables for Applied Engineering Science, 2nd edition, edited by R. Bolz and G. Tuve, CRC Press (1973).
# Carbon disulfide | 2.64 | Propane | 1.27
# annotation to a formula above: Dielectric constant of Carbon disulfide, from CRC Handbook of Tables for Applied Engineering Science, 2nd edition, edited by R. Bolz and G. Tuve, CRC Press (1973).
# annotation to a formula above: Dielectric constant of Propane, from CRC Handbook of Tables for Applied Engineering Science, 2nd edition, edited by R. Bolz and G. Tuve, CRC Press (1973).
# Carbon tetrachloride | 2.23 | Toluene | 2.4
# annotation to a formula above: Dielectric constant of Carbon tetrachloride, from CRC Handbook of Tables for Applied Engineering Science, 2nd edition, edited by R. Bolz and G. Tuve, CRC Press (1973).
# annotation to a formula above: Dielectric constant of Toluene, from CRC Handbook of Tables for Applied Engineering Science, 2nd edition, edited by R. Bolz and G. Tuve, CRC Press (1973).
# Castor oil | 4.7 | Water^a | 78.54
# annotation to a formula above: Dielectric constant of Castor Oil, from CRC Handbook of Tables for Applied Engineering Science, 2nd edition, edited by R. Bolz and G. Tuve, CRC Press (1973).
# annotation to a formula above: Dielectric constant of Water, from CRC Handbook of Tables for Applied Engineering Science, 2nd edition, edited by R. Bolz and G. Tuve, CRC Press (1973).
# Chloroform | 4.8
# annotation to a formula above: Dielectric constant of Chloroform, from CRC Handbook of Tables for Applied Engineering Science, 2nd edition, edited by R. Bolz and G. Tuve, CRC Press (1973).
# ^a The dielectric constant of water near the freezing point is 87.8; it decreases with increase in temperature to about 55.6 near the boiling point.
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# ^(* Green parentheses in this file indicate annotations to an expression. To read an annotation, right-click on the entire expression within the parentheses and choose View/Edit Annotation. If the expression is copied to another file, the annotation will be preserved.)
# Data from CRC Handbook of Tables for Applied Engineering Science, 2nd edition, edited by R. Bolz and G. Tuve, CRC Press (1973).
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