# Title: Centroids: Triangular Area
# Description: Locating the centroid of a triangular area.
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# CENTROIDS
# reference tables
# Triangular Area
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# Height, y, of centroid from base:
h/3
# annotation to a formula above: From Vector Mechanics for Engineers: Statics and Dynamics, 3rd edition, by Ferdinand P. Beer and E. Russell Johnston Jr., McGraw-Hill Book Company (1977).
# Example: Locate the centroid, c, of a triangular area given the height, h, of the triangle.
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h := 5*mm
y := h/3  # Height of centroid from base
y = 0.00166667 m
# The centroid is located on the median of the triangle at a
# height y from the base of the triangle.
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# ^(* Green parentheses in this file indicate annotations to an expression. To read an annotation, right-click on the entire expression within the parentheses and choose View/Edit Annotation. If the expression is copied to another file, the annotation will be preserved.)
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