# Title: Centroids: Semicircular Area
# Description: Locating the centroid of a semicircular area.
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# CENTROIDS
# reference tables
# Quarter Circle Area
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# Horizontal component, x, of centroid:
4*r/(3*π)
# annotation to a formula above: From Vector Mechanics for Engineers: Statics and Dynamics, 3rd edition, by Ferdinand P. Beer and E. Russell Johnston Jr., McGraw-Hill Book Company (1977).
# Vertical component, y, of centroid:
4*r/(3*π)
# Example: Locate the centroid, c, of a quarter circular area given the radius of the circle, r.
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r := 15*in
x := 4*r/(3*π)  # Horizontal component of centroid
y := 4*r/(3*π)  # Vertical component of centroid
x = 0.161701 m
y = 0.161701 m
# The coordinates of the centroid relative to the center of the circle are (x, y).
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# ^(* Green parentheses in this file indicate annotations to an expression. To read an annotation, right-click on the entire expression within the parentheses and choose View/Edit Annotation. If the expression is copied to another file, the annotation will be preserved.)
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