# Title: Centroids: Circular Sector
# Description: Locating the centroid of a circular sector.
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# CENTROIDS
# reference tables
# Semicircular Area
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# Distance, y, of centroid from center:
4*r/(3*π)
# annotation to a formula above: From Vector Mechanics for Engineers: Statics and Dynamics, 3rd edition, by Ferdinand P. Beer and E. Russell Johnston Jr., McGraw-Hill Book Company (1977).
# Example: Locate the centroid, c, of a semicircular area given the radius of the circle, r.
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r := 16*yd
y := 4*r/(3*π)  # Distance of centroid from center
y = 6.20933 m
# The centroid is located on the perpendicular bisector of the diameter of the circle at a height y from the diameter.
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# ^(* Green parentheses in this file indicate annotations to an expression. To read an annotation, right-click on the entire expression within the parentheses and choose View/Edit Annotation. If the expression is copied to another file, the annotation will be preserved.)
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