# Title: Centroids: Semiparabolic Area
# Description: Locating the centroid of a semiparabolic area.
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# CENTROIDS
# reference tables
# Circular Sector
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# Distance, x, of centroid from center:
2*r*sin(1/2*θ)/(3*(1/2*θ))
# annotation to a formula above: From Vector Mechanics for Engineers: Statics and Dynamics, 3rd edition, by Ferdinand P. Beer and E. Russell Johnston Jr., McGraw-Hill Book Company (1977).
# Example: Locate the centroid, c, of a circular sector given the radius of the circle, r, and the central angle, θ.
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r := 8.9*m
θ := 38*deg
x := 2*r*sin(1/2*θ)/(3*(1/2*θ))  # Distance of centroid from center
x = 5.82518 m
# The centroid is located on the angle bisector of the central angle a distance x from the center of the circle.
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# ^(* Green parentheses in this file indicate annotations to an expression. To read an annotation, right-click on the entire expression within the parentheses and choose View/Edit Annotation. If the expression is copied to another file, the annotation will be preserved.)
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