# Title: Centroids: Parabolic Spandrel
# Description: Locating the centroid of a parabolic spandrel.
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# CENTROIDS
# reference tables
# Parabolic Area
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# Distance, y, of centroid from vertex:
3*h/5
# annotation to a formula above: From Vector Mechanics for Engineers: Statics and Dynamics, 3rd edition, by Ferdinand P. Beer and E. Russell Johnston Jr., McGraw-Hill Book Company (1977).
# Example: Locate the centroid, c, of a parabolic area given the perpendicular lengths, a and h, as shown in the diagram.
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a := 35.5*in
h := 41.5*in
y := 3*h/5  # Distance of centroid from center
y = 0.63246 m
# The centroid is located on the axis of symmetry of the parabola a distance y from the vertex.
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# ^(* Green parentheses in this file indicate annotations to an expression. To read an annotation, right-click on the entire expression within the parentheses and choose View/Edit Annotation. If the expression is copied to another file, the annotation will be preserved.)
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