# Title: Centroids: Semicircular Arc
# Description: Locating the centroid of a semicircular arc.
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# CENTROIDS
# reference tables
# Quarter Circular Arc
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# Horizontal component, x, of the centroid:
2*r/π
# annotation to a formula above: From Vector Mechanics for Engineers: Statics and Dynamics, 3rd edition, by Ferdinand P. Beer and E. Russell Johnston Jr., McGraw-Hill Book Company (1977).
# Vertical component, y, of the centroid:
2*r/π
# Example: Locate the centroid, c, of the quarter circular arc given the radius, r, of the circle.
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r := 15.*in
x := 2*r/π  # Horizontal component of the centroid
y := 2*r/π  # Vertical component of the centroid
x = 0.242552 m
y = 0.242552 m
# The coordinates of the centroid relative to the center of the circle are (x, y).
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# ^(* Green parentheses in this file indicate annotations to an expression. To read an annotation, right-click on the entire expression within the parentheses and choose View/Edit Annotation. If the expression is copied to another file, the annotation will be preserved.)
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