# Title: Mass Moments of Inertia: Slender Rod
# Description: Determining the mass moment of inertia of a slender rod.
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# MASS MOMENTS OF INERTIA
# reference tables
# Slender Rod
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# Mass moment of inertia:
# 1/12*mass*L^2 | About the y- or z-axis
# annotation to a formula above: From Vector Mechanics for Engineers: Statics and Dynamics, 3rd edition, by Ferdinand P. Beer and E. Russell Johnston Jr., McGraw-Hill Book Company (1977).
# Example: Determine the mass moment of inertia, I, of a slender rod about an axis perpendicular to the rod and passing through the centroidal, G, given the length of the rod, L, and its mass.
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L := 10*ft
mass := 29.9*slug
I := 1/12*mass*L^2  # Moment of inertia about y or z
I = 337.825 kg*m^2
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# ^(* Green parentheses in this file indicate annotations to an expression. To read an annotation, right-click on the entire expression within the parentheses and choose View/Edit Annotation. If the expression is copied to another file, the annotation will be preserved.)
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