# Title: Mass Moments of Inertia: Thin Disk
# Description: Determining the mass moment of inertia of a thin disk.
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# MASS MOMENTS OF INERTIA
# reference tables
# Thin Disk
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# Mass moment of inertia:
# 1/2*mass*r^2 | About the x-axis
# annotation to a formula above: From Vector Mechanics for Engineers: Statics and Dynamics, 3rd edition, by Ferdinand P. Beer and E. Russell Johnston Jr., McGraw-Hill Book Company (1977).
# 1/4*mass*r^2 | About the y- or z-axis
# Example: Determine the mass moment of inertia, I, of a thin disk about the x-, y-, and z-axes and passing through the centroidal, G, given the radius of the disk, r, and its mass.
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r := 55*mm
mass := 0.026*slug
I_x := 1/2*mass*r^2  # Moment about x
I_y := 1/4*mass*r^2  # Moment about y
I_z := I_y  # Moment about z
I_x = 0.000573905 kg*m^2
I_y = 0.000286953 kg*m^2
I_z = 0.000286953 kg*m^2
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# ^(* Green parentheses in this file indicate annotations to an expression. To read an annotation, right-click on the entire expression within the parentheses and choose View/Edit Annotation. If the expression is copied to another file, the annotation will be preserved.)
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