# Title: Mass Moments of Inertia: Circular Cylinder
# Description: Determining the mass moment of inertia of a circular cylinder.
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# MASS MOMENTS OF INERTIA
# reference tables
# Circular Cylinder
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# Moments of Inertia:
# 1/2*mass*a^2 | About the x-axis
# annotation to a formula above: From Vector Mechanics for Engineers: Statics and Dynamics, 3rd edition, by Ferdinand P. Beer and E. Russell Johnston Jr., McGraw-Hill Book Company (1977).
1/12*mass*(3*a^2 + L^2)  # About the y- or z-axis
# Example: Determine the mass moment of inertia, I, of a circular cylinder about the x-, y-, and z-axes, as shown, given the length, L, and radius, a, of the cylinder, and its mass.
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L := 16*in
a := 1.5*in
mass := 32*lb
I_x := 1/2*mass*a^2  # Moment about x
I_y := 1/12*mass*(3*a^2 + L^2)  # Moment about y
I_z := I_y  # Moment about z
I_x = 0.010535 kg*m^2
I_y = 0.205043 kg*m^2
I_z = 0.205043 kg*m^2
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# ^(* Green parentheses in this file indicate annotations to an expression. To read an annotation, right-click on the entire expression within the parentheses and choose View/Edit Annotation. If the expression is copied to another file, the annotation will be preserved.)
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