# Title: Mass Moments of Inertia: Sphere
# Description: Determining the mass moment of inertia of a sphere.
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# MASS MOMENTS OF INERTIA
# reference tables
# Sphere
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# Mass moment of inertia:
# 2/5*mass*a^2 | About the x-, y- and z-axis
# annotation to a formula above: From Vector Mechanics for Engineers: Statics and Dynamics, 3rd edition, by Ferdinand P. Beer and E. Russell Johnston Jr., McGraw-Hill Book Company (1977).
# Example: Determine the mass moment of inertia, I, of a sphere given the radius, a, and mass.
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a := 6*mm
mass := 7*10^-3*kg
I := 2/5*mass*a^2  # Moment about the x-, y- or z-axis
I = 1.008e-7 kg*m^2
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# ^(* Green parentheses in this file indicate annotations to an expression. To read an annotation, right-click on the entire expression within the parentheses and choose View/Edit Annotation. If the expression is copied to another file, the annotation will be preserved.)
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