# Title: Mass Moments of Inertia: Circular Cone
# Description: Determining the mass moment of inertia of a circular cone.
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# MASS MOMENTS OF INERTIA
# reference tables
# Circular Cone
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# Mass moment of inertia:
# 3/10*mass*a^2 | About the x-axis
# annotation to a formula above: From Vector Mechanics for Engineers: Statics and Dynamics, 3rd edition, by Ferdinand P. Beer and E. Russell Johnston Jr., McGraw-Hill Book Company (1977).
3/5*mass*(1/4*a^2 + h^2)  # About the y- or z-axis
# Example: Determine the mass moment of inertia, I, of a circular cone about the x-, y-, and z-axes, as shown, given the radius, a, the height, h, and the mass of the cone.
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a := 3*m
h := 22*m
mass := 4.88*10^6*kg
I_x := 3/10*mass*a^2  # Moment about the x-axis
I_y := 3/5*mass*(1/4*a^2 + h^2)  # Moment about the y-axis
I_z := I_y  # Moment about the z-axis
I_x = 13176000 kg*m^2
I_y = 1423740000 kg*m^2
I_z = 1423740000 kg*m^2
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# ^(* Green parentheses in this file indicate annotations to an expression. To read an annotation, right-click on the entire expression within the parentheses and choose View/Edit Annotation. If the expression is copied to another file, the annotation will be preserved.)
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