# Title: Metals: Thermal Conductivity at Atmospheric Pressure, 25° C
# Description: Thermal conductivity of metals.
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# PROPERTIES OF METALS
# reference tables
# Thermal Conductivity at Atmospheric Pressure, 25º C
# Metal
## Thermal Conductivity (watt/cm K)
# Metal
## Thermal Conductivity (watt/cm K)
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# Aluminum | 2.37*watt/(cm*K) | Osmium | 0.61*watt/(cm*K)
# annotation to a formula above: Thermal conductivity of Aluminum, from CRC Handbook of Tables for Applied Engineering Science, 2nd edition, edited by R. Bolz and G. Tuve, CRC Press (1973).
# annotation to a formula above: Thermal conductivity of Osmium, from CRC Handbook of Tables for Applied Engineering Science, 2nd edition, edited by R. Bolz and G. Tuve, CRC Press (1973).
# Antimony | 0.185*watt/(cm*K) | Platinum | 0.73*watt/(cm*K)
# annotation to a formula above: Thermal conductivity of Antimony, from CRC Handbook of Tables for Applied Engineering Science, 2nd edition, edited by R. Bolz and G. Tuve, CRC Press (1973).
# annotation to a formula above: Thermal conductivity of Platinum, from CRC Handbook of Tables for Applied Engineering Science, 2nd edition, edited by R. Bolz and G. Tuve, CRC Press (1973).
# Beryllium | 2.18*watt/(cm*K) | Plutonium | 0.08*watt/(cm*K)
# annotation to a formula above: Thermal conductivity of Beryllium, from CRC Handbook of Tables for Applied Engineering Science, 2nd edition, edited by R. Bolz and G. Tuve, CRC Press (1973).
# annotation to a formula above: Thermal conductivity of Plutonium, from CRC Handbook of Tables for Applied Engineering Science, 2nd edition, edited by R. Bolz and G. Tuve, CRC Press (1973).
# Bismuth | 0.084*watt/(cm*K) | Potassium | 0.99*watt/(cm*K)
# annotation to a formula above: Thermal conductivity of Bismuth, from CRC Handbook of Tables for Applied Engineering Science, 2nd edition, edited by R. Bolz and G. Tuve, CRC Press (1973).
# annotation to a formula above: Thermal conductivity of Potassium, from CRC Handbook of Tables for Applied Engineering Science, 2nd edition, edited by R. Bolz and G. Tuve, CRC Press (1973).
# Cadmium | 0.92*watt/(cm*K) | Rhodium | 1.5*watt/(cm*K)
# annotation to a formula above: Thermal conductivity of Cadmium, from CRC Handbook of Tables for Applied Engineering Science, 2nd edition, edited by R. Bolz and G. Tuve, CRC Press (1973).
# annotation to a formula above: Thermal conductivity of Rhodium, from CRC Handbook of Tables for Applied Engineering Science, 2nd edition, edited by R. Bolz and G. Tuve, CRC Press (1973).
# Chromium | 0.91*watt/(cm*K) | Selenium | 5*10^-3*watt/(cm*K)
# annotation to a formula above: Thermal conductivity of Chromium, from CRC Handbook of Tables for Applied Engineering Science, 2nd edition, edited by R. Bolz and G. Tuve, CRC Press (1973).
# annotation to a formula above: Thermal conductivity of Selenium, from CRC Handbook of Tables for Applied Engineering Science, 2nd edition, edited by R. Bolz and G. Tuve, CRC Press (1973).
# Cobalt | 0.69*watt/(cm*K) | Silicon | 0.835*watt/(cm*K)
# annotation to a formula above: Thermal conductivity of Cobalt, from CRC Handbook of Tables for Applied Engineering Science, 2nd edition, edited by R. Bolz and G. Tuve, CRC Press (1973).
# annotation to a formula above: Thermal conductivity of Silicon, from CRC Handbook of Tables for Applied Engineering Science, 2nd edition, edited by R. Bolz and G. Tuve, CRC Press (1973).
# Copper | 3.98*watt/(cm*K) | Silver | 4.27*watt/(cm*K)
# annotation to a formula above: Thermal conductivity of Copper, from CRC Handbook of Tables for Applied Engineering Science, 2nd edition, edited by R. Bolz and G. Tuve, CRC Press (1973).
# annotation to a formula above: Thermal conductivity of Silver, from CRC Handbook of Tables for Applied Engineering Science, 2nd edition, edited by R. Bolz and G. Tuve, CRC Press (1973).
# Gold | 3.15*watt/(cm*K) | Sodium | 1.34*watt/(cm*K)
# annotation to a formula above: Thermal conductivity of Gold, from CRC Handbook of Tables for Applied Engineering Science, 2nd edition, edited by R. Bolz and G. Tuve, CRC Press (1973).
# annotation to a formula above: Thermal conductivity of Sodium, from CRC Handbook of Tables for Applied Engineering Science, 2nd edition, edited by R. Bolz and G. Tuve, CRC Press (1973).
# Iridium | 1.47*watt/(cm*K) | Tantalum | 0.575*watt/(cm*K)
# annotation to a formula above: Thermal conductivity of Iridium, from CRC Handbook of Tables for Applied Engineering Science, 2nd edition, edited by R. Bolz and G. Tuve, CRC Press (1973).
# annotation to a formula above: Thermal conductivity of Tantalum, from CRC Handbook of Tables for Applied Engineering Science, 2nd edition, edited by R. Bolz and G. Tuve, CRC Press (1973).
# Iron | 0.803*watt/(cm*K) | Thorium | 0.41*watt/(cm*K)
# annotation to a formula above: Thermal conductivity of Iron, from CRC Handbook of Tables for Applied Engineering Science, 2nd edition, edited by R. Bolz and G. Tuve, CRC Press (1973).
# annotation to a formula above: Thermal conductivity of Thorium, from CRC Handbook of Tables for Applied Engineering Science, 2nd edition, edited by R. Bolz and G. Tuve, CRC Press (1973).
# Lead | 0.352*watt/(cm*K) | Tin | 0.67*watt/(cm*K)
# annotation to a formula above: Thermal conductivity of Lead, from CRC Handbook of Tables for Applied Engineering Science, 2nd edition, edited by R. Bolz and G. Tuve, CRC Press (1973).
# annotation to a formula above: Thermal conductivity of Tin, from CRC Handbook of Tables for Applied Engineering Science, 2nd edition, edited by R. Bolz and G. Tuve, CRC Press (1973).
# Magnesium | 1.56*watt/(cm*K) | Titanium | 0.22*watt/(cm*K)
# annotation to a formula above: Thermal conductivity of Magnesium, from CRC Handbook of Tables for Applied Engineering Science, 2nd edition, edited by R. Bolz and G. Tuve, CRC Press (1973).
# annotation to a formula above: Thermal conductivity of Titanium, from CRC Handbook of Tables for Applied Engineering Science, 2nd edition, edited by R. Bolz and G. Tuve, CRC Press (1973).
# Mercury | 0.084*watt/(cm*K) | Tungsten | 1.78*watt/(cm*K)
# annotation to a formula above: Thermal conductivity of Mercury, from CRC Handbook of Tables for Applied Engineering Science, 2nd edition, edited by R. Bolz and G. Tuve, CRC Press (1973).
# annotation to a formula above: Thermal conductivity of Tungsten, from CRC Handbook of Tables for Applied Engineering Science, 2nd edition, edited by R. Bolz and G. Tuve, CRC Press (1973).
# Molybdenum | 1.38*watt/(cm*K) | Uranium | 0.25*watt/(cm*K)
# annotation to a formula above: Thermal conductivity of Molybdenum, from CRC Handbook of Tables for Applied Engineering Science, 2nd edition, edited by R. Bolz and G. Tuve, CRC Press (1973).
# annotation to a formula above: Thermal conductivity of Uranium, from CRC Handbook of Tables for Applied Engineering Science, 2nd edition, edited by R. Bolz and G. Tuve, CRC Press (1973).
# Nickel | 0.905*watt/(cm*K) | Vanadium | 0.6*watt/(cm*K)
# annotation to a formula above: Thermal conductivity of Nickel, from CRC Handbook of Tables for Applied Engineering Science, 2nd edition, edited by R. Bolz and G. Tuve, CRC Press (1973).
# annotation to a formula above: Thermal conductivity of Vanadium, from CRC Handbook of Tables for Applied Engineering Science, 2nd edition, edited by R. Bolz and G. Tuve, CRC Press (1973).
# Niobium | 0.53*watt/(cm*K) | Zinc | 1.21*watt/(cm*K)
# annotation to a formula above: Thermal conductivity of Niobium, from CRC Handbook of Tables for Applied Engineering Science, 2nd edition, edited by R. Bolz and G. Tuve, CRC Press (1973).
# annotation to a formula above: Thermal conductivity of Zinc, from CRC Handbook of Tables for Applied Engineering Science, 2nd edition, edited by R. Bolz and G. Tuve, CRC Press (1973).
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# ^(* Green parentheses in this file indicate annotations to an expression. To read an annotation, right-click on the entire expression within the parentheses and choose View/Edit Annotation. If the expression is copied to another file, the annotation will be preserved.)
# Data from CRC Handbook of Tables for Applied Engineering Science, 2nd edition, edited by R. Bolz and G. Tuve, CRC Press (1973).
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