# Title: Metals: Coefficient of Linear Expansion per Degree Celsius at 25° C
# Description: Coefficient of linear expansion per degree Celsius for metals.
# Worksheet setting: ORIGIN = 1
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# PROPERTIES OF METALS
# reference tables
# Coefficient of Linear Expansion per Degree Celsius at 25° C
# Expansion Coefficient
# (x10^6)
# Expansion Coefficient
# (x10^6)
## Metal
## Metal
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# Aluminum | 25 | Osmium | 5
# annotation to a formula above: Expansion coefficient (x10^6) for Aluminum, from CRC Handbook of Tables for Applied Engineering Science, 2nd edition, edited by R. Bolz and G. Tuve, CRC Press (1973).
# annotation to a formula above: Expansion coefficient (x10^6) for Osmium, from CRC Handbook of Tables for Applied Engineering Science, 2nd edition, edited by R. Bolz and G. Tuve, CRC Press (1973).
# Antimony | 9 | Platinum | 9
# annotation to a formula above: Expansion coefficient (x10^6) for Antimony, from CRC Handbook of Tables for Applied Engineering Science, 2nd edition, edited by R. Bolz and G. Tuve, CRC Press (1973).
# annotation to a formula above: Expansion coefficient (x10^6) for Platinum, from CRC Handbook of Tables for Applied Engineering Science, 2nd edition, edited by R. Bolz and G. Tuve, CRC Press (1973).
# Beryllium | 12 | Plutonium | 54
# annotation to a formula above: Expansion coefficient (x10^6) for Beryllium, from CRC Handbook of Tables for Applied Engineering Science, 2nd edition, edited by R. Bolz and G. Tuve, CRC Press (1973).
# annotation to a formula above: Expansion coefficient (x10^6) for Plutonium, from CRC Handbook of Tables for Applied Engineering Science, 2nd edition, edited by R. Bolz and G. Tuve, CRC Press (1973).
# Bismuth | 13 | Potassium | 83
# annotation to a formula above: Expansion coefficient (x10^6) for Bismuth, from CRC Handbook of Tables for Applied Engineering Science, 2nd edition, edited by R. Bolz and G. Tuve, CRC Press (1973).
# annotation to a formula above: Expansion coefficient (x10^6) for Potassium, from CRC Handbook of Tables for Applied Engineering Science, 2nd edition, edited by R. Bolz and G. Tuve, CRC Press (1973).
# Cadmium | 30 | Rhodium | 8
# annotation to a formula above: Expansion coefficient (x10^6) for Cadmium, from CRC Handbook of Tables for Applied Engineering Science, 2nd edition, edited by R. Bolz and G. Tuve, CRC Press (1973).
# annotation to a formula above: Expansion coefficient (x10^6) for Rhodium, from CRC Handbook of Tables for Applied Engineering Science, 2nd edition, edited by R. Bolz and G. Tuve, CRC Press (1973).
# Chromium | 6 | Selenium | 37
# annotation to a formula above: Expansion coefficient (x10^6) for Chromium, from CRC Handbook of Tables for Applied Engineering Science, 2nd edition, edited by R. Bolz and G. Tuve, CRC Press (1973).
# annotation to a formula above: Expansion coefficient (x10^6) for Selenium, from CRC Handbook of Tables for Applied Engineering Science, 2nd edition, edited by R. Bolz and G. Tuve, CRC Press (1973).
# Cobalt | 12 | Silicon | 3
# annotation to a formula above: Expansion coefficient (x10^6) for Colbalt, from CRC Handbook of Tables for Applied Engineering Science, 2nd edition, edited by R. Bolz and G. Tuve, CRC Press (1973).
# annotation to a formula above: Expansion coefficient (x10^6) for Silicon, from CRC Handbook of Tables for Applied Engineering Science, 2nd edition, edited by R. Bolz and G. Tuve, CRC Press (1973).
# Copper | 16.6 | Silver | 19
# annotation to a formula above: Expansion coefficient (x10^6) for Copper, from CRC Handbook of Tables for Applied Engineering Science, 2nd edition, edited by R. Bolz and G. Tuve, CRC Press (1973).
# annotation to a formula above: Expansion coefficient (x10^6) for Silver, from CRC Handbook of Tables for Applied Engineering Science, 2nd edition, edited by R. Bolz and G. Tuve, CRC Press (1973).
# Gold | 14.2 | Sodium | 70
# annotation to a formula above: Expansion coefficient (x10^6) for Gold, from CRC Handbook of Tables for Applied Engineering Science, 2nd edition, edited by R. Bolz and G. Tuve, CRC Press (1973).
# annotation to a formula above: Expansion coefficient (x10^6) for Sodium, from CRC Handbook of Tables for Applied Engineering Science, 2nd edition, edited by R. Bolz and G. Tuve, CRC Press (1973).
# Iridium | 6 | Tantalum | 6.5
# annotation to a formula above: Expansion coefficient (x10^6) for Iridium, from CRC Handbook of Tables for Applied Engineering Science, 2nd edition, edited by R. Bolz and G. Tuve, CRC Press (1973).
# annotation to a formula above: Expansion coefficient (x10^6) for Tantalum, from CRC Handbook of Tables for Applied Engineering Science, 2nd edition, edited by R. Bolz and G. Tuve, CRC Press (1973).
# Iron | 12 | Thorium | 12
# annotation to a formula above: Expansion coefficient (x10^6) for Iron, from CRC Handbook of Tables for Applied Engineering Science, 2nd edition, edited by R. Bolz and G. Tuve, CRC Press (1973).
# annotation to a formula above: Expansion coefficient (x10^6) for Thorium, from CRC Handbook of Tables for Applied Engineering Science, 2nd edition, edited by R. Bolz and G. Tuve, CRC Press (1973).
# Lead | 29 | Tin | 20
# annotation to a formula above: Expansion coefficient (x10^6) for Lead, from CRC Handbook of Tables for Applied Engineering Science, 2nd edition, edited by R. Bolz and G. Tuve, CRC Press (1973).
# annotation to a formula above: Expansion coefficient (x10^6) for Tin, from CRC Handbook of Tables for Applied Engineering Science, 2nd edition, edited by R. Bolz and G. Tuve, CRC Press (1973).
# Magnesium | 25 | Titanium | 8.5
# annotation to a formula above: Expnsion coefficient (x10^6) for Magnesium, from CRC Handbook of Tables for Applied Engineering Science, 2nd edition, edited by R. Bolz and G. Tuve, CRC Press (1973).
# annotation to a formula above: Expansion coefficient (x10^6) for Titanium, from CRC Handbook of Tables for Applied Engineering Science, 2nd edition, edited by R. Bolz and G. Tuve, CRC Press (1973).
# Manganese | 22 | Tungsten | 4.5
# annotation to a formula above: Expansion coefficient (x10^6) for Manganese, from CRC Handbook of Tables for Applied Engineering Science, 2nd edition, edited by R. Bolz and G. Tuve, CRC Press (1973).
# annotation to a formula above: Expansion coefficient (x10^6) for Tungsten, from CRC Handbook of Tables for Applied Engineering Science, 2nd edition, edited by R. Bolz and G. Tuve, CRC Press (1973).
# Molybdenum | 5 | Uranium | 13.4
# annotation to a formula above: Expansion coefficient (x10^6) for Molybdenum, from CRC Handbook of Tables for Applied Engineering Science, 2nd edition, edited by R. Bolz and G. Tuve, CRC Press (1973).
# annotation to a formula above: Expansion coefficient (x10^6) for Uranium, from CRC Handbook of Tables for Applied Engineering Science, 2nd edition, edited by R. Bolz and G. Tuve, CRC Press (1973).
# Nickel | 13 | Vanadium | 8
# annotation to a formula above: Expansion coefficient (x10^6) for Nickel, from CRC Handbook of Tables for Applied Engineering Science, 2nd edition, edited by R. Bolz and G. Tuve, CRC Press (1973).
# annotation to a formula above: Expansion coefficient (x10^6) for Vanadium, from CRC Handbook of Tables for Applied Engineering Science, 2nd edition, edited by R. Bolz and G. Tuve, CRC Press (1973).
# Niobium | 7 | Zinc | 35
# annotation to a formula above: Expansion coefficient (x10^6) for Niobium, from CRC Handbook of Tables for Applied Engineering Science, 2nd edition, edited by R. Bolz and G. Tuve, CRC Press (1973).
# annotation to a formula above: Expansion coefficient (x10^6) for Zinc, from CRC Handbook of Tables for Applied Engineering Science, 2nd edition, edited by R. Bolz and G. Tuve, CRC Press (1973).
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# ^(* Green parentheses in this file indicate annotations to an expression. To read an annotation, right-click on the entire expression within the parentheses and choose View/Edit Annotation. If the expression is copied to another file, the annotation will be preserved.)
# Data from CRC Handbook of Tables for Applied Engineering Science, 2nd edition, edited by R. Bolz and G. Tuve, CRC Press (1973).
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