# Title: Metals: Electrical Resistivity
# Description: Electrical resistivity of metals.
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# PROPERTIES OF METALS
# reference tables
# Electrical Resistivity
# Electrical Resistivity
# at 20° C, (Ohm ·m·10^-^8)
## Electrical Resistivity at 20° C, (Ohm ·m·10^-^8)
## Metal
## Metal
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# Aluminum | 2.67 | Nickel | 6.9
# annotation to a formula above: Electrical resistivity of Aluminum, from CRC Handbook of Tables for Applied Engineering Science, 2nd edition, edited by R. Bolz and G. Tuve, CRC Press (1973), and Electronics Engineers' Handbook, 3rd edition, edited by D. Fink and D. Christiansen, McGraw-Hill, 1989.
# annotation to a formula above: Electrical resistivity of Nickel, from CRC Handbook of Tables for Applied Engineering Science, 2nd edition, edited by R. Bolz and G. Tuve, CRC Press (1973), and Electronics Engineers' Handbook, 3rd edition, edited by D. Fink and D. Christiansen, McGraw-Hill, 1989.
# Antimony | 40.1 | Niobium | 16
# annotation to a formula above: Electrical resistivity of Antimony, from CRC Handbook of Tables for Applied Engineering Science, 2nd edition, edited by R. Bolz and G. Tuve, CRC Press (1973), and Electronics Engineers' Handbook, 3rd edition, edited by D. Fink and D. Christiansen, McGraw-Hill, 1989.
# annotation to a formula above: Electrical resistivity of Niobium, from CRC Handbook of Tables for Applied Engineering Science, 2nd edition, edited by R. Bolz and G. Tuve, CRC Press (1973), and Electronics Engineers' Handbook, 3rd edition, edited by D. Fink and D. Christiansen, McGraw-Hill, 1989.
# Beryllium | 3.3 | Osmium | 8.8
# annotation to a formula above: Electrical resistivity of Beryllium, from CRC Handbook of Tables for Applied Engineering Science, 2nd edition, edited by R. Bolz and G. Tuve, CRC Press (1973), and Electronics Engineers' Handbook, 3rd edition, edited by D. Fink and D. Christiansen, McGraw-Hill, 1989.
# annotation to a formula above: Electrical resistivity of Osmium, from CRC Handbook of Tables for Applied Engineering Science, 2nd edition, edited by R. Bolz and G. Tuve, CRC Press (1973), and Electronics Engineers' Handbook, 3rd edition, edited by D. Fink and D. Christiansen, McGraw-Hill, 1989.
# Bismuth | 117 | Platinum | 10.58
# annotation to a formula above: Electrical resistivity of Bismuth, from CRC Handbook of Tables for Applied Engineering Science, 2nd edition, edited by R. Bolz and G. Tuve, CRC Press (1973), and Electronics Engineers' Handbook, 3rd edition, edited by D. Fink and D. Christiansen, McGraw-Hill, 1989.
# annotation to a formula above: Electrical resistivity of Platinum, from CRC Handbook of Tables for Applied Engineering Science, 2nd edition, edited by R. Bolz and G. Tuve, CRC Press (1973), and Electronics Engineers' Handbook, 3rd edition, edited by D. Fink and D. Christiansen, McGraw-Hill, 1989.
# Cadmium | 7.3 | Potassium | 6.8
# annotation to a formula above: Electrical resistivity of Cadmium, from CRC Handbook of Tables for Applied Engineering Science, 2nd edition, edited by R. Bolz and G. Tuve, CRC Press (1973), and Electronics Engineers' Handbook, 3rd edition, edited by D. Fink and D. Christiansen, McGraw-Hill, 1989.
# annotation to a formula above: Electrical resistivity of Potassium, from CRC Handbook of Tables for Applied Engineering Science, 2nd edition, edited by R. Bolz and G. Tuve, CRC Press (1973), and Electronics Engineers' Handbook, 3rd edition, edited by D. Fink and D. Christiansen, McGraw-Hill, 1989.
# Chromium | 13.2 | Rhodium | 4.7
# annotation to a formula above: Electrical resistivity of Chromium, from CRC Handbook of Tables for Applied Engineering Science, 2nd edition, edited by R. Bolz and G. Tuve, CRC Press (1973), and Electronics Engineers' Handbook, 3rd edition, edited by D. Fink and D. Christiansen, McGraw-Hill, 1989.
# annotation to a formula above: Electrical resistivity of Rhodium, from CRC Handbook of Tables for Applied Engineering Science, 2nd edition, edited by R. Bolz and G. Tuve, CRC Press (1973), and Electronics Engineers' Handbook, 3rd edition, edited by D. Fink and D. Christiansen, McGraw-Hill, 1989.
# Cobalt | 6.34 | Silver | 1.63
# annotation to a formula above: Electrical resistivity of Cobalt, from CRC Handbook of Tables for Applied Engineering Science, 2nd edition, edited by R. Bolz and G. Tuve, CRC Press (1973), and Electronics Engineers' Handbook, 3rd edition, edited by D. Fink and D. Christiansen, McGraw-Hill, 1989.
# annotation to a formula above: Electrical resistivity of Silver, from CRC Handbook of Tables for Applied Engineering Science, 2nd edition, edited by R. Bolz and G. Tuve, CRC Press (1973), and Electronics Engineers' Handbook, 3rd edition, edited by D. Fink and D. Christiansen, McGraw-Hill, 1989.
# Copper | 1.694 | Sodium | 4.7
# annotation to a formula above: Electrical resistivity of Copper, from CRC Handbook of Tables for Applied Engineering Science, 2nd edition, edited by R. Bolz and G. Tuve, CRC Press (1973), and Electronics Engineers' Handbook, 3rd edition, edited by D. Fink and D. Christiansen, McGraw-Hill, 1989.
# annotation to a formula above: Electrical resistivity of Sodium, from CRC Handbook of Tables for Applied Engineering Science, 2nd edition, edited by R. Bolz and G. Tuve, CRC Press (1973), and Electronics Engineers' Handbook, 3rd edition, edited by D. Fink and D. Christiansen, McGraw-Hill, 1989.
# Gold | 2.2 | Tantalum | 13.5
# annotation to a formula above: Electrical resistivity of Gold, from CRC Handbook of Tables for Applied Engineering Science, 2nd edition, edited by R. Bolz and G. Tuve, CRC Press (1973), and Electronics Engineers' Handbook, 3rd edition, edited by D. Fink and D. Christiansen, McGraw-Hill, 1989.
# annotation to a formula above: Electrical resistivity of Tantalum, from CRC Handbook of Tables for Applied Engineering Science, 2nd edition, edited by R. Bolz and G. Tuve, CRC Press (1973), and Electronics Engineers' Handbook, 3rd edition, edited by D. Fink and D. Christiansen, McGraw-Hill, 1989.
# Iridium | 5.1 | Thorium | 14
# annotation to a formula above: Electrical resistivity of Iridium, from CRC Handbook of Tables for Applied Engineering Science, 2nd edition, edited by R. Bolz and G. Tuve, CRC Press (1973), and Electronics Engineers' Handbook, 3rd edition, edited by D. Fink and D. Christiansen, McGraw-Hill, 1989.
# annotation to a formula above: Electrical resistivity of Thorium, from CRC Handbook of Tables for Applied Engineering Science, 2nd edition, edited by R. Bolz and G. Tuve, CRC Press (1973), and Electronics Engineers' Handbook, 3rd edition, edited by D. Fink and D. Christiansen, McGraw-Hill, 1989.
# Iron | 10.1 | Tin | 12.6
# annotation to a formula above: Electrical resistivity of Iron, from CRC Handbook of Tables for Applied Engineering Science, 2nd edition, edited by R. Bolz and G. Tuve, CRC Press (1973), and Electronics Engineers' Handbook, 3rd edition, edited by D. Fink and D. Christiansen, McGraw-Hill, 1989.
# annotation to a formula above: Electrical resistivity of Tin, from CRC Handbook of Tables for Applied Engineering Science, 2nd edition, edited by R. Bolz and G. Tuve, CRC Press (1973), and Electronics Engineers' Handbook, 3rd edition, edited by D. Fink and D. Christiansen, McGraw-Hill, 1989.
# Lead | 20.6 | Titanium | 54
# annotation to a formula above: Electrical resistivity of Lead, from CRC Handbook of Tables for Applied Engineering Science, 2nd edition, edited by R. Bolz and G. Tuve, CRC Press (1973), and Electronics Engineers' Handbook, 3rd edition, edited by D. Fink and D. Christiansen, McGraw-Hill, 1989.
# annotation to a formula above: Electrical resistivity of Titanium, from CRC Handbook of Tables for Applied Engineering Science, 2nd edition, edited by R. Bolz and G. Tuve, CRC Press (1973), and Electronics Engineers' Handbook, 3rd edition, edited by D. Fink and D. Christiansen, McGraw-Hill, 1989.
# Magnesium | 4.2 | Tungsten | 5.4
# annotation to a formula above: Electrical resistivity of Magnesium, from CRC Handbook of Tables for Applied Engineering Science, 2nd edition, edited by R. Bolz and G. Tuve, CRC Press (1973), and Electronics Engineers' Handbook, 3rd edition, edited by D. Fink and D. Christiansen, McGraw-Hill, 1989.
# annotation to a formula above: Electrical resistivity of Tungsten, from CRC Handbook of Tables for Applied Engineering Science, 2nd edition, edited by R. Bolz and G. Tuve, CRC Press (1973), and Electronics Engineers' Handbook, 3rd edition, edited by D. Fink and D. Christiansen, McGraw-Hill, 1989.
# Manganese | 160 | Uranium | 27
# annotation to a formula above: Electrical resistivity of Manganese, from CRC Handbook of Tables for Applied Engineering Science, 2nd edition, edited by R. Bolz and G. Tuve, CRC Press (1973), and Electronics Engineers' Handbook, 3rd edition, edited by D. Fink and D. Christiansen, McGraw-Hill, 1989.
# annotation to a formula above: Electrical resistivity of Uranium, from CRC Handbook of Tables for Applied Engineering Science, 2nd edition, edited by R. Bolz and G. Tuve, CRC Press (1973), and Electronics Engineers' Handbook, 3rd edition, edited by D. Fink and D. Christiansen, McGraw-Hill, 1989.
# Mercury | 95.9 | Vanadium | 19.6
# annotation to a formula above: Electrical resistivity of Mercury, from CRC Handbook of Tables for Applied Engineering Science, 2nd edition, edited by R. Bolz and G. Tuve, CRC Press (1973), and Electronics Engineers' Handbook, 3rd edition, edited by D. Fink and D. Christiansen, McGraw-Hill, 1989.
# annotation to a formula above: Electrical resistivity of Vanadium, from CRC Handbook of Tables for Applied Engineering Science, 2nd edition, edited by R. Bolz and G. Tuve, CRC Press (1973), and Electronics Engineers' Handbook, 3rd edition, edited by D. Fink and D. Christiansen, McGraw-Hill, 1989.
# Molybdenum | 5.7 | Zinc | 5.96
# annotation to a formula above: Electrical resistivity of Molybdenum, from CRC Handbook of Tables for Applied Engineering Science, 2nd edition, edited by R. Bolz and G. Tuve, CRC Press (1973), and Electronics Engineers' Handbook, 3rd edition, edited by D. Fink and D. Christiansen, McGraw-Hill, 1989.
# annotation to a formula above: Electrical resistivity of Zinc, from CRC Handbook of Tables for Applied Engineering Science, 2nd edition, edited by R. Bolz and G. Tuve, CRC Press (1973), and Electronics Engineers' Handbook, 3rd edition, edited by D. Fink and D. Christiansen, McGraw-Hill, 1989.
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# ^(* Green parentheses in this file indicate annotations to an expression. To read an annotation, right-click on the entire expression within the parentheses and choose View/Edit Annotation. If the expression is copied to another file, the annotation will be preserved.)
# Data from CRC Handbook of Tables for Applied Engineering
# Science, 2nd edition, edited by R. Bolz and G. Tuve, CRC Press (1973),
# and Electronics Engineers' Handbook, 3rd edition, edited by D. Fink and D. Christiansen, McGraw-Hill, 1989.
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