# Title: Metals: Modulus of Elasticity
# Description: Modulus of elasticity of metals.
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# PROPERTIES OF METALS
# reference tables
# Modulus of Elasticity
## Modulus of Elasticity (Pa)
## Modulus of Elasticity (Pa)
## Metal
## Metal
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# Aluminum | 6.895*10^10*Pa | Niobium | 1.034*10^11*Pa
# annotation to a formula above: Modulus of elasticity for Aluminum, from CRC Handbook of Tables for Applied Engineering Science, 2nd edition, edited by R. Bolz and G. Tuve, CRC Press (1973).
# annotation to a formula above: Modulus of elasticity for Niobium, from CRC Handbook of Tables for Applied Engineering Science, 2nd edition, edited by R. Bolz and G. Tuve, CRC Press (1973).
# Antimony | 7.791*10^10*Pa | Osmium | 5.516*10^11*Pa
# annotation to a formula above: Modulus of elasticity for Antimony, from CRC Handbook of Tables for Applied Engineering Science, 2nd edition, edited by R. Bolz and G. Tuve, CRC Press (1973).
# annotation to a formula above: Modulus of elasticity for Osmium, from CRC Handbook of Tables for Applied Engineering Science, 2nd edition, edited by R. Bolz and G. Tuve, CRC Press (1973).
# Beryllium | 2.896*10^11*Pa | Platinum | 1.469*10^11*Pa
# annotation to a formula above: Modulus of elasticity for Beryllium, from CRC Handbook of Tables for Applied Engineering Science, 2nd edition, edited by R. Bolz and G. Tuve, CRC Press (1973).
# annotation to a formula above: Modulus of elasticity for Platinum, from CRC Handbook of Tables for Applied Engineering Science, 2nd edition, edited by R. Bolz and G. Tuve, CRC Press (1973).
# Bismuth | 3.172*10^10*Pa | Plutonium | 9.653*10^10*Pa
# annotation to a formula above: Modulus of elasticity for Bismuth, from CRC Handbook of Tables for Applied Engineering Science, 2nd edition, edited by R. Bolz and G. Tuve, CRC Press (1973).
# annotation to a formula above: Modulus of elasticity for Plutonium, from CRC Handbook of Tables for Applied Engineering Science, 2nd edition, edited by R. Bolz and G. Tuve, CRC Press (1973).
# Cadmium | 5.516*10^10*Pa | Rhodium | 2.896*10^11*Pa
# annotation to a formula above: Modulus of elasticity for Cadmium, from CRC Handbook of Tables for Applied Engineering Science, 2nd edition, edited by R. Bolz and G. Tuve, CRC Press (1973).
# annotation to a formula above: Modulus of elasticity for Rhodium, from CRC Handbook of Tables for Applied Engineering Science, 2nd edition, edited by R. Bolz and G. Tuve, CRC Press (1973).
# Chromium | 2.482*10^11*Pa | Selenium | 5.792*10^10*Pa
# annotation to a formula above: Modulus of elasticity for Chromium, from CRC Handbook of Tables for Applied Engineering Science, 2nd edition, edited by R. Bolz and G. Tuve, CRC Press (1973).
# annotation to a formula above: Modulus of elasticity for Selenium, from CRC Handbook of Tables for Applied Engineering Science, 2nd edition, edited by R. Bolz and G. Tuve, CRC Press (1973).
# Cobalt | 2.068*10^11*Pa | Silicon | 1.103*10^11*Pa
# annotation to a formula above: Modulus of elasticity for Cobalt, from CRC Handbook of Tables for Applied Engineering Science, 2nd edition, edited by R. Bolz and G. Tuve, CRC Press (1973).
# annotation to a formula above: Modulus of elasticity for Silicon, from CRC Handbook of Tables for Applied Engineering Science, 2nd edition, edited by R. Bolz and G. Tuve, CRC Press (1973).
# Copper | 1.172*10^11*Pa | Silver | 7.239*10^10*Pa
# annotation to a formula above: Modulus of elasticity for Copper, from CRC Handbook of Tables for Applied Engineering Science, 2nd edition, edited by R. Bolz and G. Tuve, CRC Press (1973).
# annotation to a formula above: Modulus of elasticity for Silver, from CRC Handbook of Tables for Applied Engineering Science, 2nd edition, edited by R. Bolz and G. Tuve, CRC Press (1973).
# Gold | 7.446*10^10*Pa | Tantalum | 1.862*10^11*Pa
# annotation to a formula above: Modulus of elasticity for Gold, from CRC Handbook of Tables for Applied Engineering Science, 2nd edition, edited by R. Bolz and G. Tuve, CRC Press (1973).
# annotation to a formula above: Modulus of elasticity for Tantalum, from CRC Handbook of Tables for Applied Engineering Science, 2nd edition, edited by R. Bolz and G. Tuve, CRC Press (1973).
# Iridium | 5.171*10^11*Pa | Thorium | 5.861*10^10*Pa
# annotation to a formula above: Modulus of elasticity for Iridium, from CRC Handbook of Tables for Applied Engineering Science, 2nd edition, edited by R. Bolz and G. Tuve, CRC Press (1973).
# annotation to a formula above: Modulus of elasticity for Thorium, from CRC Handbook of Tables for Applied Engineering Science, 2nd edition, edited by R. Bolz and G. Tuve, CRC Press (1973).
# Iron | 1.965*10^11*Pa | Tin | 4.137*10^10*Pa
# annotation to a formula above: Modulus of elasticity for Iron, from CRC Handbook of Tables for Applied Engineering Science, 2nd edition, edited by R. Bolz and G. Tuve, CRC Press (1973).
# annotation to a formula above: Modulus of elasticity for Tin, from CRC Handbook of Tables for Applied Engineering Science, 2nd edition, edited by R. Bolz and G. Tuve, CRC Press (1973).
# Lead | 1.379*10^10*Pa | Titanium | 1.103*10^11*Pa
# annotation to a formula above: Modulus of elasticity for Lead, from CRC Handbook of Tables for Applied Engineering Science, 2nd edition, edited by R. Bolz and G. Tuve, CRC Press (1973).
# annotation to a formula above: Modulus of elasticity for Titanium, from CRC Handbook of Tables for Applied Engineering Science, 2nd edition, edited by R. Bolz and G. Tuve, CRC Press (1973).
# Magnesium | 4.413*10^10*Pa | Tungsten | 3.447*10^11*Pa
# annotation to a formula above: Modulus of elasticity for Magnesium, from CRC Handbook of Tables for Applied Engineering Science, 2nd edition, edited by R. Bolz and G. Tuve, CRC Press (1973).
# annotation to a formula above: Modulus of elasticity for Tungsten, from CRC Handbook of Tables for Applied Engineering Science, 2nd edition, edited by R. Bolz and G. Tuve, CRC Press (1973).
# Manganese | 1.586*10^11*Pa | Uranium | 1.655*10^11*Pa
# annotation to a formula above: Modulus of elasticity for Manganese, from CRC Handbook of Tables for Applied Engineering Science, 2nd edition, edited by R. Bolz and G. Tuve, CRC Press (1973).
# annotation to a formula above: Modulus of elasticity for Uranium, from CRC Handbook of Tables for Applied Engineering Science, 2nd edition, edited by R. Bolz and G. Tuve, CRC Press (1973).
# Molybdenum | 2.758*10^11*Pa | Vanadium | 1.31*10^11*Pa
# annotation to a formula above: Modulus of elasticity for Molybdenum, from CRC Handbook of Tables for Applied Engineering Science, 2nd edition, edited by R. Bolz and G. Tuve, CRC Press (1973).
# annotation to a formula above: Modulus of elasticity for Vanadium, from CRC Handbook of Tables for Applied Engineering Science, 2nd edition, edited by R. Bolz and G. Tuve, CRC Press (1973).
2.137*10^11*Pa  # Zinc
8.274*10^10*Pa
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# Nickel
# annotation to a formula above: Modulus of elasticity for Nickel, from CRC Handbook of Tables for Applied Engineering Science, 2nd edition, edited by R. Bolz and G. Tuve, CRC Press (1973).
# annotation to a formula above: Modulus of elasticity for Zinc, from CRC Handbook of Tables for Applied Engineering Science, 2nd edition, edited by R. Bolz and G. Tuve, CRC Press (1973).
# ^(* Green parentheses in this file indicate annotations to an expression. To read an annotation, right-click on the entire expression within the parentheses and choose View/Edit Annotation. If the expression is copied to another file, the annotation will be preserved.)
# Data from CRC Handbook of Tables for Applied Engineering Science, 2nd edition, edited by R. Bolz and G. Tuve, CRC Press (1973).
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