# Title: Metals: Temperature Coefficient of Resistivity per Degree Celsius
# Description: Temperature coefficient of resistivity per degree Celsius for various metals.
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# PROPERTIES OF METALS
# reference tables
# Temperature Coefficient of Resistivity per Degree Celsius
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## Metal
## Coefficient
## Metal
## Coefficient
# Aluminum | 4*10^-3*Ω/Δ°C | Molybdenum | 4*10^-3*Ω/Δ°C
# annotation to a formula above: Temperature coefficient of resistivity per degree Celsius for Aluminum, from CRC Handbook of Tables for Applied Engineering Science, 2nd edition, edited by R. Bolz and G. Tuve, CRC Press (1973).
# annotation to a formula above: Temperature coefficient of resistivity per degree Celsius for Molybdenum, from CRC Handbook of Tables for Applied Engineering Science, 2nd edition, edited by R. Bolz and G. Tuve, CRC Press (1973).
# Antimony | 3.6*10^-3*Ω/Δ°C | Nickel | 6*10^-3*Ω/Δ°C
# annotation to a formula above: Temperature coefficient of resistivity per degree Celsius for Antimony, from CRC Handbook of Tables for Applied Engineering Science, 2nd edition, edited by R. Bolz and G. Tuve, CRC Press (1973).
# annotation to a formula above: Temperature coefficient of resistivity per degree Celsius for Nickel, from CRC Handbook of Tables for Applied Engineering Science, 2nd edition, edited by R. Bolz and G. Tuve, CRC Press (1973).
# Beryllium | 0.025*Ω/Δ°C | Niobium | 4*10^-3*Ω/Δ°C
# annotation to a formula above: Temperature coefficient of resistivity per degree Celsius for Beryllium, from CRC Handbook of Tables for Applied Engineering Science, 2nd edition, edited by R. Bolz and G. Tuve, CRC Press (1973).
# annotation to a formula above: Temperature coefficient of resistivity per degree Celsius for Niobium, from CRC Handbook of Tables for Applied Engineering Science, 2nd edition, edited by R. Bolz and G. Tuve, CRC Press (1973).
# Bismuth | 4*10^-3*Ω/Δ°C | Osmium | 4*10^-3*Ω/Δ°C
# annotation to a formula above: Temperature coefficient of resistivity per degree Celsius for Bismuth, from CRC Handbook of Tables for Applied Engineering Science, 2nd edition, edited by R. Bolz and G. Tuve, CRC Press (1973).
# annotation to a formula above: Temperature coefficient of resistivity per degree Celsius for Osmium, from CRC Handbook of Tables for Applied Engineering Science, 2nd edition, edited by R. Bolz and G. Tuve, CRC Press (1973).
# Cadmium | 4*10^-3*Ω/Δ°C | Palladium | 3.5*10^-3*Ω/Δ°C
# annotation to a formula above: Temperature coefficient of resistivity per degree Celsius for Cadmium, from CRC Handbook of Tables for Applied Engineering Science, 2nd edition, edited by R. Bolz and G. Tuve, CRC Press (1973).
# annotation to a formula above: Temperature coefficient of resistivity per degree Celsius for Palladium, from CRC Handbook of Tables for Applied Engineering Science, 2nd edition, edited by R. Bolz and G. Tuve, CRC Press (1973).
# Cerium | 9*10^-4*Ω/Δ°C | Platinum | 3.9*10^-3*Ω/Δ°C
# annotation to a formula above: Temperature coefficient of resistivity per degree Celsius for Cerium, from CRC Handbook of Tables for Applied Engineering Science, 2nd edition, edited by R. Bolz and G. Tuve, CRC Press (1973).
# annotation to a formula above: Temperature coefficient of resistivity per degree Celsius for Platinum, from CRC Handbook of Tables for Applied Engineering Science, 2nd edition, edited by R. Bolz and G. Tuve, CRC Press (1973).
# Chromium | 3*10^-3*Ω/Δ°C | Rhenium | 4*10^-3*Ω/Δ°C
# annotation to a formula above: Temperature coefficient of resistivity per degree Celsius for Chromium, from CRC Handbook of Tables for Applied Engineering Science, 2nd edition, edited by R. Bolz and G. Tuve, CRC Press (1973).
# annotation to a formula above: Temperature coefficient of resistivity per degree Celsius for Rhenium, from CRC Handbook of Tables for Applied Engineering Science, 2nd edition, edited by R. Bolz and G. Tuve, CRC Press (1973).
# Cobalt | 6*10^-3*Ω/Δ°C | Rhodium | 4.5*10^-3*Ω/Δ°C
# annotation to a formula above: Temperature coefficient of resistivity per degree Celsius for Cobalt, from CRC Handbook of Tables for Applied Engineering Science, 2nd edition, edited by R. Bolz and G. Tuve, CRC Press (1973).
# annotation to a formula above: Temperature coefficient of resistivity per degree Celsius for Rhodium, from CRC Handbook of Tables for Applied Engineering Science, 2nd edition, edited by R. Bolz and G. Tuve, CRC Press (1973).
# Copper | 4*10^-3*Ω/Δ°C | Silver | 3.8*10^-3*Ω/Δ°C
# annotation to a formula above: Temperature coefficient of resistivity per degree Celsius for Copper, from CRC Handbook of Tables for Applied Engineering Science, 2nd edition, edited by R. Bolz and G. Tuve, CRC Press (1973).
# annotation to a formula above: Temperature coefficient of resistivity per degree Celsius for Silver, from CRC Handbook of Tables for Applied Engineering Science, 2nd edition, edited by R. Bolz and G. Tuve, CRC Press (1973).
# Gold | 3.5*10^-3*Ω/Δ°C | Tantalum | 3.5*10^-3*Ω/Δ°C
# annotation to a formula above: Temperature coefficient of resistivity per degree Celsius for Gold, from CRC Handbook of Tables for Applied Engineering Science, 2nd edition, edited by R. Bolz and G. Tuve, CRC Press (1973).
# annotation to a formula above: Temperature coefficient of resistivity per degree Celsius for Tantalum, from CRC Handbook of Tables for Applied Engineering Science, 2nd edition, edited by R. Bolz and G. Tuve, CRC Press (1973).
# Hafnium | 4*10^-3*Ω/Δ°C | Thorium | 3*10^-3*Ω/Δ°C
# annotation to a formula above: Temperature coefficient of resistivity per degree Celsius for Hafnium, from CRC Handbook of Tables for Applied Engineering Science, 2nd edition, edited by R. Bolz and G. Tuve, CRC Press (1973).
# annotation to a formula above: Temperature coefficient of resistivity per degree Celsius for Thorium, from CRC Handbook of Tables for Applied Engineering Science, 2nd edition, edited by R. Bolz and G. Tuve, CRC Press (1973).
# Indium | 5*10^-3*Ω/Δ°C | Tin | 4.5*10^-4*Ω/Δ°C
# annotation to a formula above: Temperature coefficient of resistivity per degree Celsius for Indium, from CRC Handbook of Tables for Applied Engineering Science, 2nd edition, edited by R. Bolz and G. Tuve, CRC Press (1973).
# annotation to a formula above: Temperature coefficient of resistivity per degree Celsius for Tin, from CRC Handbook of Tables for Applied Engineering Science, 2nd edition, edited by R. Bolz and G. Tuve, CRC Press (1973).
# Iridium | 3.9*10^-3*Ω/Δ°C | Titanium | 3.5*10^-3*Ω/Δ°C
# annotation to a formula above: Temperature coefficient of resistivity per degree Celsius for Iridium, from CRC Handbook of Tables for Applied Engineering Science, 2nd edition, edited by R. Bolz and G. Tuve, CRC Press (1973).
# annotation to a formula above: Temperature coefficient of resistivity per degree Celsius for Titanium, from CRC Handbook of Tables for Applied Engineering Science, 2nd edition, edited by R. Bolz and G. Tuve, CRC Press (1973).
# Iron | 6*10^-3*Ω/Δ°C | Tungsten | 4.5*10^-3*Ω/Δ°C
# annotation to a formula above: Temperature coefficient of resistivity per degree Celsius for Iron, from CRC Handbook of Tables for Applied Engineering Science, 2nd edition, edited by R. Bolz and G. Tuve, CRC Press (1973).
# annotation to a formula above: Temperature coefficient of resistivity per degree Celsius for Tungsten, from CRC Handbook of Tables for Applied Engineering Science, 2nd edition, edited by R. Bolz and G. Tuve, CRC Press (1973).
# Lead | 4*10^-3*Ω/Δ°C | Vanadium | 3*10^-3*Ω/Δ°C
# annotation to a formula above: Temperature coefficient of resistivity per degree Celsius for Lead, from CRC Handbook of Tables for Applied Engineering Science, 2nd edition, edited by R. Bolz and G. Tuve, CRC Press (1973).
# annotation to a formula above: Temperature coefficient of resistivity per degree Celsius for Vanadium, from CRC Handbook of Tables for Applied Engineering Science, 2nd edition, edited by R. Bolz and G. Tuve, CRC Press (1973).
# Lithium | 5*10^-3*Ω/Δ°C | Zinc | 4*10^-3*Ω/Δ°C
# annotation to a formula above: Temperature coefficient of resistivity per degree Celsius for Lithium, from CRC Handbook of Tables for Applied Engineering Science, 2nd edition, edited by R. Bolz and G. Tuve, CRC Press (1973).
# annotation to a formula above: Temperature coefficient of resistivity per degree Celsius for Zinc, from CRC Handbook of Tables for Applied Engineering Science, 2nd edition, edited by R. Bolz and G. Tuve, CRC Press (1973).
# Magnesium | 3*10^-3*Ω/Δ°C | Zirconium | 4.4*10^-3*Ω/Δ°C
# annotation to a formula above: Temperature coefficient of resistivity per degree Celsius for Magnesium, from CRC Handbook of Tables for Applied Engineering Science, 2nd edition, edited by R. Bolz and G. Tuve, CRC Press (1973).
# annotation to a formula above: Temperature coefficient of resistivity per degree Celsius for Zirconium, from CRC Handbook of Tables for Applied Engineering Science, 2nd edition, edited by R. Bolz and G. Tuve, CRC Press (1973).
# Mercury | 9*10^-4*Ω/Δ°C
# annotation to a formula above: Temperature coefficient of resistivity per degree Celsius for Mercury, from CRC Handbook of Tables for Applied Engineering Science, 2nd edition, edited by R. Bolz and G. Tuve, CRC Press (1973).
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# ^(* Green parentheses in this file indicate annotations to an expression. To read an annotation, right-click on the entire expression within the parentheses and choose View/Edit Annotation. If the expression is copied to another file, the annotation will be preserved.)
# Data from CRC Handbook of Tables for Applied Engineering Science, 2nd edition, edited by R. Bolz and G. Tuve, CRC Press (1973).
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