# Title: Fundamental Physical Constants
# Description: A listing of fundamental physical constants.
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# BASIC SCIENCE REFERENCES
# reference tables
# Fundamental Physical Constants
# Universal Constants
# Velocity of light in vacuum
c := 299792458*m/sec
# annotation to a formula above: from The NIST Reference on Constants, Units, and Uncertainty, from CODATA Recommended Values of the Fundamental Constants - 2002, by Peter J. Mohr and Barry N. Taylor, National Institute of Standards and Technology.
# Permeability of vacuum
μ_0 := 4*π*10^-7*newton/amp^2
# Permittivity of vacuum
ε_0 := 8.854187817*10^-12*farad/m
# Newtonian constant of gravitation
G := 6.6742*10^-11*m^3/(kg*sec^2)
# Planck's constant (h)
h := 6.6260693*10^-34*joule*sec
# Electromagnetic Constants
# Elementary charge
e := 1.60217653*10^-19*coul
# Magnetic flux quantum
Φ_0 := 2.06783372*10^-15*weber
# Bohr magneton
927.400949*10^-26*joule/tesla
# Nuclear magneton
5.05078343*10^-27*joule/tesla
# Atomic Constants
# Fine-structure constant
α := 7.297352568*10^-3
# Rydberg constant
R := 10973731.5685*m^-1
# Bohr radius
a_o := 0.5291772108*10^-10*m
# Hartree energy
E_h := 4.35974417*10^-18*joule
# Quantum of circulation
3.636947550*10^-4*m^2/sec
# Electron
# Electron mass
m_e := 9.1093826*10^-31*kg
# Electron charge to mass quotient
-1.75882012*10^11*coul/kg
# Compton wavelength
2.426310238*10^-12*m
# Classical electron radius
r_e := 2.817940325*10^-15*m
# Electron magnetic moment
μ_e := -928.476412*10^-26*joule/tesla
# Muon
# Muon mass
m_μ := 1.88353140*10^-28*kg
# Proton
# Proton mass
m_p := 1.67262171*10^-27*kg
# Ratio of proton mass to electron mass | 1836.15267261
# Proton Compton wavelength
1.3214098555*10^-15*m
# Proton magnetic moment
1.41060671*10^-26*joule/tesla
# Proton gyromagnetic ratio
2.67522205*10^8*(sec*tesla)^-1
# Neutron
# Neutron mass
m_n := 1.67492728*10^-27*kg
# Neutron Compton wavelength
1.3195909067*10^-15*m
# Physico-Chemical Constants
# Avogadro constant
N_A := 6.0221415*10^23*mole^-1
# Atomic mass constant
AMU := 1.66053886*10^-27*kg
# Faraday constant
96485.3383*coul/mole
# Molar gas constant
8.314472*joule/(mole*K)
# Boltzmann's constant
k_b := 1.3806505*10^-23*joule/K
# Molar volume of ideal gas at STP
22.413996*10^-3*m^3/mole
# Stefan-Boltzmann constant
σ := 5.670400*10^-8*watt/(m^2*K^4)
# First radiation constant
3.74177138*10^-16*watt*m^2
# Second radiation constant | 1.4387752*10^-2*m*K
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# ^(* Green parentheses in this file indicate annotations to an expression. To read an annotation, right-click on the entire expression within the parentheses and choose View/Edit Annotation. If the expression is copied to another file, the annotation will be preserved.)
# Data from The NIST Reference on Constants, Units, and Uncertainty, from CODATA Recommended Values of the Fundamental Constants - 2002, by Peter J. Mohr and Barry N. Taylor, National Institute of Standards and Technology.
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