# Title: Physical Formulas - Mechanics
# Description: Formulas of motion and energy.
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# BASIC SCIENCE REFERENCES
# reference tables
# Physical Formulas - Mechanics
## Motion in One Dimension
# position
Δr == r[f] - r[i]
# annotation to a formula above: from Physics, Classical and Modern, 2nd edition, by Frederick J. Keller, W. Edward Gettys, and Malcolm J. Skove, McGraw-Hill, Inc. (1993).
# average velocity
Δv == Δr/Δt
# velocity
v == limit(Δv, Δt → 0)
# speed | |v|
# average acceleration
Δa == Δv/Δt
# acceleration
a == limit(Δa, Δt → 0)
# assuming constant acceleration:
# position
x(t) == x_0 + v_0*t + 1/2*a*t^2
# velocity
v(t) == v_0 + a*t
v^2 == v_0^2 + 2*a*(x - x_0)
## Motion in Two Dimensions
# position vector
r == x*i + y*j
# velocity vector
v == (d/dt(x))*i + (d/dt(y))*j
# acceleration vector
a == (d/dt(v_x))*i + (d/dt(v_y))*j
# projectile motion
a_0 == 0
a_y == -g
v_x == v_0*cos(θ_0)
v_y == v_0*sin(θ_0) - g*t
x == x_0 + v_0*cos(θ_0)*t
y == y_0 + v_0*sin(θ_0)*t - 1/2*g*t^2
# centripetal acceleration
a_c == v^2/R
## Newton's Laws of Motion
# Second law
F == m*a
# Third law
F_ab == -F_ba
# Gravitational force on Earth
F_e == m*g
# Weight on Earth
F_w == m*g'  # g' is the object's free-fall acceleration
# centripetal force
|ΣF| == m*v^2/R
# Newton's Law of Universal Gravitation
F == -G*m_1*m_2/r^2
# velocity of an Earth satellite
v == sqrt(G*m_e/r)
## Work and Energy
# Work
W == integral(F, l = i .. f)
# Hooke's Law
F[x] == -k*x  # k is the spring's constant
# Kinetic Energy
K == 1/2*m*v^2
# Power
P == d/dt(W)
P == F*v
# Potential Energy
# gravitational
U == m*g*y
# elastic
U == 1/2*k*x^2
# gravitational between two objects
U == -G*M*m/r
# Energy
E == K + U
## Momentum
# Center of mass
# position
r_cm == Σ*m[i]*r[i]/M
# velocity
v_cm == Σ*m[i]*v[i]/M
# acceleration
a_cm == Σ*m[i]*a[i]/M
# Momentum
p == m*v
# Impulse
J == integral(F, t = t_i .. t_f)
# Torque
τ == r*sin(θ)*F
τ == r×F
## Rotation
# Angular velocity
ω_z == d/dt(θ)
# Angular acceleration
α_z == d/dt(ω) == d^2/dt^2(θ)
# Moment of inertia
I == Σ*m[i]*R[i]^2
# Angular momentum of a particle
l == r×p  # where p == m*v
# Work done by a torque
W == integral(τ_z, θ = θ_i .. θ_f)
# Power to a rotating (rigid) object
P == t_z*ω_z
## Simple Harmonic Motion
# x-coordinate (position)
x == A*cos(ω*t + φ)
# velocity
v_x == -ω*A*sin(ω*t + φ)
# acceleration
a_x == -ω^2*A*cos(ω*t + φ)
# angular frequency
ω == 2*π*v == 2*π/T  # v is the frequency
# T is the period
ω == sqrt(k/m)  # k is the spring constant
# m is the mass
# potential energy
U == 1/2*k*A^2*cos(ω*t + φ)^2
# kinetic energy
K == 1/2*m*ω^2*A^2*sin(ω*t + φ)^2
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# ^(* Green parentheses in this file indicate annotations to an expression. To read an annotation, right-click on the entire expression within the parentheses and choose View/Edit Annotation. If the expression is copied to another file, the annotation will be preserved.)
# Formulas from Physics, Classical and Modern, 2nd edition, by Frederick J. Keller, W. Edward Gettys, and Malcolm J. Skove, McGraw-Hill, Inc. (1993).
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