# Title: Hydrogen
# Description: Atomic properties of hydrogen.
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# Hydrogen
# Atomic number: | 1
# Atomic mass: | 1.00794
# Atomic radius:
r_a := 37.3*10^-12*m
# Melting temperature:
T_m := 14.01*K
# Boiling temperature:
T_b := 20.28*K
# Critical temperature:
T_c := 33.3*K
# Standard state: | Gas
# Color: | None
# Discoverer: | Henry Cavendish
# Date discovered: | 1766
# Where discovered: | London, England
