# Title: Helium
# Description: Atomic properties of helium.
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# Helium
# Atomic number: | 2
# Atomic mass: | 4.002602
# Atomic radius:
r_a := 54*10^-12*m
# Melting temperature:
T_m := 0.95*K
# Boiling temperature:
T_b := 4.216*K
# Critical temperature:
T_c := 5.3*K
# Standard state: | Gas
# Color: | None
# Discoverer:
# Sir William Ramsay,
# Langlet, Cleve
# Date discovered: | 1895
# Where discovered: | London, England
