# Title: Lithium
# Description: Atomic properties of lithium.
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# Lithium
# Atomic number: | 3
# Atomic mass: | 6.941
# Atomic radius:
r_a := 152*10^-12*m
# Melting temperature:
T_m := 453.69*K
# Boiling temperature:
T_b := 1620*K
# Critical temperature:
T_c := 4150*K
# Standard state: | Solid
# Color: | Silver/White
# Discoverer: | Johann Arfvedson
# Date discovered: | 1817
# Where discovered: | Stockholm, Sweden
