# Title: Beryllium
# Description: Atomic properties of beryllium.
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# Beryllium
# Atomic number: | 4
# Atomic mass: | 9.012182
# Atomic radius:
r_a := 111.3*10^-12*m
# Melting temperature:
T_m := 1551*K
# Boiling temperature:
T_b := 3243*K
# Critical temperature:
T_c := 6153*K
# Standard state: | Solid
# Color: | Lead Gray
# Discoverer: | N. L. Vauquelin
# Date discovered: | 1797
# Where discovered: | France
