# Title: Boron
# Description: Atomic properties of boron.
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# Boron
# Atomic number: | 5
# Atomic mass: | 10.811
# Atomic radius:
r_a := 79.5*10^-12*m
# Melting temperature:
T_m := 2573*K
# Boiling temperature:
T_b := 3931*K
# Critical temperature:
# Standard state: | Solid
# Color: | Black
# Discoverer:
# Sir Humphrey Davy,
# Gay-Lussac, Thenard
# Date discovered: | 1808
# Where discovered: | England, France
