# Title: Carbon
# Description: Atomic properties of carbon.
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# Carbon
# Atomic number: | 6
# Atomic mass: | 12.011
# Atomic radius:
r_a := 77.2*10^-12*m
# Melting temperature:
T_m := 3820*K
# Boiling temperature:
T_b := 5100*K
# Critical temperature:
# Standard state: | Solid
# Color: | None
# Discoverer: | Known to ancients
# Date discovered: | pre-history
# Where discovered: | England, France
