# Title: Nitrogen
# Description: Atomic properties of nitrogen.
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# Nitrogen
# Atomic number: | 7
# Atomic mass: | 14.00674
# Atomic radius:
r_a := 54.9*10^-12*m
# Melting temperature:
T_m := 63.29*K
# Boiling temperature:
T_b := 77.4*K
# Critical temperature:
T_c := 126.2
# Standard state: | Gas
# Color: | None
# Discoverer: | Daniel Rutherford
# Date discovered: | 1772
# Where discovered: | Scotland
