# Title: Oxygen
# Description: Atomic properties of oxygen.
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# Oxygen
# Atomic number: | 8
# Atomic mass: | 15.9994
# Atomic radius:
r_a := 60.4*10^-12*m
# Melting temperature:
T_m := 54.8*K
# Boiling temperature:
T_b := 90.19*K
# Critical temperature:
T_c := 154.8*K
# Standard state: | Gas
# Color:
# Gas - None
# Liquid - Pale Blue
# Discoverer: | Priestley, Scheele
# Date discovered: | 1774
# Where discovered: | England, Sweden
