# Title: Fluorine
# Description: Atomic properties of fluorine.
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# Fluorine
# Atomic number: | 9
# Atomic mass: | 18.998403
# Atomic radius:
r_a := 70.9*10^-12*m
# Melting temperature:
T_m := 53.53*K
# Boiling temperature:
T_b := 85.01*K
# Critical temperature:
T_c := 144*K
# Standard state: | Gas
# Color: | light yellow
# Discoverer: | Henri Moissan
# Date discovered: | 1886
# Where discovered: | France
