# Title: Neon
# Description: Atomic properties of neon.
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# Neon
# Atomic number: | 10
# Atomic mass: | 20.1797
# Atomic radius:
r_a := 80*10^-12*m
# Melting temperature:
T_m := 24.48*K
# Boiling temperature:
T_b := 27.1*K
# Critical temperature:
T_c := 44.5*K
# Standard state: | Gas
# Color: | None
# Discoverer: | Ramsay, Travers
# Date discovered: | 1898
# Where discovered: | London, England
