# Title: Sodium
# Description: Atomic properties of sodium.
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# Sodium
# Atomic number: | 11
# Atomic mass: | 22.989768
# Atomic radius:
r_a := 185.8*10^-12*m
# Melting temperature:
T_m := 370.96*K
# Boiling temperature:
T_b := 1156.1*K
# Critical temperature:
T_c := 2800*K
# Standard state: | Solid
# Color: | Silver/White (pink when very pure)
# Discoverer: | Sir Humphrey Davy
# Date discovered: | 1807
# Where discovered: | England
