# Title: Magnesium
# Description: Atomic properties of magnesium.
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# Magnesium
# Atomic number: | 12
# Atomic mass: | 24.305
# Atomic radius:
r_a := 159.9*10^-12*m
# Melting temperature:
T_m := 922*K
# Boiling temperature:
T_b := 1363*K
# Critical temperature:
T_c := 3530*K
# Standard state: | Solid
# Color: | Silver/White
# Discoverer: | Sir Humphrey Davy
# Date discovered: | 1755
# Where discovered: | England
