# Title: Aluminum
# Description: Atomic properties of aluminum.
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# Aluminum
# Atomic number: | 13
# Atomic weight: | 26.981539
# Atomic radius:
r_a := 143.2*10^-12*m
# Melting temperature:
T_m := 933.5*K
# Boiling temperature:
T_b := 2740*K
# Critical temperature:
T_c := 8650*K
# Standard state: | Solid
# Color: | Silvery
# Discoverer: | Hans Christian Oersted
# Date discovered: | 1825
# Where discovered: | Denmark
