# Title: Silicon
# Description: Atomic properties for silicon.
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# Silicon
# Atomic number: | 14
# Atomic mass: | 28.0855
# Atomic radius:
r_a := 117.6*10^-12*m
# Melting temperature:
T_m := 1683*K
# Boiling temperature:
T_b := 2628*K
# Critical temperature:
T_c := 5159*K
# Standard state: | Solid
# Color: | Dark gray with bluish tinge
# Discoverer: | Jons Berzelius
# Date discovered: | 1824
# Where discovered: | Sweden
