# Title: Phosphorus
# Description: Atomic properties of phosphorus.
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# Phosphorus
# Atomic number: | 15
# Atomic mass: | 30.973762
# Atomic radius:
r_a := 110.5*10^-12*m
# Melting temperature:
T_m := 317.3*K
# Boiling temperature:
T_b := 553*K
# Critical temperature:
T_c := 993.8*K
# Standard state: | Solid
# Color: | None/Red/Silver/White
# Discoverer: | Hennig Brand
# Date discovered: | 1669
# Where discovered: | Germany
