# Title: Sulfur
# Description: Atomic properties of sulfur.
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# Sulfur
# Atomic number: | 16
# Atomic mass: | 32.066
# Atomic radius:
r_a := 103.5*10^-12*m
# Melting temperature:
T_m := 386*K
# Boiling temperature:
T_b := 717.824*K
# Critical temperature:
T_c := 1313*K
# Standard state: | Solid
# Color: | Lemon Yellow
# Discoverer: | Known to ancients
# Date discovered: | pre-history
