# Title: Chlorine
# Description: Atomic properties of chlorine.
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# Chlorine
# Atomic number: | 17
# Atomic mass: | 35.4527
# Atomic radius:
r_a := 99.4*10^-12*m
# Melting temperature:
T_m := 172.2*K
# Boiling temperature:
T_b := 238.6*K
# Critical temperature:
T_c := 417*K
# Standard state: | Gas
# Color: | Greenish Yellow
# Discoverer: | Carl William Scheele
# Date discovered: | 1774
# Where discovered: | Sweden
