# Title: Argon
# Description: Atomic properties of argon.
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# Argon
# Atomic number: | 18
# Atomic mass: | 39.948
# Atomic radius:
r_a := 96*10^-12*m
# Melting temperature:
T_m := 83.8*K
# Boiling temperature:
T_b := 87.3*K
# Critical temperature:
T_c := 151*K
# Standard state: | Gas
# Color: | None
# Discoverer: | Ramsay, Rayleigh
# Date discovered: | 1894
# Where discovered: | Scotland
