# Title: Potassium
# Description: Atomic properties of potassium.
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# Potassium
# Atomic number: | 19
# Atomic mass: | 39.0983
# Atomic radius:
r_a := 227.2*10^-12*m
# Melting temperature:
T_m := 336.8*K
# Boiling temperature:
T_b := 1047*K
# Critical temperature:
T_c := 2450*K
# Standard state: | Solid
# Color: | Silvery White
# Discoverer: | Sir Humphrey Davy
# Date discovered: | 1807
# Where discovered: | England
