# Title: Calcium
# Description: Atomic properties of calcium.
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# Calcium
# Atomic number: | 20
# Atomic mass: | 40.078
# Atomic radius:
r_a := 197.4*10^-12*m
# Melting temperature:
T_m := 1112*K
# Boiling temperature:
T_b := 1757*K
# Critical temperature:
T_c := 3267*K
# Standard state: | Solid
# Color: | Silvery White
# Discoverer: | Sir Humphrey Davy
# Date discovered: | 1808
# Where discovered: | England
