# Title: Scandium
# Description: Atomic properties of scandium.
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# Scandium
# Atomic number: | 21
# Atomic mass: | 44.95591
# Atomic radius:
r_a := 160.6*10^-12*m
# Melting temperature:
T_m := 1814*K
# Boiling temperature:
T_b := 3104*K
# Critical temperature:
# Standard state: | Solid
# Color: | Silvery Yellow
# Discoverer: | Lars Nilson
# Date discovered: | 1879
# Where discovered: | Sweden
