# Title: Titatium
# Description: Atomic properties of titanium.
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# Titanium
# Atomic number: | 22
# Atomic mass: | 47.88
# Atomic radius:
r_a := 144.8*10^-12*m
# Melting temperature:
T_m := 1933*K
# Boiling temperature:
T_b := 3560*K
# Critical temperature:
# Standard state: | Solid
# Color: | Steel
# Discoverer: | William Gregor
# Date discovered: | 1791
# Where discovered: | England
