# Title: Vanadium
# Description: Atomic properties of vanadium.
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# Vanadium
# Atomic number: | 23
# Atomic mass: | 50.9415
# Atomic radius:
r_a := 131.1*10^-12*m
# Melting temperature:
T_m := 2160*K
# Boiling temperature:
T_b := 3650*K
# Critical temperature:
T_c := 11200*K
# Standard state: | Solid
# Color: | Silvery Gray
# Discoverer: | Nils Sefstrom
# Date discovered: | 1801
# Where discovered: | Sweden
