# Title: Chromium
# Description: Atomic properties of chromium.
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# Chromium
# Atomic number: | 24
# Atomic mass: | 51.9961
# Atomic radius:
r_a := 124.9*10^-12*m
# Melting temperature:
T_m := 2130*K
# Boiling temperature:
T_b := 2945*K
# Critical temperature:
# Standard state: | Solid
# Color: | Blue White
# Discoverer: | Louis Vauquelin
# Date discovered: | 1780
# Where discovered: | France
