# Title: Manganese
# Description: Atomic properties of manganese.
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# Manganese
# Atomic number: | 25
# Atomic mass: | 54.93805
# Atomic radius:
r_a := 136.7*10^-12*m
# Melting temperature:
T_m := 1517*K
# Boiling temperature:
T_b := 2235*K
# Critical temperature:
T_c := 6050*K
# Standard state: | Solid, hard and brittle
# Color: | Grayish White
# Discoverer: | Johann Gahn
# Date discovered: | 1774
# Where discovered: | Sweden
