# Title: Iron
# Description: Atomic properties of iron.
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# Iron
# Atomic number: | 26
# Atomic mass: | 55.847
# Atomic radius:
r_a := 124.1*10^-12*m
# Melting temperature:
T_m := 1808*K
# Boiling temperature:
T_b := 3023*K
# Critical temperature:
T_c := 6750*K
# Standard state: | Solid
# Color: | Lustrous, grayish tinge
# Discoverer: | Known to ancients
# Date discovered: | Prehistoric
