# Title: Cobalt
# Description: Atomic properties of cobalt.
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# Cobalt
# Atomic number: | 27
# Atomic mass: | 58.9332
# Atomic radius:
r_a := 125.3*10^-12*m
# Melting temperature:
T_m := 1768*K
# Boiling temperature:
T_b := 3143*K
# Critical temperature:
# Standard state: | Solid
# Color: | Lustrous, Grayish Tinge
# Discoverer: | George Brandt
# Date discovered: | 1735
# Where discovered: | Sweden
