# Title: Nickel
# Description: Atomic properties of nickel.
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# Nickel
# Atomic number: | 28
# Atomic mass: | 58.6934
# Atomic radius:
r_a := 124.6*10^-12*m
# Melting temperature:
T_m := 1726*K
# Boiling temperature:
T_b := 3005*K
# Critical temperature:
T_c := 6294*K
# Standard state: | Solid
# Color: | Lustrous, Silvery Tinge
# Discoverer: | Axel Cronstedt
# Date discovered: | 1751
# Where discovered: | Sweden
