# Title: Copper
# Description: Atomic properties of copper.
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# Copper
# Atomic number: | 29
# Atomic mass: | 63.546
# Atomic radius:
r_a := 127.8*10^-12*m
# Melting temperature:
T_m := 1356.6*K
# Boiling temperature:
T_b := 2840*K
# Critical temperature:
T_c := 8500*K
# Standard state: | Solid
# Color: | Red
# Discoverer: | Known to ancients
# Date discovered: | Prehistoric
