# Title: Zinc
# Description: Atomic properties of zinc.
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# Zinc
# Atomic number: | 30
# Atomic mass: | 65.39
# Atomic radius:
r_a := 133.5*10^-12*m
# Melting temperature:
T_m := 692.73*K
# Boiling temperature:
T_b := 1180*K
# Critical temperature:
T_c := 2169*K
# Standard state: | Solid
# Color: | Bluish pale gray
# Discoverer: | Andreas Marggraf
# Date discovered: | before 1500
# Where discovered: | Germany
