# Title: Gallium
# Description: Atomic properties of gallium.
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# Gallium
# Atomic number: | 31
# Atomic mass: | 69.723
# Atomic radius:
r_a := 122.1*10^-12*m
# Melting temperature:
T_m := 302.93*K
# Boiling temperature:
T_b := 2676*K
# Critical temperature:
T_c := 7620*K
# Standard state: | Liquid
# Color: | Silvery white
# Discoverer: | Paul Emile Lecoq de Boisbaudran
# Date discovered: | 1875
# Where discovered: | France
