# Title: Germanium
# Description: Atomic properties of germanium.
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# Germanium
# Atomic number: | 32
# Atomic mass: | 72.61
# Atomic radius:
r_a := 122.5*10^-12*m
# Melting temperature:
T_m := 1210.6*K
# Boiling temperature:
T_b := 3103*K
# Critical temperature:
T_c := 5642*K
# Standard state: | Solid
# Color: | Grayish white
# Discoverer: | Clemens Winkler
# Date discovered: | 1896
# Where discovered: | Germany
