# Title: Arsenic
# Description: Atomic properties of arsenic.
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# Arsenic
# Atomic number: | 33
# Atomic mass: | 74.92159
# Atomic radius:
r_a := 124.5*10^-12*m
# Melting temperature:
T_m := 1090*K
# Boiling temperature:
T_b := 889*K
# Critical temperature:
# Standard state: | Solid
# Color: | Metallic gray
# Discoverer: | Albertus Magnus
# Date discovered: | circa 1250
# Where discovered:
