# Title: Selenium
# Description: Atomic properties of selenium.
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# Selenium
# Atomic number: | 34
# Atomic mass: | 78.96
# Atomic radius:
r_a := 116*10^-12*m
# Melting temperature:
T_m := 490*K
# Boiling temperature:
T_b := 958.1*K
# Critical temperature:
T_c := 1757
# Standard state: | Solid
# Color: | Gray, metallic lustre
# Discoverer: | Jons Berzelius
# Date discovered: | 1817
# Where discovered: | Sweden
