# Title: Bromine
# Description: Atomic properties of bromine.
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# Bromine
# Atomic number: | 35
# Atomic mass: | 79.904
# Atomic radius:
r_a := 114.5*10^-12*m
# Melting temperature:
T_m := 265.9*K
# Boiling temperature:
T_b := 331.9*K
# Critical temperature:
T_c := 584*K
# Standard state: | Liquid
# Color: | Brown, metallic lustre
# Discoverer: | Antoine J. Balard
# Date discovered: | 1826
# Where discovered: | France
