# Title: Krypton
# Description: Atomic properties of krypton.
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# Krypton
# Atomic number: | 36
# Atomic mass: | 83.8
# Atomic radius:
r_a := 99*10^-12*m
# Melting temperature:
T_m := 116.6*K
# Boiling temperature:
T_b := 120.85*K
# Critical temperature:
T_c := 209.4*K
# Standard  state: | Gas
# Color: | None
# Discoverer:
# Sir William Ramsay,
# Morris W. Travers
# Date discovered: | 1898
# Where discovered: | Great Britain
