# Title: Rubidium
# Description: Atomic properties of rubidium.
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# Rubidium
# Atomic number: | 37
# Atomic mass: | 85.4678
# Atomic radius:
r_a := 247.5*10^-12*m
# Melting temperature:
T_m := 312.2*K
# Boiling temperature:
T_b := 961*K
# Critical temperature:
T_c := 2100*K
# Standard state: | Solid
# Color: | Silvery white
# Discoverer: | Robert Bunsen, Gustav Kirchhoff
# Date discovered: | 1861
# Where discovered: | Germany
