# Title: Strontium
# Description: Atomic proporties of strontium.
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# Strontium
# Atomic number: | 38
# Atomic mass: | 87.62
# Atomic radius:
r_a := 215.1*10^-12*m
# Melting temperature:
T_m := 1042*K
# Boiling temperature:
T_b := 1657*K
# Critical temperature:
T_c := 3059*K
# Standard state: | Solid
# Color: | Silvery white
# Discoverer: | Adair Crawford
# Date discovered: | 1808
# Where discovered: | Scotland
