# Title: Yttrium
# Description: Atomic properties of yttrium.
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# Yttrium
# Atomic number: | 39
# Atomic mass: | 88.90585
# Atomic radius:
r_a := 177.6*10^-12*m
# Melting temperature:
T_m := 1795*K
# Boiling temperature:
T_b := 3611*K
# Critical temperature:
T_c := 8950*K
# Standard state: | Solid
# Color: | Silvery white
# Discoverer: | Johann Gadolin
# Date discovered: | 1794
# Where discovered: | Finland
