# Title: Zirconium
# Description: Atomic properties of zirconium.
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# Zirconium
# Atomic number: | 40
# Atomic mass: | 91.224
# Atomic radius:
r_a := 159*10^-12*m
# Melting temperature:
T_m := 2125*K
# Boiling temperature:
T_b := 4650*K
# Critical temperature:
T_c := 12300*K
# Standard state: | Solid
# Color: | Silvery white
# Discoverer: | Martin Klaproth
# Date discovered: | 1789
# Where discovered: | Berlin, Germany
