# Title: Niobium
# Description: Atomic properties of niobium.
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# Niobium
# Atomic number: | 41
# Atomic mass: | 92.90638
# Atomic radius:
r_a := 142.9*10^-12*m
# Melting temperature:
T_m := 2741*K
# Boiling temperature:
T_b := 5015*K
# Critical temperature:
T_c := 19000*K
# Standard state: | Solid
# Color: | Gray steel
# Discoverer: | Charles Hatchett
# Date discovered : | 1801
# Where discovered : | England
