# Title: Molybdenum
# Description: Atomic properties of molybdenum.
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# Molybdenum
# Atomic number: | 42
# Atomic mass: | 95.94
# Atomic radius:
r_a := 136.3*10^-12*m
# Melting temperature:
T_m := 2890*K
# Boiling temperature:
T_b := 4885*K
# Critical temperature:
T_c := 17000*K
# Standard state: | Solid
# Color: | Gray steel
# Discoverer: | Sir William Scheele
# Date discovered: | 1781
# Where discovered: | Sweden
