# Title: Technetium
# Description: Atomic properties of technetium.
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# Technetium
# Atomic number: | 43
# Atomic mass: | 97.9072
# Atomic radius:
r_a := 135.2*10^-12*m
# Melting temperature:
T_m := 2445*K
# Boiling temperature:
T_b := 5150*K
# Critical temperature:
# Standard state: | Solid
# Color: | Silvery gray
# Discoverer: | Carlo Perrier, Emilio Segre
# Date discovered: | 1937
# Where discovered: | Italy
