# Title: Ruthenium
# Description: Atomic properties of ruthenium.
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# Ruthenium
# Atomic number: | 44
# Atomic mass: | 101.07
# Atomic radius:
r_a := 132.5*10^-12*m
# Melting temperature:
T_m := 2583*K
# Boiling temperature:
T_b := 4173*K
# Critical temperature:
# Standard state: | Solid
# Color: | Silvery white
# Discoverer: | Karl Klaus
# Date discovered: | 1808
# Where discovered: | Russia
