# Title: Rhodium
# Description: Atomic properties of rhodium.
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# Rhodium
# Atomic number: | 45
# Atomic mass: | 102.9055
# Atomic radius:
r_a := 134.5*10^-12*m
# Melting temperature:
T_m := 2239*K
# Boiling temperature:
T_b := 4000*K
# Critical temperature:
# Standard state: | Solid
# Color: | Silvery white
# Discoverer: | William Wollaston
# Date discovered: | 1803
# Where discovered: | England
