# Title: Palladium
# Description: Atomic properties of palladium.
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# Palladium
# Atomic number: | 46
# Atomic mass: | 106.42
# Atomic radius:
r_a := 137.6*10^-12*m
# Melting temperature:
T_m := 1825*K
# Boiling temperature:
T_b := 40003413*K
# Critical temperature:
# Standard state: | Solid
# Color: | Silvery white
# Discoverer: | William H. Wollaston
# Date discovered: | 1803
# Where discovered: | England
