# Title: Silver
# Description: Atomic properties of silver.
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# Silver
# Atomic number: | 47
# Atomic mass: | 107.8682
# Atomic radius:
r_a := 144.5*10^-12*m
# Melting temperature:
T_m := 1235.1*K
# Boiling temperature:
T_b := 2485*K
# Critical temperature:
T_c := 7460*K
# Standard state: | Solid
# Color: | White
# Discoverer: | Known to ancients
# Date discovered: | Prehistoric
# Where discovered:
