# Title: Cadmium
# Description: Atomic properties of cadmium.
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# Cadmium
# Atomic number: | 48
# Atomic mass: | 112.411
# Atomic radius:
r_a := 148.9*10^-12*m
# Melting temperature:
T_m := 594.1*K
# Boiling temperature:
T_b := 1038*K
# Critical temperature:
T_c := 1903*K
# Standard state: | Solid
# Color: | Silvery gray
# Discoverer: | Friedrich Stromeyer
# Date discovered: | 1817
# Where discovered: | Germany
