# Title: Indium
# Description: Atomic properties of indium.
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# Indium
# Atomic number: | 49
# Atomic mass: | 114.818
# Atomic radius:
r_a := 162.6*10^-12*m
# Melting temperature:
T_m := 429.32*K
# Boiling temperature:
T_b := 2353*K
# Critical temperature:
T_c := 4377*K
# Standard state: | Solid
# Color: | Silvery gray
# Discoverer:
# Ferdinand Reich,
# Hieronymus T. Richter
# Date discovered: | 1863
# Where discovered: | Germany
