# Title: Tin
# Description: Atomic properties of tin.
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# Tin
# Atomic number: | 50
# Atomic mass: | 118.71
# Atomic radius:
r_a := 140.5*10^-12*m
# Melting temperature:
T_m := 505.118*K
# Boiling temperature:
T_b := 2543*K
# Critical temperature:
T_c := 8000*K
# Standard state: | Solid
# Color: | Silvery gray
# Discoverer: | Known to ancients
# Date discovered: | Prehistoric
# Where discovered:
