# Title: Antimony
# Description: Atomic properties of antimony.
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# Antimony
# Atomic number: | 51
# Atomic mass: | 121.757
# Atomic radius:
r_a := 145*10^-12*m
# Melting temperature:
T_m := 903.9*K
# Boiling temperature:
T_b := 1908*K
# Critical temperature:
T_c := 2989*K
# Standard state: | Solid
# Color: | Silvery gray
# Discoverer: | Unknown
# Date discovered: | Early historic times
# Where discovered:
