# Title: Tellurium
# Description: Atomic properties of tellurium.
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# Tellurium
# Atomic number: | 52
# Atomic mass: | 127.6
# Atomic radius:
r_a := 143.2*10^-12*m
# Melting temperature:
T_m := 722.7*K
# Boiling temperature:
T_b := 1263*K
# Critical temperature:
T_c := 2329*K
# Standard state: | Solid
# Color: | Silvery gray
# Discoverer: | Franz Muller von Reichstein
# Date discovered: | 1783
# Where discovered: | Romania
