# Title: Iodine
# Description: Atomic properties of iodine.
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# Iodine
# Atomic number: | 53
# Atomic mass: | 126.90447
# Atomic radius:
r_a := 133.1*10^-12*m
# Melting temperature:
T_m := 386.7*K
# Boiling temperature:
T_b := 457.5*K
# Critical temperature:
T_c := 785*K
# Standard state: | Solid
# Color: | Violet - Dark Gray
# Discoverer: | Bernard Courtois
# Date discovered: | 1811
# Where discovered: | France
