# Title: Xenon
# Description: Atomic properties of xenon.
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# Xenon
# Atomic number: | 54
# Atomic mass: | 131.29
# Atomic radius:
r_a := 109*10^-12*m
# Melting temperature:
T_m := 161.3*K
# Boiling temperature:
T_b := 166.1*K
# Critical temperature:
T_c := 289.75*K
# Standard state: | Gas
# Color: | None
# Discoverer:
# Sir William Ramsay,
# Morris W. Travers
# Date discovered: | 1898
# Where discovered: | England
