# Title: Cesium
# Description: Atomic properties of cesium.
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# Cesium
# Atomic number: | 55
# Atomic mass: | 132.90543
# Atomic radius:
r_a := 265.5*10^-12*m
# Melting temperature:
T_m := 301.6*K
# Boiling temperature:
T_b := 951.6*K
# Critical temperature:
T_c := 2060*K
# Standard state: | Liquid
# Color: | Silvery white
# Discoverer:
# Gustav Kirchoff,
# Robert Bunsen
# Date discovered: | 1860
# Where discovered: | Germany
