# Title: Barium
# Description: Atomic properties of barium.
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# Barium
# Atomic number: | 56
# Atomic mass: | 137.327
# Atomic radius:
r_a := 217.4*10^-12*m
# Melting temperature:
T_m := 1002*K
# Boiling temperature:
T_b := 1910*K
# Critical temperature:
T_c := 3663*K
# Standard state: | Solid
# Color: | Silvery white
# Discoverer: | Sir Humphrey Davy
# Date discovered: | 1808
# Where discovered: | England
