# Title: Lanthanum
# Description: Atomic properties of lanthanum.
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# Lanthanum
# Atomic number: | 57
# Atomic mass: | 138.9055
# Atomic radius:
r_a := 187*10^-12*m
# Melting temperature:
T_m := 1194*K
# Boiling temperature:
T_b := 3730*K
# Critical temperature:
T_c := 10500*K
# Standard state: | Solid
# Color: | Silvery white
# Discoverer: | Carl Mosander
# Date discovered: | 1839
# Where discovered: | Sweden
