# Title: Cerium
# Description: Atomic properties of cerium.
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# Cerium
# Atomic number: | 58
# Atomic mass: | 140.115
# Atomic radius:
r_a := 182.5*10^-12*m
# Melting temperature:
T_m := 1072*K
# Boiling temperature:
T_b := 3699*K
# Critical temperature:
T_c := 10400*K
# Standard state: | Solid
# Color: | Silvery white
# Discoverer:
# Wilhem von Hisinger,
# Jons Berzelius,
# Martin Klaproth
# Date discovered: | 1803
# Where discovered: | Sweden, Germany
