# Title: Praseodymium
# Description: Atomic properties of praseodymium.
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# Praseodymium
# Atomic number: | 59
# Atomic mass: | 140.90765
# Atomic radius:
r_a := 182*10^-12*m
# Melting temperature:
T_m := 1204*K
# Boiling temperature:
T_b := 3785*K
# Critical temperature:
T_c := 8900*K
# Standard state:
# Color: | Silvery white, yellowish tinge
# Discoverer: | C. F. Auer von Welsbach
# Date discovered: | 1885
# Where discovered: | Austria
