# Title: Neodymium
# Description: Atomic properties of neodymium.
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# Neodymium
# Atomic number: | 60
# Atomic mass: | 144.24
# Atomic radius:
r_a := 181.4*10^-12*m
# Melting temperature:
T_m := 1294*K
# Boiling temperature:
T_b := 3341*K
# Critical temperature:
T_c := 7900*K
# Standard state:
# Color: | Silvery white, yellowish tinge
# Discoverer: | C. F. Auer von Welsbach
# Date discovered: | 1885
# Where discovered: | Austria
