# Title: Promethium
# Description: Atomic properties of promethium
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# Promethium
# Atomic number: | 61
# Atomic mass: | 144.9127
# Atomic radius:
# Melting temperature:
T_m := 1441*K
# Boiling temperature:
T_b := 3000*K
# Critical temperature:
# Standard state: | Solid
# Color: | Metallic
# Discoverer:
# J.A. Marinsky,
# Lawrence Glendenin,
# Charles D. Coryell
# Date discovered: | 1945
# Where discovered: | United States
