# Title: Samarium
# Description: Atomic properties of samarium.
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# Samarium
# Atomic number: | 62
# Atomic mass: | 150.36
# Atomic radius:
# Melting temperature:
T_m := 1350*K
# Boiling temperature:
T_b := 2064*K
# Critical temperature:
T_c := 5400*K
# Standard state: | Solid
# Color: | Silvery white
# Discoverer: | Paul Emile Lecoq de Boisbaudran
# Date discovered: | 1879
# Where discovered: | France
