# Title: Europium
# Description: Atomic properties of europium.
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# Europium
# Atomic number: | 63
# Atomic mass: | 151.965
# Atomic radius:
r_a := 199.5*10^-12*m
# Melting temperature:
T_m := 1095*K
# Boiling temperature:
T_b := 1870*K
# Critical temperature:
T_c := 4600*K
# Standard state: | Solid
# Color: | Silvery white
# Discoverer: | Eugene Demarcay
# Date discovered: | 1901
# Where discovered: | France
