# Title: Gadolinium
# Description: Atomic properties of gadolinium.
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# Gadolinium
# Atomic number: | 64
# Atomic mass: | 157.25
# Atomic radius:
r_a := 178.7*10^-12*m
# Melting temperature:
T_m := 1586*K
# Boiling temperature:
T_b := 3539*K
# Critical temperature:
T_c := 8670*K
# Standard state: | Solid
# Color: | Silvery white
# Discoverer: | Jean de Marignac
# Date discovered: | 1880
# Where discovered: | Switzerland
