# Title: Terbium
# Description: Atomic properties of terbium.
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# Terbium
# Atomic number: | 65
# Atomic mass: | 158.92534
# Atomic radius:
r_a := 176.3*10^-12*m
# Melting temperature:
T_m := 1629*K
# Boiling temperature:
T_b := 2296*K
# Critical temperature:
# Standard state: | Solid
# Color: | Silvery white
# Discoverer: | Carl Mosander
# Date discovered: | 1843
# Where discovered: | Sweden
