# Title: Dysprosium
# Description: Atomic properties of dysprosium.
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# Dysprosium
# Atomic number: | 66
# Atomic mass: | 162.5
# Atomic radius:
r_a := 175.2*10^-12*m
# Melting temperature:
T_m := 1685*K
# Boiling temperature:
T_b := 2835*K
# Critical temperature:
T_c := 7640*K
# Standard state: | Solid
# Color: | Silvery white
# Discoverer: | Paul Emile Lecoq de Boisbaudran
# Date discovered: | 1886
# Where discovered: | France
