# Title: Holmium
# Description: Atomic properties of holmium.
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# Holmium
# Atomic number: | 67
# Atomic mass: | 164.93032
# Atomic radius:
r_a := 174.3*10^-12*m
# Melting temperature:
T_m := 1747*K
# Boiling temperature:
T_b := 2968*K
# Critical temperature:
# Standard state: | Solid
# Color: | Silvery white
# Discoverer: | J.L. Soret
# Date discovered: | 1878
# Where discovered: | Switzerland
