# Title: Erbium
# Description: Atomic properties for erbium.
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# Erbium
# Atomic number: | 68
# Atomic mass: | 167.26
# Atomic radius:
r_a := 173.4*10^-12*m
# Melting temperature:
T_m := 1802*K
# Boiling temperature:
T_b := 3136*K
# Critical temperature:
T_c := 7250*K
# Standard state: | Solid
# Color: | Silvery white
# Discoverer: | Carl Mosander
# Date discovered: | 1842
# Where discovered: | Sweden
