# Title: Thulium
# Description: Atomic properties of thulium.
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# Thulium
# Atomic number: | 69
# Atomic mass: | 168.93421
# Atomic radius:
r_a := 172.4*10^-12*m
# Melting temperature:
T_m := 1818*K
# Boiling temperature:
T_b := 2220*K
# Critical temperature:
T_c := 6430*K
# Standard state: | Solid
# Color: | Silvery white
# Discoverer: | Per Theodor Cleve
# Date discovered: | 1879
# Where discovered: | Sweden
