# Title: Ytterbium
# Description: Atomic properties of ytterbium.
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# Ytterbium
# Atomic number: | 70
# Atomic mass: | 173.04
# Atomic radius:
r_a := 194*10^-12*m
# Melting temperature:
T_m := 1097*K
# Boiling temperature:
T_b := 1466*K
# Critical temperature:
T_c := 4420*K
# Standard state: | Solid
# Color: | Silvery white
# Discoverer: | Jean de Marignac
# Date discovered: | 1878
# Where discovered: | Switzerland
