# Title: Lutetium
# Description: Atomic properties of lutetium.
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# Lutetium
# Atomic number: | 71
# Atomic mass: | 174.967
# Atomic radius:
r_a := 171.8*10^-12*m
# Melting temperature:
T_m := 1936*K
# Boiling temperature:
T_b := 3668*K
# Critical temperature:
# Standard state: | Solid
# Color: | Silvery white
# Discoverer: | Georges Urbain
# Date discovered: | 1907
# Where discovered: | France
