# Title: Hafnium
# Description: Atomic properties of hafnium.
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# Hafnium
# Atomic number: | 72
# Atomic mass: | 178.49
# Atomic radius:
r_a := 156.4*10^-12*m
# Melting temperature:
T_m := 2503*K
# Boiling temperature:
T_b := 5470*K
# Critical temperature:
T_c := 8060*K
# Standard state: | Solid
# Color: | Gray steel
# Discoverer:
# Dirk Coster,
# Georg von Hevesy
# Date discovered: | 1923
# Where discovered: | Denmark
