# Title: Tantalum
# Description: Atomic properties of tantalum.
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# Tantalum
# Atomic number: | 73
# Atomic mass: | 180.9479
# Atomic radius:
r_a := 143*10^-12*m
# Melting temperature:
T_m := 3269*K
# Boiling temperature:
T_b := 5698*K
# Critical temperature:
T_c := 22000*K
# Standard state: | Solid
# Color: | Gray blue
# Discoverer: | Anders Ekeberg
# Date discovered: | 1802
# Where discovered: | Sweden
