# Title: Tungsten
# Description: Atomic properties of tungsten.
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# Tungsten
# Atomic number: | 74
# Atomic mass: | 183.85
# Atomic radius:
r_a := 137*10^-12*m
# Melting temperature:
T_m := 3680*K
# Boiling temperature:
T_b := 5930*K
# Critical temperature:
T_c := 23000*K
# Standard state: | Solid
# Color: | Grayish white
# Discoverer: | Fausto and Juan Jose de Elhuyar
# Date discovered: | 1783
# Where discovered: | Spain
