# Title: Rhenium
# Description: Atomic properties of rhenium.
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# Rhenium
# Atomic number: | 75
# Atomic mass: | 186.207
# Atomic radius:
r_a := 137.1*10^-12*m
# Melting temperature:
T_m := 3453*K
# Boiling temperature:
T_b := 5900*K
# Critical temperature:
T_c := 20000*K
# Standard state: | Solid
# Color: | Grayish white
# Discoverer:
# Walter Noddack,
# Ida Tacke, Otto Berg
# Date discovered: | 1925
# Where discovered: | Germany
