# Title: Osmium
# Description: Atomic properties of osmium.
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# Osmium
# Atomic number: | 76
# Atomic mass: | 190.23
# Atomic radius:
r_a := 133.8*10^-12*m
# Melting temperature:
T_m := 3327*K
# Boiling temperature:
T_b := 5300*K
# Critical temperature:
# Standard state: | Solid
# Color: | Bluish gray
# Discoverer: | Smithson Tennant
# Date discovered: | 1803
# Where discovered: | England
