# Title: Iridium
# Description: Atomic properties of iridium.
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# Iridium
# Atomic number: | 77
# Atomic mass: | 192.22
# Atomic radius:
r_a := 135.7*10^-12*m
# Melting temperature:
T_m := 2683*K
# Boiling temperature:
T_b := 4403*K
# Critical temperature:
# Standard state: | Solid
# Color: | Silvery white
# Discoverer: | Smithson Tennant, Antoine Fourcroy, Louis Vanquelin
# Date discovered: | 1803
# Where discovered: | England, France
