# Title: Platinum
# Description: Atomic properties of platinum.
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# Platinum
# Atomic number: | 78
# Atomic mass: | 195.08
# Atomic radius:
r_a := 137.3*10^-12*m
# Melting temperature:
T_m := 2045*K
# Boiling temperature:
T_b := 4100*K
# Critical temperature:
T_c := 8280*K
# Standard state: | Solid
# Color: | Grayish white
# Discoverer: | Julius Scaliger
# Date discovered: | before 1700
# Where discovered: | Italy
