# Title: Gold
# Description: Atomic properties of gold.
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# Gold
# Atomic number: | 79
# Atomic mass: | 196.96654
# Atomic radius:
r_a := 144.2*10^-12*m
# Melting temperature:
T_m := 1337.58*K
# Boiling temperature:
T_b := 3080*K
# Critical temperature:
T_c := 9500*K
# Standard state: | Solid
# Color: | Yellow
# Discoverer: | Known to ancients
# Date discovered: | Prehistoric
# Where discovered:
