# Title: Mercury
# Description: Atomic properties of mercury.
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# Mercury
# Atomic number: | 80
# Atomic mass: | 200.59
# Atomic radius:
r_a := 150.3*10^-12*m
# Melting temperature:
T_m := 234.28*K
# Boiling temperature:
T_b := 629.73*K
# Critical temperature:
T_c := 1733*K
# Standard state: | Liquid
# Color: | Silvery white
# Discoverer: | Known to ancients
# Date discovered: | Prehistoric
# Where discovered:
