# Title: Thallium
# Description: Atomic properties of thallium.
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# Thallium
# Atomic number: | 81
# Atomic mass: | 204.3833
# Atomic radius:
r_a := 170*10^-12*m
# Melting temperature:
T_m := 576.6*K
# Boiling temperature:
T_b := 1730*K
# Critical temperature:
T_c := 3219*K
# Standard state: | Solid
# Color: | Silvery white
# Discoverer: | Sir William Crookes
# Date discovered: | 1861
# Where discovered: | England
