# Title: Lead
# Description: Atomic properties of lead.
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# Lead
# Atomic number: | 82
# Atomic mass: | 207.2
# Atomic radius:
r_a := 175*10^-12*m
# Melting temperature:
T_m := 600.65*K
# Boiling temperature:
T_b := 2013*K
# Critical temperature:
T_c := 5400*K
# Standard state: | Solid
# Color: | Bluish white
# Discoverer: | Known to ancients
# Date discovered: | Prehistoric
# Where discovered:
