# Title: Bismuth
# Description: Atomic properties of bismuth.
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# Bismuth
# Atomic number: | 83
# Atomic mass: | 208.98037
# Atomic radius:
r_a := 154.5*10^-12*m
# Melting temperature:
T_m := 544.5*K
# Boiling temperature:
T_b := 1883*K
# Critical temperature:
T_c := 4620*K
# Standard state: | Solid
# Color: | Lustrous reddish white
# Discoverer: | Known to ancients
# Date discovered: | 1500 (circa)
# Where discovered:
