# Title: Polonium
# Description: Atomic properties of polonium.
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# Polonium
# Atomic number: | 84
# Atomic mass: | 208.9824
# Atomic radius:
r_a := 167.3*10^-12*m
# Melting temperature:
T_m := 527*K
# Boiling temperature:
T_b := 1235*K
# Critical temperature:
T_c := 2281*K
# Standard state: | Solid
# Color: | Silvery
# Discoverer: | Marie and Pierre Curie
# Date discovered: | 1898
# Where discovered: | France
