# Title: Astatine
# Description: Atomic proerties of astatine.
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# Astatine
# Atomic number: | 85
# Atomic mass: | 209.9871
# Atomic radius:
# Melting temperature:
T_m := 575*K
# Boiling temperature:
T_b := 610*K
# Critical temperature:
# Standard state: | Solid
# Color: | Metallic
# Discoverer: | Corson, MacKenzie, Segre
# Date discovered: | 1940
# Where discovered: | United States
