# Title: Radon
# Description: Atomic properties of radon.
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# Radon
# Atomic number: | 86
# Atomic mass: | 222.0176
# Atomic radius:
# Melting temperature:
T_m := 202*K
# Boiling temperature:
T_b := 211.4*K
# Critical temperature:
T_c := 377.16*K
# Standard state: | Gas
# Color: | None
# Discoverer: | Friedrich Ernst Dorn
# Date discovered: | 1900
# Where discovered: | Germany
