# Title: Francium
# Description: Atomic properties of francium.
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# Francium
# Atomic number: | 87
# Atomic mass: | 223.0197
# Atomic radius:
# Melting temperature:
T_m := 300*K
# Boiling temperature:
T_b := 950*K
# Critical temperature:
# Standard state: | Liquid
# Color: | Metallic
# Discoverer: | Marguerite Perey
# Date discovered: | 1939
# Where discovered: | France
