# Title: Radium
# Description: Atomic properties of radium.
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# Radium
# Atomic number: | 88
# Atomic mass: | 226.0254
# Atomic radius:
# Melting temperature:
T_m := 973*K
# Boiling temperature:
T_b := 1413*K
# Critical temperature:
# Standard state: | Solid
# Color: | Lustrous metallic
# Discoverer: | Marie and Pierre Curie
# Date discovered: | 1898
# Where discovered: | France
