# Title: Actinium
# Description: Atomic properties of actinium.
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# Actinium
# Atomic number: | 89
# Atomic mass: | 227.0278
# Atomic radius:
r_a := 187.8*10^-12*m
# Melting temperature:
T_m := 1320*K
# Boiling temperature:
T_b := 3470*K
# Critical temperature:
# Standard state: | Solid
# Color: | Silvery
# Discoverer: | Andre Debierne
# Date discovered: | 1899
# Where discovered: | France
