# Title: Thorium
# Description: Atomic properties of thorium.
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# Thorium
# Atomic number: | 90
# Atomic mass: | 232.0381
# Atomic radius:
r_a := 179.8*10^-12*m
# Melting temperature:
T_m := 2023*K
# Boiling temperature:
T_b := 5060*K
# Critical temperature:
T_c := 14550*K
# Standard state: | Solid
# Color: | Silvery white
# Discoverer: | Jons Berzelius
# Date discovered: | 1815
# Where discovered: | Sweden
