# Title: Protactinium
# Description: Atomic properties of protactinium.
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# Protactinium
# Atomic number: | 91
# Atomic mass: | 231.03588
# Atomic radius:
r_a := 156.1*10^-12*m
# Melting temperature:
T_m := 2113*K
# Boiling temperature:
T_b := 4300*K
# Critical temperature:
# Standard state: | Solid
# Color: | Silvery metallic
# Discoverer:
# Otto Hahn, Lise Meitner,
# Fredrick Soddy, John Cranston
# Date discovered: | 1917
# Where discovered: | Germany, England
