# Title: Uranium
# Description: Atomic properties of uranium.
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# Uranium
# Atomic number: | 92
# Atomic mass: | 238.0289
# Atomic radius:
r_a := 138.5*10^-12*m
# Melting temperature:
T_m := 1405.5*K
# Boiling temperature:
T_b := 4018*K
# Critical temperature:
T_c := 12500*K
# Standard state: | Solid
# Color: | Metallic gray
# Discoverer: | Martin Klaproth
# Date discovered: | 1789
# Where discovered: | Germany
