# Title: Neptunium
# Description: Atomic properties of neptunium.
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# Neptunium
# Atomic number: | 93
# Atomic mass: | 237.0482
# Atomic radius:
r_a := 130*10^-12*m
# Melting temperature:
T_m := 913*K
# Boiling temperature:
T_b := 4175*K
# Critical temperature:
# Standard state: | Solid
# Color: | Silvery metallic
# Discoverer: | E.M. McMillan, P.H. Abelson
# Date discovered: | 1940
# Where discovered: | United States
