# Title: Plutonium
# Description: Atomic properties of plutonium.
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# Plutonium
# Atomic number: | 94
# Atomic mass: | 244.0642
# Atomic radius:
r_a := 151.3*10^-12*m
# Melting temperature:
T_m := 914*K
# Boiling temperature:
T_b := 3505*K
# Critical temperature:
# Standard state: | Solid
# Color: | Silvery white
# Discoverer:
# Glenn T. Seaborg, J.W. Kennedy,
# E.M. McMillan
# Date discovered: | 1940
# Where discovered | United States
