# Title: Americium
# Description: Atomic properties of americium.
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# Americium
# Atomic number: | 95
# Atomic mass: | 243.0614
# Atomic radius:
# Melting temperature:
T_m := 1267*K
# Boiling temperature:
T_b := 2880*K
# Critical temperature:
# Standard state: | Solid
# Color: | Silvery white
# Discoverer: | Glenn T. Seaborg, Ralph James, Albert Ghiorso
# Date discovered: | 1944
# Where discovered: | United States
