# Title: Fermium
# Description: Atomic properties of fermium.
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# Fermium
# Atomic number: | 100
# Atomic mass: | 257.0951
# Atomic radius:
# Melting temperature:
T_m := 1800*K
# Boiling temperature:
# Critical temperature:
# Standard state: | Solid
# Color:
# Discoverer: | Albert Ghiorso and co-workers
# Date discovered: | 1952
# Where discovered: | United States
