# Title: Mendelevium
# Description: Atomic properties of mendelevium.
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# Mendelevium
# Atomic number: | 101
# Atomic mass: | 258.1
# Atomic radius:
# Melting temperature:
T_m := 1100*K
# Boiling temperature:
# Critical temperature:
# Standard state: | Solid
# Color:
# Discoverer:
# Stanley G. Thompson, Glenn T. Seaborg,
# Bernard G. Harvey, Gregory R. Choppin,
# Albert Ghiorso
# Date discovered: | 1955
# Where discovered: | United States
