# Title: Nobelium
# Description: Atomic properties of nobelium.
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# Nobelium
# Atomic number: | 102
# Atomic mass: | 259.1009
# Atomic radius:
# Melting temperature:
T_m := 1100*K
# Boiling temperature:
# Critical temperature:
# Standard state: | Solid
# Color:
# Discoverer:
# Albert Ghiorso, Glenn T. Seaborg, Torbjorn Sikkeland, John R. Walton
# Date discovered: | 1958
# Where discovered: | United States
