# Title: Lawrencium
# Description: Atomic properties of lawrencium
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# Lawrencium
# Atomic number: | 103
# Atomic mass: | 262.11
# Atomic radius:
# Melting temperature:
T_m := 1900*K
# Boiling temperature:
# Critical temperature:
# Standard state: | Solid
# Color:
# Discoverer:
# Albert Ghiorso, Torbjorn Sikkeland,
# Almon E. Larsh, Robert M. Latimer
# Date discovered: | 1961
# Where discovered: | United States
