# Title: Hassium
# Description: Atomic properties of hassium.
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# Hassium
# Atomic number: | 108
# Atomic mass: | 265
# Atomic radius:
# Melting temperature:
# Boiling temperature:
# Critical temperature:
# Standard state: | Solid
# Color:
# Discoverer:
# Heavy Ion Research Laboratory,
# Darmstadt, West Germany
# Date discovered: | 1984
# Where discovered: | West Germany
