# Title: Solids: Specific Gravity
# Description: Specific gravity of common solids.
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# PROPERTIES OF COMMON SOLIDS
# reference tables
# Specific Gravity
## Specific Gravity
## Specific Gravity
## Material
## Material
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# Asbestos cement board | 1.4 | Limestone | 2.5
# annotation to a formula above: Specific Gravity of Asbestos cement board, from CRC Handbook of Tables for Applied Engineering Science, 2nd edition, edited by R. Bolz and G. Tuve, CRC Press (1973).
# annotation to a formula above: Specific Gravity of Limestone, from CRC Handbook of Tables for Applied Engineering Science, 2nd edition, edited by R. Bolz and G. Tuve, CRC Press (1973).
# Asbestos millboard | 1.0 | Magnesia (85%) | 0.25
# annotation to a formula above: Specific Gravity of Asbestos millboard, from CRC Handbook of Tables for Applied Engineering Science, 2nd edition, edited by R. Bolz and G. Tuve, CRC Press (1973).
# annotation to a formula above: Specific Gravity of Magnesia (85%), from CRC Handbook of Tables for Applied Engineering Science, 2nd edition, edited by R. Bolz and G. Tuve, CRC Press (1973).
# Asphalt | 1.1 | Marble | 2.6
# annotation to a formula above: Specific Gravity of Asphalt, from CRC Handbook of Tables for Applied Engineering Science, 2nd edition, edited by R. Bolz and G. Tuve, CRC Press (1973).
# annotation to a formula above: Specific Gravity of Marble, from CRC Handbook of Tables for Applied Engineering Science, 2nd edition, edited by R. Bolz and G. Tuve, CRC Press (1973).
# Beeswax | 0.95 | Mica | 2.7
# annotation to a formula above: Specific Gravity of Beeswax, from CRC Handbook of Tables for Applied Engineering Science, 2nd edition, edited by R. Bolz and G. Tuve, CRC Press (1973).
# annotation to a formula above: Specific Gravity of Mica, from CRC Handbook of Tables for Applied Engineering Science, 2nd edition, edited by R. Bolz and G. Tuve, CRC Press (1973).
# Brick, common | 1.75 | Mineral wool blanket | 0.1
# annotation to a formula above: Specific Gravity of Brick, common, from CRC Handbook of Tables for Applied Engineering Science, 2nd edition, edited by R. Bolz and G. Tuve, CRC Press (1973).
# annotation to a formula above: Specific Gravity of Mineral wool blanket, from CRC Handbook of Tables for Applied Engineering Science, 2nd edition, edited by R. Bolz and G. Tuve, CRC Press (1973).
# Brick, hard | 2.0 | Paper | 0.9
# annotation to a formula above: Specific Gravity of Brick, hard, from CRC Handbook of Tables for Applied Engineering Science, 2nd edition, edited by R. Bolz and G. Tuve, CRC Press (1973).
# annotation to a formula above: Specific Gravity of Paper, from CRC Handbook of Tables for Applied Engineering Science, 2nd edition, edited by R. Bolz and G. Tuve, CRC Press (1973).
# Chalk | 2.0 | Paraffin wax | 0.9
# annotation to a formula above: Specific Gravity of Chalk, from CRC Handbook of Tables for Applied Engineering Science, 2nd edition, edited by R. Bolz and G. Tuve, CRC Press (1973).
# annotation to a formula above: Specific Gravity of Paraffin wax, from CRC Handbook of Tables for Applied Engineering Science, 2nd edition, edited by R. Bolz and G. Tuve, CRC Press (1973).
# Charcoal, wood | 0.4 | Plaster, light | 0.7
# annotation to a formula above: Specific Gravity of Charcoal, wood, from CRC Handbook of Tables for Applied Engineering Science, 2nd edition, edited by R. Bolz and G. Tuve, CRC Press (1973).
# annotation to a formula above: Specific Gravity of Plaster, light, from CRC Handbook of Tables for Applied Engineering Science, 2nd edition, edited by R. Bolz and G. Tuve, CRC Press (1973).
# Coal, anthracite | 1.5 | Plaster, sand | 1.8
# annotation to a formula above: Specific Gravity of Coal, anthracite, from CRC Handbook of Tables for Applied Engineering Science, 2nd edition, edited by R. Bolz and G. Tuve, CRC Press (1973).
# annotation to a formula above: Specific Gravity of Plaster, sand, from CRC Handbook of Tables for Applied Engineering Science, 2nd edition, edited by R. Bolz and G. Tuve, CRC Press (1973).
# Coal, bituminous | 1.2 | Plastics, foamed | 0.2
# annotation to a formula above: Specific Gravity of Coal, bituminous, from CRC Handbook of Tables for Applied Engineering Science, 2nd edition, edited by R. Bolz and G. Tuve, CRC Press (1973).
# annotation to a formula above: Specific Gravity of Plastics, foamed, from CRC Handbook of Tables for Applied Engineering Science, 2nd edition, edited by R. Bolz and G. Tuve, CRC Press (1973).
# Concrete, light | 1.4 | Plastics, solids | 1.2
# annotation to a formula above: Specific Gravity of Concrete, light, from CRC Handbook of Tables for Applied Engineering Science, 2nd edition, edited by R. Bolz and G. Tuve, CRC Press (1973).
# annotation to a formula above: Specific Gravity of Plastics, solids, from CRC Handbook of Tables for Applied Engineering Science, 2nd edition, edited by R. Bolz and G. Tuve, CRC Press (1973).
# Concrete, stone | 2.2 | Porcelain | 2.5
# annotation to a formula above: Specific Gravity of Concrete, stone, from CRC Handbook of Tables for Applied Engineering Science, 2nd edition, edited by R. Bolz and G. Tuve, CRC Press (1973).
# annotation to a formula above: Specific Gravity of Porcelain, from CRC Handbook of Tables for Applied Engineering Science, 2nd edition, edited by R. Bolz and G. Tuve, CRC Press (1973).
# Corkboard | 0.2 | Sandstone | 2.3
# annotation to a formula above: Specific Gravity of Corkboard, from CRC Handbook of Tables for Applied Engineering Science, 2nd edition, edited by R. Bolz and G. Tuve, CRC Press (1973).
# annotation to a formula above: Specific Gravity of Sandstone, from CRC Handbook of Tables for Applied Engineering Science, 2nd edition, edited by R. Bolz and G. Tuve, CRC Press (1973).
# Earth, dry | 1.4 | Sawdust | 0.15
# annotation to a formula above: Specific Gravity of Earth, dry, from CRC Handbook of Tables for Applied Engineering Science, 2nd edition, edited by R. Bolz and G. Tuve, CRC Press (1973).
# annotation to a formula above: Specific Gravity of Sawdust, from CRC Handbook of Tables for Applied Engineering Science, 2nd edition, edited by R. Bolz and G. Tuve, CRC Press (1973).
# Fiberboard, light | 0.24 | Silica aerogel | 0.11
# annotation to a formula above: Specific Gravity of Fiberboard, light, from CRC Handbook of Tables for Applied Engineering Science, 2nd edition, edited by R. Bolz and G. Tuve, CRC Press (1973).
# annotation to a formula above: Specific Gravity of Silica aeroger, from CRC Handbook of Tables for Applied Engineering Science, 2nd edition, edited by R. Bolz and G. Tuve, CRC Press (1973).
# Fiber hardboard | 1.1 | Vermiculite | 0.13
# annotation to a formula above: Specific Gravity of Fiber hardboard, from CRC Handbook of Tables for Applied Engineering Science, 2nd edition, edited by R. Bolz and G. Tuve, CRC Press (1973).
# annotation to a formula above: Specific Gravity of Vermiculite, from CRC Handbook of Tables for Applied Engineering Science, 2nd edition, edited by R. Bolz and G. Tuve, CRC Press (1973).
# Firebrick | 2.1 | Wood, balsa | 0.16
# annotation to a formula above: Specific Gravity of Firebrick, from CRC Handbook of Tables for Applied Engineering Science, 2nd edition, edited by R. Bolz and G. Tuve, CRC Press (1973).
# annotation to a formula above: Specific Gravity of Wood, balsa, from CRC Handbook of Tables for Applied Engineering Science, 2nd edition, edited by R. Bolz and G. Tuve, CRC Press (1973).
# Glass, window | 2.5 | Wood, oak | 0.7
# annotation to a formula above: Specific Gravity of Glass, window, from CRC Handbook of Tables for Applied Engineering Science, 2nd edition, edited by R. Bolz and G. Tuve, CRC Press (1973).
# annotation to a formula above: Specific Gravity of Wood, oak, from CRC Handbook of Tables for Applied Engineering Science, 2nd edition, edited by R. Bolz and G. Tuve, CRC Press (1973).
# Gypsum board | 0.8 | Wood, white pine | 0.5
# annotation to a formula above: Specific Gravity of Gypsum board, from CRC Handbook of Tables for Applied Engineering Science, 2nd edition, edited by R. Bolz and G. Tuve, CRC Press (1973).
# annotation to a formula above: Specific Gravity of Wood, white pine, from CRC Handbook of Tables for Applied Engineering Science, 2nd edition, edited by R. Bolz and G. Tuve, CRC Press (1973).
# Hairfelt | 0.1 | Wool, felt | 0.3
# annotation to a formula above: Specific Gravity of Hairfelt, from CRC Handbook of Tables for Applied Engineering Science, 2nd edition, edited by R. Bolz and G. Tuve, CRC Press (1973).
# annotation to a formula above: Specific Gravity of Wool, felt, from CRC Handbook of Tables for Applied Engineering Science, 2nd edition, edited by R. Bolz and G. Tuve, CRC Press (1973).
# Leather, dry | 0.9 | Wool, loose | 0.1
# annotation to a formula above: Specific Gravity of Leather, dry, from CRC Handbook of Tables for Applied Engineering Science, 2nd edition, edited by R. Bolz and G. Tuve, CRC Press (1973).
# annotation to a formula above: Specific Gravity of Wool, loose, from CRC Handbook of Tables for Applied Engineering Science, 2nd edition, edited by R. Bolz and G. Tuve, CRC Press (1973).
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# ^(* Green parentheses in this file indicate annotations to an expression. To read an annotation, right-click on the entire expression within the parentheses and choose View/Edit Annotation. If the expression is copied to another file, the annotation will be preserved.)
# Data from CRC Handbook of Tables for Applied Engineering Science, 2nd edition, edited by R. Bolz and G. Tuve, CRC Press (1973).
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