# Title: Solids: Specific Heat
# Description: Specific heat of common solids.
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# PROPERTIES OF COMMON SOLIDS
# reference tables
# Specific Heat
## Material
## Specific Heat
## Material
## Specific Heat
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# Asbestos cement board | 0.2*cal/(gm*K) | Limestone | 0.217*cal/(gm*K)
# annotation to a formula above: Specific Heat of Asbestos cement board, from CRC Handbook of Tables for Applied Engineering Science, 2nd edition, edited by R. Bolz and G. Tuve, CRC Press (1973).
# annotation to a formula above: Specific Heat of Limestone, from CRC Handbook of Tables for Applied Engineering Science, 2nd edition, edited by R. Bolz and G. Tuve, CRC Press (1973).
# Asbestos millboard | 0.2*cal/(gm*K) | Magnesia (85%) | 0.2*cal/(gm*K)
# annotation to a formula above: Specific Heat of Asbestos millboard, from CRC Handbook of Tables for Applied Engineering Science, 2nd edition, edited by R. Bolz and G. Tuve, CRC Press (1973).
# annotation to a formula above: Specific Heat of Magnesia (85%), from CRC Handbook of Tables for Applied Engineering Science, 2nd edition, edited by R. Bolz and G. Tuve, CRC Press (1973).
# Asphalt | 0.4*cal/(gm*K) | Marble | 0.21*cal/(gm*K)
# annotation to a formula above: Specific Heat of Asphalt, from CRC Handbook of Tables for Applied Engineering Science, 2nd edition, edited by R. Bolz and G. Tuve, CRC Press (1973).
# annotation to a formula above: Specific Heat of Marble, from CRC Handbook of Tables for Applied Engineering Science, 2nd edition, edited by R. Bolz and G. Tuve, CRC Press (1973).
# Beeswax | 0.82*cal/(gm*K) | Mica | 0.12*cal/(gm*K)
# annotation to a formula above: Specific Heat of Beeswax, from CRC Handbook of Tables for Applied Engineering Science, 2nd edition, edited by R. Bolz and G. Tuve, CRC Press (1973).
# annotation to a formula above: Specific Heat of Mica, from CRC Handbook of Tables for Applied Engineering Science, 2nd edition, edited by R. Bolz and G. Tuve, CRC Press (1973).
# Brick, common | 0.22*cal/(gm*K) | Paper | 0.33*cal/(gm*K)
# annotation to a formula above: Specific Heat of Brick, common, from CRC Handbook of Tables for Applied Engineering Science, 2nd edition, edited by R. Bolz and G. Tuve, CRC Press (1973).
# annotation to a formula above: Specific Heat of Paper, from CRC Handbook of Tables for Applied Engineering Science, 2nd edition, edited by R. Bolz and G. Tuve, CRC Press (1973).
# Brick, hard | 0.24*cal/(gm*K) | Paraffin wax | 0.69*cal/(gm*K)
# annotation to a formula above: Specific Heat of Brick, hard, from CRC Handbook of Tables for Applied Engineering Science, 2nd edition, edited by R. Bolz and G. Tuve, CRC Press (1973).
# annotation to a formula above: Specific Heat of Paraffin wax, from CRC Handbook of Tables for Applied Engineering Science, 2nd edition, edited by R. Bolz and G. Tuve, CRC Press (1973).
# Chalk | 0.215*cal/(gm*K) | Plaster, light | 0.24*cal/(gm*K)
# annotation to a formula above: Specific Heat of Chalk, from CRC Handbook of Tables for Applied Engineering Science, 2nd edition, edited by R. Bolz and G. Tuve, CRC Press (1973).
# annotation to a formula above: Specific Heat of Plaster, light, from CRC Handbook of Tables for Applied Engineering Science, 2nd edition, edited by R. Bolz and G. Tuve, CRC Press (1973).
# Charcoal, wood | 0.24*cal/(gm*K) | Plaster, sand | 0.22*cal/(gm*K)
# annotation to a formula above: Specific Heat of Charcoal, wood, from CRC Handbook of Tables for Applied Engineering Science, 2nd edition, edited by R. Bolz and G. Tuve, CRC Press (1973).
# annotation to a formula above: Specific Heat of Plaster, sand, from CRC Handbook of Tables for Applied Engineering Science, 2nd edition, edited by R. Bolz and G. Tuve, CRC Press (1973).
# Coal, anthracite | 0.3*cal/(gm*K) | Plastics, foamed | 0.3*cal/(gm*K)
# annotation to a formula above: Specific Heat of Coal, anthracite, from CRC Handbook of Tables for Applied Engineering Science, 2nd edition, edited by R. Bolz and G. Tuve, CRC Press (1973).
# annotation to a formula above: Specific Heat of Plastics, foamed, from CRC Handbook of Tables for Applied Engineering Science, 2nd edition, edited by R. Bolz and G. Tuve, CRC Press (1973).
# Coal, bituminous | 0.33*cal/(gm*K) | Plastics, solids | 0.4*cal/(gm*K)
# annotation to a formula above: Specific Heat of Coal, bituminous, from CRC Handbook of Tables for Applied Engineering Science, 2nd edition, edited by R. Bolz and G. Tuve, CRC Press (1973).
# annotation to a formula above: Specific Heat of Plastics, solids, from CRC Handbook of Tables for Applied Engineering Science, 2nd edition, edited by R. Bolz and G. Tuve, CRC Press (1973).
# Concrete, light | 0.23*cal/(gm*K) | Porcelain | 0.22*cal/(gm*K)
# annotation to a formula above: Specific Heat of Concrete, light, from CRC Handbook of Tables for Applied Engineering Science, 2nd edition, edited by R. Bolz and G. Tuve, CRC Press (1973).
# annotation to a formula above: Specific Heat of Porcelain, from CRC Handbook of Tables for Applied Engineering Science, 2nd edition, edited by R. Bolz and G. Tuve, CRC Press (1973).
# Concrete, stone | 0.18*cal/(gm*K) | Sandstone | 0.22*cal/(gm*K)
# annotation to a formula above: Specific Heat of Concrete, stone, from CRC Handbook of Tables for Applied Engineering Science, 2nd edition, edited by R. Bolz and G. Tuve, CRC Press (1973).
# annotation to a formula above: Specific Heat of Sandstone, from CRC Handbook of Tables for Applied Engineering Science, 2nd edition, edited by R. Bolz and G. Tuve, CRC Press (1973).
# Corkboard | 0.45*cal/(gm*K) | Sawdust | 0.21*cal/(gm*K)
# annotation to a formula above: Specific Heat of Corkboard, from CRC Handbook of Tables for Applied Engineering Science, 2nd edition, edited by R. Bolz and G. Tuve, CRC Press (1973).
# annotation to a formula above: Specific Heat of Sawdust, from CRC Handbook of Tables for Applied Engineering Science, 2nd edition, edited by R. Bolz and G. Tuve, CRC Press (1973).
# Earth, dry | 0.3*cal/(gm*K) | Silica aerogel | 0.2*cal/(gm*K)
# annotation to a formula above: Specific Heat of Earth, dry, from CRC Handbook of Tables for Applied Engineering Science, 2nd edition, edited by R. Bolz and G. Tuve, CRC Press (1973).
# annotation to a formula above: Specific Heat of Silica aerogel, from CRC Handbook of Tables for Applied Engineering Science, 2nd edition, edited by R. Bolz and G. Tuve, CRC Press (1973).
# Fiberboard, light | 0.6*cal/(gm*K) | Vermiculite | 0.2*cal/(gm*K)
# annotation to a formula above: Specific Heat of Fiberboard, light, from CRC Handbook of Tables for Applied Engineering Science, 2nd edition, edited by R. Bolz and G. Tuve, CRC Press (1973).
# annotation to a formula above: Specific Vermiculite, from CRC Handbook of Tables for Applied Engineering Science, 2nd edition, edited by R. Bolz and G. Tuve, CRC Press (1973).
# Fiber hardboard | 0.5*cal/(gm*K) | Wood, balsa | 0.7*cal/(gm*K)
# annotation to a formula above: Specific Heat of Fiber Hardboard, from CRC Handbook of Tables for Applied Engineering Science, 2nd edition, edited by R. Bolz and G. Tuve, CRC Press (1973).
# annotation to a formula above: Specific Heat of Wood, balsa, from CRC Handbook of Tables for Applied Engineering Science, 2nd edition, edited by R. Bolz and G. Tuve, CRC Press (1973).
# Firebrick | 0.25*cal/(gm*K) | Wood, oak | 0.5*cal/(gm*K)
# annotation to a formula above: Specific Heat of Firebrick, from CRC Handbook of Tables for Applied Engineering Science, 2nd edition, edited by R. Bolz and G. Tuve, CRC Press (1973).
# annotation to a formula above: Specific Heat of Wood, oak, from CRC Handbook of Tables for Applied Engineering Science, 2nd edition, edited by R. Bolz and G. Tuve, CRC Press (1973).
# Glass, window
0.2*cal/(gm*K)
# Wood,
# white pine
0.6*cal/(gm*K)
# annotation to a formula above: Specific Heat of Glass, window, from CRC Handbook of Tables for Applied Engineering Science, 2nd edition, edited by R. Bolz and G. Tuve, CRC Press (1973).
# annotation to a formula above: Specific Heat of Wood, white pine, from CRC Handbook of Tables for Applied Engineering Science, 2nd edition, edited by R. Bolz and G. Tuve, CRC Press (1973).
# Gypsum board | 0.26*cal/(gm*K) | Wool, felt | 0.33*cal/(gm*K)
# annotation to a formula above: Specific Heat of Gypsum board, from CRC Handbook of Tables for Applied Engineering Science, 2nd edition, edited by R. Bolz and G. Tuve, CRC Press (1973).
# Hairfelt | 0.5*cal/(gm*K) | Wool, loose | 0.3*cal/(gm*K)
# annotation to a formula above: Specific Heat of Wool, from CRC Handbook of Tables for Applied Engineering Science, 2nd edition, edited by R. Bolz and G. Tuve, CRC Press (1973).
# Leather, dry | 0.36*cal/(gm*K)
# annotation to a formula above: Specific Heat of Leather, dry, from CRC Handbook of Tables for Applied Engineering Science, 2nd edition, edited by R. Bolz and G. Tuve, CRC Press (1973).
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# ^(* Green parentheses in this file indicate annotations to an expression. To read an annotation, right-click on the entire expression within the parentheses and choose View/Edit Annotation. If the expression is copied to another file, the annotation will be preserved.)
# Data from CRC Handbook of Tables for Applied Engineering Science, 2nd edition, edited by R. Bolz and G. Tuve, CRC Press (1973).
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