# Title: Solids: Thermal Conductivity
# Description: Thermal conductivity of common solids.
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# PROPERTIES OF COMMON SOLIDS
# reference tables
# Thermal Conductivity
## Thermal Conductivity
## Thermal Conductivity
## Material
## Material
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# Asbestos cement board | 0.607*watt/(m*K) | Marble | 2.6*watt/(m*K)
# annotation to a formula above: Thermal Conductivity of Asbestos cement board, from CRC Handbook of Tables for Applied Engineering Science, 2nd edition, edited by R. Bolz and G. Tuve, CRC Press (1973).
# annotation to a formula above: Thermal Conductivity of Marble, from CRC Handbook of Tables for Applied Engineering Science, 2nd edition, edited by R. Bolz and G. Tuve, CRC Press (1973).
# Asbestos millboard | 0.14*watt/(m*K) | Mica | 0.71*watt/(m*K)
# annotation to a formula above: Thermal Conductivity of Asbestos millboard, from CRC Handbook of Tables for Applied Engineering Science, 2nd edition, edited by R. Bolz and G. Tuve, CRC Press (1973).
# annotation to a formula above: Thermal Conductivity of Mica, from CRC Handbook of Tables for Applied Engineering Science, 2nd edition, edited by R. Bolz and G. Tuve, CRC Press (1973).
# Brick, common | 0.71*watt/(m*K) | Paper | 0.1*watt/(m*K)
# annotation to a formula above: Thermal Conductivity of Brick, common, from CRC Handbook of Tables for Applied Engineering Science, 2nd edition, edited by R. Bolz and G. Tuve, CRC Press (1973).
# annotation to a formula above: Thermal Conductivity of Paper, from CRC Handbook of Tables for Applied Engineering Science, 2nd edition, edited by R. Bolz and G. Tuve, CRC Press (1973).
# Brick, hard | 1.3*watt/(m*K) | Paraffin wax | 0.2*watt/(m*K)
# annotation to a formula above: Thermal Conductivity of Brick, hard, from CRC Handbook of Tables for Applied Engineering Science, 2nd edition, edited by R. Bolz and G. Tuve, CRC Press (1973).
# annotation to a formula above: Thermal Conductivity of Paraffin wax, from CRC Handbook of Tables for Applied Engineering Science, 2nd edition, edited by R. Bolz and G. Tuve, CRC Press (1973).
# Chalk | 0.84*watt/(m*K) | Plaster, light | 0.2*watt/(m*K)
# annotation to a formula above: Thermal Conductivity of Chalk, from CRC Handbook of Tables for Applied Engineering Science, 2nd edition, edited by R. Bolz and G. Tuve, CRC Press (1973).
# annotation to a formula above: Thermal Conductivity of Plaster, light, from CRC Handbook of Tables for Applied Engineering Science, 2nd edition, edited by R. Bolz and G. Tuve, CRC Press (1973).
# Charcoal, wood | 0.088*watt/(m*K) | Plaster, sand | 0.71*watt/(m*K)
# annotation to a formula above: Thermal Conductivity of Charcoal, wood, from CRC Handbook of Tables for Applied Engineering Science, 2nd edition, edited by R. Bolz and G. Tuve, CRC Press (1973).
# annotation to a formula above: Thermal Conductivity of Plaster, sand, from CRC Handbook of Tables for Applied Engineering Science, 2nd edition, edited by R. Bolz and G. Tuve, CRC Press (1973).
# Concrete, light | 0.42*watt/(m*K) | Plastics, foamed | 0.03*watt/(m*K)
# annotation to a formula above: Thermal Conductivity of Concrete, light, from CRC Handbook of Tables for Applied Engineering Science, 2nd edition, edited by R. Bolz and G. Tuve, CRC Press (1973).
# annotation to a formula above: Thermal Conductivity of Plastics, foamed, from CRC Handbook of Tables for Applied Engineering Science, 2nd edition, edited by R. Bolz and G. Tuve, CRC Press (1973).
# Concrete, stone | 1.7*watt/(m*K) | Plastics, solids | 0.19*watt/(m*K)
# annotation to a formula above: Thermal Conductivity of Concrete, stone, from CRC Handbook of Tables for Applied Engineering Science, 2nd edition, edited by R. Bolz and G. Tuve, CRC Press (1973).
# annotation to a formula above: Thermal Conductivity of Plastics, solids, from CRC Handbook of Tables for Applied Engineering Science, 2nd edition, edited by R. Bolz and G. Tuve, CRC Press (1973).
# Corkboard | 0.04*watt/(m*K) | Porcelain | 1.5*watt/(m*K)
# annotation to a formula above: Thermal Conductivity of Corkboard, from CRC Handbook of Tables for Applied Engineering Science, 2nd edition, edited by R. Bolz and G. Tuve, CRC Press (1973).
# annotation to a formula above: Thermal Conductivity of Porcelain, from CRC Handbook of Tables for Applied Engineering Science, 2nd edition, edited by R. Bolz and G. Tuve, CRC Press (1973).
# Earth, dry | 1.5*watt/(m*K) | Sandstone | 1.7*watt/(m*K)
# annotation to a formula above: Thermal Conductivity of Earth, dry, from CRC Handbook of Tables for Applied Engineering Science, 2nd edition, edited by R. Bolz and G. Tuve, CRC Press (1973).
# annotation to a formula above: Thermal Conductivity of Sandstone, from CRC Handbook of Tables for Applied Engineering Science, 2nd edition, edited by R. Bolz and G. Tuve, CRC Press (1973).
# Fiberboard, light | 0.058*watt/(m*K) | Sawdust | 0.08*watt/(m*K)
# annotation to a formula above: Thermal Conductivity of Fiberboard, light, from CRC Handbook of Tables for Applied Engineering Science, 2nd edition, edited by R. Bolz and G. Tuve, CRC Press (1973).
# annotation to a formula above: Thermal Conductivity of Sawdust, from CRC Handbook of Tables for Applied Engineering Science, 2nd edition, edited by R. Bolz and G. Tuve, CRC Press (1973).
# Fiber hardboard | 0.2*watt/(m*K) | Silica aerogel | 0.02*watt/(m*K)
# annotation to a formula above: Thermal Conductivity of Fiber hardboard, from CRC Handbook of Tables for Applied Engineering Science, 2nd edition, edited by R. Bolz and G. Tuve, CRC Press (1973).
# annotation to a formula above: Thermal Conductivity of Silica aerogel, from CRC Handbook of Tables for Applied Engineering Science, 2nd edition, edited by R. Bolz and G. Tuve, CRC Press (1973).
# Firebrick | 1.4*watt/(m*K) | Vermiculite | 0.058*watt/(m*K)
# annotation to a formula above: Thermal Conductivity of Firebrick, from CRC Handbook of Tables for Applied Engineering Science, 2nd edition, edited by R. Bolz and G. Tuve, CRC Press (1973).
# annotation to a formula above: Thermal Conductivity of Vermiculite, from CRC Handbook of Tables for Applied Engineering Science, 2nd edition, edited by R. Bolz and G. Tuve, CRC Press (1973).
# Glass, window | 0.96*watt/(m*K) | Wood, balsa | 0.050*watt/(m*K)
# annotation to a formula above: Thermal Conductivity of Glass, window, from CRC Handbook of Tables for Applied Engineering Science, 2nd edition, edited by R. Bolz and G. Tuve, CRC Press (1973).
# annotation to a formula above: Thermal Conductivity of Wood, balsa, from CRC Handbook of Tables for Applied Engineering Science, 2nd edition, edited by R. Bolz and G. Tuve, CRC Press (1973).
# Gypsum board | 0.17*watt/(m*K) | Wood, oak | 0.17*watt/(m*K)
# annotation to a formula above: Thermal Conductivity of Gypsum board, from CRC Handbook of Tables for Applied Engineering Science, 2nd edition, edited by R. Bolz and G. Tuve, CRC Press (1973).
# annotation to a formula above: Thermal Conductivity of Wood, oak, from CRC Handbook of Tables for Applied Engineering Science, 2nd edition, edited by R. Bolz and G. Tuve, CRC Press (1973).
# Hairfelt | 0.050*watt/(m*K) | Wood, white pine | 0.12*watt/(m*K)
# annotation to a formula above: Thermal Conductivity of Wood, white pine, from CRC Handbook of Tables for Applied Engineering Science, 2nd edition, edited by R. Bolz and G. Tuve, CRC Press (1973).
# Leather, dry | 0.2*watt/(m*K) | Wool, felt | 0.071*watt/(m*K)
# annotation to a formula above: Thermal Conductivity of Leather, dry, from CRC Handbook of Tables for Applied Engineering Science, 2nd edition, edited by R. Bolz and G. Tuve, CRC Press (1973).
# Limestone | 1.9*watt/(m*K) | Wool, loose | 0.3*watt/(m*K)
# annotation to a formula above: Thermal Conductivity of Limestone, from CRC Handbook of Tables for Applied Engineering Science, 2nd edition, edited by R. Bolz and G. Tuve, CRC Press (1973).
# annotation to a formula above: Thermal Conductivity of Wool, loose, from CRC Handbook of Tables for Applied Engineering Science, 2nd edition, edited by R. Bolz and G. Tuve, CRC Press (1973).
# Magnesia (85%) | 0.071*watt/(m*K)
# annotation to a formula above: Thermal Conductivity of Magnesia (85%), from CRC Handbook of Tables for Applied Engineering Science, 2nd edition, edited by R. Bolz and G. Tuve, CRC Press (1973).
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# ^(* Green parentheses in this file indicate annotations to an expression. To read an annotation, right-click on the entire expression within the parentheses and choose View/Edit Annotation. If the expression is copied to another file, the annotation will be preserved.)
# Data from CRC Handbook of Tables for Applied Engineering Science, 2nd edition, edited by R. Bolz and G. Tuve, CRC Press (1973).
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