# Title: Solids: Dielectric Constant at room temperature and standard conditions (at 1 MHz)
# Description: Dielectric constant of common solids at room temperature and standard conditions.
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# PROPERTIES OF COMMON SOLIDS
# reference tables
# Dielectric Constant at room temperature and standard conditions (at 1 MHz)
# Note:  The following table gives relative dielectric constants of common solids. The actual dielectric constant can be obtained by multiplying the relative dielectric constant of the material by the dielectric constant of vacuum ε_0 (see the Table of Fundamental Physical Constants). For example:
ε_0 := 8.854187817*10^-12*farad/m
ε_asphalt := 2.58*ε_0
ε_asphalt = 2.28438e-11 C^2*s^2/(kg*m^3)
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## Material
## Constant
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# Aluminum oxide | 8.80
# annotation to a formula above: Dielectric Constant of Aluminum oxide, from CRC Handbook of Tables for Applied Engineering Science, 2nd edition, edited by R. Bolz and G. Tuve, CRC Press (1973).
# Asbestos fiber | 3.1
# annotation to a formula above: Dielectric Constant of Asbestos fiber, from CRC Handbook of Tables for Applied Engineering Science, 2nd edition, edited by R. Bolz and G. Tuve, CRC Press (1973).
# Asphalt | 2.58
# annotation to a formula above: Dielectric Constant of Asphalt, from CRC Handbook of Tables for Applied Engineering Science, 2nd edition, edited by R. Bolz and G. Tuve, CRC Press (1973).
# Beeswax, yellow | 2.53
# annotation to a formula above: Dielectric Constant of Beeswax, yellow, from CRC Handbook of Tables for Applied Engineering Science, 2nd edition, edited by R. Bolz and G. Tuve, CRC Press (1973).
# Lucite | 2.63
# annotation to a formula above: Dielectric Constant of Lucite, from CRC Handbook of Tables for Applied Engineering Science, 2nd edition, edited by R. Bolz and G. Tuve, CRC Press (1973).
# Magnesium oxide | 9.65
# annotation to a formula above: Dielectric Constant of Magnesium oxide, from CRC Handbook of Tables for Applied Engineering Science, 2nd edition, edited by R. Bolz and G. Tuve, CRC Press (1973).
# Mica, ruby | 5.4
# annotation to a formula above: Dielectric Constant of Mica, ruby, from CRC Handbook of Tables for Applied Engineering Science, 2nd edition, edited by R. Bolz and G. Tuve, CRC Press (1973).
# Neoprene | 6.26
# annotation to a formula above: Dielectric Constant of Neoprene, from CRC Handbook of Tables for Applied Engineering Science, 2nd edition, edited by R. Bolz and G. Tuve, CRC Press (1973).
# Nylon 66 | 3.33
# annotation to a formula above: Dielectric Constant of Nylon 66, from CRC Handbook of Tables for Applied Engineering Science, 2nd edition, edited by R. Bolz and G. Tuve, CRC Press (1973).
# Plexiglass | 2.76
# annotation to a formula above: Dielectric Constant of Plexiglass, from CRC Handbook of Tables for Applied Engineering Science, 2nd edition, edited by R. Bolz and G. Tuve, CRC Press (1973).
# Polycarbonate | 3.02
# annotation to a formula above: Dielectric Constant of Polycarbonate, from CRC Handbook of Tables for Applied Engineering Science, 2nd edition, edited by R. Bolz and G. Tuve, CRC Press (1973).
# Polyester, cast resin, rigid | 2.8 | to | 4.1
# annotation to a formula above: Dielectric Constant of Polyester, cast resin, rigid, from CRC Handbook of Tables for Applied Engineering Science, 2nd edition, edited by R. Bolz and G. Tuve, CRC Press (1973).
# Polyethylene | 2.35
# annotation to a formula above: Dielectric Constant of Polyethylene, from CRC Handbook of Tables for Applied Engineering Science, 2nd edition, edited by R. Bolz and G. Tuve, CRC Press (1973).
# Polypropylene | 2.25
# annotation to a formula above: Dielectric Constant of Polypropylene, from CRC Handbook of Tables for Applied Engineering Science, 2nd edition, edited by R. Bolz and G. Tuve, CRC Press (1973).
# Porcelain (dry process) | 5.08
# annotation to a formula above: Dielectric Constant of Porcelain (dry process), from CRC Handbook of Tables for Applied Engineering Science, 2nd edition, edited by R. Bolz and G. Tuve, CRC Press (1973).
# Rubber, modified, isomerized | 2.4 | to | 2.7
# annotation to a formula above: Dielectric Constant of Rubber, modified, isomerized, from CRC Handbook of Tables for Applied Engineering Science, 2nd edition, edited by R. Bolz and G. Tuve, CRC Press (1973).
# Shellac, natural | 3.47
# annotation to a formula above: Dielectric Constant of Shellac, natural, from CRC Handbook of Tables for Applied Engineering Science, 2nd edition, edited by R. Bolz and G. Tuve, CRC Press (1973).
# Teflon FEP | 2.1
# annotation to a formula above: Dielectric Constant of Teflon FEP, from CRC Handbook of Tables for Applied Engineering Science, 2nd edition, edited by R. Bolz and G. Tuve, CRC Press (1973).
# Urea-formaldehyde | 6.0
# annotation to a formula above: Dielectric Constant of Urea-formaldehyde, from CRC Handbook of Tables for Applied Engineering Science, 2nd edition, edited by R. Bolz and G. Tuve, CRC Press (1973).
# Vinylite QYNA | 2.88
# annotation to a formula above: Dielectric Constant of Vinylite QYNA, from CRC Handbook of Tables for Applied Engineering Science, 2nd edition, edited by R. Bolz and G. Tuve, CRC Press (1973).
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# ^(* Green parentheses in this file indicate annotations to an expression. To read an annotation, right-click on the entire expression within the parentheses and choose View/Edit Annotation. If the expression is copied to another file, the annotation will be preserved.)
# Data from CRC Handbook of Tables for Applied Engineering Science, 2nd edition, edited by R. Bolz and G. Tuve, CRC Press (1973).
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