# Title: SmartSketch - Static Analysis of a Planar 4-Bar Linkage
# Description: Using Mathcad to control a SmartSketch drawing.
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# MATHCAD AND OTHER APPLICATIONS
# quicksheets
# SmartSketch: Static Analysis of a Planar 4-Bar Linkage
# Warning: To allow the Scripted Object component in this document to work in the Main Mathcad window, you must choose "No" in the dialog box regarding turning off script access, or set your security preferences to Low. You can also right click on the regions below and choose Enable Evaluation, if you've turned script access off.
# This worksheet illustrates inserting a SmartSketch drawing automated by Mathcad variables. Note: You must have SmartSketch installed on your computer in order for the component in this worksheet to activate properly.
# The static analysis of a simple 4-Bar Linkage requires knowledge of the spatial location of all the links. If the spatial parameters are to be calculated analytically, vector equations must be used. By inputting the crank angle to a SmartSketch drawing constructed from SmartSketch symbols, the position calculations are performed via the SmartSketch internal solver. The position parameters are then returned to Mathcad.
# The problem illustrated in the figure consist of a 4-bar linkage. The figure is a schematic diagram indicating the length of each link, the angles the links make with the horizontal, and the position and angle of the applied force. The SmartSketch drawing is set up so that the link angles are calculated and returned. The length of the individual links may be changed  by activating the symbols in-place. The lengths of the links are returned as spatial parameters.
# The user defined inputs consist of:
# · the crank angle
# · the position of the force
# · the angle of the force
# · the lengths of all links (in-place activation from within SmartSketch)
## User Input
# Crank Angle
CrankAngle := 145
# Frame Lengths
FrameLengths[0, 0] := 600
FrameLengths[1, 0] := 50
# Force Position
ForcePosition := 350
ForceAngle := 50
# Force Magnitude
F := 100*N
# [component: inputs [CrankAngle, FrameLengths, ForcePosition, ForceAngle]; outputs [Angles; Lengths]]
## Convert Outputs vector in scalar terms
theta2 := Angles[0]
L2 := Lengths[0]*mm
theta3 := Angles[1]
L3 := Lengths[1]*mm
theta4 := Angles[2]
L4 := Lengths[2]*mm
thetaF := Angles[3]
LF := Lengths[3]*mm
## Calculate Unit Vectors
e2 := [cos(theta2); sin(theta2); 0]
e3 := [cos(theta3); sin(theta3); 0]
e4 := [cos(theta4); sin(theta4); 0]
eF := [-cos(thetaF); -sin(thetaF); 0]
## Determine Magnitude of F34
# (read force F generated by 3 on 4)
# Assume f34 = 0 if link 3 and link 4 are collinear.
f34 :=
    -LF*F*(e4×eF)[2]/(L4*(e4×e3)[2]) if (e4×e3)[2] ≠ 0
    0*N otherwise
# The vector F34 may now be expressed as
F34 := f34*e3
# Recall F43 = -F34, F23 = -F43, F32 = -F23, thus
F32 := -F34
# The input torque is now defined as
T2 := -(L2*e2×F32)
T2 =  # error: This variable is undefined.
# The frame forces are
F12 := -F32
F12 =  # error
f12 := |F12|
f12 =  # error
F14 := F*eF + F34
F14 =  # error
f14 := |F14|
f14 =  # error
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