# Title: SmartSketch - Parallel Pipe Flow Example
# Description: Using Mathcad to control a SmartSketch drawing.
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# MATHCAD AND OTHER APPLICATIONS
# quicksheets
# SmartSketch: Parallel Pipe Flow Example
# This worksheet illustrates inserting an SmartSketch drawing automated by Mathcad variables. Note: You must have SmartSketch installed on your computer in order for the component in this worksheet to activate properly.
# This example was provided by:
# B. J. Stephens, Ph.D., P.E.
# Materials and Mechanical Engineering
# University of Alabama at Birmingham
## Flow Through a Parallel Branch Circuit
# The calculation of the flow in a parallel branch circuit must be accomplished by an iterative approach. The flow in each branch of the circuit must first be assumed and then the head loss calculated. Once the head loss is determined, a new flow in each branch is obtained. If the new flow is not equal to the initial flow, the initial flow assumption is replaced by the new flow rates and the calculation process is repeated. The iterative process is continued until the flow rates stop changing.
# The problem illustrated in the figure consists of a three-parallel branch flow circuit. The figure is a schematic diagram indicating the length of the through branch, the offset of the side branches, and the diameters of the branches. The diameter of the supply line is also indicated.  The SmartSketch drawing is set up so that the total length of each branch is calculated from the length of the through branch and the indicated offsets.
#
# The user-defined inputs consist of:
#
# · the length of the through branch
# · the length of the offsets
# · the diameters of all the branched and supply line
# · the roughness of the branches
# · the flow coefficients of the valves
# · the supply line flow
# · the kinematic viscosity of the fluid
# · the convergence tolerance
# Change the highlighted values as necessary:
# Scalar Values
# Supply Flow Rate
Q := 60*mm^3/s
# Supply Diameter
D := 30*mm
# Through Branch Length
L := 400*mm
# Kinematic Viscosity
ν := 1.01*10^-6*m^2/s
# Convergence Tolerance
ε := 10^-9
# Vector Values
# Branch Roughness
ξ := [0.2; 0.2; 0.2]*mm
# Valve Coefficients
k := [0.8; 0.8; 0.8]
# Offsets
offsets := [120; 120]*mm
# Diameters
diameters := [20; 15; 20]*mm
# [component: inputs [L/2, D, offsets[0], offsets[1], diameters[0], diameters[1], diameters[2]]]
# The lengths of the pipe sections are based on the respective offsets and the length of the assembly. There is no offset for the center leg.
lengths[0] := L + 2*offsets[0]
lengths[0] = 640 mm
lengths[1] := L
lengths[1] = 400 mm
lengths[2] := L + 2*offsets[1]
lengths[2] = 640 mm
# The function "ParallelPipeFlow" is contained in the collapsed area below. If you open this file in your Worksheet window, you can expand the area below  to see the details of the function.
# This page defines the Parallel Pipe Flow Function
# The ParrallelPipeFlow function calculates the flow in a branch system of parallel pipes. The function is based on White's Fluid Mechanics second edition.
#
# Function Arguments
#
# Q  =  Combined Total Flow  (mm^3/s)
# ν  =  Kinematic Viscosity  (mm^2/s)
# L  =  Vector of Pipe Lengths (mm)
# d  =  Vector of Pipe Diameters (mm)
# ξ  =  Vector of Pipe Roughness (mm)
# k  =  Vector of Valve Resistance Coefficients
# ε  =  Conveyance Tolerance
#
# The function returns a vector containing the flow in each pipe.
#
# Usage:
#
# PipeFlows := ParallelPipeFlow(Q, ν, L, d, ξ, k, ε)
ParallelPipeFlow(Q, ν, L, d, ξ, k, ε) ≡
    placeholder ← 1
    L_over_d ← vectorize(L/d)
    ε_over_d ← vectorize(ξ/d)
    q ← Q/3*vectorize(L/L)
    A ← π*vectorize(d^2)/4
    LoopFlag ← 1
    while LoopFlag < 40
        V ← vectorize(q/A)
        Re ← vectorize(d*V/ν)
        for i ∈ 0 .. rows(L) - 1
            f[i] ←
                (1/(-1.8*log(6.9/Re + (ε_over_d/3.7)^1.11)))^2 if Re[i] > 2.3*10^3
                otherwise
                    try
                        64/Re[i]
                    on error
                        64/10^-10
        γ ← vectorize(8/(π^2*d^4*g))
        factors ← vectorize((f[0]*L_over_d[0] + k[0])*γ[0]/vectorize(vectorize(vectorize(f*L_over_d) + k)*γ))
        root_root_factors ← vectorize(factors^0.25)
        q_factor ← Q/(root_root_factors*root_root_factors)
        new_q ← vectorize(sqrt(factors)*q_factor)
        Δq ← vectorize((new_q - q)/new_q)
        ζ ← Δq*Δq
        LoopFlag ←
            41 if ζ < ε
            otherwise
                q ← new_q
                LoopFlag + 1
    new_q
# Calculate Some Ratios
# Initial Flow Rate Guess for Each Pipe
# Determine f
# Determine the cross sectional areas
# Determine g
# Loop until q = new_q
# Determine the velocity
# Determine the Reynolds number
# Determine new_q_s
# Determine change
# Determine Percent Change
# Calculate the flows in the legs of the pipe assembly.
PipeFlows := ParallelPipeFlow(Q, ν, lengths, diameters, ξ, k, ε)
PipeFlows[0] = 2.39395e-8 m^3/s
PipeFlows[1] = 1.2121e-8 m^3/s
PipeFlows[2] = 2.39395e-8 m^3/s
i := 0 .. 2
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# This 2D bar chart shows the flow (in mm^3s^-1) in each leg of the parallel branch circuit.
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