# Title: Controls and Automation
# Description: Using Mathsoft controls to demonstrate Automation within Scriptable Object components.
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# PROGRAMMING
# quicksheets
# Controls and Automation
# In this worksheet, Mathsoft controls are used to demonstrate Automation within Scriptable Object components.
## Example 1: Worksheet Settings
# This button turns Automatic Calculation on and off. Click the button and then inspect the state of this setting under Calculate on the Tools menu.
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# This script in the Click event subroutine does the work:
# Sub PushBtn_Click()
# If state = 0 Then
# state = 1
# PushBtn.Flat = 1
# PushBtn.Text = "Auto Calculation is OFF"
# Worksheet.SetOption mcAutocalc, False
# Else
# state = 0
# PushBtn.Flat = 0
# PushBtn.Text = "Auto Calculation is ON"
# Worksheet.SetOption mcAutocalc, True
# End If
# PushBtn.Recalculate()
# End Sub
# The Worksheet object supports a SetOption method, an option of which is enabling and disabling Automatic Calculation.
# Other worksheet actions you might want to automate in a button include printing a worksheet, recalculating a worksheet, and saving a worksheet.
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## Example 2: Worksheet Properties
# These text fields retrieve and display worksheet properties:
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## Worksheet Name
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## Worksheet Path
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## Worksheet Full Name
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## Worksheet Application
# Application properties can also be retrieved, such as version and default file path, and window properties can be set and retrieved.
## Example 3: Getting and Setting Values
# These buttons get and set values of worksheet variables. Input and Output values are what allow a scripted component to interact with a Mathcad worksheet's calculations.  By associating a component or control with input and output values, you define its place in the calculation order of the worksheet, and notify it to recalculate when input values change, as well as notify the worksheet when to update the output values.  It is therefore important that you assign input and output values to any component that will use these worksheet variables, even if you access the value of the variable through Mathcad's Automation interface using GetValue or SetValue methods.
input := 20
# [component: inputs input; outputs x]
# Click this button to give x the value of input; x's value does not update until the button is clicked. Then, change the value of input and click the button again.
x = 0
# [component: inputs x; outputs output]
# Click this button to give output the value of x, which is an Input Variable of the control. Then, change the value of input, above, click Get Value, then click Set Value.
#
# When you first open the worksheet, output2 is undefined, since it is only set by the SetValue button. If you change the value of input and then click Set Value before clicking Get Value, output does not change.
output2 =  # error: This variable is undefined.
output = "done"
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