# Title: Mathsoft Controls: Fitting a Model Function to Data
# Description: Using Mathsoft Controls to control user input.
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# PROGRAMMING
# quicksheets
# Mathsoft Controls: Fitting a Model Function to Data
# You can use this worksheet to test how well your data is modeled by a linear, quadratic, or exponential function.
# Step 1: Enter your data in the table below or import it from a file by right-clicking on the table and choosing Import from the menu.
# [component: outputs data]
# Step 2: Choose the model that you think best fits your data.
# [component: outputs sel1]
# [component: outputs sel1]
# [component: outputs sel1]
# Step 3: If you selected the exponential fit, please provide guess values for the parameters, a, b, and c, in the model function, y == a*e^(b*x) + c.
# [component: outputs a]
# [component: outputs b]
# [component: outputs c]
# [area: fit calculations]
X := data[:, 0]
Y := data[:, 1]
# Linear Fit | Quadratic Fit | Exponential Fit
int := intercept(X, Y)
k := 2
A := if(a == "", 0, a)
B := if(b == "", 0, b)
m := slope(X, Y)
z := regress(X, Y, k)
C := if(c == "", 0, c)
F(x) := int + m*x
G(x) := interp(z, X, Y, x)
guess := [A; B; C]
z = [3; 3; 2; 1.5; 0.1; 0.5]
E := expfit(X, Y, guess)
H(x) := E[0]*e^(E[1]*x) + E[2]
fit(x) := if(sel1 == 1, F(x), if(sel1 == 2, G(x), H(x)))
param_a := E[0]
param_b := E[1]
param_c := E[2]
a := if(sel1 == 1, int, if(sel1 == 2, z[3], E[0]))
b := if(sel1 == 1, m, if(sel1 == 2, z[4], E[1]))
c := if(sel1 == 1, "NA", if(sel1 == 2, z[5], E[2]))
# Step 4: View the data and your fit on the same set of axes. How well does the model you have chosen seem to fit the data?
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a = 2.04276
b = 0.419618
c = -0.993274
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