# Title: Minimizing Data Table Reading Error
# Description: Using Mathsoft Controls to prevent user error.
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# PROGRAMMING
# quicksheets
# Minimizing Data Table Reading Error
## Typical Thickness Ranges for Different Classes of Thermoplastics
# This example reads in a data table of plastic types and an associated low and high value for typical wall thicknesses. It assigns the row labels (plastic names) to a list, making it easy for the user to choose one. It then assigns the low and high thickness values to the minimum and maximum of a slider, so this range can be used in subsequent calculations.
# [component: outputs Plastics]
Plastics = ["ABS", 0.045, 0.14; "Acetal", 0.03, 0.12; "Acrylic", 0.025, 0.15; "Liquid-Crystal", 0.008, 0.12]
# [component: inputs Plastics; outputs [Material; index]]
# Nominal wall thickness working range:
# [component: inputs index; outputs thickness]
Material = "No selection"
thickness = 0
index = "No selection"
# Note that this process takes the error out of reading the paper table correctly (easy to jump lines) and makes the whole range of permissible values available for calculations and design optimization, not just a single value. If there were more columns with other data, or column labels, you could add a list containing the other available properties, assign the correct column number to each, and allow those to be output as well. If you examine the original data file, you see it has a header that specifies the source of the data, which has been successfully excluded from import using Properties from the menu.
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