# Title: Mathsoft Controls: Quiz Template
# Description: Using Mathsoft Controls to create a quiz in a worksheet.
# Worksheet setting: ORIGIN = 1
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# PROGRAMMING
# quicksheets
# Mathsoft Controls: Quiz Template
# Use this template to create a 5-question multiple choice quiz. The questions use radio button groups to collect user responses. The quiz is graded using a push button that checks the user responses against the correct answers. The controls and supporting math regions have been commented to allow you to modify the template to your liking. Delete these comments when distributing this file.
## Sample Quiz
# Answer all five questions and then check yourself at the bottom of the page.
# Question 1: Which of these numbers is NOT rational?
# [component: outputs Q1]
# Each of these radio button controls uses the default script and returns its button number if selected. Their scripts are all identical. Get to the script by right clicking the control and choosing Edit Script.
# [component: outputs Q1]
# [component: outputs Q1]
# They also have hidden arguments that can be revealed by right-clicking the control and choosing Show Arguments. Notice that each button is defined as the same variable, Q1. So, Q1 gets the value of the button selected, or it gets the value 0, if none are selected.
# [component: outputs Q1]
# Each set of radio buttons is also keyed to its group. To see the group and number of the radio button, right click the component and choose Mathsoft Button Control Object > Properties.
# All the radio buttons have as their "text" bitmaps that are pasted into the region. To do this, simply create a region that contains what you want to appear on the radio button - math, text, whatever, including all the formatting you want. Copy that region to the clipboard. Then, right click the control and choose Mathsoft Button Control Object > Paste Bitmap.
# All of the radio groups below work in exactly the same manner. Go down to the hidden region, below, and the button that checks the answers entered by the user.
# Question 2: How many rational numbers are there?
# [component: outputs Q2]
# [component: outputs Q2]
# [component: outputs Q2]
# [component: outputs Q2]
# Question 3: Select the number in this list that is not in numerical order.
# [component: outputs Q3]
# [component: outputs Q3]
# [component: outputs Q3]
# [component: outputs Q3]
# Question 4: Which of the following fractions is equal to
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# ?
# [component: outputs Q4]
# [component: outputs Q4]
# [component: outputs Q4]
# [component: outputs Q4]
# Question 5: Which statement is true?
# [component: outputs Q5]
# [component: outputs Q5]
# [component: outputs Q5]
# [component: outputs Q5]
# All of these regions can be collapsed and hidden in an area below all the radio button groups. Essentially, this is an answer key that shows which button should be clicked in each grouping.
Q1 = 0
Q1Ans := 1
Q2 = 0
Q2Ans := 3
Q3 = 0
Q3Ans := 3
Q4 = 0
Q4Ans := 4
Q5 = 0
Q5Ans := 4
Q1Right := Q1 == Q1Ans  # These are the comparisons.
Q2Right := Q2 == Q2Ans
Q3Right := Q3 == Q3Ans
Q4Right := Q4 == Q4Ans
Q5Right := Q5 == Q5Ans
# This is the vector that stores which questions were answered right and wrong.
RightAnswers := [Q1Right; Q2Right; Q3Right; Q4Right; Q5Right]
RightAnswers = [0; 0; 0; 0; 0]
# [component: inputs RightAnswers]
# This button takes the vector above as input and then outputs a popup window with a statement about which questions were answered right and wrong. To examine the script, right-click the component and choose Edit Script.
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