# Title: Buckyballs: Using the MATLAB Component
# Description: Using the MATLAB component in Mathcad.
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# MATHCAD AND OTHER APPLICATIONS
# quicksheets
# Buckyballs: Using the MATLAB Component
# This QuickSheet illustrates the use of a Matlab^(®) component. It only computes if you have MATLAB Professional v.4.2c or higher loaded on your computer.
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# Buckyballs (formally known as carbon-60) are hollow molecules that consist of sixty carbon atoms arranged in a soccer-ball-like structure and joined by a mixture of single and double chemical bonds. On this picture, red bonds around each pentagonal face are single bonds; yellow bonds are double bonds.
# Due to its all-carbon structure and extraordinary chemical stability, carbon-60 has often been referred to as the third major form of pure carbon, after diamond and graphite.
# The sixty carbon atoms in carbon-60 are located at the vertices of a truncated icosahedron. In order to obtain a truncated icosahedron, we do as the name suggests: truncate a regular icosahedron, as shown on the figure below:
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# The result is a soccer-ball-like structure, which is identical to that of a buckyball molecule. The "flattened" view (which mathematicians call a graph, while chemists who use it to visualize complex molecules often call the Schlegel diagram) is shown below:
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# Note that all sixty nodes (carbon atoms) on the Schlegel diagram above were given a unique number from one to sixty. This allows us to readily construct an adjacency list corresponding to this diagram, which enumerates pairs of nodes (atoms) which are connected by lines (edges of the truncated icosahedron - or, in the case of a buckyball, chemical bonds).
# We use two instances of the Mathcad Data Table component to assign pre-defined connectivity list and pre-calculated XYZ coordinates corresponding to each node (atom) to Mathcad variables Connect and Coord, respectively.
# [component: outputs Connect]
# [component: outputs Coord]
# Since we'll want to look at our buckyball drawing from different viewpoints, let us filter the coordinates through a rotation matrix, R. The matrix, R, carries out rotation by φ around the z-axis, followed by rotation by θ around a horizontal axis.
R := [cos(θ), -sin(θ), 0; sin(θ)*cos(φ), cos(θ)*cos(φ), -sin(φ); sin(θ)*sin(φ), cos(θ)*sin(φ), cos(φ)]
Coord := Coord*R
# A drawing of the buckyball can now be constructed using Matlab's sparse matrix capabilities and the associated gplot ("graph-theoretical plot") plot type.
# [component: inputs [Connect, Coord]]
# Vertical axis
# rotation angle:
φ ≡ 20*deg
# Horizontal axis
# rotation angle:
θ ≡ 0*deg
# Tip: Double-click on the Matlab component to inspect the script implementing the functionality of this example. Alternatively, you can right-click on the component and choose Edit Script from the menu.
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