# Title: Scripting LabVIEW: Frequency Response
# Description: Using LabVIEW with Mathcad.
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# MATHCAD AND OTHER APPLICATIONS
# quicksheets
# Scripting LabVIEW: Frequency Response
# This example demonstrates Mathcad driving LabVIEW as an ActiveX Server through the Mathcad Scriptable Object Component. This example allows modeling and fitting of the simulated data from the FreqResp.exe NI example.
#
# The parameters for testing the frequency response are:
# "Number of Steps"
# "Low Frequency"
# "High Frequency"
#
# These are set in Mathcad and passed to LabVIEW via the LabVIEW API. The Front Panel is displayed as the VI is executed. The resulting data set is brought back into Mathcad via the LabVIEW API and plotted alongside the Mathcad calculated result for comparison.
steps := 25
Flow := .1
Fhigh := 5*10^4
VIname := "\examples\apps\freqresp.llb\Frequency Response.vi"
# Note: If you change the name of the VI to use for acquisition, you may have to modify the script as well, to accept different numbers, names or types of inputs. Right-click on the button below and choose Edit Script.
# [component: inputs [VIname, steps, Flow, Fhigh]; outputs data]
# Data is acquired by the LabVIEW VI (in this case, simulated from a frequency generator), and returned to the variable data.
# The following data table contains a sample data set for illustrative purposes. If you have LabVIEW, disable this definition of data before you acquire data from the VI.
# [component: outputs data]
min(data) = -119.532
# Test frequencies on the x-axis:
F := logspace(Flow, Fhigh, steps)
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# Now you can create an interpolation function.
G(x) := interp(pspline(F, data), F, data, x)
pts := 1*10^3
j := 0 .. pts
x[j] := Flow*(Fhigh/Flow)^(j/(pts - 1))
# The interpolation can be used to find estimates of the poles of this transfer function.
# gives the maximum, hence the value of the first pole
p1 := root(d/dx(G(x)), x, 10, 40)
p1 = 21.2096
# To find the second pole, find the derivatives (slope) along the interpolated curve, and look for the frequency at which the difference between subsequent slopes is greatest.
deriv := vectorize(d/dx(G(x)))
k := 0 .. 200
# Start the search near where you expect the second pole to be:
offset := 500
x[offset] = 71.1766
Δslope[k] := deriv[k + offset] - deriv[k + offset + 1]
TOL := 10^-10
# Return the value of the frequency corresponding to the maximum entry in the derivative difference vector:
p2 := x[match(max(Δslope), Δslope)[0] + offset]
p2 = 211.751
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# Note: If you wish to create a particular type of interface to a particular LabVIEW VI, you could then export the scripted component for easy reuse inside Mathcad. Right-click on the component, and choose Export Component. Follow the wizard panels to create the .MCM file. This file can be sent to other Mathcad users, then registered by double-clicking on it on the new client machine, at which point it appears on their Insert > Component menu. See the Developer's Reference under Help for more information.
# If you need customized solutions like this one, but don't have the time or expertise to create them yourself, contact your Mathcad Sales and Services representative for information on contracting this work. If you do not know your sales representative contact PTC at http://www.ptc.com/company/contacts/index.htm.
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