# MATHCAD AND OTHER APPLICATIONS
# Vbasic: Beam Deformation
# Analyze the deformation of a beam of given length and cross-section under a point force F. The beam is supported at both ends, and a load is applied to it.
ksi := 1000 psi
L := 3 ft  # Length of beam
W := 0.2 in
H := 0.15 in  # Width and height of beam
a1 := 1 ft  # Position of applied point force
F := F*lbf  # Input load from form.
# Modulus of  elasticity:
E := 2.9*10^7*lbf/in^2
# Moment of inertia
I := W*H^3/12
# Distance to neutral axis:
c := H/2
c = 0.001905 m
# Area of cross-section:
Area := W*H
Area = 1.93548e-5 m^2
# Points along the beam:
i := 0 .. 50
x[i] := i*L/50
# Deflection at any point of the beam:
y[i] := F*((L - a1)*(x[i]^3 - a1*(2*L - a1)*x[i]) - if(x[i] > a1, L*(x[i] - a1)^3, 0L^4))/(6*L*E*I)
# Point of maximum deflection:
xmax := sqrt(a1*(2*L - a1)/3)
ymax := F*(L - a1)*(xmax^3 - a1*(2*L - a1)*xmax)/(6*L*E*I)
# Stress and bending moment:
M[i] := F*(L - a1)*x[i]/L - if(x[i] > a1, F*(x[i] - a1), 0*F*1L)
Mmax := F*(L - a1)*a1/L
Mmax = 0.903879 C^2
S[i] := M[i]*c/I
Smax := Mmax*c/I/ksi
# Max stress:
Smax = 10.6667 F
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