# Title: Extra Math Symbols
# Description: Characters from the Symbol and extended Times New Roman fonts for use as operators or in naming functions.
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# MATH SYMBOLS
# quicksheets
# Symbols
# This QuickSheet provides characters from the new Mathcad UniMath font, which can be reused for operators or user-defined functions. You can switch the math fonts to other fonts, by clicking on a character and changing the font. These characters can be used in math or text.
# To find and add other special characters:
# 1.  Open Character Map in your Programs > Accessories > System Tools. Choose Mathcad UniMath. If you check the Advanced view box, you can type in the name of special characters, such as "subset."
# 2.  Select and copy the character you want to use.
# 3.  In Mathcad, choose Paste Special from the Edit menu, then choose "Unformatted Text as Math" if you want to use the character in math, or just copy it into your text.
# °C | °F | || | /°F | /°C | ∑ | ∏
# ∀ | ∃ | ℒ | Å | ∝ | ∅ | ƒ
# ⊆ | ⊂ | ∩ | ∪ | ⊃ | ⊇ | ∈
# ∉ | × | ∝ | ⊄ | ≈ | ÷ | ±
# ∟ | ∢ | ∠ | ∡ | ⊗ | ⊕ | ⊙
# £ | ¥ | $ | € | ¢ | ¤ | ￦
↔
←
→  # ↑  # ↓  # ⇔  # ⇐
# ⇒ | ⇑ | ⇓ | ↵ | ‡ | ↨ | ↡
# ↔ | ↞ | ↠ | ↛ | ↚ | ↤ | ↦
# È | Æ | ℘ | ℑ | ℜ | ö | ð
# ℵ | Þ | Ð | ϒ | Œ | ℤ | ℧
# ♣ | ♥ | ♠ | ♦ | ¹ | ² | ³
# ▬ | ↺ | ↶ | ∂ | ∙ | √ | ∶
# ∦ | ∓ | ∐ | ∉ | ∈ | ∋ | ∎
# ⊣ | ⊤ | ⊥ | ⊦ | ⊨ | ⊪ | ⊫
# ⊲ | ⊳ | ⊶ | ⊷ | ⊹ | ⊿ | ⊾
# You can see all math symbols available or print them out from Mathcad-UniMath.
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