# Title: Program Debugging
# Description: New features to help debug Mathcad programs. Mathcad Trace Window.
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# FEATURES IN-DEPTH
# tutorials
# Program Debugging
## trace("format string", x, y, z, ...)
## pause("format string", x, y, z, ...)
# Mathcad provides a Trace window and functions that report values of local variables as programs are run. To see program debugging, make sure your Trace window and Debugging toolbar are visible and that debugging is toggled on. If the Trace Window is not visible at the bottom of your main Mathcad window, choose Trace Window from the View menu. If the Debugging toolbar is not already visible in your toolbars at the top of the Mathcad window, choose Debug from the View > Toolbars menu.
# Debugging can be toggled on and off, so that it only generates expressions in the Trace Window when you want them. Turn debugging on by pressing the Toggle debug mode button on the debugging toolbar.
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# Toggle debug mode
# Step | View Trace Window
# Pause / Stop
# You can also toggle debug mode using the new Tools > Debug menu pick.
## Tracing Values
# Copy the program below into a blank worksheet, click in the program, and, with debugging on, type equals to evaluate the program. The value of x is shown along with sequential values of x in the Trace Window as the program goes through the loop. The program executes to the end and returns a value in the worksheet regardless of whether debug mode is on or off.
x ← 0
for i ∈ 1 .. 5
    x ← i^2 + x
    trace(x)
return x
# Note: To reposition the Trace Window without docking it on the bottom or side of the Worksheet window, press [Ctrl] while you drag the window.
# Vectors and matrices reported to the Trace Window are preceded by a label, "vector" or "matrix," and the number of elements in curly braces. The first two entries and the last entry of vectors are printed in square brackets as a comma-separated list of numbers. The first and last rows of matrices are printed in the same format.  Copy, paste, and evaluate the program below to see this syntax.
for i ∈ 0 .. 5
    for j ∈ 0 .. 5
        M[i, j] ← i*j
    trace(M)
return |M|
# You can return individual array values by supplying the index(ices) to the traced expression.
for i ∈ 0 .. 5
    for j ∈ 0 .. 5
        M[i, j] ← i*j
    trace(M[i, j])
return |M|
## Labeling Traces
# The trace function can take an optional string argument. This argument is used to label the traced output, and also to specify dimensional scaling. Using the first example above, label the output as a variable called x:
x ← 0
for i ∈ 1 .. 5
    x ← i^2 + x
    trace("x = {0}", x)
return x
# Copy, paste, and evaluate this program to see the traced output.
# Notice the curly-braces around a 0 at the end of the trace string. This notation tells the Trace Window where to put the value of the traced variable, x, in the string. You can trace multiple values, and refer to them in different places in the output string.
x ← 0
for i ∈ 1 .. 5
    x ← i^2 + x
    trace("x = {0}, i = {1}", x, i)
return x
# Values with units are scaled to the base SI units. You can force scaling in the arguments to the trace function as follows:
x ← 1*ms
for i ∈ 1 .. 5
    x ← x + i/100*sec
    trace("For iteration {1}, x = {0} ms", x/ms, i)
return x
# The string formatting is optional in the case of a single argument to trace, but if you print multiple values to the trace window, you must begin with a string argument and specify the order in which to return them.
## Pausing
# In addition to tracing, you can also pause program execution on the calculation of a particular value and report that value in the Trace Window. The calculation pauses and suspends all operations in the worksheet. At that point you can resume calculation by pressing the Resume button on the Debugging toolbar or abort the calculation using the Interrupt button (equivalent to pressing [ESC]).
# Copy, paste, and evaluate the following program to see the pause function in action.
for i ∈ 0 .. 3
    v[i] ← i
    pause("The value = {0}", v)
return |v|
# Resuming the calculation continues processing the program until the pause is executed again.
## Copying and Clearing the Trace Window
# The Trace Window has several right-click choices. Because it is a text window, the information in the window can be copied and pasted into other applications. You can either copy and paste with the mouse and keyboard, or you can right-click on the window. The resulting menu lets you select everything in the window, copy all, or clear all.
## Debugging Functions in Iteration Functions
# The trace and pause functions work at the worksheet level as well as in programs. The same rules apply either way about turning debug mode on and off and using the controls to continue or halt execution of a pause statement.The debug functions return 0.
x := 2
trace(x) =  # no stored result
# If you put a trace statement as the last line in a program, the program returns 0.
for i ∈ 0 .. 3
    x[i] ← i
    trace(x) =  # no stored result
# If you trace values inside an iterative function, such as a solver, the values will be returned each time the enclosing function iterates. Copy, paste, and evaluate the following function and root solution to see the value of x calculated on each iteration until the root converges.
f(x) :=
    trace(x)
    x^2 - 4
root(f(x), x, 0, 5) =  # no stored result
# This technique works with any iterative solver, including Solve Block functions specified with bold equals. If you wish to record the value of each iteration, you can copy the results of the trace window or put an APPENDPRN function call into the definition of f(x).
## Format Function
# The trace and pause functions make use of the format function to construct the strings they return. The format function is also available as an alternative to the concat function, when you wish to string together multiple values with surrounding text.
t1 := 23456*sec
hrs := floor(t1/hr)
mins := floor((t1 - hrs*hr)/min)
secs := floor((t1 - hrs*hr - mins*min)/sec)
Label := format("The decay time is {0} hours, {1} minutes, {2} seconds", hrs, mins, secs)
Label =  # no stored result
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