# Title: Explicit Calculation
# Description: Performing symbolic calculations with the new explicit keyword.
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# FEATURES IN-DEPTH
# tutorials
## Explicit calculation
## Keyword explicit
# The keyword explicit can be used in symbolic calculations to return expressions with the values of variables in place, but without reducing numerical expressions. For example,
a := 30.7*m
b := 5.8*sec
c := 2.36*m/sec
a/b + c explicit, a, b, c → 30.7*m/(5.8*sec) + 2.36*(m/sec)
# This is a way to show intermediate values in place before arriving at a full numerical result. You might use
a/b + c explicit, a, b, c → 30.7*m/(5.8*sec) + 2.36*(m/sec) =  # no stored result
# Instead of just
a/b + c =  # no stored result
# so that all substituted values for the variables a, b, and c are visible along with the result of the computation.
## Excluding Substitutions
# The keyword is entered just like any symbolic keyword, either by typing it in the placeholder for the symbolic keyword operator, [Ctrl] [Shift] [.], or entering it from the toolbar. The explicit keyword has modifiers that allow you to specify which variables receive substitution if assigned:
a/b + c explicit, a → 30.7*m/b + c
# You can use as many or as few modifiers as you wish.
a/b + c explicit, a, b, c, d → 30.7*m/(5.8*sec) + 2.36*(m/sec)
# Names not appearing in the calculation are ignored. Using all the variable names substitutes all variables. Using no modifiers has the same effect as redefining variable names before other types of symbolic calculations:
a/b + c explicit → a/b + c =  # no stored result
a/b + c → (7.65310344828*m)/sec
# In order to do this without the keyword,
a := a
b := b
c := c
a/b + c → c + a/b =  # no stored result
# You can use explicit to display formulas in terms of variables, without substituting values for the variables defined elsewhere in the worksheet. For example,
f(x, y, z) := tan(z) + x/y
x := 2
y := 3
z := π
f(x, y, z) explicit, f → tan(z) + x/y
## Chaining Evaluations
# You can use the explicit keyword and its modifiers chained with other symbolic keywords and evaluations, just as you can with other symbolics operations. The settings persist throughout the calculation.
a/b + c explicit, a → 30.7*m/b + c float, 2 → c + (31.0*m)/b
# or
a/b + c explicit, b; float, 2 → c + (0.17*a)/sec
# or
B := a/b + c explicit, b, c → a/(5.8*sec) + 2.36*(m/sec)
B =  # no stored result
# are all valid, as is
a/b + c explicit, b → a/(5.8*sec) + c =  # no stored result
# In this way, explicit calculation is used to revert to the named value of variables in symbolic computations without redefining the variables. Once the value has been masked, you can proceed with a multi-step symbolic or symbolic/numeric computation while treating some variables as names and some as their numeric assignments.
## Substituting Values Dependent on Previous Values
# You can chain definitions, but you have to include the whole sequence of variables to substitute all values, for example
a := 2
b := 3
c := a + b
c/a explicit, c → (a + b)/a
c/a explicit, c, a, b → (2 + 3)/2
# You can make the value of c show up as a single number by symbolically evaluating it in its definition, for example
c := a + b → 5
c/a explicit, c, a → 5/2
# This can be more complex when there are other operators involved, for example:
d := sqrt(c)
d/a explicit, d, c → sqrt(5)/a
# So, if you want to replace the square root of c with the numeric value, you'll have to choose which symbolic representation you want for d:
d1 := sqrt(c) → sqrt(5)
d2 := sqrt(c) float, 6 → 2.23607
d1/a explicit, d1, c → sqrt(5)/a
d2/a explicit, d2, c → 2.23607/a
## Display Options
# When using these symbolic results in reports, you can choose to hide or change the display of the operators and keywords. For example,
q := 56.234
r := 45
q/r explicit, q, r → 56.234/45 =  # no stored result
# The expression above has its keywords hidden and the display of the symbolic equals changed to =. Click on the expression to see the original form. All symbolic equations that use the explicit keyword can have these switches set by default.
# To modify the appearance of any symbolically evaluated region, right-click on the left-hand side. The menu options allow you to hide the keywords or the entire left-hand side. A submenu for View Evaluation As lets you replace the symbolic evaluation arrow with an equals sign, just as you can with definitions and global definitions.
# These options allow you to construct expressions such as the following:
F1 := 2.987*N
A1 := 5.78*m^2
F1/A1 explicit, F1 → 2.987*N/A1
F1/A1 explicit, F1, A1 → 2.987*N/(5.78*m^2)
F1/A1 float, 4 → (0.5168*N)/m^2 =  # no stored result
# Click on each expression above to see how it was set up.
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