# Title: Solving Equations and Systems
# Description: Using Mathcad to solve single equations and systems of equations.
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# FEATURES IN-DEPTH
# tutorials
# Solving Equations and Systems
# Learn both numeric and symbolic methods for solving single equations and systems of equations.
## Solving Equations Symbolically
# Using the Symbolic Equal Sign with the Keyword "solve"
# Using the Symbolics Menu
# Comparing the Two Methods
## Solving Equations Numerically
# Using the root Function
## Systems of Equations
# Solving Two Equations by Setting Them Equal to One Another
# Using a Solve Block
# Tip: The exercises in this tutorial require you to work within the Worksheet window. To copy the contents into the Worksheet window, choose Select All from the Edit menu. Then, either drag or copy and paste all the regions into your Worksheet window. Finally, click in the Worksheet window to complete the tasks below.
# Before you start, size the Resources window and your Worksheet window so they are side-by-side on your desktop.
## Solving Equations Symbolically
# When you solve an equation symbolically, you see the results in terms of variables and mathematical symbols. Seeing results in symbolic form can often give more insight into a problem than simply looking at numerical results. You can easily convert symbolic results to numerical ones as needed.
# There are two ways to solve an equation symbolically:
#
# •  Use the symbolic equal sign (→) with the keyword "solve." We  recommend this method because the results are "live" and update with changes you make above the equation in the worksheet.
#
# •  Select Variable > Solve from the Symbolics menu. In this case, the results are not automatically updated.
## Using the Symbolic Equal Sign with the Keyword "solve"
# 1.  In your worksheet window, type the equation using the Boolean equal sign. To do so, type [Ctrl] [=] or click the Equal To button on the Boolean toolbar.
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# 2.  Click anywhere in the equation and press [Ctrl] [Shift] [.] to insert a placeholder followed by the symbolic equal sign.
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# 3.  Type the keyword "solve" in the placeholder and press [Enter] to see the result displayed.
x^2 - 4 == 21 solve → [-5; 5]
# Note: If the equation contains more than one variable, you must also type a comma after "solve" and then type the variable you want to solve for in the placeholder that appears.
## Using the Symbolics Menu
# Another way to evaluate an expression symbolically is to use the Symbolics menu. However, in this case results are not automatically updated when you make changes elsewhere in the worksheet.
# 1.  In your Worksheet window, type the equation you want to solve using the Boolean equal sign. To do so, type [Ctrl] [=] or click the Equal To button on the Boolean toolbar.
# 2.  Select just the variable you want to solve for by clicking on it. Note: Do not select the entire expression.
# 3.  Choose Variable > Solve from the Symbolics menu.
## Example
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# Click the x and then select Variable > Solve from the Symbolics menu.
x^2 - 4 == 21
[5; -5]
# Therefore both 5 and -5 are solutions to the equation.
## Comparing the Two Methods
# •  If the equation you want to solve depends on variables defined above it in the worksheet, and you plan to update the values of the variables in the future, then you should use the symbolic equal sign with the keyword "solve."
#
# •  If you do not want to display the symbolic equal sign or the keyword "solve," and you do not plan to update the values of variables in the worksheet, you can use Variable > Solve from the Symbolics menu.
## Example
# Suppose you want to solve the following quadratic equation, with coefficients a, b, and c, for the variable z.
a*z^2 + b*z + c == 0
# Since Mathcad assumes that a, b, c, and z are all variables, you must specify the variable you want to solve for as follows:
# 1.  Place the cursor after the c in the equation above and click solve on the Symbolic toolbar to insert the keyword "solve" followed by a placeholder.
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# 2.  Type z in the placeholder and press [Enter].
a*z^2 + b*z + c solve, z → [-(b/2 - sqrt(b^2 - 4*a*c)/2)/a; -(b/2 + sqrt(b^2 - 4*a*c)/2)/a]
# Mathcad returns the solutions symbolically using the quadratic formula. Now, suppose you want to solve the same equation for the following  values of the coefficients a, b, and c:
a := 2
b := 3
c := 1
# Note that defining these values for a, b, and c does not affect the preceding solution, because the variables are defined below the solution in the worksheet. However, if you retype the left side of the preceding solution below the definition of a, b, and c, Mathcad solves the equation for those values:
0 == a*z^2 + b*z + c solve, z → [-1/2; -1]
# If you later change the value of a, b, or c anywhere above this expression in the worksheet, Mathcad updates the solution accordingly.
## Solving Equations Numerically
# If you want a numerical solution to an equation, or if the equation has no symbolic solution, you can solve it using the root function.
## Using the root Function
# To solve an equation using the root function:
# 1.  Define a guess value for the unknown variable. You can use a graph to estimate the values of the solutions.
# 2.  Type the root function where the first argument is an expression equal to zero and the second argument is the unknown variable.
## Example
# Solve the equation sin(x) == (x + 1)/10.
# It is a good idea to first plot the two functions to see approximately the number of times they intersect:
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# Tip: To plot these functions, type:
# sin(x),x+1[space]/10@[Enter]
# Double-click the graph to add gridlines if you want to make it easier to see where the roots are.
# From the plot it looks like there are seven places where the two expressions are equal - the seven places where the blue line crosses the red sine curve. Use root to find these intersections.
# The root function looks for places where an expression is equal to zero. So, first rearrange the equation into the form "something = 0."
sin(x) - (x + 1)/10 == 0
# The root function finds only a single solution. Since there are actually seven solutions, you must indicate which one you are looking for. Do this by defining a guess value for the solution. Even if there's only one solution, root requires a guess value to get it started. First try to find the largest solution. From the graph it looks like it's around x == 9, so use this guess:
x := 9
root(sin(x) - (x + 1)/10, x) = 8.24504
# Use a different guess value for x to try to find the smallest solution.
x := -9
root(sin(x) - (x + 1)/10, x) = -8.56659
## Solving Systems of Equations
## Solving Two Equations by Setting Them Equal to One Another
# To solve two equations by setting them equal to each other:
# 1.  Type the two equations that make up the system using the Boolean equal sign. Type [Ctrl] [=] or click the Equal To button on the Boolean toolbar.
# 2.  Solve each equation using the symbolic equal sign with the keyword "solve."
# 3.  Set the two solutions equal to one another using the Boolean equal sign.
# 4.  Solve for the remaining variable by clicking on any instance of it in the equation and choosing Variable > Solve from the Symbolics menu.
## Example
# Solve the following system of two equations and two unknowns:
x^2 + 2*y == 6
2*x + y == 3
# First, solve each equation for the variable y by clicking at the end of the equation, then click solve on the Symbolics toolbar and type the variable y in the placeholder that appears after "solve."
x := x
# Typing x := x and y := y prevents the Symbolic Processor from using the numeric values of x and y defined earlier in this worksheet. It does not change the numeric values of these variables.
y := y
x^2 + 2*y == 6 solve, y → 3 - x^2/2
2*x + y == 3 solve, y → 3 - 2*x
# To avoid retyping these solutions, you can copy and paste the two results setting them equal to each other with a [Ctrl] [=].
3 - 1/2*x^2 == 3 - 2*x
# Click at the end of the equation and solve the equation by clicking on the keyword "solve" from the Symbolic toolbar.
# Finally, set the two solutions equal to each other using the Boolean equal sign and solve this equation using the keyword "solve":
3 - 1/2*x^2 == 3 - 2*x solve → [4; 0]
# The empty placeholder that may appear is for modifiers. If it is not needed, then just backspace over it. You can read about keyword modifiers in Online Help.
# To graph the original two equations and their solutions:
#
# 1.  Define a range variable x over which to plot the two expressions.
x := -10, -9.9 .. 10
# 2.  Type [@] to create a blank graph, then insert x into the x-axis placeholder.
# 3.  In the y-axis placeholder, type the first expression, followed by a comma, then the second expression.
# 4.  Double-click the graph to add gridlines.
# The two points where the graphs intersect are the two solutions to the system of equations.
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## Solving a System of Equations Using a Solve Block
# A Solve Block can be used to solve any solvable system of equations with any number of equations and unknowns. Here are the steps for setting up a Solve Block:
# 1.  In your Worksheet window, define guess values for the unknown variables using a definition equal sign. To get the definition equal sign, type : (colon) or click the Definition button on the Calculator toolbar.
# 2.  Type given (as in "given these equations") as a separate math region.
# 3.  Enter the equations using [Ctrl] [=].
# 4.  Type Find, then enter all the unknown variables in parentheses following Find. Type [=] to get the results. For example, type Find(x,y,z)=.
## Example
# Solve the following system of three equations and three unknowns:
3*x + 4*y - 4*z == 2
-7*x + y + z == 5
6*x + 3*y - z == 0
x := 1
y := -1
z := 1  # Guess values
Given  # The word Given in a separate math region
3*x + 4*y - 4*z == 2
-7*x + y + z == 5  # The equations
6*x + 3*y - z == 0
Find(x, y, z) = [-0.521739; 1.11957; 0.228261]  # Find statement
# You can use the symbolic equal sign (→), by typing [Ctrl] [.], to display a result in a Solve Block. When using the symbolic equal sign, you do not need to supply guess values for the variables. You get an exact numeric result rather than a decimal result with your chosen degree of precision. Here's the same Solve Block, using → for the results.
x := 1
y := -1
z := 1  # Guess values
Given  # The word Given as a math region
3*x + 4*y - 4*z == 2
-7*x + y + z == 5  # The equations
6*x + 3*y - z == 0
Find(x, y, z) → [-12/23; 103/92; 21/92]  # Find statement
# It is useful to use the symbolic equal sign if you want a symbolic solution rather than a numeric one. Here's an example:
x := 1
y := -1  # Guess values
Given  # The word Given as a math region
a*x + b*y == 2
c*x + d*y == 5  # The equations using [Ctrl] [=]
Find(x, y) → [(2*d - 15)/(2*d - 3); 8/(2*d - 3)]  # Type Find(x,y)[Ctrl] [.] to display a symbolic result
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