# Title: Numbers and Precision
# Description: Complex numbers and numerical precision.
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# FEATURES IN-DEPTH
# tutorials
# Numbers and Precision
# This tutorial shows you how to change the format or precision of your results. It also shows you how to work with complex numbers.
# Number of Decimal Places
# To Copy Answers
# Significant Figures
# Scientific Notation
# Very Small and Very Large Numbers
# Imaginary and Complex Numbers
## Number of Decimal Places
# By default, Mathcad displays numerical results with three decimal places of precision. For example, if you type:
π = 3.14159  # Hint: To get π (in either a text region or a math region), type p and then press [Ctrl] G.
# To change the number of decimal places shown:
# 1. Choose Result from the Format menu to change the default for an entire worksheet or double-click on a result and use the dialog box to adjust the format for that result only.
# 2. Notice that Number of decimal places is set to three (3) places. Change this value. For example, if you change the number of decimal places to 5 for the result above, you see:
π = 3.14159
## Examples
# Here are a few examples. You can double-click each to see the decimal place setting.
sqrt(19) = 4.3589  # three decimal places
# Notice that Mathcad rounds the answer to the number of digits specified, with a maximum of 17 digits.
sqrt(19) = 4.3589  # seventeen decimal places
# Internally, the worksheet always calculates with 17 digits, so the maximum number of digits is seventeen.
## To Copy Answers
# One way to use answers in other calculations or definitions is to simply copy and paste:
# 1. Click on the answer.
# 2. Click the Copy button on the main toolbar or press [Ctrl] C to copy the displayed result into the clipboard.
# 3. Click in a definition, a calculation, or blank worksheet space and click the Paste button on the main toolbar or press [Ctrl] V.
## Example
sqrt(17) = 4.12311  # the answer
4.123  # copied and pasted
# But even though these two numbers look the same, they're actually different. When you copy an answer, you get only what is displayed. The worksheet stores the value of the answer on the left to 17 places, but the number on the right is 4.123, exactly.
# If you need to use an answer further down in the worksheet in a new computation or definition, assign it to a variable. That way other calculations carry the full precision of the number. For example, say you compute:
sqrt(17) + π/6 = 4.6467
# Then, later on you want to use this answer in another formula. Instead of copying 4.647, go back and assign that expression to a variable, like this:
r := sqrt(17) + π/6
r = 4.6467
# Now you can use the variable, r, wherever you need that answer, and the worksheet uses a value with all 17 digits of precision.
(r + 7)/50 = 0.232934
## Significant Figures
# Mathcad does not automatically handle significant figures. You have to manage them yourself by changing the number of decimal places on a result, as described above.
## Example
# Here's an example of how to manage significant figures. Suppose you need to find the density of a material. You've measured its volume:
vol := 11*cm^3
# You measure the mass and get:
mass := 23.57*gm
# Density is given by:
density := mass/vol
# Here is the result, based on this definition:
density = 2142.73 kg/m^3
# To get this result in grams per cubic centimeter, type gm/cm^3 in the units placeholder after the answer (see Using Units for more on using units).
density = 2.14273 gm/cm^3
# This answer shows four figures, but only the first two are significant, because you only know the volume to two figures. To display the correct number of figures, double-click on the answer and set the Number of decimal places to 1. The result has one place after the decimal point, or two figures altogether.
density = 2.14273 gm/cm^3
## Scientific Notation
# Scientific notation displays numbers as a base number multiplied by a power of ten. In the base number there should be one figure to the left of the decimal point, and the rest of the number should be to the right of it. For example, 101 would display as 1.01*10^2 in scientific notation.
# To enter a number in scientific notation:
# 1. Type the base number.
# 2. Then, multiply that number by the appropriate power of 10.
# 3. To enter a power of 10, say 10^2, type 10^2.
## Examples
# 101 is written | 1.01*10^2
# 1001 is written | 1.01*10^3
# 10001 is written | 1.01*10^4
# By default, small results are shown in decimal form and larger results in scientific notation.
## To display a result in scientific notation:
# 1. Click on the result and choose Result from the Format menu.
# 2. Choose Scientific in the Format section of the dialog box.
## To display a result in decimal format instead of scientific notation:
# 1. Click on the result and choose Result from the Format menu.
# 2. Choose Decimal in the Format section of the dialog box.
# Alternatively, you can change a result to decimal format or scientific notation by leaving General selected in the dialog box while increasing or decreasing the Exponential Threshold. A result is shown in scientific notation if the result is greater than the Exponential Threshold in the Result Format dialog box.
## Examples
# 1.
0.125 = 0.125
# Since this is a number relatively close to zero, neither very small nor very large, Mathcad does not automatically represent it in scientific notation. Double-click the result and choose Scientific in the Result Format dialog as described above and you see 1.25*10^-1.
0.125 = 0.125
# 2.
1324322 = 1324322
# Mathcad shows this result in scientific notation automatically. But some of the digits are not displayed. If they are all significant, change the Number of decimal places to 7:
1324322 = 1324322
# Or to see this result in decimal format, choose Decimal:
1324322 = 1324322
# 3.
30! = 2.65253e32
# If the integer has more than 17 digits, you won't see them when you type =, since no numerical answer is displayed to more than 17 places in a worksheet. But if you really want to see what 30! looks like, select 30!, and choose Simplify from the Symbolics menu:
30!
# simplifies to
265252859812191058636308480000000
# 4.
1*10^0/(1.212*10^7) = 8.25083e-8
# Remember that scientific notation is for expressing both very large and very small numbers. To get more or fewer digits of precision, increase or decrease this setting in the Result Format dialog.
## A Warning about Very Small or Very Large Answers
# When you expect an answer to be zero, you may see a very small number instead, like 4.56*10^-15. Or, when you expect infinity, you may see a large number like 10^307 (the largest number that Mathcad keeps track of). Always use common sense and recognize very small or very large numbers for what they are. Here is some more information about small and large numbers.
## Small Numbers
# Notice that on the Tolerance tab of the Result Format dialog box, the Zero Tolerance is set to 15 by default, but it can be any integer between 0 and 307. Zero Tolerance determines how small a number has to be before it is displayed as zero. For example, the default setting of 15 means that numbers smaller than 10^-15 are displayed as zero.
# The smallest number that can be displayed is 10^-307. Any number smaller than that will always be displayed as zero. Zero Tolerance is a global setting only. That means that it applies to all results in your worksheet, not just a single result. To set Zero Tolerance:
# 1. Click in a blank area and choose Result from the Format menu
# 2. On the Tolerance tab, increase or decrease the Zero Tolerance setting and click OK.
## Examples
10^-12 = 1e-12
# but
10^-30 = 1e-30
# Mathcad displays 10^-30 as 0 because the Zero Tolerance setting is 15, the default. If you need to know the actual value the program is using internally, click on the result, and choose Result from the Format menu. You can then change the decimal places to 17 to get the exact precision that Mathcad is using.
# The exact full precision value of numbers can be very important when comparing two numbers in a boolean expression.
## Large Numbers and Infinity
# The largest number that can be displayed is 10^307. You can also use infinity, ∞. To enter the infinity symbol, press [Ctrl] [Shift] Z. You can also find this symbol on the Calculus toolbar. The infinity symbol isn't much use in numerical calculations, since infinity isn't a number. In a worksheet, 10^307 and ∞ are equivalent, even though mathematically they are not. If you ask for a numerical value of infinity you get:
∞ = 1e307
# However, if you want to perform certain calculus operations involving infinity, the program does understand what it means in this context.
## Example
# Below is a definite integral where one of the endpoints is infinity. Since the function converges on this interval, the integral has a numeric value that can be calculated.
# This result was found using the Symbolic Evaluation rather than the Numeric Equal sign. To enter it for a calculation, press [Ctrl] [.] or click the right arrow button on the Symbolic toolbar.
integral(1/x^2, x = 1 .. ∞) → 1
# You can also often simplify sums and limits that contain infinity; for example:
limit((n + 1)/n, n → ∞)  # simplifies to
1
## Imaginary and Complex Numbers
# To enter an imaginary number:
# 1. Enter the numeric part followed by i. Do not type a multiplication sign between them.
# 2. To enter just the imaginary unit itself, type "1i".
## Example
3i
2.7i
1i
# Click on the third example, above. Notice that when you click in the imaginary number, the 1 that was entered is revealed; likewise, the 1 is hidden when you click out of the number. If you don't type the 1 when entering the imaginary number, Mathcad thinks you mean a variable called i, which it does not recognize because you haven't defined it.
# Complex numbers are entered the same way as imaginary numbers. To enter a complex number with both a real and an imaginary part, like5 - 7i, type it exactly as it is written. You can operate with complex numbers just as you do with real numbers. All the usual arithmetic works with complex numbers. Here are a few complex arithmetic calculations.
## Examples
(2 + 3i) - 5 + 1i = -3 + 4i
(4 + 3i)/(7 - 1.6i) = 0.449961 + 0.53142i
sqrt(-16) = 4i
1i^17 = 1i
# Just as real results with very tiny values may be displayed as 0 depending on the Zero Threshold setting, complex values with a very tiny imaginary part may display as only the real part depending on the Complex Threshold Tolerance.
# 1. Click in a blank area and choose Result from the Format menu
# 2. On the Tolerance tab, increase or decrease the Complex Threshold Tolerance setting and click OK.
2 + 10^-9*1i = 2 + 1e-9i  # but
2 + 10^-12*1i = 2 + 1e-12i
# Note that some algorithms, such as root finders, can return very tiny complex parts to a result that you might expect to be a real value only. You can adjust the Complex Threshold to dictate that these small imaginary parts are not displayed, but Mathcad still recognizes the values as complex. You may receive errors when trying to plot these values, or use them in any other context where complex numbers are not allowed.
k := 0 .. 4
x[k] := k
y[k] := x[k]
y[0] := y[0] + 10^-10*1i
ln(Re(y)) =  # error: This function is undefined at one or more of the specified points.
ln(y) = [-23.0259 + 1.5708i; 0; 0.693147; 1.09861; 1.38629]
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