# Title: Vectors and Matrices
# Description: A primer on vectors and matrices.
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# FEATURES IN-DEPTH
# tutorials
# Arrays and Range Variables
# There are three types of arrays in Mathcad: vectors, matrices, and nested matrices. A vector is an array of just one row or column of numbers. A matrix is an array with two or more rows and columns. A nested matrix is a matrix or vector with vectors or matrices for each of its entries. This tutorial shows you how to create and work with vectors and matrices, both in their linear algebra context and for iterating over calculations.
#
# To learn about using arrays to store data for import and export, see Handling Data.
# A range variable is quite different from a vector. A range variable is a sequence of real-valued, evenly-spaced numbers. Although range variables can be used as inputs to functions for plotting, typically range variables are used as indices for arrays. Range values must be integers in this case. When a range variable is used in an expression, it produces another range variable as output; you can not access or refer to a particular "entry" in a range, or assign it to a new name. In general, a range variable implies that you want to perform a calculation repeatedly, while a vector is a linear algebra construct or a set of data with an expected set of behaviors for functions such as multiplication, length, and so forth.
# To Create a Vector or Matrix by Hand
# Subscripts and Superscripts
# To Create a Vector or Matrix Using Range Variables
# Linear Algebra with Vectors and Matrices
# Transpose, Inverse, Determinant
# Array Functions
# Repeated or Element-wise Calculations with Arrays
## To Create a Vector or Matrix by Hand
# To create a vector or matrix of values defined element by element:
# 1. Type [Ctrl] M or click the Matrix or Vector button on the Matrix toolbar.
# 2. Enter the dimensions of the vector or matrix you want and click OK or Insert.
# 3. Fill in each empty placeholder with a value. Use the Tab key to move from placeholder to placeholder.
# Type: | See:
# [Ctrl] M
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# After you click OK or Insert:
# Type: | See:
# 1 [Tab] 2 [Tab]
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# Extend or shorten a matrix by pressing the Insert or Delete buttons while you are already in a matrix.
## Examples
# Here are several arrays with various types of data in them:
# 1 row, 3 columns
[3, 5.2, 10.1]
# 3 rows, 1 column
[5i; 1 + 2i; 6]
# 3 rows, 3 columns
[1, 2, 3; 4, 5, 6; 7, 8, 9]
# Click on 9 in the matrix above and select Insert > Matrix then Insert.
# See:
[
    1, 2, 3, □, □, □;
    4, 5, 6, □, □, □;
    7, 8, 9, □, □, □;
    □, □, □, □, □, □;
    □, □, □, □, □, □;
    □, □, □, □, □, □
]
# Click on a placeholder and select Insert > Matrix then Delete.
# See:
# Note: Depending where you click you might see a different result.
[1, 2, 3; 4, 5, 6; 7, 8, 9]
# 2 rows, 3 columns
["dog", "cat", "mouse"; 1, 3, 2]
# This last example contains strings, or words, and numeric values. It is helpful to be able to mix data in an array, particularly if you are copying and pasting that data from another application. In fact, data copied and pasted into matrices (from tabular applications such as Excel or an ASCII worksheet that contains rows and columns) preserves its characteristics, including text, numerics, complex numbers, or empty cells.
# Try to create these arrays yourself. To enter a string, type ["] in the placeholder and then enter the text. From within the string quotes, you cannot press [Tab] to move to the next placeholder. You can use the arrow keys to enter the next entry or click on the placeholder.
# Try it!
# You can also assign a variable to a vector or matrix in order to use it later in the worksheet for calculations.
## To Copy Excel Cells into Mathcad
# This image shows Excel cells that you might copy to Mathcad.
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# If you place the red crosshair in a blank region of the worksheet and choose Edit > Paste Special as "Unformatted Text As Number," you get:
[
    "temp", "time", "phase", "Amplitude";
    98, 1, 0.2i, 700;
    98.2, 3, 0.2 + 0.5i, 9*10^3;
    98.6, 4, 0.3 + 0.04i, 1.1*10^4;
    98.7, 6, 0.6, 1.6*10^4
]
# Try it!
# Type some numbers into Excel, then copy them into Mathcad.
## To Compute with Arrays
# If you define x to be a 1 x 3 vector and y to be a 3 x 1 vector, then you can use those definitions to compute the dot product of the two vectors:
x := [2, 7, 10]
y := [4; 1; 5]
x*y = 65
# Many functions take arrays, as well:
length(y) = 3
min(y) = 1
sin(y) = [-0.756802; 0.841471; -0.958924]
## Subscripts
# Subscripts are the numbers or variables that identify a single element or a sequence of elements in an array. Subscripts are written below an array variable. To type an array subscript, type [ or click the Subscript button, shown at the right, on the Matrix toolbar.
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# A subscript on a vector refers to the nth element of a vector.
# V[n] | Read, "V sub n."
# A subscript on a matrix refers to an element in the mth row and nth column in the matrix.
A[m, n]
# By default in Mathcad, the first element has the index 0. This means that the first row or column of an array is always denoted with the subscript 0.
## Examples
# Here is a vector with three elements:
vec := [7; 56; 5]
# If you type vec[0= you get the first element of the vector:
vec[0] = 7
# Likewise, if you type vec[1= you get the second element of the vector:
vec[1] = 56
# Here is a 3 x 3 matrix:
M := [7, 6, 5; 5, 5, 5; 56, 8, 9]
# If you type M[0,1= you get the element in the first row and second column:
M[0, 1] = 6
# You can change the default indexing of arrays in any worksheet by changing the ORIGIN under Tools > Worksheet Options or by redefining the built-in variable ORIGIN to 1 in your worksheet. It is useful to make a global change if you wish to start your arrays at 1. You can set this value in a template if you want it for all new worksheets.
## Superscripts
# The superscript of an array refers to a column of the array. For example, if you want to reference an entire column of a particular array, type [Ctrl] 6 to insert a superscript or click the Matrix Column button on the Matrix toolbar.
## Example
# If you type M[Ctrl]60=, you get the first column of the matrix M:
M = [7, 6, 5; 5, 5, 5; 56, 8, 9]
M[:, 0] = [7; 5; 56]
## To Create a Vector or Matrix Using Range Variables
# Another way to define vectors and matrices is to create a definition dependent on a range variable or variables, which serve as the indices for the array.
# 1. Define a range variable from 1 to n, where n is the number of rows you want in the vector. For a matrix, define a second range variable from 1 to m, where m is the number of columns.
# 2. Now, define your array, A. On the left side of your array definition, type A[n for a vector and A[n,m for a matrix. Remember that the open bracket is the keystroke for the array subscript.
# 3. On the right side of your array definition, type an expression in terms of n for a vector and n and m for a matrix.
# 4. To view the array you have defined, type A= below the definition.
## Example
# First, define a range variable, i, by typing i:0;2.
i := 0 .. 2
# Now, type B[i:i+4. You have assigned to each element in the vector B the row number plus 4, that is the values 4, 5, and 6.
B[i] := i + 4
B = [4; 5; 6]
# Note: In Mathcad, all vectors defined by a range variable are column vectors, that is, vectors that go down, not across. Column vectors are expected by most of the vector functions in Mathcad.
## Range Variables versus Vectors
# Notice the difference in display between ranges and vectors:
i = [0; 1; 2]
B = [4; 5; 6]
# They behave differently as well. Vectors can be assigned to other vectors and produce vectors when used in element-wise calculations. Ranges produce ranges and imply iteration over an expression. So, while you can produce a vector and assign it to another vector, if you produce a range, you must assign it to a vector indexed expression:
cosVec := cos(B)
cosRange := cos(i)  # error: This value must be a scalar or a vector.
# The second assignment doesn't work, because iteration on the right implies iteration on the left, and you have to tell Mathcad how to assign the results of each iteration. Doing this with subscripts creates a vector.
cosRange[i] := cos(i)
cosRange = [1; 0.540302; -0.416147]
## Linear Algebra with Vectors and Matrices
# Linear algebra has some simple rules for how to calculate using arrays. Generally, you can apply the same operations to arrays as you would to simple variables. There are no special instructions for calculating with vectors or matrices in Mathcad. Simply follow the rules of mathematics.
## Examples
## Scalar Multiplication
# If you multiply a vector by a scalar (single number), the result is a vector in which each component of the original vector has been multiplied by the scalar.
D := [2; 4; 5; 6]
2*D = [4; 8; 10; 12]
## To Add or Subtract Vectors
# You may add or subtract two vectors whenever they are the same length.
D = [2; 4; 5; 6]
B = [4; 5; 6]
E := [8; 7; 6; 5]
# This addition works:
D + E = [10; 11; 11; 11]
# This addition doesn't:
D + B =  # error: These array dimensions do not match.
## To Add or Subtract Matrices
# Here are two 2 x 2 matrices, M and P:
M := [1, 3; 2, 4]
P := [5, 7; 6, 8]
# Now add them together:
M + P = [6, 10; 8, 12]
# When you add two matrices together, the elements of the resultant matrix are the sums of the elements of the two original matrices. Just as with vectors, matrix addition is only defined for matrices of the same size.
## Transpose, Inverse, Determinant
# You can take the transpose, inverse, and determinant of matrices in Mathcad.
# Start with a 3 x 3 matrix:
X := [5, 4, 86; 1, 3, 5; 2, 4, 2]
# To calculate the transpose of the matrix, type X[Ctrl]1=.
transpose(X) = [5, 1, 2; 4, 3, 4; 86, 5, 2]
# To calculate the inverse of the matrix, type X^-1=.
X^-1 = [0.0666667, -1.6, 1.13333; -0.0380952, 0.771429, -0.290476; 0.00952381, 0.0571429, -0.052381]
# To calculate the determinant of the matrix, type X[Shift][|]=
|X| = -210
# Right-click on the |X| above, to see that it is identified as a Square Matrix Determinant rather than an Absolute Value.
## Array Functions
# Mathcad includes a variety of functions and operators for working with vectors and matrices. A few are listed below. For a full list, choose Function from the Insert menu and click on the Vector and Matrix category or choose operators from the Matrix Toolbar.
max(A)  # the maximum or minimum of the elements in a vector or matrix
min(A)
rows(A)  # the number of rows or columns in A, or the length of a column vector
cols(A)
length(A)
sort(v)  # sorts a vector in ascending order
csort(A, n)  # rearranges the rows of a matrix A so that the nth column is in ascending order
identity(n)  # gives the n x n identity matrix
augment(A, B)  # combines two matrices together by placing them side by side
stack(A, B)  # combines two matrices by stacking A above B
## Repeated or Element-wise Calculations with Arrays
# There is one array operator in particular that is useful for performing calculations in a batch, called the vectorize operator. For example, in Mathcad, if you multiply a vector by a scalar,
vec := [1; 3; 5]
2*vec = [2; 6; 10]
# you get another vector back, but if you multiply two vectors,
vec*vec = 35
# Mathcad assumes you mean the dot product.
## Examples
# Suppose you wanted element-by-element multiplication, producing another vector of the same length:
vectorize([1; 3; 5]*[1; 3; 5]) = [1; 9; 25]
# This operation is accomplished with the vectorize operator. If you type M*M [Spacebar][Ctrl][-][=], you get the product of each element of matrix M with itself:
vectorize(M*M) = [1, 9; 4, 16]
M = [1, 3; 2, 4]
# You can see more advanced examples of the vectorize operator in QuickSheets.
# Calculations can also be performed repeatedly using range variables to step through the elements of vectors and perform the same operations:
i := 0 .. last(vec)
newvec[i] := vec[i]*vec[i]
newvec = [1; 9; 25]
# This construction is particularly useful for manipulating vectors that contain signals or for solving difference equations.
# To create solutions to the logistic map:
N := 200
i := 0 .. N
n := 0 .. N
μ[i] := 4*i/N
# initialize the matrix:
X[0, i] := rnd(1)
X[n + 1, i] := μ[i]*X[n, i]*(1 - X[n, i])
n := N/2 .. N
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# More detailed examples are available on seeded iteration using range variables and arrays, as well as on parametric sets of solutions to equations.
# To convolve two signals:
N := 20
T := 1/N
n := 0 .. N
x(n) := Φ(n - 4) - Φ(n - 10)
h(n) := (e^(-0.5*n) + e^(-n))
# Output vector at n/N
y[n] := T*sum(h(m)*x(n - m), m = 0 .. N)
x[n] := x(n)
h[n] := h(n)
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# For a more detailed example of signals handled with vectors in Mathcad, see the Fourier Transforms example.
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