# Title: Part I: Creating 2D Graphs
# Description: How to create 2D graphs.
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# FEATURES IN-DEPTH
# tutorials
# Creating 2D Graphs
# One of the most common operations performed in a Mathcad worksheet is to plot relationships and data in a 2D graph. There are several different ways to specify what you want to plot and many formatting options for the output.
# To Plot Sets of Data as Scatter Plots
# To Create a Histogram
# To Create Polar Plots
# To Plot Complex Numbers
# To Plot Inequalities in One Variable
# To Create Parametric Plots
# To Draw a Circle
# To Plot Piecewise Functions
## To Plot Sets of Data as Scatter Plots
# In Mathcad, data sets may be stored in Data Tables, vectors, or matrices. (See Handling Data and Vectors and Matrices for more information.) Once your data is defined in the worksheet, plotting is very easy.
# Step 1. Define your data sets or import them:
x := [1; 2; 3; 4]
y := [7; 5; 3; 6]
# Step 2. Create an X-Y Plot by choosing Graph > X-Y Plot from the Insert menu. Alternatively, click the X-Y Plot button on the Graph toolbar:
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# Step 3. You see a blank graph with two empty placeholders. Enter your data set names in the appropriate axis placeholders (in this example, x is on the x-axis and y is on the y-axis). Then click outside the graph or press [Enter] to finish.
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# By default, Mathcad plots the data as a line and then sets the axis limits from the minimum to the maximum of the x-axis data.
# Step 4. To display a scatter plot, double-click on the graph region. On the Traces page, click under Type to select "points" and under Symbol, choose a symbol. Click OK.
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# Step 5. To change the axis limits, click on the graph and enter new values at the ends of each axis.
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## To Create a Histogram
# There are three steps to creating a histogram plot of a set of one-dimensional data:
# 1.  Enter or import the data in your worksheet.
# 2.  Use the built-in histogram function to "bin" the data.
# 3.  Plot the results returned by the histogram function.
# Step 1. Enter the data in a Data Table or a vector.
# Step 2. Define a variable and insert the histogram function by choosing Function from the Insert menu and selecting "histogram" from the list. Then, fill in the arguments to the histogram function with the number of intervals you want and the name of the data.
data := [2; 3; 4; 8; 5; 6; 9; 1; 2; 8]
H := histogram(3, data)
# Sort the data into three bins to get three bars on the plot.
# You can view the results of calling the histogram function by typing, in this case, H [=].
## Interpreting Results from the Histogram Function:
# 4 data points in the first interval, with a midpoint of 2.333.
H =  # no stored result  # 3 data points in the second interval,with a midpoint of 5.
# 3 data points in the third interval, with a midpoint of 7.667.
# Step 3. Insert an X-Y Plot by choosing Graph > X-Y Plot from the Insert menu. Then, in the x-axis enter the first column of the histogram result and in the y-axis enter the second column of the result.
#
# By default, Mathcad plots the data as a line,  however, histograms are typically done as bar graphs
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# Hint: Type [Ctrl] 6 to get the á ñ or column placeholder.
# Note: Arrays and Data Tables are indexed starting at 0 by default.
# Step 4. To display a solid bar plot, double-click the graph. On the Traces page, select "solidbar" under Type. Click OK.
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# Note: Click on the graph to see the axis limits. Note that all the data is not visible for the second two histogram bars. The lower-limit of y-axis data is the minimum number of points in an interval, so a bar is not visible, just a line.
# Mathcad sets the axis limits from the minimum to the maximum of the x-axis data. So we need to change the limits of both the x and y axes to make this graph meaningful.
# Step 5. To change the axis limits so you can see all the data on the graph, click on the graph and enter new values at the ends of each axis.
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# Click on the graph to set new axis limits
## To Create Polar Plots
# Creating a polar plot is very similar to creating a Cartesian (X-Y) Plot. Here are the steps:
# 1.  Type your function.
# 2.  Choose Graph > Polar Plot from the Insert menu. Alternatively, you can choose Toolbars > Graph from the View menu and click the Polar Plot button on the Graph toolbar.
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# 3.  Click outside of the plot or press [Enter].
## Example
# Here are two simple polar plots created from functions:
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# The first plot retains default formatting.
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# The second plot has adjusted axis limits, modified trace settings, and hidden axes. Double-click on the plot to see the settings.
## To Plot Complex Numbers
# If Mathcad encounters a complex number while plotting an ordinary function, it skips these values. For example, if you plot sqrt(x) from -5 to 10, here's what you'll see:
x := -5, -4.99 .. 10
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# The value of sqrt(x) is imaginary for x < 0 so Mathcad doesn't plot these function values.
# If you want to plot complex numbers in their true location on the complex plane, then you need to designate one axis for the real parts (the horizontal axis) and the other for the imaginary parts. Use the built-in functions Re and Im to extract the two parts of a complex number. Here's a plot of the complex exponential.
v := 0, 0.1 .. 7
z(v) := exp(1i*v)
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## To Plot Inequalities in One Variable
# To plot the inequality, 4*r - 3 > 12:
# 1.  Type the inequality expression in your worksheet and click the X-Y Plot button on the Graph toolbar or choose Graph > X-Y Plot from the Insert menu.
# 2.  Type the independent variable of the inequality expression in the x-axis placeholder of the plot.
# 3.  Press [Enter] or click outside the graph region to see the plot:
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# Now, you have a plot of the truth value of the statement over a range of values for r. To better understand the inequality and its graph, you might want to solve the inequality for the variable r first.
# 1. Type:
4*r - 3 > 12
# 2.  Press [Ctrl] [Shift] [.] to insert a placeholder followed by the symbolic equal sign.
#
# 3.  In the placeholder, type the keyword "solve."
#
# 4. Press [Enter].
4*r - 3 > 12 solve → 15/4 < r
# Mathcad returns the solution in a vector.
# When plotting inequalities, Mathcad plots both the values for r that are true (>15/4 ) and the values that are false (<15/4). Since an inequality is a Boolean expression, that is, it is either true (1) or false (0), the values for which the inequality is true correspond to 1 on the y-axis, while those that are false correspond to 0.
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# In the graph below, the y-axis limits are set to 1.5 and 0.5 to show only values for which the expression is true. Click once on the graph to see the axis-limits settings. True values center around 1 on the y-axis.
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# Range showing where expression is true
## To Create Parametric Plots
# A parametric plot is one that involves two expressions on the x- and y-axis both of which are dependent on the same independent variable. Parametric plots are especially useful for representing curves that are not functions, such as circles. To create a parametric plot:
# 1.  Type the y-axis expression in your worksheet and click the X-Y Plot button on the Graph toolbar or choose Graph > X-Y Plot from the Insert menu.
# 2.  Type the x-axis expression in the x-axis placeholder of the plot.
# 3.  Press [Enter] or click out of the graph region to see the plot:
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# Notice that the domain of v, the independent variable, need not be specified, though it can be if you want to plot the parametric curve over a particular range of values, or if you find that the range Mathcad picks does not give you the curve you expected.
v := -π, -π + π/12 .. 0
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## Examples: To Draw a Circle
# You already saw one way to draw a circle if you read the section on how to create a parametric plot. Here are two other methods:
# 1.  The easiest way to make a circle in Mathcad is to plot it using polar coordinates. A graph where "radius = 1, angle = anything" is a circle, and here it is:
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# To make this graph, just choose Graph from the Insert menu, then choose Polar Plot. Put 1 in the placeholder on the y-axis, and an independent variable, such as r, in the placeholder on the x-axis.
# 2.  If you think of a circle in terms of its equation, you can solve the equation and plot the results. For example, if the equation for the circle is x^2 + y^2 = 1, solve for y, and graph the two functions of x that result:
x := x
y := y
x^2 + y^2 == 1 solve, y; simplify; assume, x == RealRange(-1, 1) → [-sqrt(1 - x^2); sqrt(1 - x^2)]
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# To create the graph, choose Graph from the Insert menu and choose X-Y Plot, or press the X-Y Plot button on the Graph toolbar. Then enter the two expressions above with a comma between them in the placeholder on the y-axis. Finally, you can double-click on the graph to change the trace for the second expression to match the first.
# Notice that both the parametric and polar plots give you a complete circle, whereas the plot containing a pair of functions is broken at the ends of its domain.
## To Plot Piecewise Functions
# A function which is not uniform over its domain is called a piecewise function.
# To plot a piecewise function in Mathcad you use the built-in conditional function if. Use if to define a function that behaves one way on a one part of the domain and differently for the rest of the domain.
if(cond, x, y)
# If takes three arguments. "cond" is the condition, x is the value when the condition is true, and y is the value when the condition is false.
# Here is a simple function and a range variable over which the function is plotted:
f(x) := x^2 - 1
x := -2, -1.9 .. 2
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# Here's another function, g(x), whose value is equal to f(x) when f(x) > 0, and in all other cases is equal to 0.
g(x) := if(f(x) > 0, f(x), 0)
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## Examples of Piecewise Functions
# h(x) is equal to f(x) when x ≥ 1 and is equal to -f(x) otherwise:
h(x) := if(x ≥ 1, f(x), -f(x))
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# k(x) is equal to f (x) when -1 < x < 1 and is equal to -f(x) otherwise:
k(x) := if(-1 < x < 1, f(x), -f(x))
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