# Title: Part II: Formatting 2D Graphs
# Description: Changing the appearance of a 2D graph.
# Worksheet setting: ORIGIN = 1
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# FEATURES IN-DEPTH
# tutorials
# Part II: Formatting 2D Graphs
# There are several plot types and formatting options that let you customize the appearance of your 2D graphs.
# To Define Ranges and Set Axes Limits
# To Format Individual Plots
# To Format Axes
# To Show Markers on a Graph
# To Annotate Graphs
## To Define Ranges and Set Axes Limits
# There are two ways to control the domain and range over which the plot of a curve is displayed:
# 1.  By defining a range variable over which the function is evaluated.
# 2.  By setting the axes limits in the plot itself.
# Usually, you can let Mathcad define the domain over which a function or functions are plotted. However, if you would like to specify this domain yourself, define a range for the independent variable.
# For example, you might want to display function values for integers between 2 and 5, instead of using the default domain of -10 to 10 in 0.1 increments.
x := 2 .. 5
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# Hint: Double-click a graph to format it, such as changing the grid color and changing symbols on the plots.
# The default axes limits are the limits of the domain and range values. To change these, you can click a plot and enter new limits in the placeholders at the ends of each axis. In the graph below, the x-axis limits have been set from 0 to 10. Then, on the Axes page of the X-Y Plot Format dialog box, the "Equal Scales" option has been checked.
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# You may want to use the independent variable, x, in another graph on the same page. Any functions that depend on x are plotted on the same domain you defined above. So, you need to redefine the range variable, x, to get the curve you want.
x := -1/2, -1/4 .. 5/2
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# Default graph of -4x
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# Graph of -4x with new axis limits
# In this graph, the y-axis limits are set to create a more effective presentation of the information. Sometimes it is important to give both axes the same scale. Sometimes you just want to be sure all the points or curves appear in the graph and aren't cut off.
## To Format Individual Plots
# Often when you plot functions or data sets, you need to adjust the Trace settings from lines to points or other Trace types. To do so:
# 1.  Double-click the graph region.
# 2.  On the Traces page, choose "points" under Type and under Symbol make a selection other than "none." Click OK.
# In the graph below, we have changed the Trace type to points with a box symbol, and changed the color to magenta. In addition, we have modified the axes limits and set the grid lines manually. Click on the graph to see the axes limits. Double-click on each axis to see the grid settings.
t := -2, -1.75 .. 2
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# Notice that there are several other trace types to choose from: bar, solidbar, step, draw, and stem. You may choose any one of these to represent a function or data set in a 2D graph. The error trace type, however, takes two consecutive data arguments in the y-axis. Also, you must specify error as the Trace type for both these arguments. Here's an example:
x := [1; 2; 3]
y := [2.9; 4.2; 3.6]
yerr := [0.4; 0.5; 0.9]
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## To Format Axes
# For each axis, there are several formatting options that let you control gridding, markers, and scale. Double-click a single axis to format it. Or, double-click anywhere in the graph and go to the Axes page.
# This function graph has default formatting for its x-axis:
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# The same graph now has denser gridding and Equal Scales checked.
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# Set number of grids to 10.
# Check Equal Scales.
# Choose Blue for grid color.
# Now the x-axis has been set to log scale.
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# Set x-axis to log scale.
# Here's the same graph with two markers on the y-axis and grid lines removed from the y-axis:
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# Check Show markers on Primary Y Axis.
# Uncheck grid lines on X Axis.
## To Show Markers on a Graph
# To add markers to a 2D graph as on the graph above, double-click the graph to open the graph formatting dialog. Check "Show markers" on either or both axes. You can select a color. Click OK. Two placeholders appear next to the axis you have selected. When you fill one or both of these placeholders, dashed lines appear on the graph at the values you have selected. To change the value of a marker, click the number on the dashed line and use the blue editing lines to enter a new value.
## To Annotate Graphs
# There are two ways to annotate a graph. You can use the options on the Labels page of the Format dialog box, or you can drag text, math, or graphics regions onto the graph for custom annotations.
# Here's a graph with the axes labels and title enabled and the arguments hidden. To hide arguments, go to the Traces page and check "Hide Arguments."
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## To Add Annotations to a Graph
# 1.  Type your annotation in a separate text region.
# 2.  You can make arrows by using characters from the Symbol or Wingdings fonts. Go to Accessories under Windows Programs then find Character Map in System Tools to see the choices on your system.
# 3.  You can also import an image into Mathcad to use.
# 4.  Drag the text region over the graph to place it.
# 5.  The regions are not locked together so if you separate regions or move the graph, they do not stay in position.
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# local maximum è
# ç local minimum
## Tips for Annotating Graphs with Other Regions
# •  Click on the graph above and notice that the graph shifts to the right as the math region in the y-axis placeholder expands. Because the graph region itself often shifts when you click in it to make adjustments, make your region annotations as a last step
# •  If you find that one of your annotations has slipped behind the graph, right-click on the graph and choose Send to Back from the menu. This puts the graph under all the other regions with which it might be grouped.
# •  In general, making an annotation this way is as easy as dragging the annotation over the graph and positioning it properly. After you have placed one or more annotations on a graph, it is sometimes tricky to grab an individual region to adjust its position. In this case, you can use the Separate Regions command on the Format menu to undo the overlapping in your worksheet.
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