# Title: Formatting 3D Graphs
# Description: Changing the appearance of 3D graphs.
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# FEATURES IN-DEPTH
# tutorials
# Formatting 3D Graphs
# This tutorial shows you how to change the appearance of a 3D graph using the 3D Plot Format dialog box.
# Here are the topics covered in this tutorial:
# To Change a Graph's Appearance
# To Rotate a Plot
# To Spin a Plot
# To Zoom a Plot
## To Change a Graph's Appearance
# To change the look of a 3D plot, double-click it and use the options in the 3D Plot Format dialog box. The various tabs in the dialog box open pages that have options for formatting different aspects of the plot:
# •  General options control the overall appearance of a graph.
# •  Axes options control how each axis looks.
# •  Backplanes options specify whether a backplane is filled with a color, has a border, or has grid lines or tick marks.
# •  Appearance options specify the surfaces, lines, and points that make up a graph.
# •  Lighting options control both the overall lighting of the plot as well as individual lights directed onto it. Lighting changes the color or shading of a plot.
# •  Title options let you add a title and specify its location.
# •  Special options control plot options related to specific kinds of plots. For example the Bar Plot Layout options let you specify the way the bars are arranged in a 3D bar plot.
# •  Advanced options provide very fine control over the appearance of a plot, such as the vertical scale.
# To see what each option does, click the Help button in the dialog box. If you narrow down this window, you can see the Help window next to the graph dialog.
## Example
M(x, y) := sin(x) + cos(y)
# [component: inputs M]
# To add color to the surface plot above:
# 1.  Double-click the graph to bring up the 3D Plot Format dialog box.
# 2.  Click the Appearance tab.
# 3.  Click both "Fill Surface" and "Colormap" in the Fill Options section.
# 4.  Click "Apply" to preview the plot. Click "OK" to close the dialog box.
# [component: inputs M]
## Example
# Follow the directions below to enable lighting on the wireframe, solid color-filled surface plot shown here.
R(x, y) := sin(x^2 + y^2)
# [component: inputs R]
# 1.  Double-click the plot to open the 3D Plot Format dialog box and go to the Lighting page.
# 2.  Check "Enable Lighting" in the Lighting section.
# 3.  Select options on tabs labeled Light 1, Light 2, etc. to enable a directed light and set its color and location. Mathcad lets you set up to eight directed lights. Notice that when you check "Enable Lighting," lights 1, 2 and 3 are automatically turned on as Lighting Scheme 1.
# 4.  Double-click the "Ambient Light Color" box to set the ambient light color. Note that black corresponds to no ambient light.
# You can examine two different implementations of lighting in the plots shown below. Both are surface plots filled with solid yellow color, but lighting is enabled differently on each.
# •  Light 1, yellow
# •  Light 2, green
# •  Ambient Light, black
# •  Light 3, pink
# •  Light 4, pink
# •  Ambient Light, pale blue
# [component: inputs R]
# [component: inputs R]
## To Rotate a Plot
# Using the plot below, follow these steps to rotate the plot interactively with the mouse.
#
# 1.  Click in the plot and hold down the mouse.
#
# 2.  Drag the mouse in the direction you want the plot to turn.
#
# 3.  Release the mouse when the plot is in the desired position.
Z(u, v) := sin(u^2 - v^2) - sin(u^2 + v^2)
# [component: inputs Z]
# The original orientation of the plot:
# Rotation = 9 deg
# Tilt = 34 deg
# Twist = 0 deg
# You can also rotate the plot by specifying the rotation, tilt, and twist directly in the 3D Plot Format dialog box. Try resetting the previous plot to these View options:
# Rotation = 221 | Tilt = 50 | Twist = 233
# Note: If you manipulate the orientation interactively, new settings for Rotation, Tilt, and Twist appear in the View options.
## To Spin a Plot
# You can set a plot in motion so that it spins continuously about an arbitrary axis of rotation. Using the graph below, follow these steps to spin the plots in it:
# 1.  Click in the plot to activate it.
#
# 2.  Holding the [Shift] key, click and drag the mouse in the direction you want the plot to spin.
#
# 3.  Release the mouse to set the plot in motion. The plot spins continuously until you click again inside the plot.
#
# 4.  The faster you move the mouse while you're holding down the button, the faster the plot spins.
# [component: inputs Z]
# Fog has been enabled in this plot to lend depth to the graph. Go to the Advanced page in the 3D Plot Format dialog box to control fog.
# Note: If you make changes to equations that affect a plot, the plot recomputes even when it is spinning!
## To Zoom a Plot
# Using the graph below, follow these steps to zoom in on the plot:
#
# 1.  Click in the plot to activate it.
#
# 2.  Holding the [Ctrl] key, click and drag the mouse toward the top of the plot to zoom out or the bottom of the plot to zoom in.
#
# 3.  Release the mouse when the plot is at the desired zoom factor.
R := 6
r := 2
Q(u, v) := [(R + r*cos(v))*cos(u); (R + r*cos(v))*sin(u); r*sin(v)]
# Original Zoom factor = 1
# [component: inputs Q]
# Tip: If you use an IntelliMouse-compatible mouse with a center wheel, you can rotate the wheel to zoom in or out of a three-dimensional plot.
# You can also zoom on a plot by specifying the zoom factor directly in the 3D plot format dialog box. On the General tab, under View, you can set the Zoom to any real number value. Try setting the previous plot to the zoom factor 2.5.
# Note: If you have manipulated the zoom interactively, the new setting  appears in the View options on the General page.
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