# Title: Handling Data
# Description: Importing and exporting data with Mathcad.
# Worksheet setting: ORIGIN = 1
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# FEATURES IN-DEPTH
# tutorials
# Handling Data
# Mathcad is a valuable tool for analyzing data. When you work with data you need to first import or enter the data into Mathcad.
# Topics covered in this tutorial:
# To Enter Small Data Sets
# To Import Large Data Sets
# To Import Data into an Data Table
# To Insert a File Input Component
# To Export Data
# To Export Data from an Output Table
# To Write Data to a File Through the File Output Component
# READ and WRITE functions
## To Enter Small Data Sets
# If you want to analyze experimental data in Mathcad, first you need to bring your data in. If you don't have too many data points, you can simply enter your data element by element into a Data Table:
#
# 1.  Click a blank spot in a worksheet and choose Data >Table from the Insert menu. You see the following:
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# 2.  Click on the placeholder to the left and enter a name for the variable that holds your data.
# 3.  Click in the cells of the table and enter the data.
## Example
# Suppose that for a biology experiment you made a rough count of bacteria in one section of a Petri dish at six different times. Your data set consists of six times and six counts. Here's how you could enter the data:
# [component: outputs Time]
# Try it above!
# To lengthen the table, click on it, move the cursor to the bottom handle, click and drag down to make more cells visible.
# Note the ellipses in the bottom cell. They show that the table has more data in it that is not showing. If you click on the table, you can see scroll bars to use to see the rest of the data.
# To make the table narrower, click on it, move the cursor to the right side handle, click and drag left to hide the second column of cells. You get this:
# [component: outputs Time]
# Insert another Data Table in which to enter the bacteria counts for each time:
# [component: outputs Count]
# The data are now stored in the variables Time and Count.
# Now you're ready to analyze the data. Here's a plot of count versus time from the example above:
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# To calculate the logarithms of the counts type log(Count)=
log(Count) = [0.30103; 0.477121; 0.954243; 1.47712; 2; 2.27875]
# If you want to display the times alongside the logarithms of the counts, type Time=
log(Count) = [0.30103; 0.477121; 0.954243; 1.47712; 2; 2.27875]
Time = [0; 2; 8; 17; 23; 30]
## To Set the Value of Origin
# The default origin of arrays in Mathcad, including Data Tables, is 0. In this worksheet it is 1, as you can see by asking Mathcad for the built-in value of ORIGIN.
# Type | See
# ORIGIN=
ORIGIN = 1
# To reset the value of Origin in your own worksheet, go to Worksheet Options under the Tools menu. Then select the Built-In Variables tab, and set Array Origin to 1.
# If you need to work with a particular number in the table, reference the value using an array subscript.
# The third time:
Time[3] = 8
# The square root of the last count:
sqrt(Count[6]) = 13.784
## To Import Large Data Sets
# If you have a lot of data, it is easier to read it in from a data file rather than type it into a table one value at a time. You can import a variety of file types using this method. In addition to text files, you can import files from spreadsheet programs such as Microsoft Excel. To do so:
# •  Import the data file into a Data Table, or
# •  Choose Data > File Input from the Insert menu to read in the data file.
# Use the File Input component if you want the data in Mathcad to update automatically whenever you change values in your data file. Otherwise, import the data into a Data Table.
## To Import Data into a Data Table
# To import data from a file into a Data Table component:
# 1.  Right-click a blank spot in your worksheet and choose Insert > Table from the menu.
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# 2.  Click on the red placeholder to the left and enter a variable name for the data.
# 3.  Click any cell in the table and then right-click and choose Import from the menu to bring up the File Options dialog box.
# 4.  Use the Wizard to specify file type, file path, delimiter used and data range if you select a text file, and cell ranges and worksheet if you choose an Excel file.
# 5.  Click Finish to import the data. Importing preserves data characteristics, including strings, numerics, complex numbers, and empty cells, and attempts to respect a variety of delimiters.
## To Insert a File Input Component
# For more control over importing, use the File Input component to read in a data file:
# 1.  Right-click a blank spot in your worksheet and choose Insert > File Input from the menu.
# 2.  Use the File Options Wizard to specify file type, file path, delimiter used and data range if a text file is selected, and cell ranges and worksheet if an Excel file is chosen.
# 3.  Click Finish to import the data. You see something like this:
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# 4.  Click on the red placeholder to the left and enter a variable name for the data.
## Example
# In this example, we read into the worksheet some data from a file called "bigdata.prn" (a text file) using the File Input component. Here are the steps we followed. Try to follow these steps yourself in the space provided below:
# 1.  Click a blank spot in your worksheet and choose Data > File Input from the Insert menu.
# 2.  Browse for the file "bigdata.prn." It is located in the same directory as this page. It should come up immediately when you click the Browse button. Click Next.
# 3.  Enter 5 as the start value for rows, and click Finish.
# 4.  In the placeholder on the left, enter the name of the variable in which to store the data, in this case, D, and press [Enter].
# [component: outputs D]
# Try it yourself in your worksheet.
# Mathcad looks for the file you specified. When it finds it, it reads it into a variable called D. Type D= to see a table of the data.
# Try it yourself in your worksheet.
# Alternatively, you can import the data into a Data Table component.
# Now you can analyze this data by using some built-in functions on the variable, D:
# What is the data point in the 2nd row and 2nd column?
D[2, 2] = 0.9885
# What are the maximum and minimum of the data?
max(D) = 0.9968
min(D) = 0
# What is the mean?
mean(D) = 0.459934
# What is the median?
median(D) = 0.4964
# You can also perform a curve fit on two columns of the data to see if it conforms to a particular model function. Learn more about built-in data analysis functions in Features In Depth: Data Analysis.
## To Export Data
# Just as you can import data into Mathcad from a file, you can send data out of a Mathcad worksheet for use in another application.
## To Export Data from an Output Table
# To export data from an output table:
# 1.  Type the variable name containing the data you want to save to a file.
# 2.  Type = to display the data.
# 3.  If the data is not displayed in a table, double-click it to bring up the Result Format dialog box. On the Display Options tab, choose Table for the Matrix Display Style and click OK.
# 4.  Right-click on the table and choose Export from the menu. Use the Wizard to specify file information and click Finish to export the data.
i := 1 .. 5
t[i] := sin(i)
# Try it!
t = [0.841471; 0.909297; 0.14112; -0.756802; -0.958924]
# Right-click on this table and choose Export. Notice that there are many different file formats to which you can save your data.
## To Write Data to a File Through the File Output Component
# An alternative to exporting data is to write it to a data file using the File Output component. Here's how:
# 1.  Click a blank spot in your worksheet and choose Data > File Output from the Insert menu.
# 2.  Use the File Options Wizard to specify file type, file path, delimiter, and data range.
# 3.  Click Finish to export the data. You see something like this:
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# 4.  In the red placeholder on the bottom, enter the name of the variable containing your data and press [Enter].
## Example
# In this example, we exported the contents of the variable, t, above, to the file "test.txt" on the C drive. Whatever the location of your exported file, the path to that file is displayed in the component.
# [component: inputs t]
# Try it yourself here
## READ and WRITE Functions
# In addition to the data components already discussed here, Mathcad contains several functions for reading from and writing to image files, binary files, and WAV files.
# For more information about image processing, see Features In Depth: Images and Image Processing.
# For more information about reading from and writing to data files from the command line, see Data File Reading and Writing.
# For more information about reading from and writing to WAV files, see Reading WAV Files.
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