# Title: Data Analysis
# Description: More on Mathcad's curve-fitting and data analysis functions.
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# FEATURES IN-DEPTH
# tutorials
# Data Analysis
# This tutorial explores some of the built-in curve fitting and data analysis functions you can use in a worksheet.
# Here are the topics covered in this tutorial:
# To Plot Your Data
# To Plot a Single Data Variable from One Input Table or Vector
# To Plot Two Data Variables from Two Input Tables or Vectors
# To Plot Two Data Variables from One Input Table, a File Read Component, or a Matrix
# To Perform a Least Squares Fit
# The line Function
# To Perform a Specialized Curve Fit
# The expfit Function
# To Analyze the Quality of the Fit
# To Plot the Data and the Curve on the Same 2D Graph
# To Calculate Correlation
# Note: If your data comes from an outside source please read the Handling Data Tutorial for more information.
## To Plot Your Data
# Before you analyze your data, you can plot it on a 2D graph in order to make a reasonable guess about a model function that fits the data. Here are several methods to plot your data depending on how you have entered or imported it into the worksheet.
## To Plot a Single Data Variable from One Data Table or Vector
# 1.  Anywhere below or to the right of your data variable definition, define a range variable to index the data variable. For example, if your data variable is data, type i:0;length(data).
# 2.  Click below these definitions and choose Graph > X-Y Plot from the Insert menu or type @ to insert a 2D Graph.
# 3.  In the x-axis placeholder, enter the name of the range variable (for example, i).
# 4.  In the y-axis placeholder, type data[i to enter the name of the variable that contains your data subscripted with the range variable. Then, press [Enter].
# Note: Arrays and tables have a starting index of 0 (zero) by default.
## Example
# Here is a small set of data entered in a single column Data Table. The data represent the completion times for various speed trials of a car:
# [component: outputs times]
i := 0 .. length(times)
# We have formatted this graph to show the data as points and have adjusted the axis limits.
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## To Plot Two Data Variables from Two Data Tables or Vectors
# 1.  Click anywhere below or to the right of your data tables and choose Graph > X-Y Plot from the Insert menu or type @ to insert a 2D Graph.
# 2.  In the x-axis placeholder, enter the name of the variable containing your independent data (usually time).
# 3.  In the y-axis placeholder, enter the name of the variable containing your dependent data (usually what you measured) and press [Enter].
## Example
# Here are two vectors containing time and population data and a plot of time versus population, below.
time := [0; 5; 10; 15; 20; 25; 30; 35]
population := [0; 6; 11; 25; 50; 90; 153; 230]
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## To Plot Two Data Variables from One Data Table, a File Input Component, or a Matrix
# 1.  Below your data table, define two variables to contain individual columns from your data table. For example, if time values are in the first column of the data table, data, type time:data[Ctrl]6 0.
# 2.  Click anywhere below or to the right of your data table and choose Graph > X-Y Plot from the Insert menu or type @ to insert a 2D Graph.
# 3.  In the x-axis placeholder, enter the name of the variable containing your independent data (usually time).
# 4.  In the y-axis placeholder, enter the name of the variable containing your dependent data (usually what you measured) and press [Enter].
## Example
# Here is a Data Table containing time and population data, two variables assigned to individual columns from the table, and a plot of time versus population, below.
# [component: outputs data]
time := data[:, 0]
population := data[:, 1]
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## To Perform a Least Squares Fit
# A least squares fit is the method most commonly used to find the line that best fits a set of data. "Least squares" refers to the sum of the squares of the distances from the individual data points to the line itself. A least squares fit finds the smallest possible sum. There are three built-in functions in Mathcad that can be used to fit data to a straight line.
# •  The line function returns both the slope and the y-intercept of the least squares line in a vector.
# •  The slope function returns only the slope; the intercept function returns only the y-intercept.
# Here are instructions for using the line function to get the slope and intercept of a line of best fit.
## The line Function
# 1.  Click in a blank spot below your data tables.
# 2.  To define the fit, enter the name of the variable that will contain the results of the least squares fit followed by the definition equals; for example, type fit:
# 3.  For the right side of the definition, choose Function from the Insert menu to get the Insert Function dialog box. In the list of all functions, click on "line" and then click OK.
# 4.  In the two placeholders provided, enter the names of the independent data variable and the dependent data variable, in that order, and press [Enter].
# 5.  To see the results of the fit, type fit=. The first value is the y-intercept; the second value is the slope.
## To Plot the Data and a Curve on the Same 2D Graph
# Once you have performed your curve fit and plotted your data on a graph, you can superimpose the curve you found on the plot of your data to see whether the curve fits the data well or not.
# Start with a plot of your data:
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# Follow these instructions to add a curve plot to your graph:
# 1.  Click in the y-axis placeholder of your plot and press [Spacebar] until the blue editing lines enclose the argument already there.
# 2.  Type [,] for a new placeholder, and enter the name of the function representing the curve that fits your data, for example, g(x).
# 3.  Click in the x-axis placeholder and follow the same steps, but this time enter the name of the independent variable of your function, for example, x.
# 4.  You may notice that the default range of the independent variable does not sufficiently cover the data. In which case, define an independent range variable above the graph such as x:0;40.
# Try to follow these steps using the graph, above.
## Example
# In the previous example, time and population were defined. Use them again here and perform a least squares fit on the data.
fit := line(time, population)
fit = [-38; 6.20714]
# Now, these results can be used in other definitions or referenced directly in calculations or a graph. Be sure to use an array subscript to refer to these values. For example, here we define b and m as the first and second values in the vector.
b := fit[0]  # y-intercept
m := fit[1]  # slope
# Then, you can define a function that uses these values:
f(x) := m*x + b
# And, view that function and the original data in the same graph:
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# Is a straight line a good fit for this data? Not really. In the next section, we fit this data to an exponential function to see if that does a better job.
## To Perform a Specialized Curve Fit
# There are built-in curve fitting functions for the most common model functions: exponential, logistic, logarithmic, sinusoidal, and power. In addition, you can use one of the generalized curve fitting functions to specify your own model function.
# Here are instructions for using the expfit function to get the coefficients for the exponential model function, g(x) == a*e^(b*x) + c. Most of the other specialized curve fitting functions work the same way. For more information about how to use the other curve fitting functions, see the Data Analysis QuickSheets. In particular, see Using Linfit: Logarithmic Regression and Using Genfit: Power Regression.
## The expfit Function
# 1.  In a blank spot below your data tables, first, define a vector containing your guesses for the three coefficients. To define this vector, type guess:.
# 2.  For the right side of the definition, type [Ctrl]m to get the Insert Matrix dialog box and specify 3 rows and 1 column. In the vector placeholders, enter guesses for the three coefficients. Enter any values to start; refine them later. Note: This argument is optional for expfit.
# 3.  To define the fit, enter the name of the variable that will contain the results of the fit followed by the definition equals; for example, type efit:
# 4.  For the right side of the definition, choose Function from the Insert menu to get the Insert Function dialog box. In the list of all functions, click on "expfit" and then click OK.
# 5.  In the three placeholders provided, enter the names of the independent data variable, the dependent data variable, and the guess vector, in that order, and press [Enter].
# 6.  To see the results of the fit, type efit=. The three coefficients are given in the order they are specified in the model function.
## Example
# In the previous example, time and population were defined. Use them again here and perform a fit to the exponential model function.
efit := expfit(time, population)
efit = [12.1951; 0.0861055; -15.2703]
# Again, these results can be used in other definitions or referenced directly in calculations or a graph. The definition you most likely need to create is the model function using your results. First, we define the three coefficients:
a := efit[0]
b := efit[1]
c := efit[2]
# Then, define the function:
g(x) := a*e^(b*x) + c
# Now, view that function and the original data in the same graph:
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# This is a much better function to fit to the data, as you can see from the graph. It is typical, however, to do some sort of error analysis on the data and the fit to determine exactly how well the curve fits the data.
## To Analyze the Quality of the Fit
## To Plot the Data and the Curve on the Same 2D Graph
# Now check to see if this function curve fits the data well or not.
# With the results of your analysis:
efit := expfit(time, population)
efit = [12.1951; 0.0861055; -15.2703]
a := efit[0]
b := efit[1]
c := efit[2]
g(x) := a*e^(b*x) + c
# And a plot of your data:
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# Follow these instructions to add a curve plot to your graph:
# 1.  Click in the y-axis placeholder of your plot and press [Spacebar] until the blue editing lines enclose the argument already there.
# 2.  Type [,] for a new placeholder and enter the name of the function representing the curve that fits your data, say, g(x).
# 3.  Click in the x-axis placeholder and follow the same steps, this time entering the name of the independent variable of your function, say, x.
# 4.  You may notice that the default range of the independent variable does not sufficiently cover the data. In which case, define an independent range variable above the graph such as x:0;40.
# Try following these steps using the graph, above.
## To Calculate Correlation
# One way to decide whether the function is a good fit for the data is by calculating a correlation. To calculate a correlation:
# 1.  In a blank spot below the results of your analysis, enter the built-in correlation function by choosing Function from the Insert menu and selecting "corr" from the function list.
# 2.  The corr function takes two arguments, the function evaluated over the set of x-coordinate data and the y-coordinate data. So, for example, enter your corr function as corr(time,population)= for the example above.
# 3.  The closer this result is to 1, the better the fit.
# Try it, below:
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