# Title: Progamming
# Description: Tutorial on Mathcad's programming operators.
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# FEATURES IN-DEPTH
# tutorials
# Programming
# This tutorial explores some of Mathcad's built-in programming operators and facilities.
# Here are the topics covered in this tutorial:
# To Program Operators and Local Assignments
# To Combine Multiple Operations and for Loops
# To Branch with if and otherwise Operators
# To Loop and Exit with the while Operator
# To Trap Errors with the on error Operator
# Other tutorials show how you can use constructs in Mathcad to create your own functions and to iterate through calculations using range variables and arrays. Mathcad programs enable you to build more complicated compounds and iterative calculations.
## To Program Operators and Local Assignments
# Mathcad programs are constructed with operators, just like many calculus or matrix expressions. You cannot type the Mathcad programming keywords, such as for, if, and while. You must use the Programming toolbar or the appropriate keystrokes to enter the operators, which show the desired keyword along with placeholders for the arguments.
# You can make assignments in Mathcad programs just as you can in your worksheet. When the assignments occur in programs, they are local assignments, that is, they are only true with the program operator that contains them, and are not recognized elsewhere in the worksheet. They can even override other worksheet definitions just within the program.
# 1.  To view the Programming toolbar, choose Toolbars > Programming from the View menu, or use the icon shown at right on the Math toolbar.
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# 2.  To begin creating programs, choose Add Line from the toolbar, or type ].
# 3.  In the first placeholder, enter the name of a local variable (for example, x).
# 4.  Choose the local definition operator (the left-arrow) from the toolbar, or type { and type a value or expression for x, such as 6*34.
# 5.  In the following placeholder, type x, then type [Spacebar]= to select the whole program and evaluate it.
x ← 6*34
x
= 204
# The last line of this program simply returns the value x. If you wish, you can use the return operator (type [Ctrl] [|]) to specifically show what this last line does. Note that the variable x is not defined outside of the program.
x ← 6*34
return x
= 204
x =  # error: This variable is undefined.
## To Combine Multiple Operations and for Loops
# Any combination of Mathcad expressions can be conveniently wrapped in a program, either to group expressions for compactness, or to iterate in a particular way that would be difficult to do with range variables and other worksheet-level constructs. Let's build a program that calculates the residuals and the sum of squares error from a polynomial regression all in one step.
# 1.  Define a function Res(X,Y,n). Choose Add Line from the Programming toolbar (or type ]) to begin a new program.
# 2.  In the first placeholder, locally assign ({) the output of the regress function to c.
# 3.  Using the for operator from the toolbar (or type [Ctrl]"), enter a range over which to loop in the placeholders by typing i[Tab]0;last(X).
# 4.  In the placeholder below the for operator, type e[i [Spacebar] {Y[i [Spacebar] - interp(c,X,Y,X[i).
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# Note: To add lines after a for loop, you have to select the whole expression, otherwise you'll nest more instructions inside the loop.
# 5.  Select the whole for expression in the editing lines, and add another line to the program. In the placeholder below the loop, type out[0 [Spacebar] { e.
# 6. Once again, select the whole line that assigns out_0, add another line, and type out[1 [Spacebar] { [Ctrl]4 e^2.
# 7. Once again, select the whole line that assigns out_1, add another line, and type [Ctrl]| out.
## Example
Res(X, Y, n) :=
    c ← regress(X, Y, n)
    for i ∈ 0 .. last(X)
        e[i] ← Y[i] - interp(c, X, Y, X[i])
    out[0] ← e
    out[1] ← sum(e^2)
    return out
# This function takes a pair of X-Y data vectors and an integer regression polynomial order n. It doesn't explicitly say to return the vector out because programs return the last thing they calculate by default.
X := [0; 0.1; 0.35; 0.7; 1]
Y := [0; 1; 9; 1; 4]
n := 2
poly2 := Res(X, Y, 2)
poly2 = [[-0.526618; -1.11528; 4.26763; -4.14529; 1.51956]; 39.2264]
# The program returns the residuals as a vector nested in the first element of the return vector.
transpose(poly2[0]) = [-0.526618, -1.11528, 4.26763, -4.14529, 1.51956]
# Since programs, like any Mathcad expression, can only have one result, it's convenient to return multiple calculation results stacked into a single vector.
#
# The function Res now behaves like any other user-defined function. For example, we can call it with a range variable as the argument defining the order of the polynomial, to compare the fits.
or := 1 .. 4
err[or - 1] := Res(X, Y, or)[1]
err = [50.7765; 39.2264; 13.9884; 0]
## To Branch with the if and otherwise Operators
# 1.  Define a function PW(x,n). Choose Add Line from the Programming toolbar (or type ]) to begin a new program.
# 2.  In the first placeholder, type sin(x*p[Ctrl]g/n). Select the whole sin expression and choose the if operator from the Programming toolbar, or type }.
# 3.  In the new placeholder to the right of if, type 0<x<n.
# 4.  Repeat this process for two new if statements, one showing the value for x less than or equal to 0, and one for x greater than or equal to n.
## Example
PW(x, n) :=
    sin(x*π/n) if 0 < x < n
    -x/n if x ≤ 0
    (x - n)/n if x ≥ n
# This piecewise function may be easier to enter if you use the comparison operators from the Boolean toolbar (choose Toolbars > Boolean from the View menu).
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# Mathcad evaluates each if statement regardless of whether the previous if statements were true or false. It is possible to get the result of an if clause on a lower line than you intended when a subsequent condition also evaluates to true.
#
# When the if statements in a program do not cover all the possible inputs and you call the function with a value that falls through, you get the last value evaluated by the program.
## Example
test(n) :=
    val ← cos(π/n)
    1 if val == 0.5
    2 if val < 0.5
test(0.5) = 1
test(6) = 0.866025
test(3/5) = 0.5
cos(5*π/3) = 0.5
# In this perplexing example the variable val is the last thing calculated for the first two values of n. Both if tests fail, so val is returned. You might have expected the last case, cos(5π/3), to produce 0.5, but the first test does not catch it because of small numerical accuracy differences. Although the result is incorrect, it doesn't cause an error, so it can be very hard to spot and debug.
#
# Programs require a statement that can handle the cases you don't want to specify explicitly. This is what you use the otherwise operator for.
test2(n) :=
    val ← cos(π/n)
    1 if round(val, 2) == 0.5
    2 otherwise
test2(0.5) = 2
test2(6) = 2
test2(3/5) = 1
# Note that the otherwise operator only refers to the if operator that immediately precedes it. If you want to exit from a function when a condition is true, couple the if operator with a return operator, also on the Programming toolbar.
## Example
type(x) :=
    return "complex" if Im(x) ≠ 0
    return "integer" if floor(x) == x
    return "float" otherwise
type(2.6) = "float"
type(sqrt(-1)) = "complex"
type(-9) = "integer"
# Without the explicit use of the return operator, any complex value with integer components would be listed as type "integer" since both the first and second if statements would evaluate to true as the program executes.
## To Loop and Exit with the while Operator
# Sometimes you don't know exactly how many iterations through a procedure are required before a condition is met. You could pick a huge number of iterations and set up a for loop, but it might be a waste of time and computation and still doesn't guarantee that the program finishes.
# 1.  Define a function Newton(x). Choose Add Line from the Programming toolbar (or type ]) to begin a new program.
# 2.  In the first placeholder, type eps{10^-6.  In the next placeholder, likewise locally assign r to x/2 by typing r{x/2.  Select the whole expression and add another line.
# 3.  In the new placeholder, type rnew{r/2[Spacebar]+x/2*r. Select the whole expression and add another line.
# 4. Choose the while operator from the toolbar, or type [Ctrl]].
## Example
Newton(x) :=
    eps ← 10^-6
    r ← x/2
    rnew ← r/2 + x/(2*r)
    while |rnew - r| > eps
        r ← rnew
        rnew ← r/2 + x/(2*r)
    rnew
# The while operator executes all the statements in the loop until the condition is false. The program above uses a variation of Newton's method to find approximations to square roots within some value of eps.
Newton(2) = 1.41421
sqrt(2) = 1.41421
## To Trap Errors with the on error Operator
# The on error operator returns the expression on the right, unless it is in error, in which case it returns the expression on the left.
# 1.  Define f(x), and in the placeholder after the := type arg(10^-2).
# 2.  Choose the on error operator, or press [Ctrl] ['], and in the placeholder, type arg(x).
## Example
# Using the on error operator you can return another value that lets subsequent calculations continue without failing.
f(x) :=
    try
        arg(x)
    on error
        arg(10^-2)
n := 0 .. 3
Z[n] := n*(1 + n*1j)
vectorize(f(Z)) = [0; 0.785398; 1.10715; 1.24905]
vectorize(arg(Z)) =  # error: This value cannot be 0.
# You can also use the on error operator to produce a customized error message (click on the evaluation of f(0) below to see it), which might provide a better alternative to the Mathcad error in some situations.
f(x) :=
    try
        1/x
    on error
        return error("x must not be 0")
f(0) =  # error: x must not be 0
1/0 =  # error: Divide by zero.
f(2) = 0.5
# For more programming examples and usage tips, see the Programming QuickSheets and online Help.
# The Program Debugging tool will help you spot errors in your programs.
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