# Title: Calculus in Mathcad
# Description: Performing calculus with Mathcad.
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# FEATURES IN-DEPTH
# tutorials
# Calculus in Mathcad
# You can use Mathcad to perform basic calculus functions both numerically and symbolically. This tutorial shows you various methods for finding limits, sums, derivatives, and integrals.
# Here are the topics covered in this tutorial:
# Limits
# Sums and Iterated Products
# Derivatives
# Integrals
# Indefinite Integrals
# Higher Order Derivatives
## Limits
# Mathcad only evaluates limits symbolically. To find a limit:
# 1.  On the Calculus toolbar, click the two-sided limit button or type [Ctrl] L to insert the two-sided limit operator. (Choose Calculus from the View > Toolbars menu.)
# 2.  Fill in the three placeholders of the limit operator.
# 3.  On the Symbolics toolbar, click the symbolic equal sign (→) or type [Ctrl] [.] to get a result.
# The buttons for right- and left-sided limits are also located on the Calculus toolbar. Note that if you want to find a limit to positive or negative infinity, be sure to use the infinity symbol located on the Calculus toolbar or type [Ctrl] [Shift] Z.
## Examples
# Here are two examples of limits evaluated symbolically:
limit(1/x, x → ∞) → 0  # two-sided limit
limit(x/(x - 2), x → 2+) → ∞  # right-sided limit
# Try this one yourself. Click anywhere in the expression and type [Ctrl] [.] then click outside of the expression for it to evaluate:
limit(x/(x - 2), x → 2-)  # left-sided limit
# Note: Though the results of limit operations are often numeric, Mathcad can only perform limit operations symbolically using the symbolic equal sign. Alternatively, you can use the Simplify command on the Symbolics menu.
## Examples
# Here is an example of a limit expression evaluated from the Symbolics menu.
limit(x^2/(x - 1), x → 1)  # simplifies to  # undefined
# Try this one yourself. Select the entire expression, below, and choose Simplify from the Symbolics menu:
limit(sin(x)/x, x → 0-)
## Sums and Iterated Products
# Mathcad can evaluate sums and iterated products both numerically and symbolically. In general, if you have a sum that contains a variable in either the starting or ending value of its range, then you must evaluate the sum symbolically. To find a sum:
# 1.  On the Calculus toolbar, click the summation button or type [Ctrl] [Shift] 4 to get the summation operator.
# 2.  Fill in the four placeholders of the summation operator.
# 3.  For numeric evaluation, press = to get a result.
# 4.  For symbolic evaluation, click the symbolic equal sign (→) on the Symbolic toolbar, or type [Ctrl] [.] to get a result.
## Examples
# Here are two examples of sums:
sum(n^2, n = 1 .. 3) = 14  # numeric
sum(n^2, n = 1 .. k) → (k*(k + 1)*(2*k + 1))/6  # symbolic
# Try these examples yourself. Click anywhere in the first expression and press =. Click anywhere in the second expression and type [Ctrl] [.] then click outside the expression for a result.
sum(sqrt(n)/sqrt(2), n = 1 .. 4)  # approximate
sum(sqrt(n)/sqrt(2), n = 1 .. 4)  # exact
# Note: As you can see, it is also helpful to use the symbolic equal sign to get exact solutions when the numeric equal sign gives you a decimal solution. If you are calculating numeric results involving fractions, roots, or π, consider using the symbolic equal sign.
## Examples
# Here are two examples of iterated products. To get the iterated product operator, click its button on the Calculus toolbar or type [Ctrl] [Shift] 3:
product(n^2/(n + 1), n = 1 .. 5) = 20  # numeric, using the = sign
product(1/n, n = 1 .. 3) → 1/6  # exact numeric, using the symbolic equal sign
## Derivatives
# To find a derivative:
# 1.  Define the variable value at which you want to differentiate the expression.
# 2.  Type ? or click the Derivative button on the Calculus toolbar to get the derivative operator. (Choose Calculus from the View > Toolbars menu.)
# 3.  Fill in the two placeholders of the derivative operator.
# 4.  For numeric evaluation, press = to get a result.
# 5.  For symbolic evaluation, click the symbolic equal sign (→) on the Symbolic toolbar or type [Ctrl] [.] to get a result.
# Note: As with any operation that can be carried out using the symbolic equal sign, you can also use the Variable > Differentiate command from the Symbolics menu. Be sure to first select a variable in an expression.
#
# It is often necessary to use either the symbolic equal sign or the Simplify command to find an exact numeric result, particularly if the result contains fractions, roots, or constants such as π or e.
## Example
# To find the derivative of x^2 at x = 4, first define x so you get the derivative at that particular point.
x := 4
# Then insert the derivative operator by pressing ?. You see the derivative operator with placeholders:
# Click on the placeholder to the right of the derivative and type x^2. Click on the bottom placeholder and type x.
d/dx(x^2)
# Press = .
d/dx(x^2) = 8
## Examples
# Here are other examples of derivatives:
# 1.
d/dz(sin(z)) → cos(z)
# Symbolic: The variable x was already defined, above, as having the value 4. So, a different variable of differentiation was used here in order to get an expression in terms of the variable. Alternatively, you can "reset" the variable by defining x equal to x.
# 2.
z := π  # Numeric: In this case, even though the value at which the expression is differentiated is p, the result is an integer.
d/dz(sin(z)) = -1
# 3.
d/dz(tan(z)/z) = 0.31831  # Numeric: In this case, the numeric result is an estimate to three digits of precision.
# 4.
d/dz(tan(z)/z) → 1/π
# Exact Numeric: This may look like a symbolic expression, but it is in fact numeric. If you copy and paste a result into its own region and again evaluate it with the numeric equal sign, you'll see a further simplified result.
(1 + tan(π)^2)/π - tan(π)/π^2 → 1/π
# Try this one yourself. Select the entire expression below and choose Simplify from the Symbolics menu:
d/dw(1/w)
# Note: When you evaluate an expression using the Simplify command, you may want comments between the expression and the result. To change the style of this result, choose Evaluation Style from the Symbolics menu.
## Integrals
# To find an integral:
# 1.  Type [&]  or click the Definite Integral button on the Calculus toolbar to get the integral sign.
# 2.  Fill in the placeholders for the integrand, the upper limit, the lower limit, the function, and the variable over which you want to integrate.
# 3.  For numeric evaluation, press = to get a result.
# 4.  For symbolic evaluation, click the symbolic equal sign (→) on the Symbolic toolbar or type [Ctrl] [.] to get a result.
# Note: To get a symbolic result, you can also use the Simplify command on the Symbolics menu; or, to get an exact numeric result use the symbolic equal sign.
## Example
# To find the integral of x^2 from 0 to 9, first insert the definite integral operator by typing &. You see the integral operator with placeholders:
# Click on the placeholder to the right of the integral symbol and type x^2. Click on the placeholder to the right of the "d" and type x. Fill in the lower and upper placeholders with 0 and 9, respectively.
# Note: You can also use the [Tab] key to jump from placeholder to placeholder.
integral(x^2, x = 0 .. 9)
# Press = .
integral(x^2, x = 0 .. 9) = 243
## Examples
# Here are other examples of definite integrals:
# 1.
integral(1/3*x^3, x = 1 .. 3) = 6.66667  # Numeric: The numeric result is an estimate to three digits of precision.
# 2.
integral(1/3*x^3, x = 1 .. 3) → 20/3  # Exact Numeric: Here is the same calculation evaluated using the symbolic equal sign.
# Try this one yourself. Click on the integral expression below and type [Ctrl] [.] to get a result:
integral(1/x, x = 1 .. n)
# Symbolic: When one of the limits of integration is a variable, or if there is a variable other than the variable of integration in the function, use the symbolic equal sign to evaluate the integral.
## Indefinite Integrals
# For indefinite integrals, follow the steps outlined above for definite integrals, but type [Ctrl]i or click the Indefinite Integral button on the Calculus toolbar to get the indefinite integral operator. Indefinite integrals are always evaluated symbolically. So, either use the Simplify command on the Symbolics menu or the symbolic equal sign.
## Examples
# An indefinite integral evaluated symbolically:
f(x) := integral(x^2*sin(x), x) → 2*x*sin(x) - cos(x)*(x^2 - 2)
# Note that you can assign the symbolic result to a numeric function
f(1) = 2.22324
# Try this one yourself. Click on the integral expression below and type [Ctrl][.] to get a result:
integral(x^2*sin(x), x)
# Note: Mathcad never puts in the integration constant C. This is because Mathcad gives you a single solution rather than a formula for all the antiderivatives in the solution set. Be sure to add the C yourself if that is how your solution must appear.
# Another way to integrate an expression indefinitely is to enter the expression and click on the variable of integration. Then choose Variable > Integrate from the Symbolics menu. Do not include the integral operator. If you include the integral in the selected expression, you are taking a double integral.
## Higher Order Derivatives
# For higher order derivatives, follow the steps outlined earlier for first derivatives, but type [Ctrl] [Shift] [/] or click the Nth Derivative button on the Calculus toolbar. Fill in the order of the derivative in the superscript placeholder of the denominator; Mathcad copies it automatically to the placeholder in the numerator.
# Higher order derivatives may be evaluated numerically or symbolically.
## Examples
# Higher order derivative evaluated numerically:
t := 1
d^3/dt^3((1 + t)^5) = 240
# Higher order derivative evaluated symbolically:
x := x
# Note: Here we "reset" the variable of differentiation to itself. If we did not, the derivative operation would evaluate the expression using the last defined value of x, which is x = 4, near the top of the worksheet.
d^3/dx^3((1 + x)^5) → 60*(x + 1)^2
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