# Title: Controlling Calculations
# Description: Controlling calculations and calculation order.
# Worksheet setting: ORIGIN = 1
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# FEATURES IN-DEPTH
# tutorials
# Controlling Calculations
# Mathcad updates worksheets automatically and calculates from top to bottom and left to right. Sometimes, however, you need more control over the calculations. This tutorial covers some techniques for controlling calculations and the order in which a worksheet is processed.
# Here are the topics covered in this tutorial:
# To Interrupt Calculations
# Manual Mode
# Inactive Equations
# Global Variables
## To Interrupt Calculations
# Mathcad can easily perform long, often time-consuming, calculations such as factoring a huge number or adding up many terms of a series. However, if you don't want to wait for the answer, you can interrupt the calculation and restart it later if you want to.
# To interrupt a calculation:
# •  Press [Esc] when a calculation is in progress.
# To restart the calculation:
# •  Click on the calculation and press [F9] or choose Calculate > Calculate Now from the Tools menu.
## Example
# Try interrupting the calculation of the sum below. Right-click on it and choose Enable Evaluation to initiate the calculation, and then immediately press [Esc]. Mathcad asks if you want to interrupt the calculation. Click OK and you'll see that some piece of the sum gets a red error indicator and the error message tells you that you interrupted the calculation. To restart the calculation, press [F9].
sum(1/n, n = 1 .. 10000000) =  # no stored result; disabled
## Manual Mode
# If you are building or editing a worksheet that contains a lot of long calculations, it can be counterproductive and annoying to have Mathcad attempt to recalculate the whole worksheet after each change. To turn off the automatic recalculation, go to the Tools menu and uncheck Calculate > Automatic Calculation. You can still update your whole worksheet at any point by selecting Calculate > Calculate Worksheet or by pressing [Ctrl][F9]. When you are ready to resume automatic updating, recheck Automatic Calculation.
## Inactive Equations
# Sometimes you want to keep some definitions around for future use without having them active in your calculations. For example, you might want to try out some alternative definitions of a function.
# You can disable any definition following these steps:
# 1.  Right-click on the definition.
# 2.  Choose Disable Evaluation from the menu. Mathcad tags the definition with a little box on the right, like this:
f(x) := x^2 - 2  # disabled  # inactive equation
# You can read the definition, but Mathcad ignores it when calculating. To turn the equation back on:
# 1.  Right-click on the definition.
# 2.  Choose Enable Evaluation from the menu.
# If you just want to display an equation and don't plan to use it as an active definition, you can always use the bold equal sign in that specific expression by typing [Ctrl]=. This equal sign doesn't start any numerical computation; the expression just sits there in your document, like this:
f(x) == x^2 - 2  # equation defined with bold equal sign
# Note: You can format this equal sign to look like a regular equal sign. Right-click on the equal sign and choose View Equality As > Equal from the menu. You get this:
f(x) == x^2 - 2  # equation defined with bold equal sign, formatted to look like a regular equal sign
# For more information about special formatting for math regions, see the Formatting Math Regions tutorial.
## Example
# Try this one yourself. Both definitions for x, below, have been disabled. Enable calculation on the first definition to see the effect on the function evaluation below it. Then, enable calculation on the second definition:
x := 2.9  # disabled
x := 3.1  # disabled
f(x) := x/(x - 3)
f(x) =  # error: This variable is undefined.
# Note that even though there are two definitions for x in this worksheet, only the definition that immediately precedes the calculation is used. Mathcad uses a top to bottom, left to right protocol when updating the calculations in a worksheet. So, x may initially get a value of 2.9, but when Mathcad sees a new definition for x to its right, that is the value it uses.
## Global Variables
# In Mathcad you can use a variable anywhere below or to the right of the position where you defined it. However, this protocol is often inconvenient. For this reason, Mathcad allows you to define a variable globally. In calculating the worksheet, Mathcad reads a globally defined variable first, no matter where that variable is located in your worksheet.
# To define a variable globally, type the variable name then type [Shift] ['], which is the ~ character. You get a triple equal sign.
## Example
# Let's say you have a long calculation that depends on a variable, and at the end you plot the result in a graph. Now you want to change the value of that input variable and see how the graph changes. Of course you could scroll back up, change it, and scroll down to look at the graph, but it's more convenient to see the change immediately, and global variables let you do this. Here's an example - the calculation is short but you'll get the idea.
g(b) := sin(a*b)
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a ≡ 4
# Notice that a is defined below the definition of g(b), even though g(b) is dependent on a. Normally this would produce an error, but the definition of a is global. So, Mathcad knows the value of a throughout the worksheet. When you edit the right side of the definition of a, by changing 4 to 10, the plot updates immediately. Try it!
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