# Title: Images and Image Processing
# Description: Using Mathcad for image processing.
# Worksheet setting: ORIGIN = 1
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# FEATURES IN-DEPTH
# tutorials
# Images and Image Processing
# Mathcad can display images anywhere in your worksheet. It can also do image processing, because you can read any image into a matrix, transform the matrix using Mathcad functions, and then display the matrix as an image. This section illustrates some of the things you can do with images in Mathcad.
# Here are the topics covered in this tutorial:
# To Display Images
# To Modify a Picture
# The Picture Toolbar
# The Properties Dialog Box
# To Read a Grayscale Image into a Matrix
# Grayscale Image Processing
# To Read a Color Image into a Matrix
# To Save Your Images
## To Display Images
# To display an image file in Mathcad:
#
# 1.  Click in blank space and choose Picture from the Insert menu.
# 2.  In the placeholder, type " to create a string.
# 3.  Type the name of a BMP, GIF, JPEG, or other image file including the extension. If the file is in your working directory (that is, the same directory in which your worksheet has been saved), Mathcad finds it and displays the picture. If it's not in the working directory, type a full path instead of just the name of the file.
## Example
# Here are two examples that are on your Mathcad CD, one a familiar image in grayscale, and the other a color bitmap.
# [component: inputs "mona.bmp"]
# [component: inputs "dog.bmp"]
# Each of the bitmap images above consists of pixels - tiny squares that are shades of gray in the Mona Lisa image and colored in the dog picture. In a grayscale image, the pixel values are numbers between 0 (black) and 255 (pure white). In a color image, each pixel is determined by three numbers between 0 and 255, which give the amount of red, green, and blue that are combined to make the pixel's color.
## To Modify a Picture
## The Picture Toolbar
# Click on the picture below and notice two things: 1) the picture gets a "hashed" border around it and 2) the Picture toolbar appears.
# [component: inputs "dog.bmp"]
# You might get this, depending on where the picture toolbar is located on the screen. The picture toolbar can be moved anywhere on the screen. Try moving it to the right of the picture, above. To hide the picture toolbar and return the picture to normal display, click elsewhere in the worksheet.
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# To see what each button on the toolbar does, hover over the button with your cursor and read the tooltip. For example, if you want to change the orientation of the picture, click one of the buttons along the top of the toolbar. The button in the upper right corner resets the orientation back to normal. Click on the picture above and try to flip the picture upside down and then back again!
# If you want to undo all the changes you have made to the picture and reset it back to its original state, right-click the picture and choose Reset All Display Parameters from the menu. Notice that all the operations available on the toolbar are also on this menu.
## The Properties Dialog Box
# You can make many modifications to a picture through the Properties Dialog Box. Just right-click on the picture below and select Properties from the menu to see the various options.
# [component: inputs "dog.bmp"]
## To Read a Grayscale Image into a Matrix
# To process an image, you can read the pixel values into a numerical array, perform some arithmetic on the numbers, and then re-display the array as an image. Start with the grayscale image of the Mona Lisa. First read it into a matrix using the READBMP function.
M := READBMP("mona.bmp")
# Let's see what a small piece of M looks like as a matrix of numbers. Here are 35 pixels in the upper left-hand corner of the Mona Lisa image:
M = [
    143, 147, 152, 151, 152, 152, 151, 154, 147, 156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;
    154, 138, 154, 143, 147, 152, 159, 161, 149, 163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;
    147, 136, 145, 152, 152, 154, 151, 151, 136, 135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;
    151, 145, 158, 154, 142, 151, 151, 145, 156, 147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;
    149, 149, 163, 161, 151, 161, 165, 152, 165, 158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;
    168, 161, 163, 158, 154, 163, 158, 172, 177, 170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;
    166, 152, 149, 149, 170, 170, 166, 175, 166, 163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;
    156, 168, 154, 165, 163, 161, 172, 174, 161, 166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;
    177, 166, 163, 159, 152, 156, 152, 166, 181, 174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;
    163, 163, 154, 158, 166, 168, 154, 175, 170, 163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]
# The full image is a huge matrix. You can click in the matrix above to see the extent of it. To see exactly how many pixels it has, multiply the number of rows by the number of columns.
rows(M)*cols(M) = 38880
## Grayscale Image Processing
# Processing a grayscale image involves changing the pixel values in some systematic way. This task is especially easy in Mathcad because you can add a number to each element in an array just by adding the number to the array's name, and you can multiply each element just by multiplying the array name.
## Example
# For example, to divide all the pixel values in mona.bmp by 2 and then add 120, define
M1 := M/2 + 120  # which looks like
# [component: inputs M1]
# Note: Here we chose Picture from the Insert menu and typed the name of the matrix M1 in the placeholder.
## To Read a Color Image into a Matrix
# To process a color image, you can read the pixel values into a numerical array, do some arithmetic on these numbers, and then re-display the array as an image. This procedure is the same as processing a grayscale image but now you have one more variable to play with: the mix of the red, green, and blue components in the image. First read the color dog image into a matrix, using the
D := READRGB("dog.bmp")
D = [
    48, 48, 48, 48, 48, 48, 40, 40, 40, 40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;
    56, 56, 56, 48, 56, 48, 48, 48, 48, 48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;
    48, 48, 48, 48, 48, 48, 48, 48, 48, 48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;
    48, 48, 38, 38, 38, 38, 38, 48, 48, 48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;
    48, 48, 40, 40, 40, 40, 40, 38, 38, 38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;
    48, 56, 48, 48, 48, 56, 48, 48, 48, 40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;
    48, 48, 48, 48, 48, 48, 48, 56, 48, 48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;
    48, 48, 48, 48, 56, 48, 48, 56, 48, 56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;
    48, 48, 48, 48, 48, 56, 48, 48, 48, 56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;
    48, 48, 56, 56, 56, 48, 48, 48, 48, 48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]
# D is a special kind of matrix: the three color components are packed side by side into a single array. If you display D as a grayscale matrix, here's what you'll see:
# [component: inputs D]
# The first copy of the image gives the red intensity at each pixel, the second copy gives the green, and the third gives the blue. Usually before you do any image processing you want to separate the three components using the submatrix function. Here's how it works:
# First find the number of rows and columns in the packed matrix:
rows(D) = 122
cols(D) = 372
# The image has one-third as many columns, since D puts three copies of the image side by side. To get at the three components, separate pieces according to column number. The image width is w := cols(D)/3 or w = 124. So the three components are
ORIGIN = 1
rdog := submatrix(D, 1, 122, 1, w)
gdog := submatrix(D, 1, 122, w + 1, 2*w)
bdog := submatrix(D, 1, 122, 2*w + 1, 3*w)
# Check by viewing these components as grayscale images:
# [component: inputs rdog]
# [component: inputs gdog]
# [component: inputs bdog]
# To reconstruct a color image from its three components:
#
# 1.  Choose Picture from the Insert menu.
# 2.  In the placeholder, type the three components separated by commas, like this: rdog, gdog, bdog
#
# Click on each picture below to see what the arguments are.
# [component: inputs rdog, gdog, bdog]
# This image matches the original bitmap, but now you can play with the three color components. For example, suppose you divide all the blue pixel values by 2:
# [component: inputs rdog, gdog, bdog/2]
# With less blue the picture now has a very yellowish tone. What if you switch the red and green components? Green and purple fur!
# [component: inputs gdog, rdog, bdog]
# What if you use the average of the red and blue components for the green? The grass is brown and the daisies are orange, but the dog's fur looks quite realistic.
# [component: inputs rdog, (rdog + bdog)/2, bdog]
# There are many more transformations you can carry out using the three color components.
## To Save Your Images
# When you have transformed your image, how do you save it so you can use it in other programs, share it with your colleagues, and keep it for your archives? Mathcad provides two functions for writing an image out as a .bmp file. If D is a grayscale image then
WRITEBMP("mypix") := D
# writes it to your disk as a file named mypix.bmp.
#
# If you have the color components of a color image in three matrices called red, green, and blue, first combine them into a single matrix using the augment function, like this:
image := augment(red, augment(green, blue))  # disabled
# the definition
WRITERGB("mycolor") := image  # disabled
# writes your image to a color bitmap file called mycolor.bmp. Note the equations above are disabled. To enable them, right-click on the equation and choose Enable Evaluation.
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