# Title: Entering Math Expressions
# Description: Entering math in a worksheet.
# Worksheet setting: ORIGIN = 1
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# GETTING STARTED PRIMERS
# tutorials
# Entering Math Expressions
# Math in a Mathcad worksheet appears in familiar math notation - division with a fraction bar, exponents in a raised position, and built-up fractions just as you would see in a book. Here are some quick exercises to learn a few keystrokes and toolbar buttons. You will also learn how to get a numeric result and to modify its format.
## Definitions
# numeric expressions - expressions involving numbers and operators
# symbolic expressions - expressions involving numbers, unknowns (variables), and operators
# result format - type of result, including: decimal, fractional, scientific, etc.
## Practice
## Entering a Numeric Expression
# Tip: Don't press the Spacebar between parts of the expression. Mathcad enters the correct spacing as you type.
# Type: | See:
# 2+1/2
2 + 1/2
# Try it!
# Type: | See:
# (9+3)/2*4-5
(9 + 3)/(2*4 - 5)
# Try it!
# Type: | See:
# 3+\2
3 + sqrt(2)
# Try it!
## Entering a Symbolic Expression
# Type: | See:
# 3x+2y
3*x + 2*y
# Try it!
# Type: | See:
# \16-d^2
sqrt(16 - d^2)
# Try it!
# Type: | See:
# log(x^2)-log(1000)
log(x^2) - log(1000)
# Try it!
## Using the Calculator Toolbar
# The Calculator toolbar may already be open on your screen, but hidden under the Resources window. Click in the Worksheet window and move the Calculator toolbar over to the far left. Then bring your Resources window back up to make it the "active" window.
# If the Calculator toolbar is not open, then follow these steps in the Worksheet window:
# Select Toolbars > Calculator from the View menu.
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# Try it!
# Tip: All toolbars are floating, so you can move one wherever you want by dragging it around your screen.
# With your Calculator toolbar in view next to the Resources window, first click in the Resources window, then:
# Click: | See:
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2*π
# Try it!
# Click: | See:
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|-8.9|
# Try it!
## Getting a Result
# Click: | See:
# 2+1/2=
2 + 1/2 = 2.5
# Try it!
# Tip: Notice that the result is in decimal format, the Mathcad default.
# Click: | See:
# [Shift]\-8.9=
|-8.9| = 8.9
# or
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# Try it!
## Changing a Result to Fractional Format
# Click on the right of this result and select Result from the Format menu. Make sure you scroll down enough to see the next set of instructions.
# See:
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2 + 1/2 = 2.5
# Try it!
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# Click Fraction on the Number Format tab and click "OK." | See:
2 + 1/2 = 2.5
## Increasing (or Decreasing) the Digits Displayed in a Result
# Click on the right side of this result: | See:
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8 - 0.000001 = 8
# Try it!
# Select Result from the Format menu. Then, enter "6" for Number of Decimal Places and click "OK."
# See:
8 - 0.000001 = 8
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