# Title: Defining Variables
# Description: How to define a variable in Mathcad.
# Worksheet setting: ORIGIN = 1
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# GETTING STARTED PRIMERS
# tutorials
# Defining Variables
# Often you need to define a value as a variable to use in subsequent calculations. This worksheet lets you practice defining and viewing single-value and range variables.
## Practice
## Defining a Single-Value Variable
# Type: | See:
# x:2
x := 2
# Try it!
# Type: | See:
# dist:25m
dist := 25 m
# Try it!
# Note: Here, m is a unit, not a variable. Mathcad recognizes some letters as abbreviations for units, so it added the implied multiplication for you. To insert other units you must first type * for multiply. To seem the implied multiplication, click between 25 and m.
# To find the abbreviation for a unit, select Unit from the Insert menu and browse for the units you want.
# Type: | See:
# v.1:20mi/hr
v_1 := 20*mi/hr
# Try it!
# Tip: This definition uses a literal subscript, which is part of the name of the variable. To use a literal subscript press the period [.] key after the variable name.
# See:
# Click on the variable with a literal subscript above (v1) and see that the math editing lines select the whole variable name.
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# Notice that when you type the colon [:] key or press the assignment operator key
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# on the Calculator toolbar, Mathcad displays :=. The assignment operator (colon equals) in Mathcad is used for definitions, or let equals.
## Defining a Range Variable
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# Before starting these exercises, display the Matrix toolbar on your desktop by selecting Toolbars > Matrix from the View menu in the Worksheet window.
# Remember that to use a toolbar with the Resources window, you must move the toolbar to the far left in your Worksheet window. Then bring your Resources window back up to make it the "active" window and position it next to the Worksheet window.
# With your Matrix toolbar in view and your Resources window active:
# Type: | See:
# b:
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# 1 [Tab] 10
b := 1 .. 10
# Try it!
# Tip: You get a range of numbers between 1 and 10 at whole number increments.
# Type: | See:
# k:3.5;12.5
k := 3.5 .. 12.5
# Tip: You get a range of numbers between 3.5 and 12.5 at whole number increments.
# Notice that when you type the semicolon character [;], it displays on the screen as two dots () surrounded by placeholders. This is Mathcad's range variable operator.
# Try it!
# Type: | See:
# d:3.5,4.0;12.5
d := 3.5, 4 .. 12.5
# Tip: You get a range of numbers between 3.5 and 12.5 in increments of 0.5.
# Try it!
# Type: | See:
# q:1/4 [Spacebar] ,1/2 [Spacebar] ;7/4
q := 1/4, 1/2 .. 7/4
# Try it!
# Tip: You get a range of numbers between 1/4 and 7/4 in increments of 1/4.
# Type: | See:
# n:-6,-5.9;6
n := -6, -5.9 .. 6
# Tip: You get a range of numbers between -6 and 6 in increments of 0.1.
# Try it!
## Viewing a Definition
# Type: | See:
# x.start:45ft
x_start := 45 ft
# Try it!
# Type: | See:
# x.start=
x_start = 13.716 m
# Try it!
# Tip: Units are always displayed in the base units of the worksheet. Here the result is given in SI, the default unit system in Mathcad. You can change the default units in Worksheet Options under the Tools menu.
# If you want your range to be in increments other than 1 (the default), enter the next value in the range after the first one. For example, to create a range variable x that goes from 2 to 8 in increments of 0.5, type:
# Type: | See:
# t:2,2.5;8
t := 2, 2.5 .. 8
# Try it!
# Type: | See: | Tip: Range variables are always displayed in a table.
# t=
t = [2; 2.5; 3; 3.5; 4; 4.5; 5; 5.5; 6; 6.5; 7; 7.5; 8]
# Try it!
# Type: | See:
# times:1s,2.5s;7s
times := 1 s, 2.5 s .. 7 s
# Try it!
# Type:
# See:
# Tip: In a range variable, the difference between the starting point and the ending point should be evenly divisible by the increment you have chosen.
# times=
times = [1; 2.5; 4; 5.5; 7] s
# Try it!
# Note: The s next to the table above represents the unit seconds. If you click to the left of the s, you see a hidden dot for multiply between the table and the s.
# To practice calculating results based on variables you have defined in the worksheet, continue to the second part of this primer, Calculating with Variables.
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