# Title: Calculating with Variables
# Description: Using variables to perform calculations.
# Worksheet setting: ORIGIN = 1
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# GETTING STARTED PRIMERS
# tutorials
# Calculating with Variables
# This worksheet lets you practice calculating results based on variables you have defined. Then, you can practice modifying your variable values and watching your calculations update automatically.
## Practice
# Calculating a result based on one or more variables:
# Type: | See:
# x:2
x := 2
# Type: | See:
# y:x^2 [Spacebar] -1
y := x^2 - 1
# Type: | See:
# y=
y = 3
# Try it!
# Type: | See:
# distance:1356ft
distance := 1356 ft
# Type: | See:
# rate.1:distance/42.4s
rate_1 := distance/(42.4 s)
# Type: | See:
# rate.1=
rate_1 = 9.74785 m/s
# Try it!
# Tip: Mathcad uses scientific units (SI) as the default unit. You can change the default unit system under Tools > Worksheet Options.
# Type: | See:
# d:39
# and
# b:52
d := 39
b := 52
# Type: | See:
# k:\d^2 [Spacebar]+b^2
k := sqrt(d^2 + b^2)
# Type: | See:
# k=
k = 65
# Try it!
## Modifying a Variable to Update a Result
# Click the right side of this definition. Backspace over 1, type 3, and press [Enter].
time_1 := 1 hr
# Watch this calculation update:
50 m/time_1 = 0.0138889 m/s
# Change losses from 3 to 4 and press [Enter].
wins := 11
losses := 3
# Watch this calculation update:
wins/(losses + wins) = 0.785714
# Change 10m to 12m and press [Enter].
length_1 := 10 m
# Change the width from 30m to 31.6m.
width := 30 m
# Watch this calculation update:
Area := length_1*width
Area = 300 m^2
# Change 2.9m to 3m.
height := 2.9 m
# Watch this calculation update:
# Tip: Notice that this definition uses definitions already given above. When you calculate a result, you can use any variable or definition above or to the left of the calculation.
Volume := Area*height
Volume = 870000 L
# You can use symbolic calculation to see the substituted values in an expression before it's evaluated:
height*Area explicit, Area, height → 2.9*m*length_1*width = 870 m^3
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