# Title: First Things First
# Description: How the order in which math regions appear can affect calculation.
# Worksheet setting: ORIGIN = 1
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# GETTING STARTED PRIMERS
# tutorials
# First Things First
# All worksheets are comprised of regions - text regions, math regions, graphs, and images. Math regions often depend on other math regions to calculate correctly. Here's an example:
# Note: These exercises require you to work within the Worksheet window. To do so, choose Select All from the Edit menu. Then, either drag or copy and paste all the regions into your Worksheet window.
## Example
# Define a variable:
x := 3
# Then use it, like this: | Or, like this:
x^2 = 9
y := x^2
y = 9
# But, you cannot define a variable-dependent calculation:
sqrt(p + 2) =  # error: This variable is undefined.  # Tip: The red variable with no result indicates an error - if you click on it you see an error message.
# First define your variable:
p := 14
# A definition must appear above or to the left of where it is being used, a procedure referred to as top/down, left/right protocol.
# The following exercises let you practice moving regions such that calculations and definitions work properly. You can also practice aligning regions vertically and horizontally.
## Practice
## Moving Math Regions with Dependencies:
# Make sure you are working in the Worksheet window, as existing regions cannot be moved in the Resources window.
# Drag any region below to correct the definition or calculation in error:
# Tip: Move your cursor to the edge of the rectangle, until you get a black hand cursor. Now you can grab and move the region.
3*X =  # error
X := 2
# Drag any region below to correct the definition or calculation in error:
a/b*d =  # error
# Tip: You can move more than one region at a time by clicking a space near one of the regions and dragging across all the regions. When selected, they have dotted boxes around them.
a := 0.13
b := -3.4
d := 6.982
# Drag any region below to correct the definition or calculation in error:
t1 := 3 hr
# Tip:  Another way to select multiple regions is to click one, hold down the [Ctrl] key and then click another. You can deselect a region the same way, by [Ctrl]-clicking on it.
d := r*t1
r := 60 mph
# Drag any region below to correct the definitions or calculations in error:
time := circumference/speed
circumference := 2*π*R_e
speed := 12*mi/day
R_e := 6.38*10^6*m
## Entering Math Regions in the Right Order
# Enter these math regions in the right order to yield an error-free definition:
# Type:
# Tip: If you enter one definition and press [Enter], your cursor is in the right position to enter another vertically aligned region below it.
# hyp:\leg.1^2 [Spacebar] + leg.2^2
# Type:
# leg.1:20in
# Type:
# leg.2:30in
# Try it!
# Enter these math regions in the right order to yield error-free calculations:
# Type:
# Type:
# Type:
# Tip: If you enter one definition and press [Tab], your cursor is in the right position to enter another horizontally aligned region next to it.
# Vol:Area*Hght | Vol= | Hght:35cm
# Type: | Type: | Type:
# Len:15cm | Wid:20cm | Area:Len*Wid
# Try it!
## Aligning Regions
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# Align these regions vertically by selecting them and clicking the
# button on the main toolbar.
# Make sure you are working in the Worksheet window, as existing regions cannot be moved in the Resources window.
a := 1
b := 2
# Tip: You can also move a group of regions by first dragging over them to select them or by [Ctrl] clicking on each region to get a dotted line. Then you can nudge the regions using the arrow keys.
c := sqrt(a^2 + b^2)
# Rearrange these regions to correct the regions in error. Then, align the regions vertically by selecting them and clicking the
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# button on the main toolbar.
time := distance/rate_1
time =  # error
distance := 2 mi
rate_1 := 30 mph
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# Align these regions horizontally by selecting them and clicking the
# button on the main toolbar.
f := 47.8
f/r + q^3 =  # error
q := 98.6
r := 15
# Rearrange these regions to correct the errors. Then, align the regions either horizontally, vertically, or both by selecting them and clicking
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# or
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# on the main toolbar.
Tes := 273.15 K
Vol := n*Ran*Tes/P
Vol =  # error
n := 1 mol
Ran := 8.314*J/(K*mol)
P := 1 atm
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