# Title: Defining Functions
# Description: Creating a function to repeatedly perform a calculation.
# Worksheet setting: ORIGIN = 1
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# GETTING STARTED PRIMERS
# tutorials
# Defining Functions
# Practice defining functions, calculations that can be used over and over again in your worksheet without being entered repeatedly.
## Example
# Below is a function to define x as the input and 2x + 1 as the output. Notice that you use the assignment operator to define functions, just as you use the assignment operator to define variables in Mathcad.
f(x) := 2*x + 1
# The function is written in function notation, a compact way of saying that f is a rule that takes inputs represented by x and produces an output given by 2x + 1. It says, "What follows is the algebraic definition of what happens when the rule f is applied to the input x."
# If you want to "call" or evaluate that function for a particular value, all you have to type is:
f(2) = 5
# This call performed the calculation 2(2) + 1 automatically by substituting 2 for x in the function f.
## Practice
# Defining and evaluating a function
# Type: | See:
# g(x):15-x^2
g(x) := 15 - x^2
# Try it!
# Type: | See:
# g(2)=
g(2) = 11
# g(3)=
g(3) = 6
# Try it!
# Type: | See:
# d(s):s-1 [Spacebar] /s+1
d(s) := (s - 1)/(s + 1)
# Try it!
# Tip: The algebraic expression on the right-hand side of your function definition must use the variable noted in parentheses on the left-hand side.
# Type: | See:
# d(101)=
d(101) = 0.980392
# d(-101)=
d(-101) = 1.02
# Try it!
# Type: | See:
# L(g):log(g)
L(g) := log(g)
# n:10^30
n := 10^30
# Try it!
# Type: | See:
# L(n)=
L(n) = 30
# Try it!
## Evaluating a Function with a Range Variable
# Type: | See:
# x:0;10
x := 0 .. 10
# Try it!
# Tip: A range variable is a variable that takes on a range of values from one endpoint to another at a specified increment.
# Type: | See:
# f(x)=
f(x) = [1; 3; 5; 7; 9; 11; 13; 15; 17; 19; 21]  # Tip: To perform the same calculation on a range of values, use a range variable in conjunction with a function.
# Try it!
# Tip: The function, f, was defined at the top of the worksheet. As long as a definition is above or to the left of where it is being used, it does not need to be close to calculations using it.
# Type: | See:
# function(y):y^2
function(y) := y^2
# Y:3,3.5;5
Y := 3, 3.5 .. 5
# Try it!
# Type: | See:
# Tip: You can call a function with any variable defined in the worksheet.
# function(Y)=
function(Y) = [9; 12.25; 16; 20.25; 25]
# Try it!
## Modifying a Function to Update Your Calculations
# Inspect the results of evaluating the function, H, over the range variable, Y:
H(x) := ceil(x)
Y = [3; 3.5; 4; 4.5; 5]
H(Y) = [3; 4; 4; 5; 5]  # Tip: The ceil function takes the input and rounds up to the nearest integer.
# Tip: You can display a range variable next to a function evaluated with that variable to show inputs and outputs.
# Highlight ceil on the right side of this function definition and delete it:
# See:
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# Then enter the floor function by typing:
# See:
# Tip: The floor function takes the input and rounds down to the nearest integer.
# floor
H(x) := floor(x)
# Inspect the new results, above.
## Entering a Built-in Function
# To see a scrolling list of built-in functions along with brief descriptions, select Function from the Insert menu. The Insert Function dialog box, pictured below, lets you insert a function name directly into a math placeholder.
# Try it!
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# From the Function Name list, select the function gcd and click Insert.
# See:
# Tip: Greatest Common Factor (gcd) is the largest number that evenly factors all the numbers in the list.
gcd(□, □, □, □)
# Try it!
# In the four function placeholders, type: | See:
# 88  48  64  112
gcd(88, 48, 64, 112) = 8
# You can use the [Tab] key to jump to the next placeholder. Press = to see a result.
# From the Function Name list, select the function mean and click Insert.
# See:
# Tip: The built-in mean function automatically provides four placeholders for numbers you want to find the mean of, but you can always add more.
mean(□, □, □, □)
# Try it!
# Click the first placeholder and type: | See:
# 12 [Tab] 15 [Tab] 18 [Tab] 13,12.5,13.5=
mean(12, 15, 18, 13, 12.5, 13.5) = 14
# Tip: If you know the name of the function you want to use, you can simply type it with its appropriate arguments. If not, use the Insert Function dialog box to find the function's name and the arguments it takes.
# Tip: If you are not sure whether something is a function, type it and press =.
# If it is one, then its "signature" appears, describing what sort of argument it takes.
# Type: | See:
# sin=
sin = ƒ(Unitless) → Unitless
# Try it!
# Type another word that you think is a function, to test it.
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