# Title: Using the Symbolics Menu
# Description: Using Mathcad's symbolic processor.
# Worksheet setting: ORIGIN = 1
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# GETTING STARTED PRIMERS
# tutorials
# Using Symbolic Calculation
# When you evaluate an expression numerically using =, Mathcad returns one or more numbers.
F(x) := sum(3!/(k!*(3 - k)!)*x^k*2^(3 - k), k = 0 .. 3)
F(2) = 64
F(-5) = -27
# When you evaluate an expression symbolically, on the other hand, Mathcad returns the result as another expression, in terms of the variables and symbols in the original problem.
F(x) → x^3 + 6*x^2 + 12*x + 8
# There are two ways to evaluate an expression symbolically:
# You can use the symbolic equal sign (→) as above. This is the recommended method because the results are "live" and update along with any changes you make in the worksheet.
# You can use commands from the Symbolics menu. These results are "static" and are not affected by other definitions or changes in the worksheet.
# This tutorial explains how to perform symbolic operations on expressions and evaluate the results.
## Using the Symbolic Equal Sign
# To insert the symbolic equal sign after an expression, click anywhere in the expression and either:
# •  Press [Ctrl] [.].
#
# - or -
#
# •  Click → on the Symbolic toolbar.
# For example, to insert the symbolic equal sign after the expression d/dx(sin(x)):
# 1. Click the expression.
#
# 2. Press [Ctrl] [.] to insert the symbolic equal sign →.
#
# 3. Press [Enter] to evaluate the expression.
# See:
d/dx(sin(x)) → cos(x)
# Mathcad displays the result to the right of the symbolic equal sign. The result is "live." If you make changes to the expression, the result is automatically updated. See Live Symbolics.
# Another way to insert the symbolic equal sign is to select Toolbars > Symbolic from the View menu to open the Symbolic toolbar,
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# and then click the right arrow → on the toolbar.
## Using the Symbolics Menu
# You can also evaluate an expression symbolically by selecting it and then selecting Evaluate > Symbolically from the Symbolics menu. However, in this case the results are not automatically updated when you make changes elsewhere in the worksheet.
## Evaluating an Expression Exactly
# The numerical equal sign (=) returns answers as decimal numbers, approximating them to a fixed number of decimal places when necessary. The symbolic equal sign, on the other hand, returns exact results, using ordinary fractions and symbolic representations of irrational numbers, such as sqrt(2) or π.
# Click the expression below and then click → on the Symbolic toolbar. Press [Enter] to see the result:
# Tip: The symbolic equal sign (→) gives an exact result for any numeric operations you want to perform, including simplification of expressions involving fractions, roots, π, logarithms, exponents, and trigonometric functions.
2/3 + 3/4 - 4/5 + 5/6 - 6/7 + 7/8*π
# See:
2/3 + 3/4 - 4/5 + 5/6 - 6/7 + 7/8*π → 7*π/8 + 83/140
# Note the difference between this and the result returned by the numerical equal sign:
2/3 + 3/4 - 4/5 + 5/6 - 6/7 + 7/8*π = 3.34175
## Live Symbolics
# The symbolic equal sign returns "live" results. If you change an expression, or make changes above or to the left of it, the result is automatically updated.
# Change one of the numbers in the equation below and watch the result change.
2/3 + 3/4 - 4/5 + 5/6 - 6/7 + 7/8*π → 7*π/8 + 83/140
# The symbolic equal sign (→) uses any variables or functions defined in your worksheet when calculating results.
f(x) := x^2
y := 2.5
f(y) → 6.25
## Using Keywords
# To perform specific symbolic operations, you can add keywords before the symbolic sign. The Symbolic toolbar contains a list of the available keywords.
# For example, to solve the equation x^2 - 2*x - 3 == 0:
# 1. Type:
x^2 - 2*x - 3
# Note: You only need to type the left side of the equation because the right side is 0.
# 2.  Press [Ctrl] [Shift] [.] to insert a placeholder followed by the symbolic equal sign.
#
# 3. In the placeholder, type the keyword "solve."
#
# 4. Press [Enter].
# See:
x^2 - 2*x - 3 solve → [-1; 3]
# Mathcad returns the two solutions in a vector.
# The expression or equation appears on the left, followed by the keyword that describes the operation. In this case, the operation is to solve the equation x^2 - 2*x - 3 == 0. The solution follows the symbolic equal sign (→).
## Simplifying an Expression
# To simplify an expression, use the keyword "simplify." For example, to simplify (x - 1)^2 + 2*x^2 + 4*x - 1:
# 1. Type the expression.
#
# 2. Click "simplify" on the Symbolic toolbar.
#
# 3. Press [Enter].
# See:
(x - 1)^2 + 2*x^2 + 4*x - 1 simplify → x*(3*x + 2)
# Alternatively, put the blue insertion line at the end of the expression and then click .→ on the Symbolic toolbar. In the empty placeholder, type the keyword "simplify." Press [Enter] to see the result.
## Viewing Approximate and Intermediate Expressions
# To see the values of numerically defined variables to a certain precision, use the keyword "float," as shown in the following example.
# 1. Define y by typing
y := 2.5
# 2. Click the expression below and then click → on the Symbolic toolbar. Press [Enter] to see the result.
y/3 + a
# See:
y/3 + a → a + 0.833333333333
# Tip: By default, values with decimals trigger symbolic floating point calculation to 20 digits.
# 3. Click the expression above, place the blue insertion line between the → and the a, and click float on the Symbolic toolbar. Type the number 4 in the empty placeholder. Press [Enter] to see the result.
# See:
y/3 + a float, 4 → a + 0.8333
# Mathcad displays the result to 4 digits.
# Now, suppose you want to display the above expression, including the numerical value of y, but without performing any other arithmetic operations on the expression. To do so,
# Delete "float, 4" in the expression above and replace it with the keyword "explicit," followed by comma an the variable y. Press [Enter] to see the result.
# See:
y/3 + a explicit, y → 2.5/3 + a
# Mathcad replaces y with 2.5, but does not perform any other arithmetic operations.
## Factoring an Expression
# To factor an expression, use the keyword "factor." For example,
# 1. Type 2*x^3 - 2*x - 3*x^2 + 3.
# 2. Click .→ on the Symbolic toolbar.
#
# 3. In the empty placeholder, type the keyword "factor."
#
# 4. Press [Enter] to see the result.
# See:
2*x^3 - 2*x - 3*x^2 + 3 factor → (2*x - 3)*(x - 1)*(x + 1)
## Solving an Equation in Two Variables
# You can use symbolics to find closed-form solutions to a variety of problems, which may yield insight into the form and behavior of the solution. It is also possible to plot these closed-form solutions.
# 1. Type:
# z-3 [Ctrl]= x+2 [Shift] ^2
# See:
z - 3 == (x + 2)^2
# Note: Use the Boolean equals ([Ctrl] [=]) to specify the equation.
# 2. Click solve on the Symbolic toolbar.
#
# 3. Type a comma after solve.
#
# 4. Type x in the placeholder to specify the variable you want to solve for.
# 5. Press [Enter].
# Try it!
# See:
# Tip: When the equation you are solving has more than one variable, specifiy the variable you want to solve for after the keyword "solve."
z - 3 == (x + 2)^2 solve, x → [sqrt(z - 3) - 2; -sqrt(z - 3) - 2]
# You can assign the result of this symbolic evaluation to a function for further numerical use:
sol(z) := z - 3 == (x + 2)^2 solve, x → [sqrt(z - 3) - 2; -sqrt(z - 3) - 2]
sol(8) = [0.236068; -4.23607]
sol(5) = [-0.585786; -3.41421]
# Click after the last z in the expression below, click solve on the Symbolic toolbar, type a comma, and enter z in the placeholder to the right of the solve keyword. Then press [Enter].
a := 1
b := 4
c := 3
c/(a*z) == b*z
# See:
c/(a*z) == b*z solve, z → [-sqrt(3)/2; sqrt(3)/2]
# Change the value of b, above, by backspacing over the 4 and typing 1/2.
# See:
b := 1/2
c/(a*z) == b*z solve, z → [-sqrt(6); sqrt(6)]
# Change the value of a, above, by backspacing over the 1 and typing -3.
# See:
a := -3
c/(a*z) == b*z solve, z → [-sqrt(2)*1i; sqrt(2)*1i]  # The solutions are complex numbers.
# For further information and examples, see the QuickSheets on Symbolic Math.
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