# Title: Graphing — 2D Plots
# Description: Creating X-Y and polar plots in Mathcad.
# Worksheet setting: ORIGIN = 1
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# GETTING STARTED PRIMERS
# tutorials
# Graphing - 2D Plots
# Note: This worksheet is formatted in the landscape view. Either maximize your viewing window or use the horizontal scrollbar to view the entire page.
# Graphs are easy to create and modify. You can create 2D graphs from functions or data sets. A 2D graph can contain up to sixteen plots, all formatted differently. This worksheet shows you how to plot functions and data in 2D Cartesian graphs. More information about parametric and polar plots is given in the In-Depth Tutorial on 2D Plots.
## Definitions
# plot - a single line, or trace, in a graph region
# graph - a set of axes with a scale into which plots may be placed
# argument - a variable or expression used in a function or graph to define the region
## Example
log(1000) = 3  # The number 1000 is the argument to the log function.
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# In this graph, x is the x-axis argument, and x^2 is the y-axis argument.
# A placeholder is a small black rectangle in which you insert arguments for functions or graphs, in this case.
## Practice
## To Create a 2D QuickPlot from an Expression or a Function
# 1. Type: | See:
# -4x+3
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# Without removing your cursor from this math region, select Graph > X-Y Plot from the Insert menu. In the placeholder on the x-axis, where the blue editing lines are, type:
# x
# Then click outside the plot region to see the plot.
# Try it!
# Tip: This is a plot of the equation more typically expressed as y == -4*x + 3. Notice that you enter only the right-hand side of the equation in the plot as an argument.
# 2. Type: | See:
# -|9-2n
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# Without removing your cursor from this math region, type:
# @
# Then, in the placeholder on the x-axis, where the blue editing lines are, type:
# n
# Then click outside the plot.
# Try it!
# Tip: When you are in a math region and you press the key for a single vertical bar, as above, you actually get two absolute value bars and a blank placeholder to fill in.
# Tip: This type of plot is known as a QuickPlot because the program picks a range over which to plot the function you enter. Here the range is from -10 to 10 at 0.1 increments.
# 3. To define a function, type: | See:
# f(x):3x^2 [Spacebar] +1
f(x) := 3*x^2 + 1
# Then, in a new region type:
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# f(x),-f(x)
# Without removing your cursor from this math region, select Graph > X-Y Plot from the Insert menu or type @. Then, in the placeholder on the x-axis, where blue editing lines, type:
# x
# Then click outside the plot.
# Try it!
# Tip: You can plot up to 16 traces in a single graph region. This example shows two traces, the function, f(x), and its negative.
## To Add a Plot to an Existing Graph
# Click the expression in the y-axis of the plot below. Then, press [Spacebar] until the entire expression is selected:
# See:
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# To enter two more expressions in the plot, type:
# Tip: To add more plots to an existing graph, simply enter expressions in the y-axis separated by commas. Be sure all the expressions contain the same independent variable. In this case, the independent variable is x. If not, then you must add the additional independent variables on the x-axis separated by commas. You can also turn on the secondary y-axis and add plots of a different scale on the right side of a graph.
# ,-4x+2,-4x+1[Enter]
## To Change the Axis Limits of a Graph
# Click the graph below and then click the left limit of the x-axis (displayed as -10):
# See:
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# Start typing in this limit placeholder and enter a new lower limit of -2.
# Tip: You do not need to delete a default axis limit. You can simply type over it to replace it.
# Likewise, enter a new upper limit of 2 for the x-axis.
# Click the graph below and then click the lower limit of the y-axis (displayed as -397):
# See:
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# Start typing in this limit placeholder and enter a new lower limit of -20.
# Tip: Changing the x-axis limits in a QuickPlot automatically rescales the y-axis limits to match, much like zooming in on a plot. However, changing the y-axis limits in a QuickPlot does not change the x-axis limits.
# Likewise, enter a new upper limit of 5 for the y-axis.
## To Format Traces in a 2D Graph
# Double-click the graph below to bring up the X-Y Plot Formatting dialog box:
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# See:
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# 1. Click the Traces tab and set the trace 1 color to Black and the trace 1 weight to 2. Click Apply to see the changes without dismissing the dialog box.
# Tip: The best way to learn about the formatting options available for 2D graphs is to change the various settings in this dialog and see the effect on the graph.
# 2. Set the trace 2 line style to "dash" and the trace 2 weight to 2.  Click Apply.
# 3. On the X-Y Axes tab, deselect "Grid Lines" for both axes. Click OK.
# 1. See: | 2 and 3. See:
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## To Create a 2D Plot Using a Range Variable for the Independent Variable
# To define a function and range variable, type: | See:
# g(n):|4-2n
# [Tab]
# n:-3,-2.5;7
g(n) := |4 - 2*n|
n := -3, -2.5 .. 7
# Below these two definitions, type:
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# @ n [Tab][Tab][Tab] g(n)
# Try it!
# Tip: With a range variable, you can control the range of values at which the function in the graph is evaluated.
# Tip: You can use the [Tab] key to jump from placeholder to placeholder in a 2D graph region, or you can use your mouse to click on the placeholders you want to fill.
## To Create a 2D Plot from a Data Set
# To define two vectors to contain your x and y data points, type:
# See:
# xdata: [Ctrl]m | and | ydata: [Ctrl]m
# For each vector, enter 10 rows and 1 column and click OK. Then enter the following set of data into the vector's placeholders:
# For x: 2, 4, 5, 7, 8, 9, 11, 13, 14, 15
# For y: 3, 6, 9, 13, 14, 17, 22, 25, 26, 28
xdata := [2; 4; 5; 7; 8; 9; 11; 13; 14; 15]
ydata := [3; 6; 9; 13; 14; 17; 22; 25; 26; 28]
# Try it!
# Tip: To quickly enter values in a vector, use the [Tab] key after each entry to get to the next placeholder.
# To insert a graph region, type: | See:
# @
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# In the x-axis placeholder, enter "xdata" and in the y-axis placeholder, enter "ydata", and press [Enter].
# Try it!
# Tip: The default formatting for a graph is a line, but you can format any plot as points, bars, and other so on.
# To format the plot as points, double-click your graph above to bring up the X-Y Plot Formatting dialog box. Pick grid line colors by clicking on the color squares. Then, click the Traces tab and scroll to the  right to set Trace 1 symbol to points and the Symbol to box. You can also pick the color of the Symbol.
# Get this:
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# To learn about 3D graphing, continue to the second part of this primer, Graphing - 3D Plots.
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