# Title: Graphing — 3D Plots
# Description: Creating three-dimensional plots in Mathcad.
# Worksheet setting: ORIGIN = 1
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# GETTING STARTED PRIMERS
# tutorials
# Graphing - 3D Plots
# This worksheet shows you how to create a 3D plot from a function of two variables, and from a set of parametric functions. It also explains a little bit about how to format the look of these plots for maximum effect.
## Examples
# Here are two 3D plots with special formatting:
F1(u, v) := u*sin(v)
F2(u, v) := u*cos(v)
f(x, y) := x^2 + y^2
F3(u, v) := u*sin(u)^2
# [component: inputs f]
# [component: inputs (F1, F2, F3)]
# The 3D graph on the left shows the plot of a function of two variables, a paraboloid. The 3D graph on the right shows a parametric plot of a surface of revolution, specified by three functions to determine the x, y, and z coordinates.
## Practice
## To Create a 3D QuickPlot from a Function
# 1. To define a two-variable function,
# type:
# See:
# H1(x,y):x^2 [Spacebar] +4y^2
H1(x, y) := x^2 + 4*y^2
# Click in a new region to insert a 3D graph  (surface plot) and enter the name of the function in this region by typing:
# [component: inputs H1]
# [Ctrl]2 H1
# Try it!
# Tip: Any two-variable function of quadratic terms produces a paraboloid in a surface plot.
# This plot is a QuickPlot, meaning that you don't have to specify a range or spacing for the independent variables because Mathcad picks them automatically. To adjust the range used, double-click on the plot, and change the settings on the QuickPlot tab. The default is -5 to 5 for each independent variable with a spacing of 20 points across each range.
# 2. Insert a 3D graph region (bar plot) by clicking the following button on the Graph toolbar:
# See:
# [component: inputs H1]
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# Or, select Graph > 3D Bar Plot from the Insert menu. Then, enter the name of the function defined in the previous example, H1.
# Try it!
## To Create a 3D QuickPlot from Parametric Functions
# It is sometimes useful to define variables in terms of other variables or parameters.
# To define three two-variable functions,
# type:
# See:
X(u, v) := sin(v)*cos(u)
Y(u, v) := sin(v)*sin(u)
# X(u,v):sin(v)*cos(u)[Enter]
# Y(u,v):sin(v)*sin(u)[Enter]
# Z(u,v):cos(v)[Enter]
Z(u, v) := cos(v)
# Then, insert a 3D graph region (surface plot) and enter the name of the functions, surrounded by parentheses, in this region by typing:
# [component: inputs (X, Y, Z)]
# [Ctrl]2 'X,Y,Z[Enter]
# Try it!
# In addition to functions of two variables and sets of parametric functions, you can also enter matrix names and sets of three paired vectors specifying X, Y, and Z coordinates.  See the Quicksheet on plotting data for more examples.
## To Change the Appearance of a 3D Graph
# 1. Double-click the 3D graph below to access the 3-D Plot Format dialog box:
# See:
# [component: inputs H1]
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# On the Appearance page, select "Fill Surface" and "Colormap" and click OK.
# See:
# [component: inputs H1]
# Click on the plot itself, hold down the mouse button, and move the mouse around. Notice that this changes the view you have of the plot.
# Double-click on the plot again. On the General page, set the Rotation, Tilt, and Twist as follows:
# Rotation: 0
# Tilt: 35
# Twist: -10
# The graph appears as it does to the right.
# 2. Double-click the 3D graph below to access the 3-D Plot Format dialog box.
# See:
# [component: inputs (X, Y, Z)]
# On the Appearance page, select "Fill Surface" and "Solid Color" in the first column.
# Click the color box to the right of the Solid Color selection. Select the following color from the palette and click OK twice to close the dialogs:
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# [component: inputs (X, Y, Z)]
# See:
# [component: inputs (X, Y, Z)]
# Right-click on the plot and select Lighting from the menu. Under "Light Scheme," choose "Scheme 1."
# Double-click on the plot again. On the Advanced page, set %Transparency to 50%. On the General page, set the Rotation, Tilt, and Twist as follows:
# See:
# [component: inputs (X, Y, Z)]
# Rotation: 40
# Tilt: 20
# Twist: 320
# Continue to try different options to see how you can transform the look of a 3D graph. See Formatting 3D Plots for more information.
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