# Title: Using Units
# Description: Performing calculations involving units.
# Worksheet setting: ORIGIN = 1
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# GETTING STARTED PRIMERS
# tutorials
# Using Units
# One of the useful features of Mathcad is its ability to track standard units during calculations and to convert the units of calculated quantities automatically. You can mix and match units as you like and be assured of getting the correct result. This worksheet lets you practice using built-in units and producing results in the units you want.
# By default, Mathcad uses units from the SI unit system (International System of Units). Mathcad offers several choices of unit systems: SI, CGS, MKS, U.S. customary units, or no unit system.
## Examples
# Here is a calculation that mixes units:
5 ft + 25 in + 1.2 m - 0.6 yd = 2.81036 m
# Although each term in the calculation above is expressed in a different unit of length - feet (ft), inches (in), meters (m), and yards (yd) - the result is appropriately scaled and given in the base SI unit for length, meters.
# Here is another example in which units are mixed:
5 ft + 3 sec =  # error: This value has units: Time, but must have units: Length.
# The two terms in this expression have mismatched units: one is a unit of length (ft) and one is a unit of time (sec). Mathcad knows better than to try to come up with a result. Click on the expression to see the error message - it tells you that the second argument must have a dimension of Length in order to be added to the first.
## Practice
## To Enter Expressions Containing Units
# Type: | See:
# 3hr+4min-68sec=
3 hr + 4 min - 68 sec = 10972 s
# Try it!
# Tip: This result appears in seconds (s), the default base unit. Seconds can be abbreviated as "s" and "sec."
# Type: | See:
# 55mi/hr [Spacebar] *35sec =
55*mi/hr*35*sec = 860.552 m
# Try it!
# Type: | See:
# ft/m=
ft/m = 0.3048
# Tip: This result gives you the conversion factor from feet to meters. In other words, multiply a length in feet by this result to get a length in meters.
# Try it!
## To Use the Insert Unit Dialog Box
# Select Unit from the Insert menu. | See:
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# Keep this dialog box open while you perform the next several exercises.
# Type: | See:
# 30000kg+1.2*
30000 kg + 1.2*tonne - 120000 lb = -23231.1 kg
# Notice that the Insert Unit dialog has scrolled down to Mass and Kilogram. In the Unit list that comes up, click Metric ton (tonne) and then click "Insert." Then type:
# -120000lb=
# Try it!
## To Change the Units of a Result
# Type: | See:
# 3hr+4min-68sec=
3 hr + 4 min - 68 sec = 10972 s
# To get a result in minutes, click the result and then click the small black rectangle (it may appear green) to the right of the displayed units. In the units placeholder, type:
# See:
# min [Enter]
3 hr + 4 min - 68 sec = 182.867 min
# Try it!
# Click the result below, then click the units placeholder and type:
# mi [Enter] | See:
55*km/hr*35*sec = 534.722 m
55*km/hr*35*sec = 0.332261 mi
# Click the result below, then click the units placeholder and type:
# km/hr [Enter] | or | kph [Enter] | See:
15 mph = 6.7056 m/s
15 mph = 24.1402 km/hr
# or
15 mph = 24.1402 kph
## To Define Your Own Units
# To define a femtometer, which is not a built-in unit, type:
# See:
# fm:10^-15 [Spacebar] [Spacebar] *m
fm := 10^-15*m
# Try it!
# Tip: A unit can have any name you want to give it, but it is best to use accepted abbreviations when you can.
# To convert a length measure to femtometers using the unit you defined above, click the result below, then click the units placeholder and type:
# fm [Enter] | See:
15*10^-10*m = 1.5e-9 m
15*10^-10*m = 1500000 fm
# To define a unit that can be used to track points gained or lost, type:
# See:
# pt:1
pt := 1
# Try it!
# Tip:You can define any unit to have the value 1 in order to display that label in results. The unit doesn't need to have a pre-existing definition.
# To display that unit in a result, such as the one below, click the result, then click the units placeholder and type:
# pt/mi [Enter]
Δp_wingspan := 2*pt
Δm_wingspan := 1*mi
rate_wingspan := Δp_wingspan/Δm_wingspan  # See:
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rate_wingspan = 0.00124274 1/m
## To Change the Unit System of the Worksheet
# Select Worksheet Options from the Tools menu.
# Click the Unit System tab, and select U.S. This option gives you results in feet, inches, and other "English System" measures. Then click OK.
# To test this out, type:
# 6ft+2m=
# You get a result in feet.
# Try it! ß
# See:
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# Now change the unit system back to SI in the same Unit System tab.
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# See:
# To set your unit system to return a customized unit for any quantity, open the Unit System tab and choose the Custom system. Base the system around a standard, such as SI, then modify the measure of interest. For example, you can choose the U.S. system, but return all lengths in inches. Make these modifications and look at the results in the above example.
## To Check Your Calculations with Units
# The units feature is also very convenient because it lets you know if you have made a mistake in the units in your calculations. For example, the result of the force calculation below should be in newtons (or an equivalent force unit):
a := 10*m/sec
mass := 2*kg
F := mass*a
F = 20 kg*m/s
# but it appears to have an extraneous factor of seconds. Looking closely at the statements in the calculation, you can see that the definition of the acceleration a is missing a term of sec^-1.
## To Format Displayed Units
# To display units choose Result under the Format menu. Under the heading "Unit Display," check "Format units" and "Simplify units when possible." Units in your results display as shown below. These options can be set as the default or for individual equations.
# To set a Unit Display option as the default for a worksheet, click anywhere in the worksheet and choose Result from the Format menu.
# To set one of these Display options for a single result, click on the result, then choose Result from the Format menu.
g = 9.80665 m/s^2  # Units not formatted
g = 9.80665 m/s^2  # Units formatted
5*kg*4*m^2/(20*s^2) = 1 kg*m^2/s^2  # Default unit result
5 kg*4*m^2/(20*s^2) = 1 J  # Units simplified
## Units in Range Variables
# Range variables that include units must specifically include the stepsize for the range; automatically chosen step sizes would assume the base unit of the chosen worksheet system, resulting, for example, in stepping from 0 cm to 1 meter in the SI system of units. The required notation forces you to be clear.
# To define a range variable with dimensions, type:
# r:0cm,1cm;10cm
# To see the values in the range, type:
# r=
# Try it! ß | See:
r := 0 cm, 1 cm .. 5 cm
r = [0; 0.01; 0.02; 0.03; 0.04; 0.05] m
# Ranges with units are particularly useful for plotting functions that take units.
## Functions that Accept Units
# Since functions can do any of the above calculations, functions also balance units.
# Type:
# d(x,v):3x+v*sec
# To evaluate the function, type:
# d(2*cm,3*cm/sec)=
# Try it! ß | See:
d(x, v) := 3*x + v*sec
d(2*cm, 3*cm/sec) = 0.09 m
# Mathcad gives you similar errors if you try to call a function with units that don't make sense.
d(2*cm, 3*cm) =  # error: This value has units: Length, but must have units: Length · Time^-1.
# If you want to know what kind of arguments a function expects without altering values, you can look at the function signature by evaluating the name of the function.
d = ƒ(any1 · Time, any1) → any1 · Time
# What this says is "The name d is a function of two arguments. The first argument can have any dimensions, the second argument has the dimensions of the first divided by time. The result has the same dimensions as the first argument." The compact notation allows Mathcad to express the signature of any type of function.
pow(x, n) := x^n
# Tip: It is not possible to define a function that returns units that depend on the value of the inputs; it cannot be unit balanced without knowing the particular value of the inputs.
pow(2*m, 3) =  # error: This value has units: Length, but must have units: Unitless.
# The error arises because the value of n determines the units of the output. Since Mathcad checks unit balancing before calculation begins on your document, it balances all the units without processing the particular arguments of the functions, and this kind of construct is not allowed. You can call such a function without units:
pow(2, 3) = 8
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