# Title: Data and String Calculation Strategies
# Description: Changes to data import and string behaviors.
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# MIGRATION GUIDE
# tutorials
## Data and String Calculation Issues
# Mathcad 12 and 13 introduced some changes to data import and string behaviors to support new operating systems and XML technology. These changes introduced some incompatibilities between different versions of Mathcad. This worksheet catalogs the changes and shows best practices for creating and reading data.
## More Options for File Reading Components
# MC11: File Input component is limited in file type and ability to change files.
# MC12 and higher: Data Input Wizard provides many options for file type, settings, preview, and changing the input file.
## Data Import Wizard
# The Data Input Wizard addresses many user requirements not met by the original File Input component. We recommend upgrading worksheets to use the newer component, available from the Insert > Component menu. You can:
# •  Add an input variable with the file name
# •  Change the file read from the worksheet
# •  Read fixed-width and binary files from a component
# •  Preview data
# •  Adjust settings for delimiters and empty cell fillers.
## Strings and vec2str Function Cannot Contain Control Characters
# MC11: Any ANSI character from 0 - 255 accepted in strings and vec2str.
# MC12 and MC13: Only non-control ANSI characters from 32 to 255 accepted in strings and vec2str.
# MC14: Only non-control Unicode characters from 32 to 127 and 160 and above accepted in strings and vec2str.
# In Mathcad 11 and previous versions, string variables and the vec2str function allows entries and arguments corresponding to the first 31 ANSI codes, which are control characters. Most of these cannot be accurately displayed in a Mathcad worksheet or represented in the corresponding XML file.
# In Mathcad 12 and higher, the vec2str function only accepts arguments in the range 32 to 255, and the three representable controls, tab (9), carriage return (10), and linefeed (13).
vs[0] := 4
vs = [4]
vec2str(vs) =  # error: This string cannot be computed because it contains an invalid character.
vs := [4Dh; 61h; 74h; 68h; 63h; 61h; 64h]
vec2str(vs) = "Mathcad"
# Mathcad 14 behaves similarly to Mathcad 12 and 13, except that it uses Unicode characters, rather than ANSI characters. As a result, evaluations of vec2str over the range 128 - 159 return empty blocks, or null characters, in Mathcad 14. The characters accessed with ANSI codes 128 - 159 are available elsewhere in the Unicode character set. vec2str now supports character codes greater than 255 to accommodate the extended characters within Unicode character sets.
# You can determine which code maps to which character on your operating system by looking at the Windows Character Map, accessible under Programs > Accessories > System Tools. The program shows the codes in hexadecimal format, entered in Mathcad using the h suffix to specify the base of the number.
## READ, WRITE, and APPEND Replaced
# MC11: Deprecated functions still available using the "old engine" switch.
# MC12 and higher: Replace READ function with READFILE and appropriate row and column arguments.
# The READ, WRITE, and APPEND functions have been deprecated for many Mathcad versions and are unsupportable in modern Windows technology. A new function READFILE allows you to read specific rows or columns from a file or files with nonuniform row and column sizes. By using range variables, READFILE can provide a direct replacement for the READ function. WRITEPRN and APPENDPRN should be used as replacements for the WRITE and APPEND functions.
X := READFILE("test_data.txt", "delimited")
X = [
    "run1", 2, 3.4, 3.5, NaN;
    "run2", 3, 3.4, 3.8, 4.1;
    "run3", 2.8, 2.9, 3.7, 3.9;
    "run4", 3, 3.6, NaN, NaN;
    "run5", 2.6, 3.1, 3.6, 3.9
]
# The READFILE function allows you to:
# •  Import both text and numeric data.
# •  Specify delimited, fixed-width, or Excel format files for reading in files.
# •  Import rows of nonuniform length, filling the missing entries as specified by the last optional argument to READFILE.
# •  Use NaN (not a number) for unsupplied values.
# You can either begin processing your data using this first form of output from READFILE, filtering or handling NaN's in place as you go, or you can trim them from the data. Many people used READ to read their data into a vector, so let's convert the matrix into this form:
ravel(M) :=
    V ← NaN
    for x ∈ M
        V[rows(V)] ← x
    V
Xv := ravel(transpose(X))
transpose(Xv) = ["run1", 2, 3.4, 3.5, NaN, "run2", 3, 3.4, 3.8, 4.1, "run3", 2.8, 2.9, 3.7, 3.9, "run4", 3, 3.6, NaN, NaN, "run5", 2.6, 3.1, 3.6, 3.9]
# Remove the NaN's:
trimNaN(y) :=
    i ← 0
    for j ∈ 0 .. last(y)
        continue if IsNaN(y[j])
        z[i] ← y[j]
        i ← i + 1
    z
Xv_clean := trimNaN(Xv)
transpose(Xv_clean) = ["run1", 2, 3.4, 3.5, "run2", 3, 3.4, 3.8, 4.1, "run3", 2.8, 2.9, 3.7, 3.9, "run4", 3, 3.6, "run5", 2.6, 3.1, 3.6, 3.9]
# You can use READFILE to read elements a row or an element at a time using the optional third and fourth arguments, which specify the rows and columns.
i := 1 .. 5
val[i - 1] := READFILE("test_data.txt", "delimited", [i; i], [2; 2])
transpose(val) = [[2], [3], [2.8], [3], [2.6]]
# This reads the data element in each row from the second column .
## Explicit Strings Are Limited to 1024 Characters
# MC11: Strings entered manually can be of any length.
# MC12 and higher: Strings entered manually can only contain up to 1024 characters (2^10).
# To communicate efficiently with Windows and the engine that drives Mathcad, strings defined by entering characters can only contain up to 1024 characters. Longer strings are supported by Mathcad, but you must create them by concatenating several shorter strings together or by reading them from an external data source.
str1 := "0.245"
strlong :=
    str ← ""
    for i ∈ 1 .. 200
        str ← concat(str, str1, " , ")
    return str
strlen(strlong) = 1600
strlong = "0.245 , 0.245 , 0.245 , 0.245 , 0.245 , 0.245 , 0.245 , 0.245 , 0.245 , 0.245 , 0.245 , 0.245 , 0.245 , 0.245 , 0.245 , 0.245 , 0.245 , 0.245 , 0.245 , 0.245 , 0.245 , 0.245 , 0.245 , 0.245 , 0.245 , 0.245 , 0.245 , 0.245 , 0.245 , 0.245 , 0.245 , 0.245 , 0.245 , 0.245 , 0.245 , 0.245 , 0.245 , 0.245 , 0.245 , 0.245 , 0.245 , 0.245 , 0.245 , 0.245 , 0.245 , 0.245 , 0.245 , 0.245 , 0.245 , 0.245 , 0.245 , 0.245 , 0.245 , 0.245 , 0.245 , 0.245 , 0.245 , 0.245 , 0.245 , 0.245 , 0.245 , 0.245 , 0.245 , 0.245 , 0.245 , 0.245 , 0.245 , 0.245 , 0.245 , 0.245 , 0.245 , 0.245 , 0.245 , 0.245 , 0.245 , 0.245 , 0.245 , 0.245 , 0.245 , 0.245 , 0.245 , 0.245 , 0.245 , 0.245 , 0.245 , 0.245 , 0.245 , 0.245 , 0.245 , 0.245 , 0.245 , 0.245 , 0.245 , 0.245 , 0.245 , 0.245 , 0.245 , 0.245 , 0.245 , 0.245 , 0.245 , 0.245 , 0.245 , 0.245 , 0.245 , 0.245 , 0.245 , 0.245 , 0.245 , 0.245 , 0.245 , 0.245 , 0.245 , 0.245 , 0.245 , 0.245 , 0.245 , 0.245 , 0.245 , 0.245 , 0.245 , 0.245 , 0.245 , 0.245 , 0.245 , 0.245 , 0.245 , 0.245 , 0.245 , 0.245 , 0.245 , 0.245 , 0.245 , 0.245 , 0.245 , 0.245 , 0.245 , 0.245 , 0.245 , 0.245 , 0.245 , 0.245 , 0.245 , 0.245 , 0.245 , 0.245 , 0.245 , 0.245 , 0.245 , 0.245 , 0.245 , 0.245 , 0.245 , 0.245 , 0.245 , 0.245 , 0.245 , 0.245 , 0.245 , 0.245 , 0.245 , 0.245 , 0.245 , 0.245 , 0.245 , 0.245 , 0.245 , 0.245 , 0.245 , 0.245 , 0.245 , 0.245 , 0.245 , 0.245 , 0.245 , 0.245 , 0.245 , 0.245 , 0.245 , 0.245 , 0.245 , 0.245 , 0.245 , 0.245 , 0.245 , 0.245 , 0.245 , 0.245 , 0.245 , 0.245 , 0.245 , 0.245 , 0.245 , 0.245 , 0.245 , 0.245 , 0.245 , 0.245 , 0.245 , 0.245 , "
# The 1600 character string shown can be created and displayed, but not entered manually or copied and pasted into a variable. This string has to be created as two separate strings and concatenated. Note the error shown by the following definition.
s := "0.245 , 0.245 , 0.245 , 0.245 , 0.245 , 0.245 , 0.245 , 0.245 , 0.245 , 0.245 , 0.245 , 0.245 , 0.245 , 0.245 , 0.245 , 0.245 , 0.245 , 0.245 , 0.245 , 0.245 , 0.245 , 0.245 , 0.245 , 0.245 , 0.245 , 0.245 , 0.245 , 0.245 , 0.245 , 0.245 , 0.245 , 0.245 , 0.245 , 0.245 , 0.245 , 0.245 , 0.245 , 0.245 , 0.245 , 0.245 , 0.245 , 0.245 , 0.245 , 0.245 , 0.245 , 0.245 , 0.245 , 0.245 , 0.245 , 0.245 , 0.245 , 0.245 , 0.245 , 0.245 , 0.245 , 0.245 , 0.245 , 0.245 , 0.245 , 0.245 , 0.245 , 0.245 , 0.245 , 0.245 , 0.245 , 0.245 , 0.245 , 0.245 , 0.245 , 0.245 , 0.245 , 0.245 , 0.245 , 0.245 , 0.245 , 0.245 , 0.245 , 0.245 , 0.245 , 0.245 , 0.245 , 0.245 , 0.245 , 0.245 , 0.245 , 0.245 , 0.245 , 0.245 , 0.245 , 0.245 , 0.245 , 0.245 , 0.245 , 0.245 , 0.245 , 0.245 , 0.245 , 0.245 , 0.245 , 0.245 , 0.245 , 0.245 , 0.245 , 0.245 , 0.245 , 0.245 , 0.245 , 0.245 , 0.245 , 0.245 , 0.245 , 0.245 , 0.245 , 0.245 , 0.245 , 0.245 , 0.245 , 0.245 , 0.245 , 0.245 , 0.245 , 0.245 , 0.245 , 0.245 , 0.245 , 0.245 , 0.245 , 0.245 , 0.245 , 0.245 , 0.245 , 0.245 , 0.245 , 0.245 , 0.245 , 0.245 , 0.245 , 0.245 , 0.245 , 0.245 , 0.245 , 0.245 , 0.245 , 0.245 , 0.245 , 0.245 , 0.245 , 0.245 , 0.245 , 0.245 , 0.245 , 0.245 , 0.245 , 0.245 , 0.245 , 0.245 , 0.245 , 0.245 , 0.245 , 0.245 , 0.245 , 0.245 , 0.245 , 0.245 , 0.245 , 0.245 , 0.245 , 0.245 , 0.245 , 0.245 , 0.245 , 0.245 , 0.245 , 0.245 , 0.245 , 0.245 , 0.245 , 0.245 , 0.245 , 0.245 , 0.245 , 0.245 , 0.245 , 0.245 , 0.245 , 0.245 , 0.245 , 0.245 , 0.245 , 0.245 , 0.245 , 0.245 , 0.245 , 0.245 , 0.245 , 0.245 , 0.245 , 0.245 , 0.245 , 0.245 , "  # error: This string has more than 1024 characters. Define it as separate strings and concatenate them.
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