# Title: Units in Functions and Operators
# Description: Effects of changes to unit checking on worksheets.
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# MIGRATION GUIDE
# tutorials
## Unicode Font Effects
# Mathcad is now fully Unicode-compliant. You can enter non-ASCII characters such as special mathematical symbols and characters from Asian, Greek, Hebrew, Cyrillic and other languages into variables, plot titles, trace labels and other fields.
## Symbol Font
# However, you should no longer use the Symbol font when you enter Greek or other special characters, since the Symbol font is not a Unicode font. Use of the Symbol font may cause problems when saving worksheets, especially on double-byte operating systems.
## [Ctrl] G
# In Mathcad 14, [Ctrl] G will toggle only Roman letters and Greek letters. You can type a Roman letter such as p, then type [Ctrl] G after it to get π in either math or text, but you can not use [Ctrl] G to toggle other special characters.
## Math Styles
# In previous versions of Mathcad, selecting the "γ" in the expression below and changing its font or style had no effect, since the character was not dependent upon the Math styles.
γ := 2*e
# annotation to a formula above: Describes the enhanced support for Unicode characters in Mathcad, and how double-byte characters can now be used in variable names, plot titles, and trace labels, along with the effect on Greek characters.
# In Mathcad 14, changing either the font or the style does affect Greek characters. Changing the style from Variables, which uses the Times New Roman font, to User 1, which uses the Verdana font, affects both the Greek character γ and the Roman character e:
γ := 2*e
## Missing Greek and Math Characters
# Several Greek characters are not available in some fonts, like Times Roman. They include a Greek Theta Symbol, a Phi Symbol, and a variant of Pi that is an Omega Pi. However, these characters are available in other fonts, such as Arial Unicode. That font is not good in general for a math font, because it is hard to distinguish ones and the letter el.
# If you see missing characters in your worksheets, try changing the font to another font that may have that character, or searching the Character Map accessory under Programs > Accessories. You can search for a specific character in that program by either looking for it visually in different fonts, or checking the box that says "Advanced View." Then you can type in the name of the character to search for it, such as "nabla" or "omega." Select the character, then copy it into your Mathcad worksheet.
## Copy and Paste of Variables
# In earlier versions of Mathcad you could click in a variable to copy it, and then click in another variable name to replace the variable.
# In Mathcad 14, the copied variable is inserted into the destination variable name. This change was made to accommodate Unicode. Now when you are replacing a variable, just double-click the old variable to highlight it before pasting.
# Copy a, click on b, and paste:
a*x + b*y == 0
## Mathcad 13 and lower
## Mathcad 14
a*x + a*y == 0
a*x + ba*y == 0
# Copy a, double-click on b to highlight it, then paste:
a*x + b*y == 0
## Mathcad 14
a*x + a*y == 0
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