# Title: Function Changes
# Description: Updates to function definitions and calculation methods.
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# MIGRATION GUIDE
# tutorials
## Function Changes
# We've updated some function definitions and calculation methods in newer versions of Mathcad. These changes accommodate newer operating systems, new compiler technologies, XML, and better methods of working. We've made efforts to include backwards compatibility strategies, but we recommend updating your worksheets for the best performance and most consistent results.
## Truncation Functions Use Full Precision
# MC11: Truncation functions use 12 digits of precision.
# MC12: Truncation functions use 17 digits of precision.
# MC13 and higher: Truncation functions use 12 or 17 digits of precision based on worksheet settings.
# By default, in Mathcad 12 and higher, truncation functions (floor, ceil, trunc) use all available 17 digits when truncating a number.
ceil(5*1*ft/(12*in)) = 6  # because
5*1*ft/(12*in) = 5
# Using full precision prevents odd results, such as a number being less than its floor or greater than its ceiling.
## Switching to Mathcad 11 Truncation Behavior
# You can switch to Mathcad 11 and earlier behavior, in which only the first 12 digits are used to determine the truncated number.
# 1. Open Tools > Worksheet Options and click on the Calculation tab.
# 2. Uncheck the "Use exact equality in comparisons and truncation" box.
# 3. Notice the results in the worksheet above change.
# 4. Worksheets saved in Mathcad 11 and earlier versions are read in with this box unchecked making results consistent with previous use.
# Note: The "exact equality" setting also controls the number of decimal places used in Boolean comparisons.
## Definitions Allowed in Solve Blocks
# MC11: Definitions must occur before the Given keyword.
# MC12 and higher: Definitions can occur in the body of a Solve Block.
# Mathcad 12 and higher allow definitions for guess values and equation parameters to occur in the body of a solve block. This notation can be clearer, as it groups all required definitions between the Given keyword and the ending function of the solve block (Find, Minerr, and so forth). For example,
Given
n1 := 3.2
A := 30
B := 20
A + B == 78
A - n1*B == 22
Find(A, B) = [64.6667; 13.3333]
# is now accepted, although the old style notation of guess values above the solve block still work.
## Functions Must Have a Fixed Number of Arguments to Be Passed as an Argument
# MC11: Functions with an arbitrary number of arguments can be used as arguments.
# MC12 and higher: Functions must have a fixed number of arguments to be used as arguments.
# Static unit checking is incompatible with functions that can accept an arbitrary number of variables.
f(g, x, y, z) := g(x, y) + g(x, y, z)  # error: This value must be a scalar.
# The previous definition is no longer allowed. Any function passed as an argument must be used with the same number of arguments every time it is referenced. If you need to use a function that accepts a variable number of arguments as an argument, you must define a version with a fixed number of arguments.
f(g, x, y) := g(x, x) + g(x, y)
stdev2(x, y) := stdev(x, y)
f(stdev2, 1.325*m, identity(4)*m) = 0.490357 m
# Calling the function, f, with built-in standard deviation function, as shown below, does not work, because f only takes this function in its two-argument form and can't infer that form from the variable-argument version of stdev.
f(stdev, 1.325*m, identity(4)*m) =  # error: This function accepts a variable number of arguments so cannot be passed as an argument.
# This is true for any function that accepts an arbitrary number of arguments, for example, mean, sph2xy, and READFILE all accept different numbers of arguments. Any function with optional arguments falls into this category.
# The same is true of the if and until constructs, which are not functions. They are procedures and so are similarly restricted.
## Finding a Function's Signature (number, units, and type of arguments)
# To find a function's signature (number, units, and type of arguments), evaluate the name of the calling function by just typing the function followed by =
f = ƒ(ƒ(any1, any1) → any2, any1, any1) → any2
# The first argument to f is a function of two variables, which must both have the same quantity. The result of this argument is a value of any quantity, which does not have to be the same as that of the arguments.
cos = ƒ(Unitless) → Unitless
# Unitless means that the argument and result do not have units.
## Final-Value ODE Solvers Deprecated
# MC11 and MC12: Final-value ODE solvers take both number of points and point-spacing. Constraints can't be satisfied simultaneously.
# MC13 and higher: Final-value functions are deprecated. Use the uppercase solvers instead.
# The logic used in defining the final-value ODE solver functions rkadapt, bulstoer, stiffb, stiffr and radau is flawed - it is impossible to simultaneously assign both the number of desired solution points and the point spacing. It is difficult to predict the final output of these functions. These functions were created when computers were significantly slower than modern machines, so solving for endpoints was necessary to save time.
#
# We recommend using the uppercase versions of these functions, Rkadapt, Bulstoer, Stiffb, Stiffr and Radau, which do not have a conflict in their arguments. They provide a complete solution over the interval and are fast on modern systems.
## Changes to Odesolve
# When you use the function Odesolve with a solve block to solve an ODE, right-clicking on Odesolve displays a drop-down menu from which you can select the solver you want to use:
# •  The default solver is changed from Fixed to Adams/BDF, which calls the new solver AdamsBDF. As a result, Odesolve may return different results than in previous versions of Mathcad.
#
# •  The option Stiff is renamed Radau.
# If you created a worksheet in Mathcad version 13 or earlier, in which you called Odesolve with Fixed as the selected solver, when you open the worksheet in Mathcad 14, Mathcad automatically changes the solver to Adams/BDF. If you want to use Fixed, select it from the menu and save the worksheet. Mathcad retains that setting when you re-open the worksheet.
## Reducing the Value of tol to Improve Results of ODE Solvers
# The new ODE solvers, Adams, BDF, and Radau, are sensitive to the value of tol, the optional input argument that specifies the required accuracy of the solution variable. If you suspect that your results are not sufficiently accurate, set tol to a value smaller than 10^-5. Then call the solver again with the input argument tol and see if the results improve.
## Augment Ignores Vectorization
# MC11, MC13 and MC14: augment does not accept vectorization of its arguments.
# MC12: augment accepts vectorization of its arguments.
# Mathcad 13 and 14 restore the Mathcad 11 behavior of not vectorizing the arguments to augment. If you want to vectorize the arguments of augment, you should define your own function in terms of augment, and then vectorize that function.
a := [1; 2; 3]
b := [4; 5; 6]
vectorize(augment(a, b)) = [1, 4; 2, 5; 3, 6]
vectorize(augment(2, b)) =  # error: These array dimensions do not match.
f(x, y) := augment(x, y)
vectorize(f(a, b)) = [[1, 4]; [2, 5]; [3, 6]]
vectorize(f(2, b)) = [[2, 4]; [2, 5]; [2, 6]]
## Summation and Submatrix Limits Must Be Integers
# MC11: Summation and submatrix use the floor of noninteger arguments.
# MC12 and higher: Summation and submatrix require integer arguments.
# A bug in Mathcad 11 and some previous versions allows non-integer numbers to be used in summation limits and the submatrix function. You should floor these integers to get the correct behavior.
ul := 5*2/3
ul = 3.33333
sum(i, i = 0 .. floor(ul)) = 6
# For other function changes that affect data reading or writing functions, see the section of the migration guide on Data and String Calculation strategies.
## Evaluating Euler's Constant Numerically
# You can now evaluate Euler's constant γ with the numerical equals sign.
γ = 0.577216
# In previous releases, γ could only be evaluated symbolically.
## Default Order for Methods Used by Find and Minerr
# In Mathcad 14, when you apply the solvers Find or Minerr to a nonlinear function, the following methods are applied in the order given, until a solution is found:
# Levenberg-Marquardt
# Conjugate gradient
# Quasi-Newton
# This differs from Mathcad 13, where the methods are applied in the following order: 1) Conjugate gradient, 2) Quasi-Newton, and 3) Levenberg-Marquardt.
# As a result, Find and Minerr might return different results than previously, for problems that have multiple solutions. For example:
## Mathcad 14
## Mathcad 13
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x := 1
y := 6
# annotation to a formula above: This tutorial describes the changes to Mathcad resulting from an extensively update symbolic calculation engine. Mathcad now returns symbolic results for a wider range of functions and more detailed results for piecewise or periodic solutions.
Given
x*y == 1
Find(x, y) = [0.166667; 6]
# Note that both results are valid solutions. You can force Find or Minerr to use a specific method by right-clicking the solver, selecting Nonlinear in the drop-down menu, and checking the box next to the desired solver.
## Change to the Definition of the Heaviside Function at 0
# In Mathcad 14, the Heaviside function is defined to be 0.5 at x = 0.
Φ(0) = 0.5
Φ(0) → 1/2
# This differs from previous versions, in which the function was defined to be 1 at x = 0.
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