# Title: Programming Strategies
# Description: Updating programs to work properly in Mathcad 13.
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# MIGRATION GUIDE
# tutorials
# Programming Strategies
# Newer versions of Mathcad make some changes to program behavior so that the same construct produces the same results regardless of where it is used. These changes introduced some incompatibilities between Mathcad versions, due to fixing some bugs in earlier versions. This worksheet catalogs the changes and shows ways to make programs consistent and clear.
## Return Value of Local Assignments
# MC11, MC13, and MC14: Local assignments return the right-hand side of the expression.
# MC12: Local assignments return the left-hand side of the expression.
# In Mathcad 12, the left-side of a local assignment is returned, which results in different values when the local assignment is the last statement used in a program loop. In all other versions of Mathcad, the right-side of a local assignment is the return value:
# Mathcad
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# Mathcad 12
for i ∈ 0 .. 3
    x[i] ← i^2
= 9
# To make all versions of Mathcad return the same value, use a return operator on a separate line. Your programs will also be clearer:
for i ∈ 0 .. 3
    x[i] ← i^2
return x
= [0; 1; 4; 9]  # or
for i ∈ 0 .. 3
    x[i] ← i^2
return i^2
= 9
# Mathcad 13 and higher versions have a switch on the "Compatibility" tab of Worksheet Options under the Tools menu that allows you to set the behavior of this construct. Use the switch only to see how an earlier version would have calculated the result. We recommend that you use explicit return statements to clarify what the program should return in all cases.
# Note that there is a bug in Mathcad 11 that causes it to return the left side of a local evaluation when a matrix column is assigned. This kind of assignment has been made consistent in Mathcad to return the right-hand evaluation,
A ← identity(3)
B[:, 1] ← 2*A[:, 1]
= [0; 2; 0]
# You can, as before, explicitly return the whole matrix, B, if you want a result consistent with version 11:
A ← identity(3)
B[:, 1] ← 2*A[:, 1]
return B
= [0, 0; 0, 2; 0, 0]
## Evaluation Order of Local Assignments
# MC11, MC13, and MC14: Expressions with local assignments are evaluated right to left.
# MC12: Expressions with local assignments are evaluated left to right.
# The order of evaluation of local assignments is different in Mathcad 12 than in other versions of Mathcad. Most versions of Mathcad perform the rightmost assignment first. Mathcad 12 evaluates the leftmost assignment first.
k := 0
k ← 0
X[k] ← k ← 2
X
= [0; 0; 2]
X[k] := k ← 2
X = [2]
# The following construction works in all versions of Mathcad:
k ← 0
k ← 2
X[k] ← k
X
= [0; 0; 2]
## Referencing of Worksheet Variables
# MC11: Worksheet names always reference on the right-hand side of local assignments in function definitions.
# MC12: Worksheet names reference on the right-hand side of local assignments until reassigned in program, except built-in names.
# MC13 and higher: Worksheet names reference on the right-hand side of local assignments until reassigned in program, including built-in names.
# All versions of Mathcad reference worksheet variables when the name is defined. Mathcad 12 and higher override definitions when the name is reused locally. In previous versions, direct program evaluation worked this way, while function definitions always referenced the worksheet variable. For example, Mathcad 11 assigns the gg on the right of the local assignment below to be the worksheet value on each pass, producing the result 1 from function ff.
gg := 0
ff(n) :=
    for i ∈ 0 .. 2
        gg ← gg + 1
    gg
for i ∈ 0 .. 2
    gg ← gg + 1
gg
= 3
ff(1) = 3
# In Mathcad 12 and previous versions, there are further problems if the name of the worksheet and local variables are the same as a built-in variable. In Mathcad 13 and higher, all versions of this construct perform in the same way, regardless of the name used. We recommend that you use different names for variables, to clarify meaning.
## Namespace Operator
# If you wish to explicitly reference a name in the worksheet on each pass, mimicking the Mathcad 11 and previous version behavior, use the namespace operator to clarify whether the local or worksheet name is meant:
ff2(n) :=
    for i ∈ 0 .. 2
        gg ← gg + 1
    gg
ff2(1) = 1
# The behavior for referencing external functions and assigning them to local variables of the same name works the same way; these will fail in Mathcad 12 and higher. In the following example, the name Q1 is reassigned to a local variable and can no longer be used as a function.
Q1(x) := x^2
for j ∈ 0 .. 3
    Q1[j] ← Q1(j)
Q1 =  # error: This value must be an array.  # or
for j ∈ 0 .. 3
    Q1 ← Q1(j) =  # error: This function refers to itself inconsistently.
# These programs should be changed to
for j ∈ 0 .. 3
    Q1[j] ← Q1(j)
Q1
= [0; 1; 4; 9]  # or
for j ∈ 0 .. 3
    Q2[j] ← Q1(j)
Q2
= [0; 1; 4; 9]
# This change makes program functionality consistent with the way reassignments work outside of programs.
# Note: Since the namespace operator was introduced in Mathcad 12, saving and opening files that use it as Mathcad 11 or Mathcad 2001i will not work. Use distinct names in the worksheet and the program for the most version-neutral functionality.
## Range Summation Operator
# Similarly, the range summation operator always refers to worksheet assignments for its range variable in Mathcad 11, even if there is a locally defined variable of the same name. In Mathcad 12 and higher, the local value takes precedence. A program iteration variable is just a scalar for the value of each loop; the range summation gives the error "This value must be a range."
i := 0 .. 2
# We recommend instead
x ← 2
for i ∈ 0 .. 2
    val[i] ← sum(k, k = 0 .. 2)
val
= [3; 3; 3]
x ← 2
for i ∈ 0 .. 2
    val[i] ← sum(i, i)
val =  # error: This value must be a range.
# Or you can change the name of the local variable:
x ← 2
for k ∈ 0 .. 2
    val[k] ← sum(i, i)
val
= [3; 3; 3]
## Uninitialized Variables and Non-executing Programs
# MC11, MC13, and MC14: Programs that return unassigned variables are set to 0. Programs that never execute produce an error.
# MC12: Programs that return unassigned variables or that never execute return NaN.
# Mathcad 12 returns NaN from programs that return unassigned variables or from programs that never executed. Mathcad 13 and Mathcad 11 set uninitialized variables to zero, while programs that never execute because of conditional statements return an error.
f(x) :=
    p ← 1 if x
    p ← 2 if 2*x
f(1) = 2
f(0) =  # error: This program has no return value. You must account for all cases when using conditional statements in a Mathcad program.
# Note: Returning an uninitialized variable in a program will override any worksheet definition:
p := 2
p ← 1 if 0
p
= 0
## Recursion Depth in Mathcad 13
# MC11: Infinitely recursing programs sometimes throw errors, sometimes crash Mathcad.
# MC12: Programs are limited to a stack depth of 100, more instructions throw an error.
# MC13 and MC14: Programs are limited to a stack depth of 1000, more instructions throw an error.
# To prevent crashing in the case of infinite recursion, Mathcad 12 introduced a restriction on the depth of the recursion stack, the number of instructions a recursive program can keep in memory before it is rejected by Mathcad. Recursion stack depth in Mathcad 12 was 100, which made some programs fail that ran in Mathcad 11. The stack depth in Mathcad 13 and 14 is 1000.
F1(N) :=
    1 if N == 1
    F1(N/2) if mod(N, 2) == 0
    F1(3*N + 1) otherwise
F1(1) = 1
F1(260) = 1
F1(0) =  # error: This expression cannot be evaluated. It may have resulted in an overflow or infinite recursion.
# Programs that can be written recursively can frequently be written non-recursively. While recursive formulas have a compact mathematical notation, they are frequently slower to execute than non-recursive programs. We recommend you avoid recursive constructions when possible.
# For more in-depth information on Programming in Mathcad, download the Inside Mathcad: Programming E-book from the downloads section on http://www.ptc.com/go/mathsoft/mathcad_download.
# If you are unfamiliar with programming operators, see the Tutorial on Programming.
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