# Title: Changes to Symbolics in Mathcad 14
# Description: This tutorial describes the changes to Mathcad resulting from an extensively update symbolic calculation engine. Mathcad now returns symbolic results for a wider range of functions and more detailed results for piecewise or periodic solutions.
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## MIGRATION GUIDE
# tutorials
## Changes to Symbolics in Mathcad 14
# Mathcad 14 features an extensively updated symbolic calculation engine. Mathcad now returns symbolic results for a wider range of functions and more detailed results for piecewise or periodic solutions.
# The following sections describe changes to the behavior of Mathcad 14 that you should be aware of:
# Changes to the Form of Symbolic Results
# Simplifying Results
# Integrals Involving Variables Equal to the Variable of Integration
# Integrals Involving Defined Variables
# Fourier and Inverse Fourier Transforms
# Solving Underconstrained Systems with Find
# Series
# Symbolic Inner Product Now Displays Complex Conjugates
# Symbolic Evaluation of Minerr Only Accepts Linear Equalities
# Changes to Definitions of Elliptic Integral Functions
# Some Symbolic Results No Longer Display Special Symbolic Functions
# Change to Symbolic Evaluation of acot(x)
## Changes to the Form of Symbolic Results
# Mathcad 14 features an extensively updated symbolic calculation engine, providing you with more detailed symbolic results for a wider range of functions. Some symbolic results are returned in different, but equivalent, forms than in previous releases. Here are some examples:
## Mathcad 14
## Mathcad 13
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x^2 - 2 == 0 solve → [sqrt(2); -sqrt(2)]
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d/dx(x^2*sin(x)) → x^2*cos(x) + 2*x*sin(x)
# In most cases, these differences have no significant effect on results in your previous worksheets. The following sections provide tips on how to modify your worksheets to resolve any issues that might arise.
## Simplifying Results
# Mathcad 14 returns more general results than in previous releases. Consequently, some results now appear in a different form. For example, compare the following:
## Mathcad 14
## Mathcad 13
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x^2 + y^2 == 1 solve, y → [sqrt(x - 1)*sqrt(x + 1)*1i; -sqrt(x - 1)*sqrt(x + 1)*1i]
# Mathcad 14 solves the most general case, in which the variables x and y can be complex. Since the solutions to the equation are real when x is a real number between -1 and 1, you can simplify the Mathcad 14 result by adding this assumption using the keyword "assume."
x^2 + y^2 == 1 solve, y; simplify; assume, x == RealRange(-1, 1) → [-sqrt(1 - x^2); sqrt(1 - x^2)]
# In general, if there are restrictions on the variables in a problem, you can simplify your results by using the keyword "assume " to impose those restrictions.
# Here's another example. Mathcad 14 does not automatically simplify the absolute value of a symbolic complex number, such as x + yi.
## Mathcad 13
## Mathcad 14
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|x + y*1i| → |x + y*1i|
# Note that the Mathcad 13 result is only valid when x and y are real numbers. In Mathcad 14, you need to add the assumption that x and y are real to simplify the result.
|x + y*1i| simplify; assume, x == real, y == real → sqrt(x^2 + y^2)
# If the keyword "simplify" does not fully simplify an expression, you can increase the number of steps performed by "simplify" by adding the modifier "max." For example:
v := [x; y]  # error: This variable is undefined.
|v| assume, x == real, y == real; simplify → sqrt(x^2 + |y|^2)
# Since the variables are assumed to be real, the absolute value sign around y is unnecessary. To fully simplify the result, add the modifier "max."
|v| assume, x == real, y == real; simplify, max → sqrt(x^2 + y^2)
## Integrals Involving Variables Equal to the Variable of Integration
# In Mathcad 14, if you symbolically evaluate the integral of an expression with respect to a variable A, which was previously defined to be equal to the variable of integration, Mathcad correctly treats A as the variable of integration. This differs from the behavior of Mathcad 13. For example, compare the following results.
## Mathcad 14, 12 and 11
## Mathcad 13
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A := x  # error: This variable is undefined.
integral(A, x) → x^2/2
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integral(A, x = 0 .. 1) → 1/2
# Note: The Mathcad 14 behavior for these types of integrals is the same as the behavior in Mathcad 11 and 12.
## Integrals Involving Defined Variables
# In Mathcad 14, if you evaluate an indefinite integral with respect to a variable that has been previously defined in the worksheet, the value of the variable is substituted into the result. In previous versions of Mathcad, the defined value is not substituted.
## Mathcad 14
## Mathcad 13
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x := 3
integral(x, x) → 9/2
## Fourier and Inverse Fourier Transforms
# Mathcad 14 uses a slightly different definition for Fourier and inverse Fourier transforms than in previous releases.
# Fourier Transform of f(t)
## Mathcad 14
## Mathcad 13
integral(f(t)*e^(1i*ω*t), t = -∞ .. ∞)
integral(f(t)*e^(-1i*ω*t), t = -∞ .. ∞)
# Inverse Fourier Transform of F(ω)
## Mathcad 14
## Mathcad 13
1/2π*integral(F(ω)*e^(-1i*ω*t), ω = -∞ .. ∞)
1/(2*π)*integral(F(ω)*e^(1i*ω*t), ω = -∞ .. ∞)
# Notice that the exponents have reverse signs in Mathcad 14 from earlier versions. The Mathcad 14 version is a valid alternative way to define the transforms, but the results of the symbolic keywords "fourier" and "invfourier" sometimes differ slightly from results in previous versions, as shown in the following examples.
## Mathcad 14
## Mathcad 13
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Φ(t) fourier → (π*ω*Δ(ω) + 1i)/ω
e^(1i*a*t) fourier → 2*π*Δ(a + ω)
(π*ω*Δ(ω) + 1i)/ω invfourier → Φ(t)
2*π*Δ(ω + a) invfourier → e^(a*t*1i)
# To return the Mathcad 13 results for "fourier," replace the variable t with -t in the Mathcad 14 expression:
Φ(-t) fourier → (π*ω*Δ(ω) - 1i)/ω
e^(-1i*a*t) fourier → 2*π*Δ(ω - a)
# To return the Mathcad 13 results for "invfourier," replace the variable ω with -ω in the Mathcad 14 expression:.
(π*(-ω)*Δ(-ω) + 1i)/(-ω) invfourier → 1 - Φ(t)
2*π*Δ(-ω + a) invfourier → e^(-a*t*1i)
## Solving Underconstrained Systems with Find
# In Mathcad 14, using Find with the symbolic equal sign to solve an underconstrained system of equations returns just one solution, instead of the general solution to the system. For example:
## Mathcad 14
## Mathcad 13
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Given
a + b + c == 0
a + 2*b == 1
Find(a, b, c) → [-1; 1; 0]
# To return the general solution in Mathcad 14, add the modifier "fully":
Given
a + b + c == 0
a + 2*b == 1
Find(a, b, c) fully → {
    [-2*_z - 1; _z + 1; _z] if _z ∈ ℂ
    undefined otherwise
}
# To replace the generated variable _z with c, add the modifier "using, _z = c."
Given
a + b + c == 0
a + 2*b == 1
Find(a, b, c) fully; using, _z == c → [-2*c - 1; c + 1; c]
## Series
# In Mathcad 14, the keyword "series" sometimes returns one more term than in previous versions. For example:
x := x  # Clear the symbolic value of x.
## Mathcad 14
## Mathcad 13
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e^x - 1 series, 4 → x + x^2/2 + x^3/6 + x^4/24
# Mathcad 14 returns a different ordering for the terms of a series in two or more variables than previous versions.
## Mathcad 14
e^(x + y) series, x, y, 4 → 1 + y + y^2/2 + y^3/6 + x + x*y + x*y^2/2 + x^2/2 + x^2*y/2 + x^3/6
## Mathcad 13
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# Note that the two series are equivalent. The only difference between them is the order of the terms.
## Symbolic Inner Product Now Displays Complex Conjugate Signs
# When you take the inner product of two symbolic vectors in Mathcad 14, the result is displayed with complex conjugate bars over the variables in the second vector. This differs from the Mathcad 13 behavior, in which conjugate bars are not displayed in the inner product.
## Mathcad 14
## Mathcad 13
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[a; b]*[x; y] → a*conj(x) + b*conj(y)
# Note that this change only applies to vectors containing undefined variables. When taking inner products of numerical vectors, both Mathcad 13 and 14 correctly apply complex conjugates to the entries of the second vector. For example, suppose you define.
a := 1
x := 3i
b := 2
y := 1
# Both Mathcad 14 and Mathcad 13 return the correct result.
[a; b]*[x; y] → 2 - 3i
# In Mathcad 14, this result is consistent with taking the symbolic inner product and substituting the values of the variables:
[a; b]*[x; y] substitute, a == 1, b == 2, x == 3i, y == 1 → 2 - 3i
# This fixes a bug in previous versions, in which the above calculation returned the incorrect 2 + 3i.
## Symbolic Evaluation of Minerr Only Accepts Linear Equations
# In Mathcad 14, if you evaluate the function Minerr symbolically, the equations in the solve block that contains Minerr must be linear, and inequality constraints are not allowed. Otherwise, Mathcad returns an error. In Mathcad 13, evaluating Minerr symbolically for nonlinear equations and inequalities returned incorrect results.
# In Mathcad 14 you can still evaluate Minerr numerically for solve blocks that contain nonlinear equations and inequalities.
## Changes to Definitions of Elliptic Integral Functions
# Some symbolic integrals return results in terms of the elliptic integral functions.
# - EllipticK(m)
# - EllipticF(x,m)
# - EllipticE(m)
# - EllipticE(x,m)
# - EllipticPi(m)
# - EllipticPi(x,m)
# See the QuickSheet "Symbolic Elliptic Integral Functions" for the definitions of these functions.
# In Mathcad 14, the definitions of these functions is slightly different than in previous versions. For example, in Mathcad 14, the following integral returns ellipticK(m):
integral(1/(sqrt(1 - τ^2)*sqrt(1 - m*τ^2)), τ = 0 .. 1) → EllipticK(m)
# In Mathcad 13, the same result was returned if you replaced m with its square root. That is, if you set m:= 3 in the above example, the result in Mathcad 13 would be ellipticK(9). This change to argument m holds in all the functions.
# In Mathcad 14, the following integral returns ellipticF(x, m):
x := x
integral(1/(sqrt(1 - τ^2)*sqrt(1 - m*τ^2)), τ = 0 .. sin(x)) assume, -π/2 < x < π/2 → EllipticF(x, m)
# In Mathcad 13, the same result was returned if you replaced sin(x) with x as the upper limit of integration in the integral. This change to the argument x holds in all the two-argument functions.
## Some Symbolic Results No Longer Display Special Symbolic Functions
# In Mathcad 14, some symbolic results are no longer expressed using special symbolic functions, as they were in previous releases. For example, in Mathcad 13 the following integral returns a result in terms of the digamma function, Psi.
integral(e^(-1/5*τ)/(1 - e^(-τ)), τ = 0 .. ∞) → integral(-e^(-τ/5)/(e^(-τ) - 1), τ = 0 .. ∞)
# Mathcad 14 does not return this result in terms of Psi.
## Change to Symbolic Evaluation of acot(x)
# In Mathcad 14, the symbolic definition of acot(x) uses a different branch of the inverse cotangent function than in previous releases. As a result, evaluating acot(x) with the symbolic equal sign for x < 0 returns a result that differs from the Mathcad 13 result by π. For example,
acot(-1) → -π/4
# The Mathcad 13 result is | 3*π/4 | .
# In Mathcad 14, the symbolic definition of acot(x) has a jump discontinuity at x = 0.
# Note that evaluating acot(x) with the numerical equal sign returns the same results as in previous releases.
acot(-1) = 2.35619
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