# Title: Units in Calculation and Solving
# Description: Effects of changes to unit checking on worksheets.
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# MIGRATION GUIDE
# tutorials
# Units in Calculations and Solving
# Mathcad 12 introduced static unit and type checking. All regions are unit balanced and checked for type (vector, scalar, function, and so on) consistency before they are executed. This feature offers gains in performance and consistency of operation. It can also cause a few surprising side effects in your worksheets.
## Range Variables with Units Require an Explicit Step Size
# MC11: Range variables with units use the base unit for a step size if not supplied.
# MC12 and higher: Range variables with units must specify a step size.
# In Mathcad 11 and previous versions, range variables with units without an explicit step size would assume a step of 1 in the base unit of the system. This assumption created confusion and undesirable results whenever ranges were specified in units that differed from the base dimension (such as cm instead of m). In Mathcad 12 and higher versions, explicit steps are required:
i := 0*mm .. 3*mm  # error: Dimensioned ranges must specify the second value in the range.
i := 0*mm, 1*mm .. 3*mm
i = [0; 1; 2; 3] mm
# Similar ambiguous behavior exists when passing values with units to a graph or a component. All values are scaled to the base unit of the current unit system. For consistent conversions between one unit system and another, we recommend dividing out units explicitly before passing them into a calculation that strips them or scales them. An example is shown in the case of fitting functions, below.
## Regression and ODE Solvers Don't Accept Units
# MC11: Functions that accept other functions as arguments don't unit balance the output of the argument function
# MC12 and higher: All units must balance in any function call, including the outputs generated by calling argument functions.
# In earlier versions of Mathcad, the fitting (genfit, linfit) functions and ODE solvers (such as rkfixed and odesolve) always reject data with units. To correctly unit-balance their results, they have to return mixed-unit matrices, which are not currently supported. A bug in Mathcad 11 and previous versions allowed the vector of functions to have units associated with the output of those functions. These outputs are scaled to the base units of the worksheet unit system and are returned without units. The results are hard to interpret at best, and at worst, could result in scaling errors.
T_c := 300*K
mW := 10^-3*W
Tm := [300; 10^3; 1.5*10^3; 2*10^3]*K
Pm := [0; 4; 10; 16]*mW
# This vector of fitting functions is accepted in Mathcad 11 and previous versions, although it incorrectly takes the vector of normalized input temperatures Tm and subtracts the non-normalized temperature T_c.
fit(Tm) := [Tm - T_c; T^4]  # error: The forms of these values must match. This value has the form: Temperature, but others have the form: Magnetic Flux Density^4.
# Rewrite the fitting function vector to have a unitless result to make linfit work.
fit(Tm) := [Tm - T_c/K; Tm^4]
linfit(Tm/K, Pm/mW, fit) = [0.00633229; 3.37848e-13]
# These results are now specifically scaled to mW/K and mW/K^4, respectively. Mathcad 12 and higher versions require that these function vectors produce unitless results so the whole solver is correctly unit-balanced. The same is true of ODE solve blocks that use functions with united results in the body of the block.
## UnitsOf and SIUnitsOf Functions
# MC11: UnitsOf function returns the base unit for any quantity in the worksheet unit system.
# MC12: UnitsOf replaced with SIUnitsOf function, which returns the base SI unit for any quantity, regardless of worksheet unit system.
# MC13 and higher: UnitsOf restored in the SI system. SIUnitsOf returns the base SI unit for any quantity, regardless of worksheet unit system.
# All unit systems in Mathcad 12 and higher are based around the SI unit system for consistency in conversions. The UnitsOf function behaves differently from previous versions in the US and CGS systems, so it has been deprecated in all but the SI system of units. A new function SIUnitsOf replaces UnitsOf.  We recommend swapping the new function name in as soon as possible, even in worksheets in the SI unit system.
# For quick conversion, you can define
UnitsOf(x) := SIUnitsOf(x)
# but we recommend searching and replacing to remove reference to the old function entirely. The SIUnitsOf function returns the SI base unit, providing predictable and consistent behavior regardless of other unit system settings.
## Unit Simplification Rules
# MC11: 1/s simplified to Hz.
# MC12: 1/s does not simplify, to avoid confusion with angular frequency Hz.
# MC13 and higher: User-defined default units let you choose unit simplification rules.
# Through the last several versions, various unit reduction rules have been added and removed to avoid confusion. The most prominent was 1/s = Hz. This simplification was incorrect for engineers who treat Hz as angular frequency. The rule is no longer present in Mathcad 12 and higher versions, but you can restore it if appropriate to your work using the "Custom" unit system settings in the Tools > Worksheet Options Unit System tab.
#
# Any unit can be added or deleted from the derived unit list, which tells Mathcad to simplify when it matches the units in the list.
## Unit System Tab Dimensions
# We do not recommend using customizations on the "Dimensions" tab of Tools > Worksheets Options. Given our new unit balancing system, based around quantities rather than units, we expect to remove the ability to rename quantities in this dialog. More extended functionality will be based around quantities in the future, and more sophisticated methods to customize unit and quantity systems will be introduced.
## Solve Blocks with Mixed-Unit Results Must be Assigned Differently
# MC11: "Mixed-unit results" from a solve block can be displayed or parameterized.
# MC12: "Mixed-unit results" must be independently assigned, cannot be parameterized.
# MC13 and higher: "Mixed-unit results" must be independently assigned, including parametric functions to calculate results
# Mathcad 11 and several previous versions allowed solve blocks to return vectors of results with different units. These vectors were not true matrices and existed only so they could be broken apart into separate values. These vectors are confusing and inconsistent, so in Mathcad 12 and higher you must assign these outputs to individual names.
x := 1 ft
y := 1*ft/sec
Given
2*x*y == 3*ft^2/sec
x/y == 8 sec
[xs; ys] := Find(x, y)
xs = 3.4641 ft
ys = 0.433013 ft/s
# The two solutions must be given unique names in the output vector, and they must be assigned rather than directly evaluated. You must do the same with parametric solve blocks with mixed units in the results:
Given
Q*x*y == 3*ft^2/sec
x/y == 8 sec
[xs(Q); ys(Q)] := Find(x, y)
## Solve Blocks with Units May Fail to Converge due to Scaling
# MC11: Values in solve blocks are scaled to the worksheet unit system before solving.
# MC12 and higher: Values in solve blocks are scaled to SI before solving.
# All unit systems in Mathcad 12 and higher are based around the SI unit system for consistency in conversions. Numbers are represented internally scaled to SI, and their quantity is carried along separately. The different scaling may cause nonlinear problems to fail to converge in the US or CGS systems. The problem is corrected by normalizing the equations to their appropriate units. This method may help with problems that failed to converge under any version of Mathcad.
# Consider the following highly nonlinear function in US units:
ksf := kip/ft^2
# Guess:
σ(x) := (.75*in + x)*11.2*ksf/(4.*in - 2.*sqrt(.56*in^2 - 1.*x^2))
x := 0.4*in
# Find the maximum of this function by setting the derivative equal to zero and constraining the search space. Note the very different scales of the values in this problem when expressed in the given US and the default SI units.
σ(x) = 32.7026 psi
σ(x) = 225476 Pa
d/dx(σ(x)) = 13.3129 pounds_per_cubic_inch
d/dx(σ(x)) = 3613745 Pa/m
Given
d/dx(σ(x)) == 0*psi/in
x ≤ 0.6*in
x ≥ 0
x0 := Find(x)
x0 = 0.564222 in
# The solve block also converges if you specifically scale the problem, dividing through by the units in which it is cast:
Given
d/dx(σ(x)/psi) == 0*1/in
x ≤ 0.6*in
x ≥ 0
x2 := Find(x)
x2 = 0.564222 in
σ(x2) = 33.8823 psi
# For problems such as these, you might try a different method altogether, such as the root function.
root(d/dx(σ(x)), x, 0*in, 0.6*in) = 0.564222 in
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