# Title: 2D Graph Enhancements
# Description: 2D Graph enhancements: improved accuracy of tick marks, and negative radii in polar plots.
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# NEW FEATURES
# tutorials
# 2D Graph Enhancements
# Mathcad 14 adds new enhancements for 2D graphs:
# New number format tab on 2D graphs
# Negative radii in polar plots
## New Number Format Tab on 2D Graphs
# A Number Format tab has been added to the 2D graph formatting dialogs, so that you can set the decimal place of ticks and results generated by Mathcad for more displayed accuracy on plots. As with all other plot format features, these settings only affect the 2D graph to which they are applied, unless you make them the default settings.
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## Example
# The graph below looks fine:
y(x) := x
X := 0, 0.10 .. 2
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# Now zoom in by typing in some axis limits. Note that the axis limits on x and y are not quite the same if you click on the graph. The graph still looks fine since the plot crosses at 1.5 and 1.5.
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# Now turn off the auto grid, and force 4 grids. Now the graph does not display correctly! At x = 1.5, we should still see y = 1.5
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# The graph seems to display inaccurately, but this inaccuracy is due to the rounding of the tick marks on the axes. While Mathcad divides each axis into 4 intervals, the ticks appear unequally spaced because the limits are different between the two axes. The second tick mark on each axis actually occurs at:
# x axis:
(1.57 - 1.43)*2/4 + 1.43 =  # no stored result
# y axis:
(1.57 - 1.42)*2/4 + 1.42 =  # no stored result
# Unfortunately, the difference is so small that it disappears when Mathcad rounds the ticks to two significant figures. 1.495 rounds up to 1.5, which leads to the imprecise-looking graph.
# With the addition of the Number Format tab, you can make the tick marks more accurate. Double-click the plot to open the Formatting X-Y Plot dialog. Choose the Number Format tab, then set the Number of Decimal Places to 3 as below. When Mathcad redraws the graph, the grid lines don't move, but their values are reflected more accurately.
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## Negative Radii in Polar Plots
# Mathcad 14 allows you to specify negative values for radii in polar plots, similar to the negative values allowed for the X and Y axes in X-Y plots. This is particularly useful when plotting in dB (log scale), which commonly occurs in the communications and antenna design industries.
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## Example
N := 4
f := 3*MHz
n := 0 .. N - 1
c := 2.998*10^8*m/sec
d := 50*m
α := 30*deg
F(φ) := 5.7/N*sum(e^(-(1j*n*d*2*π*f/c*cos(φ) + 1j*n*α)), n)
FdB(φ) := 10*log(|F(φ)|)
# Previously, Mathcad phase translated the negative radii and gave them a positive radius value:
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# Here's what the graph looks like now, with show negative radii enabled on the radial axis:
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