# Title: Defining a Variable by the Result of a Numerical Evaluation in a Single Line
# Description: Tutorial shows how to the define a variable by the result of a numerical evaluation in a single line expression.
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## NEW FEATURES
# tutorials
# Defining a Variable by the Result of a Numerical Evaluation in a Single Line
# In Mathcad 14, you can define a variable by the result of a numerical evaluation in a single line. For example:
x := sqrt(2) = 1.41421
# The variable x is defined by the result on the right-hand side of the numerical equal sign (=). You can evaluate x either numerically or symbolically. In the following,
# Note: Only three decimal places are displayed when you evaluate x with the equal sign, because Number of decimal places, in the Result Format dialog (Format > Result), is set to 3. The actual value of x is accurate to 17 decimal places, as you can see by evaluating x with the symbolic equal sign.
x = 1.41421
x → 1.41421356237
# Note that this is a different result than you get by defining the variable without the numerical evaluation on the right:
y := sqrt(2)
# In this case, y retains its "exact" value as the square root of 2.
y → sqrt(2)
# You can evaluate the result symbolically to more than 17 decimal places:
y float, 30 → 1.41421356237309504880168872421
# One advantage of defining and evaluating in a single line is that you can control the way results are displayed by the keyword "explicit." For example, consider the following explicit calculation:
a := 2*ft
b := 14.6*in
c := sqrt(a^2 + b^2)
# If you evaluate the expression a + c with the keyword "explicit," Mathcad substitutes the values for a and b in place, without performing any arithmetic.
a + c explicit, ALL → 2*ft + sqrt((2*ft)^2 + (14.6*in)^2)
# On the other hand, if you want Mathcad to evaluate the expression under the square root first and then replace the numerical result for c, you should define c with a numerical evaluation.
c := sqrt(a^2 + b^2) = 0.713537 m
a + c explicit, ALL → 2*ft + 0.713536590232*m
# Another reason for defining a variable by the result of a numerical evaluation is that you can capture the output of a function that is only defined numerically, and then evaluate the variable symbolically. This is easier than defining the variable on a new line by copying and pasting the function's numerical output.
# For example, suppose you compute the variance of a vector of numbers using the built-in function var.
var([1.2; 3.7; 2.5; 1.9]) = 0.841875
# Note that the function var can only be evaluated numerically, so you cannot directly evaluate the preceding expression symbolically.
var([1.2; 3.7; 2.5; 1.9]) → var([1.2; 3.7; 2.5; 1.9])
# However, if you first define a variable v by the numerical output of var, you can then evaluate the result symbolically.
v := var([1.2; 3.7; 2.5; 1.9]) = 0.841875
v → 0.841875
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