# Title: New and Improved ODE Solvers
# Description: Using the new ODE solver functions.
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## NEW FEATURES
# tutorials
# New ODE Solvers and State Space Solver
# Mathcad 14 features the following new and enhanced functions for solving ordinary differential equations (ODEs):
# New Solvers for Ordinary Differential Equations
# Changes to Odesolve
# Enhancements to Radau
# New State Space Solver
## New Solvers for Ordinary Differential Equations
# Mathcad 14 adds three new functions for solving ODEs:
# Adams, based on Adams methods, is designed to solve non-stiff systems. The syntax for Adams is
#
# Adams(init, t1, t2, npoints, D, [tol])
# BDF, which uses backward differentiation formulas, is designed to solve stiff systems. The syntax for BDF is
#
# BDF(init, t1, t2, npoints, D, [J], [tol])
# AdamsBDF, a hybrid solver that dynamically detects whether a system is non-stiff or stiff, and calls Adams or BDF accordingly.
# The syntax for AdamsBDF is
#
# AdamsBDF(init, t1, t2, npoints, D, [J], [tol])
# Note: For BDF and AdamsBDF, you can use either of the optional arguments J and tol by itself. For example, the following forms are valid:
# BDF(init, t1, t2, npoints, D, [J])
# BDF(init, t1, t2, npoints, D, [tol])
## Arguments
# The required arguments, init, t1, t2, npoints, and D, for the new solvers are the same as for the existing solvers. See Solving a First-Order ODE Initial Value Problem for an example that uses the existing solver rkfixed with these arguments. In that example, you can replace rkfixed with Adams, BDF, or AdamsBDF and compare the results.
# In addition, the new solvers have the following optional arguments:
# tol - A real value or a vector of real values specifying tolerances for each independent variable in the system. You can use tol to override the default tolerance of 10^-5.
# J (BDF and AdamsBDF only) - a function that returns the n x n Jacobian matrix, the matrix of partial derivatives of the system of equations in D with respect to the variables y_0, y_1, ..., y_n. Supplying J can improve the accuracy of your results.
# The example below uses J.
# Note: J is different from the matrix used as the final argument for the solvers Stiffb and Stiffr.
## Changes to Odesolve
# When you use the function Odesolve with a solve block to solve an ODE, right-clicking on Odesolve displays a drop-down menu from which you can select the solver you want to use. This menu has the following changes in Mathcad 14:
# •  The default solver is changed from Fixed to Adams/BDF, which calls the new and superior solver AdamsBDF. As a result, Odesolve may return different, but more accurate, results than in earlier versions of Mathcad.
#
# •  The option Stiff is renamed Radau.
# Note: If you created a worksheet in Mathcad version 13 or earlier, in which you called Odesolve with Fixed as the selected solver, when you open the worksheet in Mathcad 14, Mathcad automatically changes the solver to Adams/BDF. However, if you create a new 14 worksheet using Odesolve with Fixed as the selected solver, Mathcad retains that setting when you re-open the worksheet.
## Enhancements to Radau
# The solver Radau, which is designed to solve stiff systems, now accepts three new optional arguments:
# •  J - A function that returns the n x n Jacobian matrix, the matrix of partial derivatives of the system of equations in D.
# •  M - A real matrix representing a coupling between the variables of the form
M*(d/dt1(y)) == f(t1, y)
# •  tol - A real value or a vector of real values specifying tolerances for each independent variable in the system. You can use tol to override the default tolerance of 10^-5.
# Radau accepts these arguments using the syntax
# Radau(init, t1, t2, npoints, D, [J], [M], [tol])
# Note: You can use any combination of the optional arguments J, M and tol, and omit the options you do not wish to use.
# The arguments J and tol are also available to the new solvers described in New Solvers for Ordinary Differential Equations.
## Example
# Suppose you want to solve a system of the following form:
d/dt1(y[0]) == -.04*y[0] + 10^4*y[1]*y[2]
d/dt1(y[1]) == .04*y[0] - 10^4*y[1]*y[2] - 3*10^7*y[1]^2
0 == y[0] + y[1] + y[2] - 1
# Note that while the first two equations involve derivatives, the third is algebraic. You can write this system in the following form:
M*(d/dt1(y)) == f(t1, y)
# where f(t,y) is the vector function
f(t1, y) := [-.04*y[0] + 10^4*y[1]*y[2]; .04*y[0] - 10^4*y[1]*y[2] - 3*10^7*y[1]^2; y[0] + y[1] + y[2] - 1]
# and M is the "coupling matrix":
M := [1, 0, 0; 0, 1, 0; 0, 0, 0]
# Note that M has a 0 in its lower-right corner because the left-hand side of the third equation is 0. As a result,
M*(d/dt1(y)) == [d/dt1(y[0]); d/dt1(y[1]); 0]
# To improve the accuracy of your results, you can supply the Jacobian matrix J as an optional argument to Radau. The Jacobian has the following form.
J(t1, y) == [
    d/d(y[0])(f[0]), d/d(y[1])(f[0]), d/d(y[2])(f[0]);
    d/d(y[0])(f[1]), d/d(y[1])(f[1]), d/d(y[2])(f[1]);
    d/d(y[0])(f[2]), d/d(y[1])(f[2]), d/d(y[2])(f[2])
]
# In this example, the Jacobian is
J(t1, y) := [-.04, 10^4*y[2], 10^4*y[1]; .04, -10^4*y[2] - 6*10^7*y[1], -10^4*y[1]; 1, 1, 1]
# Create a vector yinit of initial conditions for y_0, y_1, and y_2.
yinit[0] := 1
yinit[1] := 0
yinit[2] := 0
# Create endpoints for the interval over which the ODE is to be solved.
ts := 0
te := 4*10^4
# Now, apply the solver Radau with these arguments.
sol := Radau(yinit, ts, te, 1000, f, J, M)
# The following plots show the graph of the solution.
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## New State Space Solver
# Mathcad 14 features a new state space solver, statespace, that solves systems of the form:
d/dt1(x(t1)) == A(t1)*x(t1) + B(t1)*u(t1)
# where
# •  x(t) is a vector of unknown states.
# •  A(t) is the state matrix.
# •  B(t) is the input matrix.
# •  u(t) is the input, or control, function. u(t) can be a scalar or vector-valued function.
# The following example illustrates the statespace solver.
A(t1) := [0, .5; -1, -1]
B(t1) := [-1; .1]
u(t1) := sin(t1)
x0 := [0; 1]
sol := statespace(x0, 0, 20, 500, A, B, u)
# statespace takes the following arguments:
#
# statespace(x0, t0, t1, npts, A, B, u)
#
# •  x0 is a vector of initial conditions.
# •  t0 is a starting point of the integration interval.
# •  t1 is an ending point of the integration interval.
# •  npts is the number of points at which to return results.
# •  A is the state matrix.
# •  B is the input matrix.
# •  u is the control function. u can be a scalar or a vector.
# The graph of the solution is shown below.
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