# Title: New Features
# Description: An outline of the features new to Mathcad 13.
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## NEW FEATURES
# tutorials
# Enhancements to Symbolics
# Mathcad 14 features the following general improvements to its symbolic capabilities:
# Improved Symbolic Processor
# More Detailed Results from Symbolic Operations
# Changes to Numerical Evaluation of Undefined Symbolic Results
# Controlling the Number of Decimal Places Displayed in Symbolic Results
# In addition, the following QuickSheets describe other additions and enhancements to the Mathcad 14 symbolics capabilities:
# New Symbolics Keywords, Functions, and Modifiers
# New Gradient Operator and Jacobian Function
# Evaluating Vectorized Functions and Operators Symbolically
## Improved Symbolic Processor
# Mathcad 14 features an extensively updated symbolic calculation engine. Mathcad now returns symbolic results for a wider range of functions, more detailed results for piecewise or periodic solutions, and has more functionality to control and manipulate the form of symbolic results.
# As a result of this upgrade, you may notice that Mathcad 14 returns some symbolic results in different, but equivalent, forms than in previous releases. The following are examples of this:
## MC 14
## MC13 and earlier
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d/dx(x^2*sin(x)) → x^2*cos(x) + 2*x*sin(x)
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integral(sin(x)^2, x) → x/2 - sin(2*x)/4
## More Detailed Results from Symbolic Operations
# You can now return more detailed results from "solve" and other symbolic operations by adding the new modifier "fully." For example,
(3*a - 7)*x == 1 solve, x, fully → {
    1/(3*a - 7) if a ≠ 7/3
    undefined if a == 7/3
}
# The detailed result tells you the value of a for which the solution is undefined. You can use the detailed result to define a function.
f(a) := (3*a - 7)*x == 1 solve, x, fully → {
    1/(3*a - 7) if a ≠ 7/3
    undefined if a == 7/3
}
f(1) → -1/4
# Note that you can evaluate the function f(a) at the value a == 7/3, which returns the word "undefined," but does not return a Mathcad error.
f(7/3) → undefined
# If instead you defined f(a) without using "fully," evaluating g(7/3) would return an error.
# For equations whose solution is periodic, Mathcad returns a single solution, followed by an expression for adding integer multiples of the period to the first solution.
sin(x) == cos(x) solve, fully → {
    π/4 + π*_n if _n ∈ ℤ
    undefined otherwise
}
# The expression
π/4 + π*_n if _n ∈ ℤ
# means the single solution π/4  plus all integer multiples of π. Mathcad inserts a new, generated variable _n that represents an arbitrary integer. The expression
_n ∈ ℤ
# means "_n is an element of the set ℤ of integers."
# The generated variable _n is preceded by an underscore to avoid conflicts with other variables that you might have defined elsewhere in the worksheet.
# Note: For equations that involve just a single variable, it is no longer necessary to specify the variable after "solve."
## Numerical Evaluation of Undefined Results Now Returns NaN
# For certain symbolic operations, Mathcad returns the answer "undefined." For example:
limit(1/x, x → 0) → undefined
# In Mathcad 14, you can define a variable by this result. When you evaluate the variable with the equal sign, the result is NaN, or "Not a Number." This differs from the behavior in previous versions of Mathcad, in which trying to define a variable by an undefined symbolic result returned an error. Compare the following:
# Mathcad 14 | Mathcad 12 and 13
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L := limit(1/x, x → 0) → undefined
L =  # no stored result
# You can also use this feature when defining a function by a detailed result that contains special cases for which the result is undefined. Using the same example as in the preceding section,
f(a) := (3*a - 7)*x == 1 solve, x, fully → {
    1/(3*a - 7) if a ≠ 7/3
    undefined if a == 7/3
}
# you can evaluate f(a) at the a == 7/3  numerically and the result is NaN:
f(7/3) =  # no stored result
## Controlling the Number of Decimal Places Displayed in Symbolic Results
# In Mathcad 14, you can now control the number of decimal places that are displayed in the results of symbolic evaluations, just as you can for numeric evaluations. For example, suppose you evaluate π symbolically using the keyword "float."
π float → 3.14159265359
# By default, Mathcad computes symbolic floating-point results to 20 digits.  If you only want to display the result to 5 decimal places, do the following:
# 1.  With the cursor in the result, select Result on the Format menu.
# 2.  Check the box next to "Apply to symbolic results."
# 3.  Set "Number of decimal places" to 5.
# 4.  Click OK.
# The result is displayed as follows:
π float → 3.14159
# This only changes the number of decimal places that are displayed. If you define a variable by this computation, it is still accurate to 20 digits.
x := π float → 3.14159
# If you later display x without changing the settings in the Result Format dialog, Mathcad displays all the digits of x.
x → 3.14159265359
# Note: We recommend that you use the Result Format dialog to control the number of displayed digits of a result, because this does not affect the accuracy of the result.
# Adding an integer modifier to "float" changes the number of computed digits, and therefore the accuracy, of the result. For example, if you add 6 after "float," Mathcad computes only 6 digits of π.
y := π float, 6 → 3.14159
# This time the variable only represents π to 6 digits.
y → 3.14159
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