# Title: New Usability Features
# Description: New Mathcad worksheet features such as find and replace in collapsed regions, file comparison, multiplication display of units, new or clarified units, and reduced size of images.
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# NEW FEATURES
# tutorials
# New Usability Features
# Mathcad 14 introduces some new features that improve your Mathcad experience:
# Finding and Replacing in Collapsed Areas
# Comparing Files
# Changing Multiplication Display in Units
# New Units
# Reducing Size of Images
# New Solving E-book
## Finding and Replacing in Collapsed Areas
# You can now find and replace characters located within collapsed areas. Both the Find and Replace dialogs have an option to find characters in math and text regions in collapsed areas. This option is enabled by default.
## Comparing Files
# Mathcad 14 allows you to visually compare two saved worksheets and reports the added, deleted, and changed regions between the two. If a worksheet contains unsaved changes, Mathcad uses the last saved version for the comparison.
# To compare two worksheets, choose Compare from the Tools menu and specify the two worksheets to compare. You can then browse to each worksheet you want to compare, including your current worksheet.
# The comparison results appear in a separate window, with the differences between the worksheets indicated with outlining rectangles. Mathcad indicates the type of difference by changing the color of the rectangle:
# •  A red rectangle indicates a region only existing in the first (left) worksheet.
# •  A blue rectangle indicates a region only existing in the second (right) worksheet.
# •  A gold rectangle indicates a region whose content differs between the two worksheets.
# You can only compare two worksheets in each compare window, though you can open more than one Compare Worksheet window at a time to compare multiple worksheets.
## Changing Display of Multiplication Operator in Unit Results
# If you prefer to have the multiplication operator in your resulting units appear differently, you can now change its display. You can also change the display of the operator of units that you insert in a result. Just right-click on the unit and choose the display you prefer. For multiplication, you have the choice of different sized dots, x, or space.
5*cm + 6*cm = 0.11 m
5*N = 5 kg*m/s^3*s
## New Units
# Mathcad 14 includes several new units, and has clarified some existing units. New to Mathcad 14 are:
# •  meganewtons (MN), giganewtons (GN), and teranewtons (TN), which are scaled versions of the SI unit of force, newton.
# •  °, the degree symbol, which is equivalent to the SI angular unit deg.
# •  dots per inch (dpi), used to express resolution for print and screen images.
# •  pound (lbm), the amount of mass necessary to generate one pound of weight (lbf) at standard gravity.
# •  metric ton force (tonnef), the amount of force (weight) generated by one metric ton of mass (tonne) at standard gravity.
# •  °R, degrees Rankine, a variation of the US unit of temperature, Rankine.
# •  International Btu (Btu), a variation of the existing unit, International BTU (BTU).
1*10^6*N = 1 MN
1000 MN = 1 GN
1000*GN = 1 TN
° = 1 deg
dpi = 1 in^-1
lbf = 9.80665 lb*m/s^2
tonnef = 9.80665 m*tonne/s^2
°R = 0.555556 K
Btu = 1055.06 J
# These units are available in all unit systems, except for MN, GN, TN, and tonnef, which are not defined in the CGS system of units.
# Several entries in the Insert Units dialog have been clarified as well:
# •  The flow rate gallons per minute, has been clarified as US gallons per minute.
# •  The unit of pressure psi has been clarified as pounds (force) per square inch.
## Reducing Size of Images
# Mathcad 14 allows you to reduce the size of your files by choosing the quality of images in the worksheet. The XML Options tab of the Properties Dialog under the File menu, has a new option of Image Quality for JPEGs. If you select to convert your images to the JPEG format, then you may reduce the quality of the images, thereby reducing their size and reducing the overall size of the file.
## Inside Mathcad: Solving E-book
# A new E-book has been added to the Inside Mathcad series. Inside Mathcad: Solving introduces Mathcad methods for solving and optimization. It covers choosing the correct function, using the functions, and interpreting results.
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