# Title: Evaluating Vectorized Functions and Operators Symbolically
# Description: This new Mathcad feature allows a vectorized function or operator to be applied to a vector and the result to be evaluated symbolically.
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## NEW FEATURES
# tutorials
# Evaluating Vectorized Functions and Operators Symbolically
# In Mathcad 14, you can now apply a vectorized function or operator to a vector and evaluate the result symbolically. You vectorize a function by applying the vectorize operator. In previous versions of Mathcad, you could only evaluate vectorized functions or operators with the numerical equal sign (=). See Vectorizing an Expression for a more detailed description of the vectorize operator.
# As an example, suppose you want to apply the sine function to the elements of the following vector and evaluate the result symbolically.
v := [π/2; π/3; π/6]
# To do so:
#
# 1.  Type sin(v).
#
# 2.  Press [Ctrl] [-] to insert the vectorize operator, which is displayed as an arrow above sin(v).
vectorize(sin(v))
# The vectorize operator causes the sine function to be applied element-wise to the vector v.
# 3.  Press [Ctrl] [.] to insert the symbolic equal sign.
#
# 4.  Press [Enter].
vectorize(sin(v)) → [1; sqrt(3)/2; 1/2]
# Note: Many built-in functions are implicitly vectorized for numerical evaluation. For example, you can numerically evaluate the sine of a vector without using the vectorize operator.
sin(v) = [1; 0.866025; 0.5]
# However, if you want to apply these functions to vectors and evaluate the results symbolically, you must use the vectorize operator.
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