## Main Heading
# Type some text here.
## Section Heading
# Type some text here.
x := 1
y := 2
z := x*y^2
z =  # no stored result
# Line your equations up against the guidelines.  Try not to put more than two or three equation regions side by side, and keep everything in neat columns for best possible MathML formatting.
## H3 Subsection Heading
# This is a numbered list style.
# Just press [Enter] to get the next numbered entry and the hanging indent.
## H3 Bulleted List
# This is a bulleted list style.
# Just press [Enter] to get the next bulleted entry and the hanging indent.
## Favorite Links
